# Agricultural Tractor 37-74 kW, emmision class 1-5, 1 hour operation; diesel driven, emmission class 1-5, agricultural tractor; consumption mix, to consumer; 37-74 kW

Dataset: ILCD process, Unit process, single operation
Geography: GLO
Reference year: 2020
Valid until: 2024
Classification: Transport services / Road
LCI method principle: Attributional
Completeness: All relevant flows quantified
Share of supply or production covered: 95 %
Method details: GaBi Refinery Modelling Principles; GaBi Modelling Principles; GaBi Water Modelling Principles; GaBi Agriculture Model Documentation; GaBi Land Use Change Model Documentation; GaBi Energy Modelling Principles; Suggestions for updating the PEF method 2019; Guide for EF compliant data sets; GaBi Agrarian Modelling Principles
Project: Provision of product environmental footprint-compliant life cycle inventory datasets. Contract number N° 09.029901/2021/846457/SER/ENV.B.1
Generated by: Sphera Solutions GmbH
Owner: Sphera Solutions GmbH
Compliance: ILCD Data Network - Entry-level; Suggestions for updating the PEF method 2019; ISO 14040 Environmental Management – Life Cycle Assessment – Principles and Framework, 2006; ISO 14044:2006. Environmental Management – Life Cycle Assessment – Requirements and guidelines.; Environmental Footprint 3.1
Review: Independent internal review by Sphera Solutions GmbH, Dr. Michael Baumann, Sphera Solutions GmbH, Dr. Stefan Eckert
Data quality: Technological representativeness: Fair; Time representativeness: Good; Geographical representativeness: Fair; Completeness: Not evaluated / unknown; Precision: Good; Methodological appropriateness and consistency: Not evaluated / unknown; Overall quality: Good
Amounts: no units in this file; such an amount is in the reference unit of its flow, which a separate flow dataset defines
copyright: true
licenseType: Free of charge for some user types or use types
accessRestrictions: Datasets can only be used in accordance with the terms and conditions of this EULA exclusively until 31st December 2024 (PERMITTED USE).

## General comment
The data set covers all relevant technologies with a high overall data quality. The inventory is mainly based on literature data.

## Geography
The data set represents a global and unified applied technology.The data set can be adapted to the country / region specific situation by using the applicable data sets with the country / region specific conditions.

## Time period
annual average

## Technology and included processes
The process "universal tractor" had been set up in order to model the general exhaust-gas characteristics of the tractors used in the agricultural processes. By known (to fill in) engine power, engine speed and fuel consumption the exhaust-gas values per working time of the machine per ha can be calculated. The system boundary does not comprise the diesel provision, but the emissions from diesel burning in tractor. The tractor specific consumption and emission data (HC, NOx, CO and CO2 emissions) have been especially elaborated by FAT (Swiss Federal Research Station for Agricultural Economics and Engineering) in order to calculate ecobalances of agricultural production processes. The underlying waste gas model of FAT is based on 109 single measurements with over 162,000 data sets and a gate time of 450 hours in trial operation. The data source for the modelling of benzpyrene and dust (particles into air) is Borken et al.
According to literature data [DLG powermix] [Kraftstoffverbrauch in der Land- und Forstwirtschaft], the specific diesel consumption is set to 300 g/kWh.

## Technical purpose
Provision of a standard technical process according to the applied technology.

## Model description
The open parameters in this processes enable the user to adjust the model to their individual circumstances. The description of the parameters is given alongside the parameters in the comments section.

For mathematical model details concerning the implementation of the CCF formula see:
http://www.gabi-software.com/fileadmin/GaBi_Databases/PEF_CFF_model_description.pdf

## Parameters
- Anteil_CO2_bio: 0.05
  [-] share of biogenic C in fuel
- CO_1: 65.12; = 2.2 * power * load
  [g/h] CO emmission per hour; Stage 1
- CO_2: 65.12; = 2.2 * power * load
  [g/h] CO emmission per hour; Stage 2
- CO_3a: 65.12; = 2.2 * power * load
  [g/h] CO emmission per hour; Stage 3a
- CO_3b: 88.8; = 3 * power * load
  [g/h] CO emmission per hour; Stage 3b
- CO_4: 88.8; = 3 * power * load
  [g/h] CO emmission per hour; Stage 4
- CO_5: 88.8; = 3 * power * load
  [g/h] CO emmission per hour; Stage 5
- CO_tot: 68.6128; = CO_1 * share_1 + CO_2 * share_2 + CO_3a * share_3a + CO_3b * share_3b + CO_4 * share_4 + CO_5 * share_5
  [g/h] CO emmission per hour weighted
- CO2: 28.2384; = 3.18 * Diesel
  [kg/h] CO2 emission per hour
- CO2_biogen: 1.41192; = CO2 * (Anteil_CO2_bio)
  [kg/h] CO2 (biogenic) emission per hour
- CO2_fossil: 26.8265; = CO2 * (1 - Anteil_CO2_bio)
  [kg/h] CO2 (fossil) emission per hour
- Diesel: 8.88; = (300 * power * load) / 1000
  [kg/h] Diesel Consumption
- HC_1: 17.76; = 0.6 * power * load
  [g/h] HC emmission per hour; Stage 1
- HC_2: 11.84; = 0.4 * power * load
  [g/h] HC emmission per hour; Stage 2
- HC_3a: 11.84; = 0.4 * power * load
  [g/h] HC emmission per hour; Stage 3a
- HC_3b: 8.288; = 0.28 * power * load
  [g/h] HC emmission per hour; Stage 3b
- HC_4: 8.288; = 0.28 * power * load
  [g/h] HC emmission per hour; Stage 4
- HC_5: 8.288; = 0.28 * power * load
  [g/h] HC emmission per hour; Stage 5
- HC_tot: 12.5386; = HC_1 * share_1 + HC_2 * share_2 + HC_3a * share_3a + HC_3b * share_3b + HC_4 * share_4 + HC_5 * share_5
  [g/h] HC emmission per hour weighted
- hours: 10000
  [h] Operating hours over tractor's lifetime [range 5000 -10000 h]
- load: 0.4
  [-] load factor default = 0,3
- N2O_tot: 1.036; = 0.035 * power * load
  [g/h] N2O emmission per hour
- NH3_tot: 0.0592; = 0.002 * power * load
  [g/h] NH3 emmission per hour
- NOx_1: 227.92; = 7.7 * power * load
  [g/h] NOx emission per hour; Stage 1
- NOx_2: 162.8; = 5.5 * power * load
  [g/h] NOx emission per hour; Stage 2
- NOx_3a: 112.48; = 3.8 * power * load
  [g/h] NOx emission per hour; Stage 3a
- NOx_3b: 150.96; = 5.1 * power * load
  [g/h] NOx emission per hour; Stage 3b
- NOx_4: 119.88; = 4.05 * power * load
  [g/h] NOx emission per hour; Stage 4
- NOx_5: 62.16; = 2.1 * power * load
  [g/h] NOx emission per hour; Stage 5
- NOx_tot: 166.456; = NOx_1 * share_1 + NOx_2 * share_2 + NOx_3a * share_3a + NOx_3b * share_3b + NOx_4 * share_4 + NOx_5 * share_5
  [g/h] NOx emission per hour weigted
- PM_1: 10.36; = 0.35 * power * load
  [g/h] PM emmission per hour; Stage 1
- PM_2: 6.512; = 0.22 * power * load
  [g/h] PM emmission per hour; Stage 2
- PM_3a: 6.512; = 0.22 * power * load
  [g/h] PM emmission per hour; Stage 3a
- PM_3b: 0.74; = 0.025 * power * load
  [g/h] PM emmission per hour; Stage 3b
- PM_4: 0.74; = 0.025 * power * load
  [g/h] PM emmission per hour; Stage 4
- PM_5: 0.444; = 0.015 * power * load
  [g/h] PM emmission per hour; Stage 5
- PM_tot: 6.5268; = PM_1 * share_1 + PM_2 * share_2 + PM_3a * share_3a + PM_3b * share_3b + PM_4 * share_4 + PM_5 * share_5
  [g/h] PM emmission per hour weighted
- Power: 74
  Typical power range 37kW to 74kW
- share_1: 0.17
  [-] share of stage 1 vehicles
- share_2: 0.67
  [-] share of stage 2 vehicles
- share_3a: 0.05
  [-] share of stage 3a vehicles
- share_3b: 0.03
  [-] share of stage 3b vehicles
- share_4: 0.05
  [-] share of stage 4 vehicles
- share_5: 0.04
  [-] share of stage 5 vehicles
- tractor: 0.0001; = 1 / hours
  [pcs/h] pieces of tractor allocated per hour

## Reference product
- Agricultural implement: 1; calculated

## Inputs
- Diesel: 8.88; = Diesel; estimated
- Truck (tractor & trailer): 0.0001; = tractor; estimated
- Agricultural implement: 1; calculated

## Outputs
All rows: estimated
- ammonia [Emissions to air, unspecified]: 5.92e-5; = 0.001 * NH3_tot
- carbon dioxide (biogenic) [Emissions to air, unspecified]: 1.41192; = CO2_biogen
- nitrous oxide [Emissions to air, unspecified]: 0.001036; = 0.001 * N2O_tot
- particles (PM2.5) [Emissions to air, unspecified]: 0.0065268; = 0.001 * PM_tot
- non-methane volatile organic compounds [Emissions to air, unspecified]: 0.0125386; = 0.001 * HC_tot
- carbon monoxide [Emissions to air, unspecified]: 0.0686128; = 0.001 * CO_tot
- carbon dioxide (fossil) [Emissions to air, unspecified]: 26.8265; = CO2_fossil
- nitrogen oxides [Emissions to air, unspecified]: 0.166456; = 0.001 * NOx_tot

## Impact indicators
- Acidification: 0.123356
- Climate change: 27.1093
- Ecotoxicity, freshwater: 0.117442
- Eutrophication marine: 0.0647567
- Eutrophication, terrestrial: 0.709898
- Human toxicity, non-cancer: 7.97131e-10
- EF-particulate Matter: 1.82419e-6
- Photochemical ozone formation - human health: 0.182123
- Climate change-Fossil: 27.2429
- Ecotoxicity, freshwater_inorganics: 0.0095243
- Ecotoxicity, freshwater_organics: 0.107918
- Human toxicity, non-cancer_inorganics: 7.40683e-8
- Human toxicity, non-cancer_organics: 7.96346e-10
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
## Modelling constants
Direct land use change: GHG emissions from direct LUC allocated to good/service for 20 years after the LUC occurs.
Carbon storage and delayed emissions: credits associated with temporary (carbon) storage or delayed emissions are not considered in the calculation of the EF for the default impact categories.
Emissions off-setting: not included
Fossil and biogenic carbon emissions and removals: removals and emissions are modelled as follows: All GHG emissions from fossil fuels (including peat and limestone) are modelled consistently with the ILCD list of elementary flows. In the case that the emissions refer to the molecules CO2 and CH4, they are modelled as ‘carbon dioxide (fossil)’ and ‘methane (fossil)’. Biogenic uptake and emissions are modelled separately. For land use change, all carbon emissions and uptakes are inventoried separately for each of the elementary flows. Soil carbon accumulation (uptake) via improved agricultural management is excluded from the model.

## Cut-off and completeness
A cut-off rule based on mass or energy flow or the level of environmental significance of max. 3% is applied and confirmed by the reviewer. An active cut-off within the system has not been applied, no data gaps are known and all elementary flows of environmental effect are included in the inventory.

Capital goods (including infrastructures) and their end of life are included unless the exclusion is clearly documented and conform with the cut-off principles.

System boundaries include all known processes linked to the product supply chain.

## Data selection and combination
LCI modeling is fully consistent.
Energy and transport datasets from the PEF energy and transports tender are consistently used.

## Data treatment and extrapolations
For details please see the document "GaBi Databases Modelling Principles"

## Use advice
Notice: this data set supersedes the EF3.0-compliant version (see link under "preceding data set version" below calculated with the EF3.0). The life cycle inventory is not changed from the original EF3.0 data set. The LCIA results are calculated based on the EF3.1 methods which provide updated characterisation factors in the following impact categories: Climate Change, Ecotoxicity freshwater, Photochemical Ozone Formation, Acidification, Human Toxicity non-cancer, and Human Toxicity cancer. The review report and the data quality ratings refer to the original results. The data set has been updated by the European Commission on the basis of the original EF3.0 data set delivered by the data provider.

Life Cycle Inventory (LCI) datasets to be used for implementing regular Product Environmental Footprint (PEF) studies and Organisation Environmental Footprint (OEF) studies exclusively under the specified Product groups and sectors as defined in the Product Environmental Footprint Category Rules (PEFCR) and Organisation Environmental Footprint Sectorial Rules (OEFSR) listed in https://ec.europa.eu/environment/eussd/smgp/ef_transition.htm
The datasets are specifically designed for these methodological requirements (see above) and the related LCIA methods (listed below) recommended in EF.

## Review details
The dataset is compliant to "Zampori L., Pant R.: Suggestions for updating the Product Environmental Footprint (PEF) method, 2019 and Fazio S., Zampori L., De Schryver A. et al.: Guide for EF compliant data sets, Version 2.0, 2020.
In the PEF context the fields "Methodological appropriateness and consistency" and "completeness" are not evaluated by the review since their good quality is defined as mandatory.

## Other review details
Good overall quality (2,50) interpreted into "good quality" in the PEF quality validation scheme. The quality indicator for completeness was not requested to be quantified as a single DQI for all tenders. If a value “Not evaluated / unknown” completeness is given, this indicates that a single DQI was not explicitly requested but the completeness is still to be understood as very good.
The Data Quality Indicator Results are conservative expert judgements, confirmed or - if necessary - corrected by the reviewers, based on their methodological as well as process understanding and considering semi-quantitatively the contribution of the DQIs of the used EF energy and transport datasets and of EF-related DQIs provided and reviewed within the GaBi databases. The overall DQIs of the datasets take into account primarily the quality and representativeness of the foreground technology information and that of the key upstream processes. If datasets are e.g. energy and transport intensive - or gain credits from energy recovery - the DQIs of the used EF energy and transport datasets influence the overall DQI significantly and have stronger been taken into account, via expert judgement. Analogous applies for other key background datasets. For the DQIs of the mentioned GaBi secondary datasets, similar DQIs had already been assigned to those datasets and were considered by the reviewers via expert judgement when assigning of the overall DQIs. In case of doubt, lower (i.e. lower quality) DQIs were assigned.

## Data sources
- Basisdaten für ökologische Bilanzierungen, 1999
- DLG Powermix, DLG Testzentrum Technik und Betriebsmittel, onlinen 2020
- Kraftstoffverbrauch in der Land- und Forstwirtschaft

## Intended applications
Life Cycle Inventory (LCI) datasets to be used in Product Environmental Footprint Category Rules (PEFCRs) and Organisation Environmental Footprint Sectoral Rules (OEFSRs) developed in the context of the Environmental Footprint transition phase launched by the Commission in 2018.
