# Well boat, 116m, 1178 t fish capacity; solid fishing vessel assembly; production mix, at plant; ocean going, 116 m, 1178 t carrying fish capacity

Dataset: ILCD process, Unit process, single operation
Geography: EU+EFTA+UK
Reference year: 2016
Valid until: 2024
Classification: Systems / Vehicles
LCI method principle: Attributional
LCI method approaches: Allocation - market value; Allocation - net calorific value; Allocation - exergetic content; Allocation - mass; Not applicable
Completeness: All relevant flows quantified
Share of supply or production covered: 95 %
Method details: GaBi Modelling Principles; GaBi Water Modelling Principles; GaBi Agriculture Model Documentation; GaBi Energy Modelling Principles; GaBi Refinery Modelling Principles; GaBi Land Use Change Model Documentation; Suggestions for updating the PEF method 2019; Guide for EF compliant data sets; GaBi Agrarian Modelling Principles
Project: Provision of product environmental footprint-compliant life cycle inventory datasets. Contract number N° 09.029901/2021/846457/SER/ENV.B.1
Generated by: Sphera Solutions GmbH
Owner: Sphera Solutions GmbH
Compliance: ILCD Data Network - Entry-level; Suggestions for updating the PEF method 2019; ISO 14040 Environmental Management – Life Cycle Assessment – Principles and Framework, 2006; ISO 14044:2006. Environmental Management – Life Cycle Assessment – Requirements and guidelines.; Environmental Footprint 3.1
Review: Independent internal review by Sphera Solutions GmbH, Dr. Michael Baumann, Sphera Solutions GmbH, Dr. Stefan Eckert
Data quality: Technological representativeness: Fair; Time representativeness: Good; Geographical representativeness: Fair; Completeness: Not evaluated / unknown; Precision: Good; Methodological appropriateness and consistency: Not evaluated / unknown; Overall quality: Good
Amounts: no units in this file; such an amount is in the reference unit of its flow, which a separate flow dataset defines
copyright: true
licenseType: Free of charge for some user types or use types
accessRestrictions: Datasets can only be used in accordance with the terms and conditions of this EULA exclusively until 31st December 2024 (PERMITTED USE).

## General comment
The data set covers all relevant process steps / technologies over the supply chain of the represented gate to gate inventory with a good overall data quality. The inventory is mainly based on industry data and is completed, where necessary, by secondary data. This data set is based on primary data from internationally adopted production processes, connected with regional precursor chains.

## Geography
The data set represents the country specific situation in Europe, focusing on the main technologies, the region specific characteristics and / or import statistics.

## Time period
annual average

## Technology and included processes
The dataset describes the production of a wellboat made of steel with a defined size and a defined carrying fish capacity. The typical material composition of a ship is accounted, with hull made of steel. The dataset also includes the consumption of energy for welding and ship assembly.

Background system:
Electricity: Electricity is modelled according to the individual country-specific situations. The country-specific modelling is achieved on multiple levels. Firstly, individual energy carrier specific power plants and plants for renewable energy sources are modelled according to the current national electricity grid mix. Modelling the electricity consumption mix includes transmission / distribution losses and the own use by energy producers (own consumption of power plants and "other" own consumption e.g. due to pumped storage hydro power etc.), as well as imported electricity. Secondly, the national emission and efficiency standards of the power plants are modelled as well as the share of electricity plants and combined heat and power plants (CHP). Thirdly, the country-specific energy carrier supply (share of imports and / or domestic supply) including the country-specific energy carrier properties (e.g. element and energy content) are accounted for. Fourthly, the exploration, mining/production, processing and transport processes of the energy carrier supply chains are modelled according to the specific situation of each electricity producing country. The different production and processing techniques (emissions and efficiencies) in the different energy producing countries are considered, e.g. different crude oil production technologies or different flaring rates at the oil platforms.
Thermal energy, process steam: The thermal energy and process steam supply is modelled according to the individual country-specific situation with regard to emission standards and considered energy carriers. The thermal energy and process steam are produced at heat plants. Efficiencies for thermal energy production are by definition 100% in relation to the corresponding energy carrier input. For process steam the efficiency ranges from 85%, 90% to 95%. The energy carriers used for the generation of thermal energy and process steam are modelled according to the specific import situation (see electricity above).
Transports: All relevant and known transport processes are included. Ocean-going and inland ship transport as well as rail, truck and pipeline transport of bulk commodities are considered.
Energy carriers: The energy carriers are modelled according to the specific supply situation (see electricity above).
Refinery products: Diesel fuel, gasoline, technical gases, fuel oils, lubricants and residues such as bitumen are modelled with a parameterised country-specific refinery model. The refinery model represents the current national standard in refining techniques (e.g. emission level, internal energy consumption, etc.) as well as the individual country-specific product output spectrum, which can be quite different from country to country. The supply of crude oil is modelled, again, according to the country-specific situation with the respective properties of the resources.

## Technical purpose
Assembly of fishing vessel.

## Model description
The open parameters in this processes enable the user to adjust the model to their individual circumstances. The description of the parameters is given alongside the parameters in the comments section.

For mathematical model details concerning the implementation of the CCF formula see:
http://www.gabi-software.com/fileadmin/GaBi_Databases/PEF_CFF_model_description.pdf

## Parameters
- LPG_weld: 45301.7
  [kg] LPG consumption for welding, default 4.53E04, possible deviation +/-20%
- Transport_ship: 270
  [km] Transport by ship
- Transport_train: 240
  [km] Transport by train
- Transport_truck: 130
  [km] Transport by truck

## Reference product
- Wellboat, 116 m (production): 1; calculated

## Inputs
- Electricity: 1.57594e6; estimated
  Source: Energy Consumption and Conservation in Shipbuilding
- Plywood board (5% moisture): 45600; estimated
  board for joinery
- Polyethylene terephthalate compound (PET): 18240; estimated
  plexi parts (e.g. windows)
- Liquefied petroleum gas (LPG; 70% propane; 30% butane): 45301.7; estimated
  energy for welding, source: Energy Consumption and Conservation in Shipbuilding
- Transport by truck: 5.928e8; estimated
- Polyethylene high density granulate (HDPE/PE-HD): 63597.8
- Lubricating oil: 4484.84; estimated
- Transport by ship: 1.2312e9; estimated
- Container glass: 45600; estimated
  Glass for windows
- Steel tinplated steel: 4.18608e6
- Diesel Europe: 41115.2; estimated
- Polyvinyl chloride granulate (S-PVC): 1211.05; estimated
  PVC for cables
- Concrete C20-25: 68400; estimated
- Nylon 6 granulate (PA 6): 63597.8
- Transport by train: 1.0944e9; estimated
- Auxiliary flow upstream elementary flows (pieces): 1
- Auxiliary flow foreground elementary flows (pieces): 1

## Outputs
- Steel scrap: 82080; estimated
  2% of steel input

## Deviations from the LCI method approaches
Foreground system: For the foreground system, no allocation was applied.
Background system: For the combined heat and power production, allocation by exergetic content is applied. For the electricity generation and by-products, e.g. gypsum, allocation by market value is applied due to no common physical properties. Within the refinery allocation by net calorific value and mass is used. For the combined crude oil, natural gas and natural gas liquids production allocation by net calorific value is applied.
For details please see the document "GaBi Databases Modelling Principles"

## Modelling constants
Direct land use change: GHG emissions from direct LUC allocated to good/service for 20 years after the LUC occurs.
Carbon storage and delayed emissions: credits associated with temporary (carbon) storage or delayed emissions are not considered in the calculation of the EF for the default impact categories.
Emissions off-setting: not included
Fossil and biogenic carbon emissions and removals: removals and emissions are modelled as follows: All GHG emissions from fossil fuels (including peat and limestone) are modelled consistently with the ILCD list of elementary flows. In the case that the emissions refer to the molecules CO2 and CH4, they are modelled as ‘carbon dioxide (fossil)’ and ‘methane (fossil)’. Biogenic uptake and emissions are modelled separately. For land use change, all carbon emissions and uptakes are inventoried separately for each of the elementary flows. Soil carbon accumulation (uptake) via improved agricultural management is excluded from the model.

## Cut-off and completeness
A cut-off rule based on mass or energy flow or the level of environmental significance of max. 3% is applied and confirmed by the reviewer. An active cut-off within the system has not been applied, no data gaps are known and all elementary flows of environmental effect are included in the inventory.

Capital goods (including infrastructures) and their end of life are included unless the exclusion is clearly documented and conform with the cut-off principles.

System boundaries include all known processes linked to the product supply chain.

## Data selection and combination
LCI modeling is fully consistent.
Energy and transport datasets from the PEF energy and transports tender are consistently used.

## Use advice
Notice: this data set supersedes the EF3.0-compliant version (see link under "preceding data set version" below calculated with the EF3.0). The life cycle inventory is not changed from the original EF3.0 data set. The LCIA results are calculated based on the EF3.1 methods which provide updated characterisation factors in the following impact categories: Climate Change, Ecotoxicity freshwater, Photochemical Ozone Formation, Acidification, Human Toxicity non-cancer, and Human Toxicity cancer. The review report and the data quality ratings refer to the original results. The data set has been updated by the European Commission on the basis of the original EF3.0 data set delivered by the data provider.

Life Cycle Inventory (LCI) datasets to be used for implementing regular Product Environmental Footprint (PEF) studies and Organisation Environmental Footprint (OEF) studies exclusively under the specified Product groups and sectors as defined in the Product Environmental Footprint Category Rules (PEFCR) and Organisation Environmental Footprint Sectorial Rules (OEFSR) listed in https://ec.europa.eu/environment/eussd/smgp/ef_transition.htm
The datasets are specifically designed for these methodological requirements (see above) and the related LCIA methods (listed below) recommended in EF.

## Review details
The dataset is compliant to "Zampori L., Pant R.: Suggestions for updating the Product Environmental Footprint (PEF) method, 2019 and Fazio S., Zampori L., De Schryver A. et al.: Guide for EF compliant data sets, Version 2.0, 2020.
In the PEF context the fields "Methodological appropriateness and consistency" and "completeness" are not evaluated by the review since their good quality is defined as mandatory.

## Other review details
Good overall quality (2,50) interpreted into "good quality" in the PEF quality validation scheme. The quality indicator for completeness was not requested to be quantified as a single DQI for all tenders. If a value “Not evaluated / unknown” completeness is given, this indicates that a single DQI was not explicitly requested but the completeness is still to be understood as very good.
The Data Quality Indicator Results are conservative expert judgements, confirmed or - if necessary - corrected by the reviewers, based on their methodological as well as process understanding and considering semi-quantitatively the contribution of the DQIs of the used EF energy and transport datasets and of EF-related DQIs provided and reviewed within the GaBi databases. The overall DQIs of the datasets take into account primarily the quality and representativeness of the foreground technology information and that of the key upstream processes. If datasets are e.g. energy and transport intensive - or gain credits from energy recovery - the DQIs of the used EF energy and transport datasets influence the overall DQI significantly and have stronger been taken into account, via expert judgement. Analogous applies for other key background datasets. For the DQIs of the mentioned GaBi secondary datasets, similar DQIs had already been assigned to those datasets and were considered by the reviewers via expert judgement when assigning of the overall DQIs. In case of doubt, lower (i.e. lower quality) DQIs were assigned.

## Data sources
- GaBi databases
- Oil Tanker Phase Out and the Ship Scrapping Industry
- FAO Definition and classification of fishery vessel types, online 2022
- Ocean farm services: different wellboats and service boats, 2020-2022
- Fishfarmingexpert: World`s largest wellboat, online 2022
- Salt Ship Design, Saltship aquaculture vessels, online 2022
- Energy Consumption and Conservation in Shipbuilding , online 2022

## Intended applications
Life Cycle Inventory (LCI) datasets to be used in Product Environmental Footprint Category Rules (PEFCRs) and Organisation Environmental Footprint Sectoral Rules (OEFSRs) developed in the context of the Environmental Footprint transition phase launched by the Commission in 2018.
