# Container ship, transoceanic, transport of frozen food products; heavy fuel oil driven, cargo; consumption mix, to consumer; average, ocean going

Dataset: ILCD process, Unit process, single operation
Geography: EU+EFTA+UK
Reference year: 2020
Valid until: 2024
Classification: Materials production / Water
LCI method principle: Attributional
LCI method approaches: Allocation - market value; Allocation - net calorific value; Allocation - exergetic content; Allocation - mass; Not applicable
Completeness: All relevant flows quantified
Share of supply or production covered: 95 %
Method details: GaBi Modelling Principles; GaBi Water Modelling Principles; GaBi Agriculture Model Documentation; GaBi Energy Modelling Principles; GaBi Refinery Modelling Principles; GaBi Land Use Change Model Documentation; Suggestions for updating the PEF method 2019; Guide for EF compliant data sets; GaBi Agrarian Modelling Principles
Project: Provision of product environmental footprint-compliant life cycle inventory datasets. Contract number N° 09.029901/2021/846457/SER/ENV.B.1
Generated by: Sphera Solutions GmbH
Owner: Sphera Solutions GmbH
Compliance: ILCD Data Network - Entry-level; Suggestions for updating the PEF method 2019; ISO 14040 Environmental Management – Life Cycle Assessment – Principles and Framework, 2006; ISO 14044:2006. Environmental Management – Life Cycle Assessment – Requirements and guidelines.; Environmental Footprint 3.1
Review: Independent internal review by Sphera Solutions GmbH, Dr. Michael Baumann, Sphera Solutions GmbH, Dr. Stefan Eckert
Data quality: Technological representativeness: Fair; Time representativeness: Good; Geographical representativeness: Good; Completeness: Not evaluated / unknown; Precision: Good; Methodological appropriateness and consistency: Not evaluated / unknown; Overall quality: Good
Amounts: no units in this file; such an amount is in the reference unit of its flow, which a separate flow dataset defines
copyright: true
licenseType: Free of charge for some user types or use types
accessRestrictions: Datasets can only be used in accordance with the terms and conditions of this EULA exclusively until 31st December 2024 (PERMITTED USE).

## General comment
Source: International Maritime Organization - Third IMO GHG Study 2014 - Executive Summary and Final Report. 2015

## Geography
represents a global and unified applied technology

## Time period
annual average

## Technology and included processes
This dataset describes a ship transporting frozen products. Additional inventories due to cooling (energy, exhaust emissions and coolant leakage) are accounted.
Container ship ocean with parameterized dead weight tons (dwt) payload capacity. Variable parameters (with default setting) are: distance (100km). Inputs: heavy fuel oil, maritime infrastructure and ship production. Outputs: cargo and combustion emissions (carbon dioxide, carbon monoxide, methane, nitrogen oxides, NMVOC, particulate PM 2.5, sulphur dioxide).

## Technical purpose
Sea transport of goods in standard container vessels. Global average container vessel size of 43,000 DWT as default parameter to be used for general seaborn transportation unless the specific ship or the specific ship fleet is known for the transport.

## Model description
The open parameters in this processes enable the user to adjust the model to their individual circumstances. The description of the parameters is given alongside the parameters in the comments section.

For mathematical model details concerning the implementation of the CCF formula see:
http://www.gabi-software.com/fileadmin/GaBi_Databases/PEF_CFF_model_description.pdf

## Parameters
- Cap_utilisation: 0.7; max 1
  [-] Average capacity utilisation (default container ship 0,7)
- CO2_tot: 7.17647e-6; = 3.114 * spec_consumpt
  [kgCO2/kg Cargo]
- Distance: 1; = 1
  [km] Distance seaborne transport start - destination (default=100km)
- DWT: 43000; min 5000; max 200000
  [t] Dead-Weight-Tons (default=43.000)
- Fuel_Consumpt: 99.097; = (-5E-9*DWT^2+0.0016*DWT+9.8129)/Cap_utilisation*Distance
  [kg] Heavy fuel oil (HFO) in total
- S_content_fuel: 2.5; = 2.5
  [wt%] Sulphur content of fuel burnt in vessel engine (default=2,5 wt%)
- Spec_consumpt: 2.30458e-6; = Fuel_Consumpt / (DWT * 1000)
  [kgHFO/kg cargo]
- Spec_SO2_Em: 1.15229e-7; = 2 * S_content_fuel / 100 * Fuel_Consumpt / (DWT * 1000)
  [kgSO2/kg cargo]

## Reference product
- Transporting capacity: 1000; estimated

## Inputs
- Maritime infrastructure: 9.8e-7; calculated
  5500ha, 150E6 t loaded (without unloading), 75 years, 5000 km distance
- Cargo ship (piece): 4.4e-12; calculated
  150.000 DWt, 50%loaded, 30a, 100.000km/a
- Heavy fuel oil (1.0 wt.% S): 0.00460916; = 2000 * Spec_consumpt; calculated

## Outputs
- methane (fossil) [Emissions to air, unspecified]: 2.7655e-7; = 0.12 * Spec_consumpt; estimated
- nitrous oxide [Emissions to air, unspecified]: 6.91374e-7; = 0.3 * Spec_consumpt; estimated
- sulfur dioxide [Emissions to air, unspecified]: 0.000230458; = 2000 * Spec_SO2_Em; estimated
- particles (PM2.5) [Emissions to air, unspecified]: 3.35547e-5; = 14.56 * Spec_consumpt; estimated
- HFC-125 [Emissions to air, unspecified]: 2.44e-7; calculated
- 1,1,1-trifluoroethane [Emissions to air, unspecified]: 2.89e-7; calculated
- non-methane volatile organic compounds [Emissions to air, unspecified]: 1.41962e-5; = 6.16 * Spec_consumpt; estimated
- carbon monoxide [Emissions to air, unspecified]: 1.27674e-5; = 5.54 * Spec_consumpt; estimated
- carbon dioxide (fossil) [Emissions to air, unspecified]: 0.0143529; = 2000 * CO2_tot; estimated
- nitrogen oxides [Emissions to air, unspecified]: 0.000416207; = 180.6 * Spec_consumpt; estimated
- HFC-134a [Emissions to air, unspecified]: 2.22e-8; calculated

## Impact indicators
- Acidification: 0.000609894
- Climate change: 0.0171755
- Ecotoxicity, freshwater: 0.000122654
- Eutrophication marine: 0.000161905
- Eutrophication, terrestrial: 0.00177304
- Human toxicity, cancer: 2.60362e-16
- Human toxicity, non-cancer: 9.07666e-13
- EF-particulate Matter: 1.05123e-8
- Photochemical ozone formation - human health: 0.000449679
- Climate change-Fossil: 0.0171163
- Ecotoxicity, freshwater_inorganics: 2.91518e-7
- Ecotoxicity, freshwater_organics: 0.000122362
- Human toxicity, cancer_organics: 2.60362e-16
- Human toxicity, non-cancer_inorganics: 1.37824e-11
- Human toxicity, non-cancer_organics: 9.07666e-13
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
## Deviations from the LCI method approaches
Foreground system: no allocation is applied.

Background system: Within the refinery allocation by net calorific value and mass is used. For the combined crude oil, natural gas and natural gas liquids production allocation by net calorific value is applied.

## Modelling constants
Direct land use change: GHG emissions from direct LUC allocated to good/service for 20 years after the LUC occurs.
Carbon storage and delayed emissions: credits associated with temporary (carbon) storage or delayed emissions are not considered in the calculation of the EF for the default impact categories.
Emissions off-setting: not included
Fossil and biogenic carbon emissions and removals: removals and emissions are modelled as follows: All GHG emissions from fossil fuels (including peat and limestone) are modelled consistently with the ILCD list of elementary flows. In the case that the emissions refer to the molecules CO2 and CH4, they are modelled as ‘carbon dioxide (fossil)’ and ‘methane (fossil)’. Biogenic uptake and emissions are modelled separately. For land use change, all carbon emissions and uptakes are inventoried separately for each of the elementary flows. Soil carbon accumulation (uptake) via improved agricultural management is excluded from the model.

## Cut-off and completeness
A cut-off rule based on mass or energy flow or the level of environmental significance of max. 3% is applied and confirmed by the reviewer. An active cut-off within the system has not been applied, no data gaps are known and all elementary flows of environmental effect are included in the inventory.

Capital goods (including infrastructures) and their end of life are included unless the exclusion is clearly documented and conform with the cut-off principles.

System boundaries include all known processes linked to the product supply chain.

## Data selection and combination
LCI modeling is fully consistent.
Energy and transport datasets from the PEF energy and transports tender are consistently used.

## Data treatment and extrapolations
For details please see the document "GaBi Databases Modelling Principles"

## Use advice
Notice: this data set supersedes the EF3.0-compliant version (see link under "preceding data set version" below calculated with the EF3.0). The life cycle inventory is not changed from the original EF3.0 data set. The LCIA results are calculated based on the EF3.1 methods which provide updated characterisation factors in the following impact categories: Climate Change, Ecotoxicity freshwater, Photochemical Ozone Formation, Acidification, Human Toxicity non-cancer, and Human Toxicity cancer. The review report and the data quality ratings refer to the original results. The data set has been updated by the European Commission on the basis of the original EF3.0 data set delivered by the data provider.

Life Cycle Inventory (LCI) datasets to be used for implementing regular Product Environmental Footprint (PEF) studies and Organisation Environmental Footprint (OEF) studies exclusively under the specified Product groups and sectors as defined in the Product Environmental Footprint Category Rules (PEFCR) and Organisation Environmental Footprint Sectorial Rules (OEFSR) listed in https://ec.europa.eu/environment/eussd/smgp/ef_transition.htm
The datasets are specifically designed for these methodological requirements (see above) and the related LCIA methods (listed below) recommended in EF.

## Review details
The dataset is compliant to "Zampori L., Pant R.: Suggestions for updating the Product Environmental Footprint (PEF) method, 2019 and Fazio S., Zampori L., De Schryver A. et al.: Guide for EF compliant data sets, Version 2.0, 2020.
In the PEF context the fields "Methodological appropriateness and consistency" and "completeness" are not evaluated by the review since their good quality is defined as mandatory.

## Other review details
Good overall quality (2,25) interpreted into "good quality" in the PEF quality validation scheme. The quality indicator for completeness was not requested to be quantified as a single DQI for all tenders. If a value “Not evaluated / unknown” completeness is given, this indicates that a single DQI was not explicitly requested but the completeness is still to be understood as very good.
The Data Quality Indicator Results are conservative expert judgements, confirmed or - if necessary - corrected by the reviewers, based on their methodological as well as process understanding and considering semi-quantitatively the contribution of the DQIs of the used EF energy and transport datasets and of EF-related DQIs provided and reviewed within the GaBi databases. The overall DQIs of the datasets take into account primarily the quality and representativeness of the foreground technology information and that of the key upstream processes. If datasets are e.g. energy and transport intensive - or gain credits from energy recovery - the DQIs of the used EF energy and transport datasets influence the overall DQI significantly and have stronger been taken into account, via expert judgement. Analogous applies for other key background datasets. For the DQIs of the mentioned GaBi secondary datasets, similar DQIs had already been assigned to those datasets and were considered by the reviewers via expert judgement when assigning of the overall DQIs. In case of doubt, lower (i.e. lower quality) DQIs were assigned.

## Data sources
- GaBi databases
- IMO GHG Study 2014
- Simulationsbasierte Energiebedarfsprognose in Seehafen Container-Terminals, 2016, online 2020
- Container Handbuch: Refrigerated containers and CA technology, online 2022

## Intended applications
Life Cycle Inventory (LCI) datasets to be used in Product Environmental Footprint Category Rules (PEFCRs) and Organisation Environmental Footprint Sectoral Rules (OEFSRs) developed in the context of the Environmental Footprint transition phase launched by the Commission in 2018.
