# Van hybrid, Euro 6, 3.5t; diesel/electric driven, Euro 6, LCV; consumption mix, to consumer; engine size 1.4-2l

Dataset: ILCD process, Unit process, single operation
Geography: GLO
Reference year: 2020
Valid until: 2024
Classification: Transport services / Road
LCI method principle: Attributional
Completeness: All relevant flows quantified
Share of supply or production covered: 95 %
Method details: GaBi Refinery Modelling Principles; GaBi Modelling Principles; GaBi Water Modelling Principles; GaBi Agriculture Model Documentation; GaBi Land Use Change Model Documentation; GaBi Energy Modelling Principles; Suggestions for updating the PEF method 2019; Guide for EF compliant data sets; GaBi Agrarian Modelling Principles
Project: Provision of product environmental footprint-compliant life cycle inventory datasets. Contract number N° 09.029901/2021/846457/SER/ENV.B.1
Generated by: Sphera Solutions GmbH
Owner: Sphera Solutions GmbH
Compliance: ILCD Data Network - Entry-level; Suggestions for updating the PEF method 2019; ISO 14040 Environmental Management – Life Cycle Assessment – Principles and Framework, 2006; ISO 14044:2006. Environmental Management – Life Cycle Assessment – Requirements and guidelines.; Environmental Footprint 3.1
Review: Independent internal review by Sphera Solutions GmbH, Dr. Michael Baumann, Sphera Solutions GmbH, Dr. Stefan Eckert
Data quality: Technological representativeness: Good; Time representativeness: Good; Geographical representativeness: Good; Completeness: Not evaluated / unknown; Precision: Good; Methodological appropriateness and consistency: Not evaluated / unknown; Overall quality: Good
Amounts: no units in this file; such an amount is in the reference unit of its flow, which a separate flow dataset defines
copyright: true
licenseType: Free of charge for some user types or use types
accessRestrictions: Datasets can only be used in accordance with the terms and conditions of this EULA exclusively until 31st December 2024 (PERMITTED USE).

## General comment
The data set represents the applied technology with a good overall data quality. The inventory is based on industry and literature data.
- average emission values for Euro 6
- source emissions/driving share: HBEFA 4.1, status Oktober 2019
- input parameter: driving performance [km], sulphur content diesel [ppm], driving share motorway/rural/urban, share of biogenic C in fuel [-]
- average sulphur content: default for EU = 10 ppm

- Source of non-exhaust PM emissions: HBEFA 4.1. Remark: “Please note that the differentiation by traffic situation is uncertain and that the output emission factors are only valid for Central Europe (DE, AT, CH, FR) but not for Northern Europe (NO, SE). Treat any results with caution”

## Geography
The data set is representative for the mentioned region.

## Time period
annual average

## Technology and included processes
Passenger car with variable parameters: sulphur content of fuel, driving share urban/interurban/motorway and total mileage over lifetime. Inputs: fuel, electricity, vehicle (production), road. Outputs: driving distance, combustion emissions (ammonia, benzene, carbon dioxide, carbon monoxide, methane, nitrogen oxides, nitrous oxide, NMVOC, particulate PM 2.5, sulphur dioxide), vehicle (end-of-life).
For more information please refer to: https://scn.spherasolutions.com/client/downloads.aspx?product=GaBi&productID=47

## Technical purpose
Provision of a standard transport service according to the applied technology.

## Model description
The open parameters in this processes enable the user to adjust the model to their individual circumstances. The description of the parameters is given alongside the parameters in the comments section.

For mathematical model details concerning the implementation of the CCF formula see:
http://www.gabi-software.com/fileadmin/GaBi_Databases/PEF_CFF_model_description.pdf

## Parameters
- driving_perform: 150000
  [km] Life-time mileage of vehicle
- driving_share: 6.66667e-6; = 1 / (driving_perform)
  [1/km] Reciprocal of mileage
- ppm_sulfur: 10; max 2000
  [ppm] sulphur content in petrol, default Europe = 10 ppm
- road: 6.33379e-6; = ((share_el*spec_elec_tot/43.1)+(1-share_el)*spec_diesel_tot)/(53800000000)*(690000/50)*1000
  [m] meters of average street allocated to the vehicle km (average of diesel, petrol, CNG)
- service_life: 150000
  [km] service life of the car (default 150000km)
- share_check: 1; = share_mw + share_ru + share_ur
  Result must be 1!
- share_CO2_bio: 0.05; max 1
  [-] share of biogenic C in fuel
- share_el: 0.3
  [-] Percentage driving electric [0-1]
- share_mw: 0.3; max 1
  [-] Percentage on motorway, Standard = 0,3
- share_ru: 0.39; max 1
  [-] Percentage outside of town, Standard = 0,39
- share_ur: 0.31; max 1
  [-] Percentage within town, Standard = 0,31
- spec_benzene_mw: 0.000136684; = (1.36684029712342E-4)
  [gBenzene/km] Benzene emissions motorway
- spec_benzene_ru: 0.00017457; = (1.74570377566852E-4)
  [gBenzene/km] Benzene emissions outside of town
- spec_benzene_to: 0.000109937; = ((share_mw * spec_benzene_mw) + (share_ru * spec_benzene_ru) + (share_ur * spec_benzene_ur)) * (1 - share_el)
  [gBenzene/km] Benzene emissions weighted
- spec_benzene_ur: 0.000154725; = (1.54725494212471E-4)
  [gBenzene/km] Benzene emissions within a town
- spec_CH4_mw: 0.015377; = (0.0153769524767995)
  [gCH4/km] CH4 emissions motorway
- spec_CH4_ru: 0.0196392; = (0.019639166072011)
  [gCH4/km] CH4 emissions outside of town
- spec_CH4_tot: 0.0123679; = ((share_mw * spec_CH4_mw) + (share_ru * spec_CH4_ru) + (share_ur * spec_CH4_ur)) * (1 - share_el)
  [gCH4/km] CH4 emissions weighted
- spec_CH4_ur: 0.0174066; = (0.0174066163599491)
  [gCH4/km] CH4 emissions within a town
- spec_CO_mw: 0.0185279; = (0.0185278542339802)
  [gCO/km] CO emissions motorway
- spec_CO_ru: 0.0209916; = (0.020991550758481)
  [gCO/km] CO emissions outside of town
- spec_CO_tot: 0.0156788; = ((share_mw * spec_CO_mw) + (share_ru * spec_CO_ru) + (share_ur * spec_CO_ur)) * (1 - share_el)
  [gCO/km] CO emissions weighted
- spec_CO_ur: 0.0279138; = (0.02791378647089)
  [gCO/km] CO emissions within a town
- spec_CO2_bio: 7.14204; = spec_CO2_tot * share_CO2_bio
  [gCO2/kg] biogenic CO2 share of CO2 emission
- spec_CO2_fos: 135.699; = spec_CO2_tot * (1 - share_CO2_bio)
  [gCO2/kg] fossil CO2 share of CO2 emission
- spec_CO2_mw: 262.126; = (262.126098632813)
  [gCO2/km] CO2 emissions motorway
- spec_CO2_ru: 189.167; = (189.166748046875)
  [gCO2/km] CO2 emissions outside of town
- spec_CO2_tot: 142.841; = ((share_mw * spec_CO2_mw) + (share_ru * spec_CO2_ru) + (share_ur * spec_CO2_ur)) * (1 - share_el)
  [gCO2/km] CO2 emissions weighted
- spec_CO2_ur: 166.598; = (166.598236083984)
  [gCO2/km] CO2 emissions within a town
- spec_diesel_mw: 0.0837553; = (83.7552947998047) / 1000
  [kgdiesel/km] diesel consumption motorway
- spec_diesel_ru: 0.0604431; = (60.4431114196777) / 1000
  [kgdiesel/km] diesel consumption outside of town
- spec_diesel_tot: 0.0319486; = ((share_mw * spec_diesel_mw) + (share_ru * spec_diesel_ru) + (share_ur * spec_diesel_ur)) * (1 - share_el) * (1 - share_el)
  [kgdiesel/km] diesel consumption weighted
- spec_diesel_ur: 0.053232; = (53.2319526672363) / 1000
  [kgdiesel/km] diesel consumption within a town
- spec_elec_mw: 1.40732; = (1.40731573104858)
  [MJ/km] electric consumption motorway
- spec_elec_ru: 1.04547; = (1.04546678066254)
  [MJ/km] electric consumption outside of town
- spec_elec_tot: 0.334533; = ((share_mw * spec_elec_mw) + (share_ru * spec_elec_ru) + (share_ur * spec_elec_ur)) * share_el
  [MJ/km] electric consumption weighted
- spec_elec_ur: 0.919944; = (0.919944286346436)
  [MJ/km] electric consumption within a town
- spec_energy_tot: 2.04573; = spec_elec_tot * share_el + spec_fuel_to_MJ * (1 - share_el)
  [MJ/km] energy consumption weighted total
- spec_fuel_mw_MJ: 3.56994; = (3.56994271278381)
  [MJ/km] diesel consumption motorway
- spec_fuel_ru_MJ: 2.5763; = (2.57629609107971)
  [MJ/km] diesel consumption outside of town
- spec_fuel_to_MJ: 2.77911; = ((share_mw * spec_fuel_mw_MJ) + (share_ru * spec_fuel_ru_MJ) + (share_ur * spec_fuel_ur_MJ))
  [MJ/km] diesel consumption weighted
- spec_fuel_ur_MJ: 2.26893; = (2.26893138885498)
  [MJ/km] diesel consumption within a town
- spec_N2O_mw: 0.00798312; = (0.00798311736434698)
  [gN2O/km] N2O emissions motorway
- spec_N2O_ru: 0.0109458; = (0.0109458472579718)
  [gN2O/km] N2O emissions outside of town
- spec_N2O_tot: 0.00788451; = ((share_mw * spec_N2O_mw) + (share_ru * spec_N2O_ru) + (share_ur * spec_N2O_ur)) * (1 - share_el)
  [gN2O/km] N2O emissions weighted
- spec_N2O_ur: 0.014838; = (0.0148379877209663)
  [gN2O/km] N2O emissions within a town
- spec_NH3_mw: 0.00798312; = (0.00798311736434698)
  [gNH3/km] NH3 emissions motorway
- spec_NH3_ru: 0.0109458; = (0.0109458472579718)
  [gNH3/km] NH3 emissions outside of town
- spec_NH3_tot: 0.00788451; = ((share_mw * spec_NH3_mw) + (share_ru * spec_NH3_ru) + (share_ur * spec_NH3_ur)) * (1 - share_el)
  [gNH3/km] NH3 emissions weighted
- spec_NH3_ur: 0.014838; = (0.0148379877209663)
  [gNH3/km] NH3 emissions within a town
- spec_NMVOC_mw: 0.00170855; = (0.00170855026226491)
  [gNMVOC/km] NMVOC emissions motorway
- spec_NMVOC_ru: 0.00218213; = (0.00218212977051735)
  [gNMVOC/km] NMVOC emissions outside of town
- spec_NMVOC_tot: 0.00137421; = ((share_mw * spec_NMVOC_mw) + (share_ru * spec_NMVOC_ru) + (share_ur * spec_NMVOC_ur)) * (1 - share_el)
  [gNMVOC/km] NMVOC emissions weighted
- spec_NMVOC_ur: 0.00193407; = (0.00193406862672418)
  [gNMVOC/km] NMVOC emissions within a town
- spec_NO_mw: 0.104447; = (0.104447197169065)
  [gNO/km] NO emissions motorway
- spec_NO_ru: 0.0540189; = (0.0540188737213612)
  [gNO/km] NO emissions outside of town
- spec_NO_tot: 0.047503; = ((share_mw * spec_NO_mw) + (share_ru * spec_NO_ru) + (share_ur * spec_NO_ur)) * (1 - share_el)
  [gNO/km] NO emissions weighted
- spec_NO_ur: 0.0498705; = (0.0498705469071865)
  [gNO/km] NO emissions within a town
- spec_NO2_mw: 0.0562408; = (0.056240800768137)
  [gNO2/km] NO2 emissions motorway
- spec_NO2_ru: 0.0290871; = (0.0290870852768421)
  [gNO2/km] NO2 emissions outside of town
- spec_NO2_tot: 0.0255785; = ((share_mw * spec_NO2_mw) + (share_ru * spec_NO2_ru) + (share_ur * spec_NO2_ur)) * (1 - share_el)
  [gNO2/km] NO2 emissions weighted
- spec_NO2_ur: 0.0268534; = (0.026853371411562)
  [gNO2/km] NO2 emissions within a town
- spec_part_mw: 0.0574481; = (0.0574480704963207)
  [gParticulate matter/km] Particulate emissions motorway
- spec_part_ru: 0.00680449; = (0.00680449046194553)
  [gParticulate matter/km] Particulate emissions outside of town
- spec_part_tot: 0.0156109; = ((share_mw * spec_Part_mw) + (share_ru * spec_Part_ru) + (share_ur * spec_Part_ur)) * (1 - share_el)
  [gParticulate matter/km] Particulate emissions weighted
- spec_part_ur: 0.00778425; = (0.0077842460013926)
  [gParticulate matter/km] Particulate emissions within a town
- spec_SO2_mw: 1.06464e-6; = (ppm_sulfur / 1000000) * 2 * spec_diesel_ur
  [kgSO2/km] SO2 emissions motorway / 2 (Molar weight SO2/Molar weight S=64g/32g)
- spec_SO2_ru: 1.20886e-6; = (ppm_sulfur / 1000000) * 2 * spec_diesel_ru
  [kgSO2/km] SO2 emissions outside of town / 2 (Molar weight SO2/Molar weight S=64g/32g)
- spec_SO2_tot: 7.8462e-7; = ((share_mw * spec_SO2_mw) + (share_ru * spec_SO2_ru) + (share_ur * spec_SO2_ur)) * (1 - share_el)
  [kgSO2/km] SO2 emissions weighted
- spec_SO2_ur: 1.06464e-6; = (ppm_sulfur / 1000000) * 2 * spec_diesel_ur
  [kgSO2/km] SO2 emissions within a town / 2 (Molar weight SO2/Molar weight S=64g/32g)

## Reference product
- Vehicle kilometers: 1000; estimated

## Inputs
- Vehicle: 6.66667e-6; = driving_share; estimated
- Diesel: 0.0319486; = spec_diesel_tot; estimated
- Road (average): 6.33379e-6; = road
- Electricity: 0.334533; = spec_elec_tot; estimated

## Outputs
- methane (fossil) [Emissions to air, unspecified]: 1.23679e-5; = 0.001 * spec_CH4_tot; estimated
- ammonia [Emissions to air, unspecified]: 7.88451e-6; = 0.001 * spec_NH3_tot; estimated
- Vehicle: 6.66667e-6; = driving_share; estimated
- carbon dioxide (biogenic) [Emissions to air, unspecified]: 0.00714204; = 0.001 * spec_CO2_bio; estimated
- nitrous oxide [Emissions to air, unspecified]: 7.88451e-6; = 0.001 * spec_N2O_tot; estimated
- sulfur dioxide [Emissions to air, unspecified]: 7.8462e-7; = spec_SO2_tot; estimated
- particles (PM2.5) [Emissions to air, unspecified]: 1.56109e-5; = 0.001 * spec_part_tot; estimated
- nitrogen monoxide [Emissions to air, unspecified]: 4.7503e-5; = 0.001 * spec_NO_tot; calculated
- benzene [Emissions to air, unspecified]: 1.09937e-7; = 0.001 * spec_benzene_to; estimated
- nitrogen dioxide [Emissions to air, unspecified]: 2.55785e-5; = 0.001 * spec_NO2_tot; estimated
- non-methane volatile organic compounds [Emissions to air, unspecified]: 1.37421e-6; = 0.001 * spec_NMVOC_tot; estimated
- carbon monoxide [Emissions to air, unspecified]: 1.56788e-5; = 0.001 * spec_CO_tot; estimated
- carbon dioxide (fossil) [Emissions to air, unspecified]: 0.135699; = 0.001 * spec_CO2_fos; estimated

## Impact indicators
- Acidification: 9.76674e-5
- Climate change: 0.13822
- Ecotoxicity, freshwater: 0.00107607
- Eutrophication marine: 3.89872e-5
- Eutrophication, terrestrial: 0.000525458
- Human toxicity, cancer: 2.86385e-14
- Human toxicity, non-cancer: 9.34024e-13
- EF-particulate Matter: 4.01194e-9
- Photochemical ozone formation - human health: 7.53997e-5
- Climate change-Fossil: 0.138528
- Ecotoxicity, freshwater_inorganics: 0.00106019
- Ecotoxicity, freshwater_organics: 1.58733e-5
- Human toxicity, cancer_organics: 2.86385e-14
- Human toxicity, non-cancer_inorganics: 1.70299e-11
- Human toxicity, non-cancer_organics: 8.2946e-13
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
## Modelling constants
Direct land use change: GHG emissions from direct LUC allocated to good/service for 20 years after the LUC occurs.
Carbon storage and delayed emissions: credits associated with temporary (carbon) storage or delayed emissions are not considered in the calculation of the EF for the default impact categories.
Emissions off-setting: not included
Fossil and biogenic carbon emissions and removals: removals and emissions are modelled as follows: All GHG emissions from fossil fuels (including peat and limestone) are modelled consistently with the ILCD list of elementary flows. In the case that the emissions refer to the molecules CO2 and CH4, they are modelled as ‘carbon dioxide (fossil)’ and ‘methane (fossil)’. Biogenic uptake and emissions are modelled separately. For land use change, all carbon emissions and uptakes are inventoried separately for each of the elementary flows. Soil carbon accumulation (uptake) via improved agricultural management is excluded from the model.

## Cut-off and completeness
A cut-off rule based on mass or energy flow or the level of environmental significance of max. 3% is applied and confirmed by the reviewer. An active cut-off within the system has not been applied, no data gaps are known and all elementary flows of environmental effect are included in the inventory.

Capital goods (including infrastructures) and their end of life are included unless the exclusion is clearly documented and conform with the cut-off principles.

System boundaries include all known processes linked to the product supply chain.

## Data selection and combination
LCI modeling is fully consistent.
Energy and transport datasets from the PEF energy and transports tender are consistently used.

## Data treatment and extrapolations
For details please see the document "GaBi Databases Modelling Principles"

## Use advice
Notice: this data set supersedes the EF3.0-compliant version (see link under "preceding data set version" below calculated with the EF3.0). The life cycle inventory is not changed from the original EF3.0 data set. The LCIA results are calculated based on the EF3.1 methods which provide updated characterisation factors in the following impact categories: Climate Change, Ecotoxicity freshwater, Photochemical Ozone Formation, Acidification, Human Toxicity non-cancer, and Human Toxicity cancer. The review report and the data quality ratings refer to the original results. The data set has been updated by the European Commission on the basis of the original EF3.0 data set delivered by the data provider.

Life Cycle Inventory (LCI) datasets to be used for implementing regular Product Environmental Footprint (PEF) studies and Organisation Environmental Footprint (OEF) studies exclusively under the specified Product groups and sectors as defined in the Product Environmental Footprint Category Rules (PEFCR) and Organisation Environmental Footprint Sectorial Rules (OEFSR) listed in https://ec.europa.eu/environment/eussd/smgp/ef_transition.htm
The datasets are specifically designed for these methodological requirements (see above) and the related LCIA methods (listed below) recommended in EF.

## Review details
The dataset is compliant to "Zampori L., Pant R.: Suggestions for updating the Product Environmental Footprint (PEF) method, 2019 and Fazio S., Zampori L., De Schryver A. et al.: Guide for EF compliant data sets, Version 2.0, 2020.
In the PEF context the fields "Methodological appropriateness and consistency" and "completeness" are not evaluated by the review since their good quality is defined as mandatory.

## Other review details
Good overall quality (2,0) interpreted into "very good quality" in the PEF quality validation scheme. The quality indicator for completeness was not requested to be quantified as a single DQI for all tenders. If a value “Not evaluated / unknown” completeness is given, this indicates that a single DQI was not explicitly requested but the completeness is still to be understood as very good.
The Data Quality Indicator Results are conservative expert judgements, confirmed or - if necessary - corrected by the reviewers, based on their methodological as well as process understanding and considering semi-quantitatively the contribution of the DQIs of the used EF energy and transport datasets and of EF-related DQIs provided and reviewed within the GaBi databases. The overall DQIs of the datasets take into account primarily the quality and representativeness of the foreground technology information and that of the key upstream processes. If datasets are e.g. energy and transport intensive - or gain credits from energy recovery - the DQIs of the used EF energy and transport datasets influence the overall DQI significantly and have stronger been taken into account, via expert judgement. Analogous applies for other key background datasets. For the DQIs of the mentioned GaBi secondary datasets, similar DQIs had already been assigned to those datasets and were considered by the reviewers via expert judgement when assigning of the overall DQIs. In case of doubt, lower (i.e. lower quality) DQIs were assigned.

## Data sources
- Handbook Emission Factors for Road Transport HBEFA, Version 4.1, 2019

## Intended applications
Life Cycle Inventory (LCI) datasets to be used in Product Environmental Footprint Category Rules (PEFCRs) and Organisation Environmental Footprint Sectoral Rules (OEFSRs) developed in the context of the Environmental Footprint transition phase launched by the Commission in 2018.
