# Barge ocean, technology mix; technology mix, diesel driven, cargo; consumption mix, to consumer; 3'000t payload capacity

Dataset: ILCD process, Unit process, single operation
Geography: GLO
Reference year: 2020
Valid until: 2024
Classification: Materials production / Water
LCI method principle: Attributional
LCI method approaches: Allocation - market value; Allocation - net calorific value; Allocation - exergetic content; Allocation - mass; Not applicable
Completeness: All relevant flows quantified
Share of supply or production covered: 95 %
Included processes: Diesel mix at refinery
Method details: GaBi Modelling Principles; GaBi Water Modelling Principles; GaBi Agriculture Model Documentation; GaBi Energy Modelling Principles; GaBi Refinery Modelling Principles; GaBi Land Use Change Model Documentation; Suggestions for updating the PEF method 2019; Guide for EF compliant data sets; GaBi Agrarian Modelling Principles
Project: Provision of product environmental footprint-compliant life cycle inventory datasets. Contract number N° 09.029901/2021/846457/SER/ENV.B.1
Generated by: Sphera Solutions GmbH
Owner: Sphera Solutions GmbH
Compliance: ILCD Data Network - Entry-level; Suggestions for updating the PEF method 2019; ISO 14040 Environmental Management – Life Cycle Assessment – Principles and Framework, 2006; ISO 14044:2006. Environmental Management – Life Cycle Assessment – Requirements and guidelines.; Environmental Footprint 3.1
Review: Independent internal review by Sphera Solutions GmbH, Dr. Michael Baumann, Sphera Solutions GmbH, Dr. Stefan Eckert
Data quality: Technological representativeness: Fair; Time representativeness: Good; Geographical representativeness: Fair; Completeness: Not evaluated / unknown; Precision: Good; Methodological appropriateness and consistency: Not evaluated / unknown; Overall quality: Good
Amounts: no units in this file; such an amount is in the reference unit of its flow, which a separate flow dataset defines
copyright: true
licenseType: Free of charge for some user types or use types
accessRestrictions: Datasets can only be used in accordance with the terms and conditions of this EULA exclusively until 31st December 2024 (PERMITTED USE).

## General comment
The data set covers all relevant process steps / technologies over the waterway transport system with a good overall data quality. The inventory is mainly based on industry data and is complemented, where necessary, by secondary data.

## Geography
The data set is representative for the global average.The geographical representativeness concerning the related country as well as its DQR is related to relevance of the contributors. Possible geographical variance of minor contributors below the cut-off criteria are not affecting the geographical representativeness of the overall process, but are positively affecting the completeness of the model.

## Time period
annual average

## Technology and included processes
Ocean- going barges are usually tugged barges, 3000t payload capacity was assumed.

The barge was modelled on the basis of an inland water barge with 3000t payload capacity:

The existing inland waterway ship categories in the database were matched with actual ships utilised for inland waterway transport, as documented by the Versuchsanstalt für Binnenschiffbau e.V. (VBD) in 2004. The VBD provided current technical information, including the average ship speed, utilisation ratio of the drive capacity and the fuel consumption, in cases of both current and canal waterways. The fuel consumption [in kg/h] was calculated linearly according to load from the utilisation capacity from 0% (empty) to 100% (fully loaded), with the known empty and full load capacities. The fuel consumption [in kg diesel/kg load] was then calculated taking into account the average speed of the ship [km/h], distance [km] and the maximum payload capacity [dwt]. The fuel consumption was then graphed against the capacity utilisation, which resulted in a downward sloping, concave upward curve whose corresponding power equation was of the form y=ax^-b (where y is the fuel consumption, and x is the capacity utilisation).
Inputs to the inland waterway ships are fuel and cargo. Outputs are cargo and combustion emissions. Vessel production, end of life treatment of the vessel and the fuel supply chain (such as emissions from exploration, refinery and transportation) are not included in this data set.
Emission factors of emissions typically emitted from the diesel engines of inland waterway ships, consisting of NOx, NMVOC, CH4, CO, NH3, N2O and PM, were updated based on CORINAIR's Emission Inventory Guidebook from December 2006. The emission factors for CO2 and SO2 were obtained from the Intergovernmental Panel on Climate Change (IPCC) Revised Guidelines for National Greenhouse Gas Inventories from 2006.

## Technical purpose
Sea transport of goods in bulk with a payload of up to 3.000 dead weight tons.

## Model description
The open parameters in this processes enable the user to adjust the model to their individual circumstances. The description of the parameters is given alongside the parameters in the comments section.

For mathematical model details concerning the implementation of the CCF formula see:
http://www.gabi-software.com/fileadmin/GaBi_Databases/PEF_CFF_model_description.pdf

## Parameters
- Cap_utilisation: 0.65; = 0.65
  [-] Average capacity utilisation by mass (default 0,65)
- Distance: 1
  [km] distance start - end, default = 100 km
- Fuel_consump_km: 6.69
  [kg] fuel consumption per km
- Fuel_consumpt: 6.69; = Fuel_consump_km * Distance
  [kg] Diesel total consumption
- Load_actual: 1950; = 3000 * Cap_utilisation
  [t] payload
- Maritime_infra: 1.96e-8; = 9.8E-07*Distance*3000/150000
  [sqm] maritime infrastructure production per tkm
- S_content_fuel: 50; = 50
  [ppm] sulphur content in diesel, default Europe = 10 ppm
- Ship_prod: 8.8e-14; = (4.4E-12*3000/150000)*Distance
  [-] pieces cargo ship production per tkm
- Spec_consumpt: 3.43077e-6; = Fuel_consumpt / (Load_actual * 1000)
  [kg/kg] Diesel per kg cargo
- Spec_SO2_em: 3.43077e-10; = S_content_fuel / 1000000 * 2 * Spec_consumpt
  [kg] SO2 emission
- ton_km: 1000; = Distance * 1000

## Reference product
- Transporting capacity: 1000; = ton_km; calculated

## Inputs
- Maritime infrastructure: 1.96e-8; = Maritime_infra; calculated
  average ship scaled down 3000t/ 150000 t; average ship: 5500ha, 150000 t loaded (without unloading), 75 years, 5000 km distance
- Diesel: 0.00343077; = 1000 * Spec_consumpt; calculated
- Cargo ship (piece): 8.8e-14; = Ship_prod; calculated
  average ship scaled down 3000t/150000t; calculation for average ocean going ship: 150.000 DWt, 50%loaded, 30a, 100.000km/a
- Transporting capacity: 1000; = ton_km; calculated

## Outputs
All rows: calculated
- methane (fossil) [Emissions to air, unspecified]: 6.17538e-7; = 0.18 * Spec_consumpt
- sulfur dioxide [Emissions to air, unspecified]: 3.43077e-7; = 1000 * Spec_SO2_em
- particles (PM2.5) [Emissions to air, unspecified]: 1.41348e-5; = 4.12 * Spec_consumpt
- non-methane volatile organic compounds [Emissions to air, unspecified]: 1.61932e-5; = 4.72 * Spec_consumpt
- carbon monoxide [Emissions to air, unspecified]: 3.73954e-5; = 10.9 * Spec_consumpt
- carbon dioxide (fossil) [Emissions to air, unspecified]: 0.0109442; = 3190 * Spec_consumpt
- nitrogen oxides [Emissions to air, unspecified]: 0.000145808; = 42.5 * Spec_consumpt

## Impact indicators
- Acidification: 0.000108347
- Climate change: 0.0109626
- Ecotoxicity, freshwater: 0.000140425
- Eutrophication marine: 5.67192e-5
- Eutrophication, terrestrial: 0.000621141
- Human toxicity, non-cancer: 1.03697e-12
- EF-particulate Matter: 3.60714e-9
- Photochemical ozone formation - human health: 0.00016374
- Climate change-Fossil: 0.0110256
- Ecotoxicity, freshwater_inorganics: 8.53849e-7
- Ecotoxicity, freshwater_organics: 0.000139571
- Human toxicity, non-cancer_inorganics: 4.03683e-11
- Human toxicity, non-cancer_organics: 1.03697e-12
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
## Deviations from the LCI method approaches
Foreground system: no allocation is applied.

Background system: Within the refinery allocation by net calorific value and mass is used. For the combined crude oil, natural gas and natural gas liquids production allocation by net calorific value is applied.

## Modelling constants
Direct land use change: GHG emissions from direct LUC allocated to good/service for 20 years after the LUC occurs.
Carbon storage and delayed emissions: credits associated with temporary (carbon) storage or delayed emissions are not considered in the calculation of the EF for the default impact categories.
Emissions off-setting: not included
Fossil and biogenic carbon emissions and removals: removals and emissions are modelled as follows: All GHG emissions from fossil fuels (including peat and limestone) are modelled consistently with the ILCD list of elementary flows. In the case that the emissions refer to the molecules CO2 and CH4, they are modelled as ‘carbon dioxide (fossil)’ and ‘methane (fossil)’. Biogenic uptake and emissions are modelled separately. For land use change, all carbon emissions and uptakes are inventoried separately for each of the elementary flows. Soil carbon accumulation (uptake) via improved agricultural management is excluded from the model.

## Cut-off and completeness
A cut-off rule based on mass or energy flow or the level of environmental significance of max. 3% is applied and confirmed by the reviewer. An active cut-off within the system has not been applied, no data gaps are known and all elementary flows of environmental effect are included in the inventory.

Capital goods (including infrastructures) and their end of life are included unless the exclusion is clearly documented and conform with the cut-off principles.

System boundaries include all known processes linked to the product supply chain.

## Data selection and combination
LCI modeling is fully consistent.
Energy and transport datasets from the PEF energy and transports tender are consistently used.

## Data treatment and extrapolations
For details please see the document "GaBi Databases Modelling Principles"

## Use advice
Notice: this data set supersedes the EF3.0-compliant version (see link under "preceding data set version" below calculated with the EF3.0). The life cycle inventory is not changed from the original EF3.0 data set. The LCIA results are calculated based on the EF3.1 methods which provide updated characterisation factors in the following impact categories: Climate Change, Ecotoxicity freshwater, Photochemical Ozone Formation, Acidification, Human Toxicity non-cancer, and Human Toxicity cancer. The review report and the data quality ratings refer to the original results. The data set has been updated by the European Commission on the basis of the original EF3.0 data set delivered by the data provider.

Life Cycle Inventory (LCI) datasets to be used for implementing regular Product Environmental Footprint (PEF) studies and Organisation Environmental Footprint (OEF) studies exclusively under the specified Product groups and sectors as defined in the Product Environmental Footprint Category Rules (PEFCR) and Organisation Environmental Footprint Sectorial Rules (OEFSR) listed in https://ec.europa.eu/environment/eussd/smgp/ef_transition.htm
The datasets are specifically designed for these methodological requirements (see above) and the related LCIA methods (listed below) recommended in EF.

## Review details
The dataset is compliant to "Zampori L., Pant R.: Suggestions for updating the Product Environmental Footprint (PEF) method, 2019 and Fazio S., Zampori L., De Schryver A. et al.: Guide for EF compliant data sets, Version 2.0, 2020.
In the PEF context the fields "Methodological appropriateness and consistency" and "completeness" are not evaluated by the review since their good quality is defined as mandatory.

## Other review details
Good overall quality (2,50) interpreted into "good quality" in the PEF quality validation scheme. The quality indicator for completeness was not requested to be quantified as a single DQI for all tenders. If a value “Not evaluated / unknown” completeness is given, this indicates that a single DQI was not explicitly requested but the completeness is still to be understood as very good.
The Data Quality Indicator Results are conservative expert judgements, confirmed or - if necessary - corrected by the reviewers, based on their methodological as well as process understanding and considering semi-quantitatively the contribution of the DQIs of the used EF energy and transport datasets and of EF-related DQIs provided and reviewed within the GaBi databases. The overall DQIs of the datasets take into account primarily the quality and representativeness of the foreground technology information and that of the key upstream processes. If datasets are e.g. energy and transport intensive - or gain credits from energy recovery - the DQIs of the used EF energy and transport datasets influence the overall DQI significantly and have stronger been taken into account, via expert judgement. Analogous applies for other key background datasets. For the DQIs of the mentioned GaBi secondary datasets, similar DQIs had already been assigned to those datasets and were considered by the reviewers via expert judgement when assigning of the overall DQIs. In case of doubt, lower (i.e. lower quality) DQIs were assigned.

## Data sources
- Technische und wirtschaftliche Konzepte für flußangepaßte Binnenschiffe
- Verkehrswirtschaftlicher und ökologischer Vergleich der Verkehrsträger Straße, Bahn und Wasserstraße
- Verminderung der Luft- und Lärmbelastung im Güterfernverkehr 2010, Forschungsbericht, 10405962, 1994
- Binnenschifffahrt in Zahlen 1994, 1994
- Ocean Barges, Mc Donough Marine Services, 2017-2022
- Can Barges Go to Sea?, Flat Bottom Boat World, onlinen 2022

## Intended applications
Life Cycle Inventory (LCI) datasets to be used in Product Environmental Footprint Category Rules (PEFCRs) and Organisation Environmental Footprint Sectoral Rules (OEFSRs) developed in the context of the Environmental Footprint transition phase launched by the Commission in 2018.
