# Lorry, Total weight 7,5 -12 t, cooled, electric / 5t payload capacity; electric driven, cargo, cooled; consumption mix, to consumer; 7.5 - 12t gross weight / 5t payload capacity

Dataset: ILCD process, Unit process, single operation
Geography: GLO
Reference year: 2020
Valid until: 2024
Classification: Transport services / Road
Synonyms: lorry
LCI method principle: Attributional
Completeness: All relevant flows quantified
Share of supply or production covered: 95 %
Method details: GaBi Refinery Modelling Principles; GaBi Modelling Principles; GaBi Water Modelling Principles; GaBi Agriculture Model Documentation; GaBi Land Use Change Model Documentation; GaBi Energy Modelling Principles; Suggestions for updating the PEF method 2019; Guide for EF compliant data sets; GaBi Agrarian Modelling Principles
Project: Provision of product environmental footprint-compliant life cycle inventory datasets. Contract number N° 09.029901/2021/846457/SER/ENV.B.1
Generated by: Sphera Solutions GmbH
Owner: Sphera Solutions GmbH
Compliance: ILCD Data Network - Entry-level; Suggestions for updating the PEF method 2019; ISO 14040 Environmental Management – Life Cycle Assessment – Principles and Framework, 2006; ISO 14044:2006. Environmental Management – Life Cycle Assessment – Requirements and guidelines.; Environmental Footprint 3.1
Review: Independent internal review by Sphera Solutions GmbH, Dr. Michael Baumann, Sphera Solutions GmbH, Dr. Stefan Eckert
Data quality: Technological representativeness: Good; Time representativeness: Good; Geographical representativeness: Good; Completeness: Not evaluated / unknown; Precision: Good; Methodological appropriateness and consistency: Not evaluated / unknown; Overall quality: Good
Amounts: no units in this file; such an amount is in the reference unit of its flow, which a separate flow dataset defines
copyright: true
licenseType: Free of charge for some user types or use types
accessRestrictions: Datasets can only be used in accordance with the terms and conditions of this EULA exclusively until 31st December 2024 (PERMITTED USE).

## General comment
- source emissions/driving share: HBEFA 4.1, status September 2021
- input parameter: distance [km], payload [t], utilisation [-], driving share motorway/rural/urban
- Parameter “switch_part_NE”, allow the possibility of including non-exhaust PM emissions (0= no non-exhaust PM, 1 = non-exhaust PM included).
- Source of non-exhaust PM emissions: HBEFA 4.1. Remark: “Please note that the differentiation by traffic situation is uncertain and that the output emission factors are only valid for Central Europe (DE, AT, CH, FR) but not for Northern Europe (NO, SE). Treat any results with caution”

## Geography
The data set is representative for the mentioned region.

## Time period
annual average

## Technology and included processes
Truck as heavy or light duty vehicle for road transport. Variable parameters are: payload, utilisation ratio, distance and driving share urban/interurban/motorway. Inputs: electricity, road and vehicle (production). Outputs: cargo and emissions from cooling agent leakage.
For more information please refer to: https://scn.spherasolutions.com/client/downloads.aspx?product=GaBi&productID=47

## Technical purpose
Provision of a standard transport service according to the applied technology.

## Model description
The open parameters in this processes enable the user to adjust the model to their individual circumstances. The description of the parameters is given alongside the parameters in the comments section.

For mathematical model details concerning the implementation of the CCF formula see:
http://www.gabi-software.com/fileadmin/GaBi_Databases/PEF_CFF_model_description.pdf

## Parameters
- Cool_Leakage_dr: 1.52e-7; = (Cool_Leakage_ra / km_year) * distance / (payload * utilisation * 1000)
  [kg] Calculated leakage rate per km driven per year
- Cool_Leakage_ra: 0.76
  [kg/year] Coolant leakage
- distance: 100
  [km] distance start - end, default = 100 km
- km_year: 100000; = service_life / lifetime_truck
  [km/year] Calculated km per year
- Lifetime_truck: 10
  [Years] Assumed lifetime of truck (assumed 10 years)
- lorry: 2e-8; = distance / (service_life * tonnage * 1000)
  [pcs] pieces of lorry allocated to the transport
- payload: 5
  [t] default = 5t
- service_life: 1e6
  [km] total service life of the lorry, default 1.000.000 km, used for allocation of capital goods
- share_check: 1; = share_mw + share_ru + share_ur
  Check - value must be 1
- share_mw: 0.7; max 1
  [-] driving share motorway , default = 0,70
- share_ru: 0.23; max 1
  [-] driving share rural , default = 0,23
- share_ur: 0.07; max 1
  [-] driving share urban , default = 0,07
- spec_elec_mw: 0.000897834; = (3.39253854751587 + 0.52 + (3.96917033195496 - 3.39253854751587) * utilisation) / (payload * 1000 * utilisation)
  [MJ/(kg*km)] electric consumption motorway
- spec_elec_ru: 0.000829095; = (2.90199637413025 + 0.56 + (3.58547377586365 - 2.90199637413025) * utilisation) / (payload * 1000 * utilisation)
  [MJ/(kg*km)] electric consumption rural
- spec_elec_tot: 0.0885527; = ((share_mw * spec_elec_mw) + (share_ru * spec_elec_ru) + (share_ur * spec_elec_ur)) * distance
  [MJ/kg] electric consumption weighted
- spec_elec_ur: 0.000947871; = (2.33243083953857 + 1.34 + (3.39935302734375 - 2.33243083953857) * utilisation) / (payload * 1000 * utilisation)
  [MJ/(kg*km)] electric consumption urban
- street: 5.27013e-7; = (spec_elec_tot/43.1/53800000000)*(690000/50)*1000
  [m] meters of average street allocated to the transport (default service life of the street = 50a)
- tonnage: 5; = utilisation * payload
  [t]
- utilisation: 1; max 1
  [-] utilisation by mass, default = 0.61

## Reference product
- Transport: 100; calculated

## Inputs
- Truck (tractor & trailer): 2e-8; = lorry
- Road (average): 5.27013e-7; = street
- Electricity: 0.0885527; = spec_elec_tot; estimated

## Outputs
- HFC-125 [Emissions to air, unspecified]: 6.688e-8; = 0.44 * Cool_Leakage_dr; calculated
- 1,1,1-trifluoroethane [Emissions to air, unspecified]: 7.904e-8; = 0.52 * Cool_Leakage_dr; calculated
- HFC-134a [Emissions to air, unspecified]: 6.08e-9; = 0.04 * Cool_Leakage_dr; calculated

## Impact indicators
- Climate change: 0.000718656
- Ecotoxicity, freshwater: 2.425e-8
- Human toxicity, cancer: 7.13062e-17
- Human toxicity, non-cancer: 9.33191e-17
- Climate change-Fossil: 0.000691722
- Ecotoxicity, freshwater_organics: 2.425e-8
- Human toxicity, cancer_organics: 7.13062e-17
- Human toxicity, non-cancer_organics: 9.33191e-17
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
## Modelling constants
Direct land use change: GHG emissions from direct LUC allocated to good/service for 20 years after the LUC occurs.
Carbon storage and delayed emissions: credits associated with temporary (carbon) storage or delayed emissions are not considered in the calculation of the EF for the default impact categories.
Emissions off-setting: not included
Fossil and biogenic carbon emissions and removals: removals and emissions are modelled as follows: All GHG emissions from fossil fuels (including peat and limestone) are modelled consistently with the ILCD list of elementary flows. In the case that the emissions refer to the molecules CO2 and CH4, they are modelled as ‘carbon dioxide (fossil)’ and ‘methane (fossil)’. Biogenic uptake and emissions are modelled separately. For land use change, all carbon emissions and uptakes are inventoried separately for each of the elementary flows. Soil carbon accumulation (uptake) via improved agricultural management is excluded from the model.

## Cut-off and completeness
A cut-off rule based on mass or energy flow or the level of environmental significance of max. 3% is applied and confirmed by the reviewer. An active cut-off within the system has not been applied, no data gaps are known and all elementary flows of environmental effect are included in the inventory.

Capital goods (including infrastructures) and their end of life are included unless the exclusion is clearly documented and conform with the cut-off principles.

System boundaries include all known processes linked to the product supply chain.

## Data selection and combination
LCI modeling is fully consistent.
Energy and transport datasets from the PEF energy and transports tender are consistently used.

## Data treatment and extrapolations
For details please see the document "GaBi Databases Modelling Principles"

## Use advice
Notice: this data set supersedes the EF3.0-compliant version (see link under "preceding data set version" below calculated with the EF3.0). The life cycle inventory is not changed from the original EF3.0 data set. The LCIA results are calculated based on the EF3.1 methods which provide updated characterisation factors in the following impact categories: Climate Change, Ecotoxicity freshwater, Photochemical Ozone Formation, Acidification, Human Toxicity non-cancer, and Human Toxicity cancer. The review report and the data quality ratings refer to the original results. The data set has been updated by the European Commission on the basis of the original EF3.0 data set delivered by the data provider.

Life Cycle Inventory (LCI) datasets to be used for implementing regular Product Environmental Footprint (PEF) studies and Organisation Environmental Footprint (OEF) studies exclusively under the specified Product groups and sectors as defined in the Product Environmental Footprint Category Rules (PEFCR) and Organisation Environmental Footprint Sectorial Rules (OEFSR) listed in https://ec.europa.eu/environment/eussd/smgp/ef_transition.htm
The datasets are specifically designed for these methodological requirements (see above) and the related LCIA methods (listed below) recommended in EF.

## Review details
The dataset is compliant to "Zampori L., Pant R.: Suggestions for updating the Product Environmental Footprint (PEF) method, 2019 and Fazio S., Zampori L., De Schryver A. et al.: Guide for EF compliant data sets, Version 2.0, 2020.
In the PEF context the fields "Methodological appropriateness and consistency" and "completeness" are not evaluated by the review since their good quality is defined as mandatory.

## Other review details
Good overall quality (2,0) interpreted into "very good quality" in the PEF quality validation scheme. The quality indicator for completeness was not requested to be quantified as a single DQI for all tenders. If a value “Not evaluated / unknown” completeness is given, this indicates that a single DQI was not explicitly requested but the completeness is still to be understood as very good.
The Data Quality Indicator Results are conservative expert judgements, confirmed or - if necessary - corrected by the reviewers, based on their methodological as well as process understanding and considering semi-quantitatively the contribution of the DQIs of the used EF energy and transport datasets and of EF-related DQIs provided and reviewed within the GaBi databases. The overall DQIs of the datasets take into account primarily the quality and representativeness of the foreground technology information and that of the key upstream processes. If datasets are e.g. energy and transport intensive - or gain credits from energy recovery - the DQIs of the used EF energy and transport datasets influence the overall DQI significantly and have stronger been taken into account, via expert judgement. Analogous applies for other key background datasets. For the DQIs of the mentioned GaBi secondary datasets, similar DQIs had already been assigned to those datasets and were considered by the reviewers via expert judgement when assigning of the overall DQIs. In case of doubt, lower (i.e. lower quality) DQIs were assigned.

## Data sources
- Handbook Emission Factors for Road Transport HBEFA, Version 4.1, 2019

## Intended applications
Life Cycle Inventory (LCI) datasets to be used in Product Environmental Footprint Category Rules (PEFCRs) and Organisation Environmental Footprint Sectoral Rules (OEFSRs) developed in the context of the Environmental Footprint transition phase launched by the Commission in 2018.
