# Freight train, diesel traction; diesel driven, cargo; consumption mix, to consumer; average train, gross tonne weight 1000t / 726t payload capacity

Dataset: ILCD process, Unit process, single operation
Geography: GLO
Reference year: 2014
Valid until: 2024
Classification: Transport services / Rail
LCI method principle: Attributional
LCI method approaches: Allocation - market value; Allocation - net calorific value; Allocation - exergetic content; Allocation - mass
Completeness: All relevant flows quantified
Share of supply or production covered: 95 %
Method details: Suggestions for updating the PEF method 2019; GaBi Modelling Principles; GaBi Water Modelling Principles; GaBi Energy Modelling Principles; GaBi Refinery Modelling Principles; GaBi Agriculture Model Documentation; GaBi Land Use Change Model Documentation; Guide for EF compliant data sets; GaBi Agrarian Modelling Principles
Project: Provision of product environmental footprint-compliant life cycle inventory datasets. Contract number N° 09.029901/2021/846457/SER/ENV.B.1
Generated by: Sphera Solutions GmbH
Owner: Sphera Solutions GmbH
Compliance: ILCD Data Network - Entry-level; Suggestions for updating the PEF method 2019; ISO 14040 Environmental Management – Life Cycle Assessment – Principles and Framework, 2006; ISO 14044:2006. Environmental Management – Life Cycle Assessment – Requirements and guidelines.; Environmental Footprint 3.1
Review: Independent internal review by Sphera Solutions GmbH, Dr. Michael Baumann, Sphera Solutions GmbH, Dr. Stefan Eckert
Data quality: Technological representativeness: Good; Time representativeness: Good; Geographical representativeness: Fair; Completeness: Not evaluated / unknown; Precision: Good; Methodological appropriateness and consistency: Not evaluated / unknown; Overall quality: Good
Amounts: no units in this file; such an amount is in the reference unit of its flow, which a separate flow dataset defines
copyright: true
licenseType: Free of charge for some user types or use types
accessRestrictions: Datasets can only be used in accordance with the terms and conditions of this EULA exclusively until 31st December 2024 (PERMITTED USE).

## General comment
The data set covers all relevant process steps / technologies over the rail transport cargo system with a good overall data quality. The inventory is based on industry and literature data.
The utilization ratio of the train is 40%.

## Geography
The data set is representative for the mentioned region.The geographical representativeness concerning the related country as well as its DQR is related to relevance of the contributors. Possible geographical variance of minor contributors below the cut-off criteria are not affecting the geographical representativeness of the overall process, but are positively affecting the completeness of the model.

## Time period
annual average

## Technology and included processes
This dataset contains the production phase of the train (capital goods) and the use phase of the train (including energy consumption) allocated to 1 tkm transported good. It also includes the construction of the railway track infrastructure used by the train (a piece of railway track allocated to 1 tkm transported by train). As default settings for the train parameters, a utilization ratio of 40% and a lifetime of 30 years were chosen. For railway track production, an average German railway track is accounted, see table. To know how much railway track infrastructure is needed for one freight train, the entire railway track infrastructure and the entire train fleet are considered. Allocation was applied by tkm and pkm (1 pkm= 0,1 tkm). Thus, one piece of railway track including it`s materials consumed (see table attached) is allocated to the train according to it`s tkm transported.

Rail transport via diesel cargo train. This transport dataset refers to 1 tkm and includes the fuel, train production and railway track infrastructure. The shares have been calculated by using the gross domestic product. Variable parameters are: distance, ppm_sulfur, share_CO2_bio and utilisation. End-of-life treatment of the train is not included. Upstream processes for fuel production (e.g. exploration and production of fuels, refinery, transport) are included in the data set.

## Technical purpose
Rail transport of bulk commodities or packaged goods.

## Model description
The open parameters in this processes enable the user to adjust the model to their individual circumstances. The description of the parameters is given alongside the parameters in the comments section.

For mathematical model details concerning the implementation of the CCF formula see:
http://www.gabi-software.com/fileadmin/GaBi_Databases/PEF_CFF_model_description.pdf

## Reference product
- Transport: 1000

## Inputs
- Diesel: 0.00728796; estimated
- Cargotrain (piece): 1.4e-9
- Railway: 5e-6

## Outputs
- methane (fossil) [Emissions to air, unspecified]: 6.26765e-7; estimated
- carbon dioxide (biogenic) [Emissions to air, unspecified]: 0.00115696; calculated
- nitrous oxide [Emissions to air, unspecified]: 3.13382e-7; estimated
- sulfur dioxide [Emissions to air, unspecified]: 1.45759e-7; estimated
- particles (PM2.5) [Emissions to air, unspecified]: 9.47435e-6; estimated
- non-methane volatile organic compounds [Emissions to air, unspecified]: 3.37433e-5; estimated
- carbon monoxide [Emissions to air, unspecified]: 6.77781e-5; estimated
- carbon dioxide (fossil) [Emissions to air, unspecified]: 0.0219823; calculated
- nitrogen oxides [Emissions to air, unspecified]: 0.000352009; estimated

## Impact indicators
- Acidification: 0.000260677
- Climate change: 0.0220866
- Ecotoxicity, freshwater: 0.000292173
- Eutrophication marine: 0.000136931
- Eutrophication, terrestrial: 0.00149956
- Human toxicity, non-cancer: 2.13382e-12
- EF-particulate Matter: 2.82399e-9
- Photochemical ozone formation - human health: 0.000388861
- Climate change-Fossil: 0.0222052
- Ecotoxicity, freshwater_inorganics: 1.54758e-6
- Ecotoxicity, freshwater_organics: 0.000290625
- Human toxicity, non-cancer_inorganics: 7.31664e-11
- Human toxicity, non-cancer_organics: 2.13382e-12
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
## Deviations from the LCI method approaches
Foreground system: no allocation is applied.

Background system: Within the refinery allocation by net calorific value and mass is used. For the combined crude oil, natural gas and natural gas liquids production allocation by net calorific value is applied.

## Modelling constants
Direct land use change: GHG emissions from direct LUC allocated to good/service for 20 years after the LUC occurs.
Carbon storage and delayed emissions: credits associated with temporary (carbon) storage or delayed emissions are not considered in the calculation of the EF for the default impact categories.
Emissions off-setting: not included
Fossil and biogenic carbon emissions and removals: removals and emissions are modelled as follows: All GHG emissions from fossil fuels (including peat and limestone) are modelled consistently with the ILCD list of elementary flows. In the case that the emissions refer to the molecules CO2 and CH4, they are modelled as ‘carbon dioxide (fossil)’ and ‘methane (fossil)’. Biogenic uptake and emissions are modelled separately. For land use change, all carbon emissions and uptakes are inventoried separately for each of the elementary flows. Soil carbon accumulation (uptake) via improved agricultural management is excluded from the model.

## Cut-off and completeness
A cut-off rule based on mass or energy flow or the level of environmental significance of max. 3% is applied and confirmed by the reviewer. An active cut-off within the system has not been applied, no data gaps are known and all elementary flows of environmental effect are included in the inventory.

Capital goods (including infrastructures) and their end of life are included unless the exclusion is clearly documented and conform with the cut-off principles.

System boundaries include all known processes linked to the product supply chain.

## Data selection and combination
LCI modeling is fully consistent.
EF Energy datasets are consistently used.

## Data treatment and extrapolations
Several data sources have been averaged. Measured data from representative transport systems have been upscaled.

## Use advice
Notice: this data set supersedes the EF3.0-compliant version (see link under "preceding data set version" below calculated with the EF3.0). The life cycle inventory is not changed from the original EF3.0 data set. The LCIA results are calculated based on the EF3.1 methods which provide updated characterisation factors in the following impact categories: Climate Change, Ecotoxicity freshwater, Photochemical Ozone Formation, Acidification, Human Toxicity non-cancer, and Human Toxicity cancer. The review report and the data quality ratings refer to the original results. The data set has been updated by the European Commission on the basis of the original EF3.0 data set delivered by the data provider.

Life Cycle Inventory (LCI) datasets to be used for implementing regular Product Environmental Footprint (PEF) studies and Organisation Environmental Footprint (OEF) studies exclusively under the specified Product groups and sectors as defined in the Product Environmental Footprint Category Rules (PEFCR) and Organisation Environmental Footprint Sectorial Rules (OEFSR) listed in https://ec.europa.eu/environment/eussd/smgp/ef_transition.htm
The datasets are specifically designed for these methodological requirements (see above) and the related LCIA methods (listed below) recommended in EF.

## Review details
The dataset is compliant to "Zampori L., Pant R.: Suggestions for updating the Product Environmental Footprint (PEF) method, 2019 and Fazio S., Zampori L., De Schryver A. et al.: Guide for EF compliant data sets, Version 2.0, 2020.
In the PEF context the fields "Methodological appropriateness and consistency" and "completeness" are not evaluated by the review since their good quality is defined as mandatory.

## Other review details
Good overall quality (2,25) interpreted into "good quality" in the PEF quality validation scheme. The quality indicator for completeness was not requested to be quantified as a single DQI for all tenders. If a value “Not evaluated / unknown” completeness is given, this indicates that a single DQI was not explicitly requested but the completeness is still to be understood as very good.
The Data Quality Indicator Results are conservative expert judgements, confirmed or - if necessary - corrected by the reviewers, based on their methodological as well as process understanding and considering semi-quantitatively the contribution of the DQIs of the used EF energy and transport datasets and of EF-related DQIs provided and reviewed within the GaBi databases. The overall DQIs of the datasets take into account primarily the quality and representativeness of the foreground technology information and that of the key upstream processes. If datasets are e.g. energy and transport intensive - or gain credits from energy recovery - the DQIs of the used EF energy and transport datasets influence the overall DQI significantly and have stronger been taken into account, via expert judgement. Analogous applies for other key background datasets. For the DQIs of the mentioned GaBi secondary datasets, similar DQIs had already been assigned to those datasets and were considered by the reviewers via expert judgement when assigning of the overall DQIs. In case of doubt, lower (i.e. lower quality) DQIs were assigned.

## Data sources
- EcoTransIT World, Ecolog.Transport Information Tool for Worldwide Transports: Methodology and Data
- Energieverbrauch u. Schadstoffemiss. des motorisierten Verkehrs in Deutschland 1960-2030(TREMOD, v5)
- GaBi databases
- Materialbestand und Materialflüsse in Infrastrukturen, 2011
- Verkehr in Zahlen 2017/ 2018
- Ecoinvent report 14: Transport für Infrastruktur Transporte

## Intended applications
Life Cycle Inventory (LCI) datasets to be used in Product Environmental Footprint Category Rules (PEFCRs) and Organisation Environmental Footprint Sectoral Rules (OEFSRs) developed in the context of the Environmental Footprint transition phase launched by the Commission in 2018.
