# brand tag; rotogravure and flexo printing; Production, at plant; paper tag

Dataset: ILCD process, Partly terminated system
Geography: GLO
Reference year: 2021
Valid until: 2024
Classification: Systems / Textiles, furnitures and other interiors
LCI method principle: Attributional
LCI method approaches: Allocation - market value
Completeness: All relevant flows quantified
Project: Provision of process-based 3.0 Environmental Footprint-compliant life cycle inventory datasets - Others - contract number 070201/2020/840235/SER/ENV.B.1
Generated by: Metsims Sustainability Consulting
Owner: PRé Sustainability B.V.
Compliance: ILCD Data Network - Entry-level; Suggestions for updating the PEF method 2019; ISO 14040 Environmental Management – Life Cycle Assessment – Principles and Framework, 2006; ISO 14044:2006. Environmental Management – Life Cycle Assessment – Requirements and guidelines.; Environmental Footprint 3.1
Review: Dependent internal review by Avraam Symeonidis, Emilia Moreno Ruiz; Independent review panel by Madhuri Nigam
Data quality: Overall quality: Very good; Time representativeness: Very good; Geographical representativeness: Good; Technological representativeness: Very good; Precision: Good; Methodological appropriateness and consistency: Not applicable
Amounts: no units in this file; such an amount is in the reference unit of its flow, which a separate flow dataset defines
copyright: true
licenseType: Free of charge for some user types or use types
accessRestrictions: Free of charge for all final users implementing a regular Product Environmental Footprint (PEF) studies and Organisation Environmental Footprint (OEF) studies exclusively under the specified Product groups and sectors as defined in the Product Environmental Footprint Category Rules (PEFCR) and Organisation Environmental Footprint Sectorial Rules (OEFSR) listed in http://ec.europa.eu/environment/eussd/smgp/PEFCR_OEFSR.htm and in accordance with the terms and conditions of the EULA (available at https://ecoinvent.lca-data.com/) exclusively until 31st December 2024. Any use of this dataset or any derivative data not within the specific context of one of the PEF/OEF projects or after the end of 2024 is not permitted.

## General comment
Notice: this data set supersedes the EF3.0-compliant version (see link under "preceding data set version" below calculated with the EF3.0). The life cycle inventory is not changed from the original EF3.0 data set. The LCIA results are calculated based on the EF3.1 methods which provide updated characterisation factors in the following impact categories: Climate Change, Ecotoxicity freshwater, Photochemical Ozone Formation, Acidification, Human Toxicity non-cancer, and Human Toxicity cancer. The review report and the data quality ratings refer to the original results. The data set has been updated by the European Commission on the basis of the original EF3.0 data set delivered by the data provider.A brand label usually is a small piece of paper featuring company or product details. Details are printed onto brand label by using solvent and water based or solvent-free printing inks.

This dataset covers rotogravure and flexo printing technologies with the mix of water based, solvent based and solvent-free inks. Brand tag assumed as printed craft paper.

## Technology and included processes
This dataset covers rotogravure and flexo printing technologies with the mix of water based, solvent based and solvent-free inks. Brand tag assumed as printed craft paper.
Electricity consumption of printing machine was included and ink use was assumed as 10 gr per 1 kg brand tag.

Waste processing model was generated from global waste collection rate. Global waste collection rate is 65%. It was assumed that 100% of collected waste are delivered to recycle facility. Uncollected part of waste (35%) was assumed that it is dropped to landfill areas. From production facility to landfill transport was assumed as 70 km.

## Parameters
- A_paper: 0.5
  The amount of waste paper produced is 0.045896175kg. The assumed percentage of losses of the recycling process is 0.283667621776504. R2 has been calculated as the original amount of waste minues losses, i.e. 0.0328769161891117kg. The value for A has been taken from the default values for the CFF. The default value for paper is 0.5. Being pre-consumer waste, Qsout/Qp is assumed to be 1. The E*v part of the formula is modelled as a negative input of the relevant virgin material.
- Qsout/Qp_paper: 1
  (same comment as for A_paper)
- CFF_paper: 0.0458962; = (1-A_paper)*R2_paper
  (same comment as for A_paper)
- avoid_paper: 0.283668; = CFF_paper*Qsout/Qp_paper
  (same comment as for A_paper)
- R2_paper: 0.0328769
  The amount of waste produced is 0.045896175kg. The assumed percentage of losses of the recycling process is 0.283667621776504. R2 has been calculated as the original amount of waste minues losses, i.e. 0.0328769161891117kg. The value for A has been taken from the default values for the CFF. The default value for paper is 0.5. Being pre-consumer waste, Qsout/Qp is assumed to be 1. The E*v part of the formula is modelled as a negative input of the relevant virgin material.
- kg_0: 0.00166667
  Mass in kg, for solvent-based printing ink, flexo printing // solvent-based printing ink production // eu+efta+uk; Articulated lorry transport, Euro 4, Total weight >32 t; EU+EFTA+UK
- km_0: 1002
  Distance in km, for solvent-based printing ink, flexo printing // solvent-based printing ink production // eu+efta+uk; Articulated lorry transport, Euro 4, Total weight >32 t; EU+EFTA+UK
- kg_km_0: 1.67; = kg_0*km_0
  Transport amount in km*km, for solvent-based printing ink, flexo printing // solvent-based printing ink production // eu+efta+uk; Articulated lorry transport, Euro 4, Total weight >32 t; EU+EFTA+UK
- kg_1: 0.00166667
  Mass in kg, for solvent-based printing ink, rotogravure printing // solvent-based printing ink production // eu+efta+uk; Articulated lorry transport, Euro 4, Total weight >32 t; EU+EFTA+UK
- km_1: 1002
  Distance in km, for solvent-based printing ink, rotogravure printing // solvent-based printing ink production // eu+efta+uk; Articulated lorry transport, Euro 4, Total weight >32 t; EU+EFTA+UK
- kg_km_1: 1.67; = kg_1*km_1
  Transport amount in km*km, for solvent-based printing ink, rotogravure printing // solvent-based printing ink production // eu+efta+uk; Articulated lorry transport, Euro 4, Total weight >32 t; EU+EFTA+UK
- kg_2: 0.0087156
  Mass in kg, for label, paper // label, paper // eu+efta+uk; Articulated lorry transport, Euro 4, Total weight >32 t; EU+EFTA+UK
- km_2: 11152.4
  Distance in km, for label, paper // label, paper // eu+efta+uk; Articulated lorry transport, Euro 4, Total weight >32 t; EU+EFTA+UK
- kg_km_2: 97.2; = kg_2*km_2
  Transport amount in km*km, for label, paper // label, paper // eu+efta+uk; Articulated lorry transport, Euro 4, Total weight >32 t; EU+EFTA+UK
- kg_3: 0.00166667
  Mass in kg, for solvent-free printing ink, flexo printing // solvent-free printing ink production // eu+efta+uk; Articulated lorry transport, Euro 4, Total weight >32 t; EU+EFTA+UK
- km_3: 1002
  Distance in km, for solvent-free printing ink, flexo printing // solvent-free printing ink production // eu+efta+uk; Articulated lorry transport, Euro 4, Total weight >32 t; EU+EFTA+UK
- kg_km_3: 1.67; = kg_3*km_3
  Transport amount in km*km, for solvent-free printing ink, flexo printing // solvent-free printing ink production // eu+efta+uk; Articulated lorry transport, Euro 4, Total weight >32 t; EU+EFTA+UK
- kg_4: 0.00166667
  Mass in kg, for solvent-free printing ink, rotogravure printing // solvent-free printing ink production // eu+efta+uk; Articulated lorry transport, Euro 4, Total weight >32 t; EU+EFTA+UK
- km_4: 1002
  Distance in km, for solvent-free printing ink, rotogravure printing // solvent-free printing ink production // eu+efta+uk; Articulated lorry transport, Euro 4, Total weight >32 t; EU+EFTA+UK
- kg_km_4: 1.67; = kg_4*km_4
  Transport amount in km*km, for solvent-free printing ink, rotogravure printing // solvent-free printing ink production // eu+efta+uk; Articulated lorry transport, Euro 4, Total weight >32 t; EU+EFTA+UK
- kg_5: 0.00166667
  Mass in kg, for water-based printing ink, flexo printing // water-based printing ink production // eu+efta+uk; Articulated lorry transport, Euro 4, Total weight >32 t; EU+EFTA+UK
- km_5: 1002
  Distance in km, for water-based printing ink, flexo printing // water-based printing ink production // eu+efta+uk; Articulated lorry transport, Euro 4, Total weight >32 t; EU+EFTA+UK
- kg_km_5: 1.67; = kg_5*km_5
  Transport amount in km*km, for water-based printing ink, flexo printing // water-based printing ink production // eu+efta+uk; Articulated lorry transport, Euro 4, Total weight >32 t; EU+EFTA+UK
- kg_6: 0.00166667
  Mass in kg, for water-based printing ink, rotogravure printing // water-based printing ink production // eu+efta+uk; Articulated lorry transport, Euro 4, Total weight >32 t; EU+EFTA+UK
- km_6: 2056.36
  Distance in km, for water-based printing ink, rotogravure printing // water-based printing ink production // eu+efta+uk; Articulated lorry transport, Euro 4, Total weight >32 t; EU+EFTA+UK
- kg_km_6: 3.42727; = kg_6*km_6
  Transport amount in km*km, for water-based printing ink, rotogravure printing // water-based printing ink production // eu+efta+uk; Articulated lorry transport, Euro 4, Total weight >32 t; EU+EFTA+UK
- kg_7: 0.00166667
  Mass in kg, for solvent-based printing ink, flexo printing // solvent-based printing ink production // eu+efta+uk; Transoceanic ship, containers; GLO
- km_7: 18000
  Distance in km, for solvent-based printing ink, flexo printing // solvent-based printing ink production // eu+efta+uk; Transoceanic ship, containers; GLO
- kg_km_7: 30; = kg_7*km_7
  Transport amount in km*km, for solvent-based printing ink, flexo printing // solvent-based printing ink production // eu+efta+uk; Transoceanic ship, containers; GLO
- kg_8: 0.00166667
  Mass in kg, for solvent-based printing ink, rotogravure printing // solvent-based printing ink production // eu+efta+uk; Transoceanic ship, containers; GLO
- km_8: 18000
  Distance in km, for solvent-based printing ink, rotogravure printing // solvent-based printing ink production // eu+efta+uk; Transoceanic ship, containers; GLO
- kg_km_8: 30; = kg_8*km_8
  Transport amount in km*km, for solvent-based printing ink, rotogravure printing // solvent-based printing ink production // eu+efta+uk; Transoceanic ship, containers; GLO
- kg_9: 0.0087156
  Mass in kg, for label, paper // label, paper // eu+efta+uk; Transoceanic ship, containers; GLO
- km_9: 200330
  Distance in km, for label, paper // label, paper // eu+efta+uk; Transoceanic ship, containers; GLO
- kg_km_9: 1746; = kg_9*km_9
  Transport amount in km*km, for label, paper // label, paper // eu+efta+uk; Transoceanic ship, containers; GLO
- kg_10: 0.00166667
  Mass in kg, for solvent-free printing ink, flexo printing // solvent-free printing ink production // eu+efta+uk; Transoceanic ship, containers; GLO
- km_10: 18000
  Distance in km, for solvent-free printing ink, flexo printing // solvent-free printing ink production // eu+efta+uk; Transoceanic ship, containers; GLO
- kg_km_10: 30; = kg_10*km_10
  Transport amount in km*km, for solvent-free printing ink, flexo printing // solvent-free printing ink production // eu+efta+uk; Transoceanic ship, containers; GLO
- kg_11: 0.00166667
  Mass in kg, for solvent-free printing ink, rotogravure printing // solvent-free printing ink production // eu+efta+uk; Transoceanic ship, containers; GLO
- km_11: 18000
  Distance in km, for solvent-free printing ink, rotogravure printing // solvent-free printing ink production // eu+efta+uk; Transoceanic ship, containers; GLO
- kg_km_11: 30; = kg_11*km_11
  Transport amount in km*km, for solvent-free printing ink, rotogravure printing // solvent-free printing ink production // eu+efta+uk; Transoceanic ship, containers; GLO
- kg_12: 0.00166667
  Mass in kg, for water-based printing ink, flexo printing // water-based printing ink production // eu+efta+uk; Transoceanic ship, containers; GLO
- km_12: 18000
  Distance in km, for water-based printing ink, flexo printing // water-based printing ink production // eu+efta+uk; Transoceanic ship, containers; GLO
- kg_km_12: 30; = kg_12*km_12
  Transport amount in km*km, for water-based printing ink, flexo printing // water-based printing ink production // eu+efta+uk; Transoceanic ship, containers; GLO
- kg_13: 0.00166667
  Mass in kg, for water-based printing ink, rotogravure printing // water-based printing ink production // eu+efta+uk; Transoceanic ship, containers; GLO
- km_13: 18000
  Distance in km, for water-based printing ink, rotogravure printing // water-based printing ink production // eu+efta+uk; Transoceanic ship, containers; GLO
- kg_km_13: 30; = kg_13*km_13
  Transport amount in km*km, for water-based printing ink, rotogravure printing // water-based printing ink production // eu+efta+uk; Transoceanic ship, containers; GLO

## Reference product
- brand tag // brand tag // glo: 1

## Inputs
- Electricity from Electricity grid mix 1kV-60kV - AU: 0.0292
- Electricity from Electricity grid mix 1kV-60kV - EU+EFTA+UK: 0.4302
- Electricity from Electricity grid mix 1kV-60kV - NZ: 0.0056
- Electricity from Electricity grid mix 1kV-60kV - RAF: 0.094
- Electricity from Electricity grid mix 1kV-60kV - RNA: 0.6296
- Electricity from Electricity grid mix 1kV-60kV - RSA: 0.2136
- Electricity from Electricity grid mix 1kV-60kV - RU: 0.1259
- Transport of solvent-based printing ink, flexo printing // solvent-based printing ink production // eu+efta+uk by Articulated lorry transport, Euro 4, Total weight >32 t - EU+EFTA+UK: 1.67; = kg_km_0
- Transport of solvent-based printing ink, rotogravure printing // solvent-based printing ink production // eu+efta+uk by Articulated lorry transport, Euro 4, Total weight >32 t - EU+EFTA+UK: 1.67; = kg_km_1
- Transport of label, paper // label, paper // eu+efta+uk by Articulated lorry transport, Euro 4, Total weight >32 t - EU+EFTA+UK: 97.2; = kg_km_2
- Transport of solvent-free printing ink, flexo printing // solvent-free printing ink production // eu+efta+uk by Articulated lorry transport, Euro 4, Total weight >32 t - EU+EFTA+UK: 1.67; = kg_km_3
- Transport of solvent-free printing ink, rotogravure printing // solvent-free printing ink production // eu+efta+uk by Articulated lorry transport, Euro 4, Total weight >32 t - EU+EFTA+UK: 1.67; = kg_km_4
- Transport of water-based printing ink, flexo printing // water-based printing ink production // eu+efta+uk by Articulated lorry transport, Euro 4, Total weight >32 t - EU+EFTA+UK: 1.67; = kg_km_5
- Transport of water-based printing ink, rotogravure printing // water-based printing ink production // eu+efta+uk by Articulated lorry transport, Euro 4, Total weight >32 t - EU+EFTA+UK: 3.42727; = kg_km_6
- Transport of solvent-based printing ink, flexo printing // solvent-based printing ink production // eu+efta+uk by Transoceanic ship, containers - GLO: 30; = kg_km_7
- Transport of solvent-based printing ink, rotogravure printing // solvent-based printing ink production // eu+efta+uk by Transoceanic ship, containers - GLO: 30; = kg_km_8
- Transport of label, paper // label, paper // eu+efta+uk by Transoceanic ship, containers - GLO: 1746; = kg_km_9
- Transport of solvent-free printing ink, flexo printing // solvent-free printing ink production // eu+efta+uk by Transoceanic ship, containers - GLO: 30; = kg_km_10
- Transport of solvent-free printing ink, rotogravure printing // solvent-free printing ink production // eu+efta+uk by Transoceanic ship, containers - GLO: 30; = kg_km_11
- Transport of water-based printing ink, flexo printing // water-based printing ink production // eu+efta+uk by Transoceanic ship, containers - GLO: 30; = kg_km_12
- Transport of water-based printing ink, rotogravure printing // water-based printing ink production // eu+efta+uk by Transoceanic ship, containers - GLO: 30; = kg_km_13
- Electricity from Electricity grid mix 1kV-60kV - CN: 0.645102
- Electricity from Electricity grid mix 1kV-60kV - RAS w/o CN: 0.706798
- recovered fibre for graphics grades // recovered fibre for graphics grades // eu+efta+uk: 0.0164385; = CFF_paper
- brand tag // brand tag // glo, blackbox: 1
- brand tag // brand tag // glo, elementary: 1

## Outputs
- avoided product system, paper from brand tag // avoided product system paper in brand tag // glo: 0.0164385; = avoid_paper

## Impact indicators
- Eutrophication marine: 0.000694139
- Ecotoxicity, freshwater: 3.15189
- Land use: -7.61793
- Water use: 0.196097
- Resource use, minerals and metals: 5.29985e-7
- Resource use, fossils: 8.23994
- Climate change: 0.638719
- Ozone depletion: 5.42571e-10
- Human toxicity, cancer: 3.13069e-10
- Human toxicity, non-cancer: 3.76359e-9
- EF-particulate Matter: 1.44871e-7
- Ionising radiation, human health: 0.0412164
- Photochemical ozone formation - human health: 0.00203306
- Acidification: 0.00431618
- Eutrophication, terrestrial: 0.0075793
- Eutrophication, freshwater: 3.11274e-6

## Deviations from the LCI method principle
The background data uses:
- the \xe2\x80\x9cRecycled content cut-off\xe2\x80\x9d approach to allocate end-of-life by-products and secondary materials. This allocation is explained in the description of the recycled content system model (http://www.ecoinvent.org/database/system-models-in-ecoinvent-3/cut-off-system-model/allocation-cut-off-by-classification.html).
OR
- EF compliant data

## Deviations from the LCI method approaches
Background data:
- the \xe2\x80\x9cRecycled content cut-off\xe2\x80\x9d approach to allocate end-of-life by-products and secondary materials. This allocation is explained in the description of the recycled content system model (http://www.ecoinvent.org/database/system-models-in-ecoinvent-3/cut-off-system-model/allocation-cut-off-by-classification.html). The ecoinvent database mostly relies on “Allocation – market values” apart for few exceptions particularly in the energy sector. ecoinvent energy data is replaced with EF3.0 core data as per the EF guidelines version 2.0.
OR
- EF compliant data

CFF implementation:
-For recycling of waste cotton. The original amount of waste material was 0.0286764705882353kg. The default A of 0.8 for textile shirt was used. 20% of the original amount is therefore considered to reflect the implementation of the CFF formula. Being pre-consumer waste, Qsout/Qp is assumed to be 1. The E*v part of the formula is modelled as a negative input of the relevant virgin material. 90% of the amount of the produced waste material is used to account for losses during recycling.

## Modelling constants
All modelling constants follow the requirements listed in the Tender Specifications 070201/2020/SER/ENV.B1. Completeness: There are no intentional cut-offs in the inventory no matter how small their contribution to all the EF impact categories is. Eventual cut-offs are in compliance with the Guide for EF compliant data sets (JRC 2020), i.e. only if below the 3% cut-off rule. Water use: water use is modelled at country level using separate flows for water withdrawal, water release and water evaporation. Handling multi-functional processes: the following PEF multi- functionality decision hierarchy is applied for resolving all multi- functionality problems: (1) subdivision or system expansion; (2) allocation based on a relevant underlying physical relationship (substitution may apply here); (3) allocation based on some other relationship. Direct land use change: GHG emissions from direct LUC allocated to good/service for 20 years after the LUC occurs, with IPCC default values. Carbon storage and delayed emissions: credits associated with temporary (carbon) storage or delayed emissions up to 300 years are not be considered. Emissions off-setting: are not included. Capital goods (including infrastructures) and their End of life: they are included. System boundaries: system boundaries include all processes linked to the product supply chain (e.g. maintenance). Time period: emissions and removals are modelled as if released or removed at the beginning of the assessment method. Fossil and biogenic carbon emissions and removals: removals and emissions are modelled as follows: All GHG emissions from fossil fuels (including peat and limestone) are modelled consistently with the most updated ILCD list of elementary flows. The non-fossil (biogenic) carbon flows are modelled consistently with the most updated ILCD list of elementary flows.

## Cut-off and completeness
There are no intentional cut-offs in the inventory no matter how small their contribution to all the EF impact categories is. Eventual cut-offs are in compliance with the Guide for EF compliant data sets (JRC 2020), i.e. only if below the 3% cut-off rule. The dataset dry mass and water balance has been checked to ensure the inventory is complete. Capital goods (e.g. infrastructure) and their end-of-life are included.

## Data selection and combination
These datasets include, in both their foreground and background data, links to EF3.0 compliant data.
The relevant background data on energy, transport, and End of Life are from the LCDN data node (http://lcdn.thinkstep.com/Node/).
All other background data in the supply of this product for which no EF3.0 process was available are from ecoinvent v3.7 database (www.ecoinvent.org) or other data sources.

## Data treatment and extrapolations
Several data sources have been used to model the inventory.

## Review details
Internal reviews have been asked to review the plausibility of the unit process, LCIA scores, and DQRs. Internal reviewers have also been asked to review the data for EF compliancy. The consortium is therefore responsible for aspects such as compliancy with the ILCD format, including validation in Look@LCI, and nomenclature.
Internal reviwers have been asked to judge based on the process name, that the unit process models in a complete and representative way the process in the requested location. The review encompassed the plausability of:
- exchanges with nature (elementary flows) as well as exchanges such as product and waste flows.
- meta information (general comment, technology comment, system boundaries, allocation, cut-off rules, etc.). Reviewers were asked to judge if the provided information is enough to understand the content of the process.
- LCIA scores
- DQRs including precision, technology, time and geography. As well as the overall DQR.
External reviewers have been asked to provide their expertise in the field of interest. External reviewers have been asked to review the unit process, including eventual methodological choices, the LCIA scores (provided with contribution scores as well), and DQRs. External reviewers have been provided all the information in a tool developed by the consortium for the purpose of this project.
External reviewers have been asked to judge based on the process name, that the unit process models in a complete and representative way the process in the requested location. The review encompassed:
- Plausability and completeness of exchanges with nature (elementary flows) as well as exchanges such as product and waste flows.
- Review of meta information (general comment, technology comment, system boundaries, allocation, cut-off rules, etc.). Reviewers were asked to judge if the provided information is enough to understand the content of the process.
- Review of properties (biogenic carbon and water content).
- Review of allocation keys.
- Plausability of LCIA scores calculated by the consortium.
- Plausability of DQRs including precision, technology, time and geography. As well as the overall DQR.

## Data sources
- Background Data for Representative products and organisations. EF 3.0 compliant (data stock)
- Vignesh, K. S., Rajadesingu, S., & Arunachalam, K. D. (2021). Challenges, issues, and problems with zero-waste tools. In Concepts of Advanced Zero Waste Tools (pp. 69-90). Elsevier.
- ALI, B. A. S. (2019). EVALUATION OF WASTE IN PRODUCTION IN KARARRI PRINTING, PUBLISHING, AND DISTRIBUTION COMPANY (Doctoral dissertation, Sudan University of Science and Technology).
- ENV23 - UK statistics on waste, https://www.gov.uk/government/statistical-data-sets/env23-uk-waste-data-and-management, Access Date: 15.06.2021

## Intended applications
Implementation of regular Product Environmental Footprint (PEF) studies and Organisation Environmental Footprint (OEF) studies exclusively under the specified Product groups and sectors as defined in the Product Environmental Footprint Category Rules (PEFCR) and Organisation Environmental Footprint Sectorial Rules (OEFSR) listed in http://ec.europa.eu/environment/eussd/smgp/PEFCR_OEFSR.htm
