# semi-chemical wood pulp; technology mix; production mix, at plant; dry mass 0.9 kg; carbon content, non fossil 0.494

Dataset: ILCD process, Partly terminated system
Geography: WORLD (WITHOUT EU+EFTA+UK)
Reference year: 2020
Valid until: 2024
Classification: Materials production / Paper and cardboards
LCI method principle: Attributional
LCI method approaches: Allocation - market value
Completeness: All relevant flows quantified
Project: Provision of process-based 3.0 Environmental Footprint-compliant life cycle inventory datasets - Renewable materials - contract number 070201/2020/840085/SER/ENV.B.1
Generated by: ecoinvent
Owner: ecoinvent
Compliance: ILCD Data Network - Entry-level; Suggestions for updating the PEF method 2019; ISO 14040 Environmental Management – Life Cycle Assessment – Principles and Framework, 2006; ISO 14044:2006. Environmental Management – Life Cycle Assessment – Requirements and guidelines.; Environmental Footprint 3.1
Review: Dependent internal review by Lucia Valsasina, Emilia Moreno Ruiz; Independent review panel by Michael Sturges
Data quality: Overall quality: Good; Time representativeness: Very good; Geographical representativeness: Fair; Technological representativeness: Good; Precision: Good; Methodological appropriateness and consistency: Not applicable
Amounts: no units in this file; such an amount is in the reference unit of its flow, which a separate flow dataset defines
copyright: true
licenseType: Free of charge for some user types or use types
accessRestrictions: Free of charge for all final users implementing a regular Product Environmental Footprint (PEF) studies and Organisation Environmental Footprint (OEF) studies exclusively under the specified Product groups and sectors as defined in the Product Environmental Footprint Category Rules (PEFCR) and Organisation Environmental Footprint Sectorial Rules (OEFSR) listed in http://ec.europa.eu/environment/eussd/smgp/PEFCR_OEFSR.htm and in accordance with the terms and conditions of the EULA (available at https://ecoinvent.lca-data.com/) exclusively until 31st December 2024. Any use of this dataset or any derivative data not within the specific context of one of the PEF/OEF projects or after the end of 2024 is not permitted.

## General comment
Notice: this data set supersedes the EF3.0-compliant version (see link under "preceding data set version" below calculated with the EF3.0). The life cycle inventory is not changed from the original EF3.0 data set. The LCIA results are calculated based on the EF3.1 methods which provide updated characterisation factors in the following impact categories: Climate Change, Ecotoxicity freshwater, Photochemical Ozone Formation, Acidification, Human Toxicity non-cancer, and Human Toxicity cancer. The review report and the data quality ratings refer to the original results. The data set has been updated by the European Commission on the basis of the original EF3.0 data set delivered by the data provider.This dataset represents the production of 1 kg of semi-chemical wood pulp. Chemical pulp is produced by chemical pulping of biomass raw materials, most commonly hardwood and softwood,or also straw from many cereals, bagasse, reed, or esparto grass, and from other annual non-wood plants.

## Technology and included processes
Semi-chemical pulping is similar to chemical mechanical methods in that the material is first chemically treated and then ground into pulp. It can be seen that semi-chemical pulp and chemical mechanical pulp are both chemical and mechanical two-stage pulping. The distinction between the two is often based on the yield of wood raw materials. The yields obtained are generally 10% to 40% higher than those of chemical process since only 25% to 50% of the ligning and 30% to 40% of the hemicelluloses are removed. The major difference between all semichemical techniques and those of acid sulfite processes is that only a portion of the lignin is removed during the cook, after which the pulp is further reduced by mechanical disintegration. This method achieves yields as high as 60 to 80 percent, as opposed to 50 to 55 percent for other chemical processes.

## Parameters
- kg_0: 0.0276845
  Mass in kg, for sodium hydroxide, without water, in 50% solution state; Transoceanic ship, containers; GLO
- km_0: 599
  Distance in km, for sodium hydroxide, without water, in 50% solution state; Transoceanic ship, containers; GLO
- kg_km_0: 16.583; = kg_0*km_0
  Transport amount in km*km, for sodium hydroxide, without water, in 50% solution state; Transoceanic ship, containers; GLO
- kg_1: 0.0276845
  Mass in kg, for sodium hydroxide, without water, in 50% solution state; Freight train, diesel traction; EU+EFTA+UK
- km_1: 229.272
  Distance in km, for sodium hydroxide, without water, in 50% solution state; Freight train, diesel traction; EU+EFTA+UK
- kg_km_1: 6.34727; = kg_1*km_1
  Transport amount in km*km, for sodium hydroxide, without water, in 50% solution state; Freight train, diesel traction; EU+EFTA+UK
- kg_2: 0.0276845
  Mass in kg, for sodium hydroxide, without water, in 50% solution state; Freight train, electricity traction; EU+EFTA+UK
- km_2: 77.9889
  Distance in km, for sodium hydroxide, without water, in 50% solution state; Freight train, electricity traction; EU+EFTA+UK
- kg_km_2: 2.15908; = kg_2*km_2
  Transport amount in km*km, for sodium hydroxide, without water, in 50% solution state; Freight train, electricity traction; EU+EFTA+UK
- kg_3: 0.0276845
  Mass in kg, for sodium hydroxide, without water, in 50% solution state; Freight train, average; EU+EFTA+UK
- km_3: 1.8394
  Distance in km, for sodium hydroxide, without water, in 50% solution state; Freight train, average; EU+EFTA+UK
- kg_km_3: 0.050923; = kg_3*km_3
  Transport amount in km*km, for sodium hydroxide, without water, in 50% solution state; Freight train, average; EU+EFTA+UK
- kg_4: 0.0276845
  Mass in kg, for sodium hydroxide, without water, in 50% solution state; Barge; EU+EFTA+UK
- km_4: 8.08691
  Distance in km, for sodium hydroxide, without water, in 50% solution state; Barge; EU+EFTA+UK
- kg_km_4: 0.223882; = kg_4*km_4
  Transport amount in km*km, for sodium hydroxide, without water, in 50% solution state; Barge; EU+EFTA+UK
- kg_5: 0.0276845
  Mass in kg, for sodium hydroxide, without water, in 50% solution state; Barge; ROW w/o EU+EFTA
- km_5: 16.5131
  Distance in km, for sodium hydroxide, without water, in 50% solution state; Barge; ROW w/o EU+EFTA
- kg_km_5: 0.457157; = kg_5*km_5
  Transport amount in km*km, for sodium hydroxide, without water, in 50% solution state; Barge; ROW w/o EU+EFTA
- kg_6: 0.0276845
  Mass in kg, for sodium hydroxide, without water, in 50% solution state; Articulated lorry transport, Euro 4, Total weight >32 t; EU+EFTA+UK
- km_6: 57.3754
  Distance in km, for sodium hydroxide, without water, in 50% solution state; Articulated lorry transport, Euro 4, Total weight >32 t; EU+EFTA+UK
- kg_km_6: 1.58841; = kg_6*km_6
  Transport amount in km*km, for sodium hydroxide, without water, in 50% solution state; Articulated lorry transport, Euro 4, Total weight >32 t; EU+EFTA+UK
- kg_7: 0.0276845
  Mass in kg, for sodium hydroxide, without water, in 50% solution state; Articulated lorry transport, Total weight >32 t, mix Euro 0-5; ROW w/o EU+EFTA
- km_7: 151.425
  Distance in km, for sodium hydroxide, without water, in 50% solution state; Articulated lorry transport, Total weight >32 t, mix Euro 0-5; ROW w/o EU+EFTA
- kg_km_7: 4.19212; = kg_7*km_7
  Transport amount in km*km, for sodium hydroxide, without water, in 50% solution state; Articulated lorry transport, Total weight >32 t, mix Euro 0-5; ROW w/o EU+EFTA
- kg_8: 0.0010447
  Mass in kg, for chlorine dioxide // chlorine dioxide production // glo; Articulated lorry transport, Euro 4, Total weight >32 t; EU+EFTA+UK
- km_8: 1005.08
  Distance in km, for chlorine dioxide // chlorine dioxide production // glo; Articulated lorry transport, Euro 4, Total weight >32 t; EU+EFTA+UK
- kg_km_8: 1.05; = kg_8*km_8
  Transport amount in km*km, for chlorine dioxide // chlorine dioxide production // glo; Articulated lorry transport, Euro 4, Total weight >32 t; EU+EFTA+UK
- kg_9: 2.31582e-6
  Mass in kg, for diesel // diesel mix at refinery // au; Articulated lorry transport, Euro 4, Total weight >32 t; EU+EFTA+UK
- km_9: 1001.81
  Distance in km, for diesel // diesel mix at refinery // au; Articulated lorry transport, Euro 4, Total weight >32 t; EU+EFTA+UK
- kg_km_9: 0.00232; = kg_9*km_9
  Transport amount in km*km, for diesel // diesel mix at refinery // au; Articulated lorry transport, Euro 4, Total weight >32 t; EU+EFTA+UK
- kg_10: 2.9908e-5
  Mass in kg, for diesel // diesel mix at refinery // cn; Articulated lorry transport, Euro 4, Total weight >32 t; EU+EFTA+UK
- km_10: 999.734
  Distance in km, for diesel // diesel mix at refinery // cn; Articulated lorry transport, Euro 4, Total weight >32 t; EU+EFTA+UK
- kg_km_10: 0.0299; = kg_10*km_10
  Transport amount in km*km, for diesel // diesel mix at refinery // cn; Articulated lorry transport, Euro 4, Total weight >32 t; EU+EFTA+UK
- kg_11: 7.98409e-6
  Mass in kg, for diesel // diesel mix at refinery // jp; Articulated lorry transport, Euro 4, Total weight >32 t; EU+EFTA+UK
- km_11: 999.488
  Distance in km, for diesel // diesel mix at refinery // jp; Articulated lorry transport, Euro 4, Total weight >32 t; EU+EFTA+UK
- kg_km_11: 0.00798; = kg_11*km_11
  Transport amount in km*km, for diesel // diesel mix at refinery // jp; Articulated lorry transport, Euro 4, Total weight >32 t; EU+EFTA+UK
- kg_12: 5.60612e-6
  Mass in kg, for diesel // diesel mix at refinery // raf; Articulated lorry transport, Euro 4, Total weight >32 t; EU+EFTA+UK
- km_12: 1000.69
  Distance in km, for diesel // diesel mix at refinery // raf; Articulated lorry transport, Euro 4, Total weight >32 t; EU+EFTA+UK
- kg_km_12: 0.00561; = kg_12*km_12
  Transport amount in km*km, for diesel // diesel mix at refinery // raf; Articulated lorry transport, Euro 4, Total weight >32 t; EU+EFTA+UK
- kg_13: 4.34835e-5
  Mass in kg, for diesel // diesel mix at refinery // ras w/o cn; Articulated lorry transport, Euro 4, Total weight >32 t; EU+EFTA+UK
- km_13: 1000.38
  Distance in km, for diesel // diesel mix at refinery // ras w/o cn; Articulated lorry transport, Euro 4, Total weight >32 t; EU+EFTA+UK
- kg_km_13: 0.0435; = kg_13*km_13
  Transport amount in km*km, for diesel // diesel mix at refinery // ras w/o cn; Articulated lorry transport, Euro 4, Total weight >32 t; EU+EFTA+UK
- kg_14: 4.4685e-5
  Mass in kg, for diesel // diesel mix at refinery // rna; Articulated lorry transport, Euro 4, Total weight >32 t; EU+EFTA+UK
- km_14: 1000.34
  Distance in km, for diesel // diesel mix at refinery // rna; Articulated lorry transport, Euro 4, Total weight >32 t; EU+EFTA+UK
- kg_km_14: 0.0447; = kg_14*km_14
  Transport amount in km*km, for diesel // diesel mix at refinery // rna; Articulated lorry transport, Euro 4, Total weight >32 t; EU+EFTA+UK
- kg_15: 1.04656e-5
  Mass in kg, for diesel // diesel mix at refinery // rsa; Articulated lorry transport, Euro 4, Total weight >32 t; EU+EFTA+UK
- km_15: 1003.28
  Distance in km, for diesel // diesel mix at refinery // rsa; Articulated lorry transport, Euro 4, Total weight >32 t; EU+EFTA+UK
- kg_km_15: 0.0105; = kg_15*km_15
  Transport amount in km*km, for diesel // diesel mix at refinery // rsa; Articulated lorry transport, Euro 4, Total weight >32 t; EU+EFTA+UK
- kg_16: 1.22566e-5
  Mass in kg, for diesel // diesel mix at refinery // ru; Articulated lorry transport, Euro 4, Total weight >32 t; EU+EFTA+UK
- km_16: 1003.54
  Distance in km, for diesel // diesel mix at refinery // ru; Articulated lorry transport, Euro 4, Total weight >32 t; EU+EFTA+UK
- kg_km_16: 0.0123; = kg_16*km_16
  Transport amount in km*km, for diesel // diesel mix at refinery // ru; Articulated lorry transport, Euro 4, Total weight >32 t; EU+EFTA+UK
- kg_17: 0.0025
  Mass in kg, for edta // edta production // eu+efta+uk; Articulated lorry transport, Euro 4, Total weight >32 t; EU+EFTA+UK
- km_17: 1000
  Distance in km, for edta // edta production // eu+efta+uk; Articulated lorry transport, Euro 4, Total weight >32 t; EU+EFTA+UK
- kg_km_17: 2.5; = kg_17*km_17
  Transport amount in km*km, for edta // edta production // eu+efta+uk; Articulated lorry transport, Euro 4, Total weight >32 t; EU+EFTA+UK
- kg_18: 1.79462
  Mass in kg, for hardwood under bark // hardwood forestry // glo; Articulated lorry transport, Euro 4, Total weight >32 t; EU+EFTA+UK
- km_18: 924.989
  Distance in km, for hardwood under bark // hardwood forestry // glo; Articulated lorry transport, Euro 4, Total weight >32 t; EU+EFTA+UK
- kg_km_18: 1660; = kg_18*km_18
  Transport amount in km*km, for hardwood under bark // hardwood forestry // glo; Articulated lorry transport, Euro 4, Total weight >32 t; EU+EFTA+UK
- kg_19: 0.0317805
  Mass in kg, for hydrogen peroxide, 50% // hydrogen peroxide, 50% production // eu+efta+uk; Articulated lorry transport, Euro 4, Total weight >32 t; EU+EFTA+UK
- km_19: 1000.61
  Distance in km, for hydrogen peroxide, 50% // hydrogen peroxide, 50% production // eu+efta+uk; Articulated lorry transport, Euro 4, Total weight >32 t; EU+EFTA+UK
- kg_km_19: 31.8; = kg_19*km_19
  Transport amount in km*km, for hydrogen peroxide, 50% // hydrogen peroxide, 50% production // eu+efta+uk; Articulated lorry transport, Euro 4, Total weight >32 t; EU+EFTA+UK
- kg_20: 0.034018
  Mass in kg, for lime, packed // lime production, milled, packed // row; Articulated lorry transport, Euro 4, Total weight >32 t; EU+EFTA+UK
- km_20: 999.471
  Distance in km, for lime, packed // lime production, milled, packed // row; Articulated lorry transport, Euro 4, Total weight >32 t; EU+EFTA+UK
- kg_km_20: 34; = kg_20*km_20
  Transport amount in km*km, for lime, packed // lime production, milled, packed // row; Articulated lorry transport, Euro 4, Total weight >32 t; EU+EFTA+UK
- kg_21: 0.00424409
  Mass in kg, for magnesium oxide // magnesium oxide production // eu+efta+uk; Articulated lorry transport, Euro 4, Total weight >32 t; EU+EFTA+UK
- km_21: 999.037
  Distance in km, for magnesium oxide // magnesium oxide production // eu+efta+uk; Articulated lorry transport, Euro 4, Total weight >32 t; EU+EFTA+UK
- kg_km_21: 4.24; = kg_21*km_21
  Transport amount in km*km, for magnesium oxide // magnesium oxide production // eu+efta+uk; Articulated lorry transport, Euro 4, Total weight >32 t; EU+EFTA+UK
- kg_22: 0.000391762
  Mass in kg, for sodium chlorate // sodium chlorate production // glo; Articulated lorry transport, Euro 4, Total weight >32 t; EU+EFTA+UK
- km_22: 1000.61
  Distance in km, for sodium chlorate // sodium chlorate production // glo; Articulated lorry transport, Euro 4, Total weight >32 t; EU+EFTA+UK
- kg_km_22: 0.392; = kg_22*km_22
  Transport amount in km*km, for sodium chlorate // sodium chlorate production // glo; Articulated lorry transport, Euro 4, Total weight >32 t; EU+EFTA+UK
- kg_23: 0.02
  Mass in kg, for sodium silicate powder // sodium silicate powder production // eu+efta+uk; Articulated lorry transport, Euro 4, Total weight >32 t; EU+EFTA+UK
- km_23: 1000
  Distance in km, for sodium silicate powder // sodium silicate powder production // eu+efta+uk; Articulated lorry transport, Euro 4, Total weight >32 t; EU+EFTA+UK
- kg_km_23: 20; = kg_23*km_23
  Transport amount in km*km, for sodium silicate powder // sodium silicate powder production // eu+efta+uk; Articulated lorry transport, Euro 4, Total weight >32 t; EU+EFTA+UK
- kg_24: 0.0043683
  Mass in kg, for sulphur // sulphur (elemental) at refinery // cn; Articulated lorry transport, Euro 4, Total weight >32 t; EU+EFTA+UK
- km_24: 239.154
  Distance in km, for sulphur // sulphur (elemental) at refinery // cn; Articulated lorry transport, Euro 4, Total weight >32 t; EU+EFTA+UK
- kg_km_24: 1.0447; = kg_24*km_24
  Transport amount in km*km, for sulphur // sulphur (elemental) at refinery // cn; Articulated lorry transport, Euro 4, Total weight >32 t; EU+EFTA+UK
- kg_25: 0.00087366
  Mass in kg, for sulphur // sulphur (elemental) at refinery // jp; Articulated lorry transport, Euro 4, Total weight >32 t; EU+EFTA+UK
- km_25: 1000.39
  Distance in km, for sulphur // sulphur (elemental) at refinery // jp; Articulated lorry transport, Euro 4, Total weight >32 t; EU+EFTA+UK
- kg_km_25: 0.874; = kg_25*km_25
  Transport amount in km*km, for sulphur // sulphur (elemental) at refinery // jp; Articulated lorry transport, Euro 4, Total weight >32 t; EU+EFTA+UK
- kg_26: 0.00546037
  Mass in kg, for sulphur // sulphur (elemental) at refinery // ras w/o cn; Articulated lorry transport, Euro 4, Total weight >32 t; EU+EFTA+UK
- km_26: 999.931
  Distance in km, for sulphur // sulphur (elemental) at refinery // ras w/o cn; Articulated lorry transport, Euro 4, Total weight >32 t; EU+EFTA+UK
- kg_km_26: 5.46; = kg_26*km_26
  Transport amount in km*km, for sulphur // sulphur (elemental) at refinery // ras w/o cn; Articulated lorry transport, Euro 4, Total weight >32 t; EU+EFTA+UK
- kg_27: 0.00370021
  Mass in kg, for sulphur // sulphur (elemental) at refinery // rna; Articulated lorry transport, Euro 4, Total weight >32 t; EU+EFTA+UK
- km_27: 999.944
  Distance in km, for sulphur // sulphur (elemental) at refinery // rna; Articulated lorry transport, Euro 4, Total weight >32 t; EU+EFTA+UK
- kg_km_27: 3.7; = kg_27*km_27
  Transport amount in km*km, for sulphur // sulphur (elemental) at refinery // rna; Articulated lorry transport, Euro 4, Total weight >32 t; EU+EFTA+UK
- kg_28: 0.000385438
  Mass in kg, for sulphur // sulphur (elemental) at refinery // rsa; Articulated lorry transport, Euro 4, Total weight >32 t; EU+EFTA+UK
- km_28: 998.863
  Distance in km, for sulphur // sulphur (elemental) at refinery // rsa; Articulated lorry transport, Euro 4, Total weight >32 t; EU+EFTA+UK
- kg_km_28: 0.385; = kg_28*km_28
  Transport amount in km*km, for sulphur // sulphur (elemental) at refinery // rsa; Articulated lorry transport, Euro 4, Total weight >32 t; EU+EFTA+UK
- kg_29: 0.00192719
  Mass in kg, for sulphur // sulphur (elemental) at refinery // ru; Articulated lorry transport, Euro 4, Total weight >32 t; EU+EFTA+UK
- km_29: 1001.46
  Distance in km, for sulphur // sulphur (elemental) at refinery // ru; Articulated lorry transport, Euro 4, Total weight >32 t; EU+EFTA+UK
- kg_km_29: 1.93; = kg_29*km_29
  Transport amount in km*km, for sulphur // sulphur (elemental) at refinery // ru; Articulated lorry transport, Euro 4, Total weight >32 t; EU+EFTA+UK
- kg_30: 0.0174987
  Mass in kg, for sulphur dioxide // sulphur dioxide production // glo; Articulated lorry transport, Euro 4, Total weight >32 t; EU+EFTA+UK
- km_30: 1000.07
  Distance in km, for sulphur dioxide // sulphur dioxide production // glo; Articulated lorry transport, Euro 4, Total weight >32 t; EU+EFTA+UK
- kg_km_30: 17.5; = kg_30*km_30
  Transport amount in km*km, for sulphur dioxide // sulphur dioxide production // glo; Articulated lorry transport, Euro 4, Total weight >32 t; EU+EFTA+UK
- kg_31: 0.000261175
  Mass in kg, for sulphuric acid // sulphuric acid production // glo; Articulated lorry transport, Euro 4, Total weight >32 t; EU+EFTA+UK
- km_31: 999.332
  Distance in km, for sulphuric acid // sulphuric acid production // glo; Articulated lorry transport, Euro 4, Total weight >32 t; EU+EFTA+UK
- kg_km_31: 0.261; = kg_31*km_31
  Transport amount in km*km, for sulphuric acid // sulphuric acid production // glo; Articulated lorry transport, Euro 4, Total weight >32 t; EU+EFTA+UK
- kg_32: 0.0010447
  Mass in kg, for chlorine dioxide // chlorine dioxide production // glo; Transoceanic ship, containers; GLO
- km_32: 17995.6
  Distance in km, for chlorine dioxide // chlorine dioxide production // glo; Transoceanic ship, containers; GLO
- kg_km_32: 18.8; = kg_32*km_32
  Transport amount in km*km, for chlorine dioxide // chlorine dioxide production // glo; Transoceanic ship, containers; GLO
- kg_33: 2.31582e-6
  Mass in kg, for diesel // diesel mix at refinery // au; Transoceanic ship, containers; GLO
- km_33: 18049.8
  Distance in km, for diesel // diesel mix at refinery // au; Transoceanic ship, containers; GLO
- kg_km_33: 0.0418; = kg_33*km_33
  Transport amount in km*km, for diesel // diesel mix at refinery // au; Transoceanic ship, containers; GLO
- kg_34: 2.9908e-5
  Mass in kg, for diesel // diesel mix at refinery // cn; Transoceanic ship, containers; GLO
- km_34: 17988.5
  Distance in km, for diesel // diesel mix at refinery // cn; Transoceanic ship, containers; GLO
- kg_km_34: 0.538; = kg_34*km_34
  Transport amount in km*km, for diesel // diesel mix at refinery // cn; Transoceanic ship, containers; GLO
- kg_35: 7.98409e-6
  Mass in kg, for diesel // diesel mix at refinery // jp; Transoceanic ship, containers; GLO
- km_35: 18035.9
  Distance in km, for diesel // diesel mix at refinery // jp; Transoceanic ship, containers; GLO
- kg_km_35: 0.144; = kg_35*km_35
  Transport amount in km*km, for diesel // diesel mix at refinery // jp; Transoceanic ship, containers; GLO
- kg_36: 5.60612e-6
  Mass in kg, for diesel // diesel mix at refinery // raf; Transoceanic ship, containers; GLO
- km_36: 18016
  Distance in km, for diesel // diesel mix at refinery // raf; Transoceanic ship, containers; GLO
- kg_km_36: 0.101; = kg_36*km_36
  Transport amount in km*km, for diesel // diesel mix at refinery // raf; Transoceanic ship, containers; GLO
- kg_37: 4.34835e-5
  Mass in kg, for diesel // diesel mix at refinery // ras w/o cn; Transoceanic ship, containers; GLO
- km_37: 18006.8
  Distance in km, for diesel // diesel mix at refinery // ras w/o cn; Transoceanic ship, containers; GLO
- kg_km_37: 0.783; = kg_37*km_37
  Transport amount in km*km, for diesel // diesel mix at refinery // ras w/o cn; Transoceanic ship, containers; GLO
- kg_38: 4.4685e-5
  Mass in kg, for diesel // diesel mix at refinery // rna; Transoceanic ship, containers; GLO
- km_38: 18015
  Distance in km, for diesel // diesel mix at refinery // rna; Transoceanic ship, containers; GLO
- kg_km_38: 0.805; = kg_38*km_38
  Transport amount in km*km, for diesel // diesel mix at refinery // rna; Transoceanic ship, containers; GLO
- kg_39: 1.04656e-5
  Mass in kg, for diesel // diesel mix at refinery // rsa; Transoceanic ship, containers; GLO
- km_39: 18059.1
  Distance in km, for diesel // diesel mix at refinery // rsa; Transoceanic ship, containers; GLO
- kg_km_39: 0.189; = kg_39*km_39
  Transport amount in km*km, for diesel // diesel mix at refinery // rsa; Transoceanic ship, containers; GLO
- kg_40: 1.22566e-5
  Mass in kg, for diesel // diesel mix at refinery // ru; Transoceanic ship, containers; GLO
- km_40: 18031
  Distance in km, for diesel // diesel mix at refinery // ru; Transoceanic ship, containers; GLO
- kg_km_40: 0.221; = kg_40*km_40
  Transport amount in km*km, for diesel // diesel mix at refinery // ru; Transoceanic ship, containers; GLO
- kg_41: 0.0025
  Mass in kg, for edta // edta production // eu+efta+uk; Transoceanic ship, containers; GLO
- km_41: 18000
  Distance in km, for edta // edta production // eu+efta+uk; Transoceanic ship, containers; GLO
- kg_km_41: 45; = kg_41*km_41
  Transport amount in km*km, for edta // edta production // eu+efta+uk; Transoceanic ship, containers; GLO
- kg_42: 1.79462
  Mass in kg, for hardwood under bark // hardwood forestry // glo; Transoceanic ship, containers; GLO
- km_42: 16605.2
  Distance in km, for hardwood under bark // hardwood forestry // glo; Transoceanic ship, containers; GLO
- kg_km_42: 29800; = kg_42*km_42
  Transport amount in km*km, for hardwood under bark // hardwood forestry // glo; Transoceanic ship, containers; GLO
- kg_43: 0.0317805
  Mass in kg, for hydrogen peroxide, 50% // hydrogen peroxide, 50% production // eu+efta+uk; Transoceanic ship, containers; GLO
- km_43: 17998.5
  Distance in km, for hydrogen peroxide, 50% // hydrogen peroxide, 50% production // eu+efta+uk; Transoceanic ship, containers; GLO
- kg_km_43: 572; = kg_43*km_43
  Transport amount in km*km, for hydrogen peroxide, 50% // hydrogen peroxide, 50% production // eu+efta+uk; Transoceanic ship, containers; GLO
- kg_44: 0.034018
  Mass in kg, for lime, packed // lime production, milled, packed // row; Transoceanic ship, containers; GLO
- km_44: 17990.5
  Distance in km, for lime, packed // lime production, milled, packed // row; Transoceanic ship, containers; GLO
- kg_km_44: 612; = kg_44*km_44
  Transport amount in km*km, for lime, packed // lime production, milled, packed // row; Transoceanic ship, containers; GLO
- kg_45: 0.00424409
  Mass in kg, for magnesium oxide // magnesium oxide production // eu+efta+uk; Transoceanic ship, containers; GLO
- km_45: 18001.5
  Distance in km, for magnesium oxide // magnesium oxide production // eu+efta+uk; Transoceanic ship, containers; GLO
- kg_km_45: 76.4; = kg_45*km_45
  Transport amount in km*km, for magnesium oxide // magnesium oxide production // eu+efta+uk; Transoceanic ship, containers; GLO
- kg_46: 0.000391762
  Mass in kg, for sodium chlorate // sodium chlorate production // glo; Transoceanic ship, containers; GLO
- km_46: 18021.2
  Distance in km, for sodium chlorate // sodium chlorate production // glo; Transoceanic ship, containers; GLO
- kg_km_46: 7.06; = kg_46*km_46
  Transport amount in km*km, for sodium chlorate // sodium chlorate production // glo; Transoceanic ship, containers; GLO
- kg_47: 0.02
  Mass in kg, for sodium silicate powder // sodium silicate powder production // eu+efta+uk; Transoceanic ship, containers; GLO
- km_47: 18000
  Distance in km, for sodium silicate powder // sodium silicate powder production // eu+efta+uk; Transoceanic ship, containers; GLO
- kg_km_47: 360; = kg_47*km_47
  Transport amount in km*km, for sodium silicate powder // sodium silicate powder production // eu+efta+uk; Transoceanic ship, containers; GLO
- kg_48: 0.0043683
  Mass in kg, for sulphur // sulphur (elemental) at refinery // cn; Transoceanic ship, containers; GLO
- km_48: 238.669
  Distance in km, for sulphur // sulphur (elemental) at refinery // cn; Transoceanic ship, containers; GLO
- kg_km_48: 1.04258; = kg_48*km_48
  Transport amount in km*km, for sulphur // sulphur (elemental) at refinery // cn; Transoceanic ship, containers; GLO
- kg_49: 0.00087366
  Mass in kg, for sulphur // sulphur (elemental) at refinery // jp; Transoceanic ship, containers; GLO
- km_49: 17970.4
  Distance in km, for sulphur // sulphur (elemental) at refinery // jp; Transoceanic ship, containers; GLO
- kg_km_49: 15.7; = kg_49*km_49
  Transport amount in km*km, for sulphur // sulphur (elemental) at refinery // jp; Transoceanic ship, containers; GLO
- kg_50: 0.00546037
  Mass in kg, for sulphur // sulphur (elemental) at refinery // ras w/o cn; Transoceanic ship, containers; GLO
- km_50: 18002.4
  Distance in km, for sulphur // sulphur (elemental) at refinery // ras w/o cn; Transoceanic ship, containers; GLO
- kg_km_50: 98.3; = kg_50*km_50
  Transport amount in km*km, for sulphur // sulphur (elemental) at refinery // ras w/o cn; Transoceanic ship, containers; GLO
- kg_51: 0.00370021
  Mass in kg, for sulphur // sulphur (elemental) at refinery // rna; Transoceanic ship, containers; GLO
- km_51: 17999
  Distance in km, for sulphur // sulphur (elemental) at refinery // rna; Transoceanic ship, containers; GLO
- kg_km_51: 66.6; = kg_51*km_51
  Transport amount in km*km, for sulphur // sulphur (elemental) at refinery // rna; Transoceanic ship, containers; GLO
- kg_52: 0.000385438
  Mass in kg, for sulphur // sulphur (elemental) at refinery // rsa; Transoceanic ship, containers; GLO
- km_52: 17979.5
  Distance in km, for sulphur // sulphur (elemental) at refinery // rsa; Transoceanic ship, containers; GLO
- kg_km_52: 6.93; = kg_52*km_52
  Transport amount in km*km, for sulphur // sulphur (elemental) at refinery // rsa; Transoceanic ship, containers; GLO
- kg_53: 0.00192719
  Mass in kg, for sulphur // sulphur (elemental) at refinery // ru; Transoceanic ship, containers; GLO
- km_53: 18005.5
  Distance in km, for sulphur // sulphur (elemental) at refinery // ru; Transoceanic ship, containers; GLO
- kg_km_53: 34.7; = kg_53*km_53
  Transport amount in km*km, for sulphur // sulphur (elemental) at refinery // ru; Transoceanic ship, containers; GLO
- kg_54: 0.0174987
  Mass in kg, for sulphur dioxide // sulphur dioxide production // glo; Transoceanic ship, containers; GLO
- km_54: 18001.3
  Distance in km, for sulphur dioxide // sulphur dioxide production // glo; Transoceanic ship, containers; GLO
- kg_km_54: 315; = kg_54*km_54
  Transport amount in km*km, for sulphur dioxide // sulphur dioxide production // glo; Transoceanic ship, containers; GLO
- kg_55: 0.000261175
  Mass in kg, for sulphuric acid // sulphuric acid production // glo; Transoceanic ship, containers; GLO
- km_55: 17995.6
  Distance in km, for sulphuric acid // sulphuric acid production // glo; Transoceanic ship, containers; GLO
- kg_km_55: 4.7; = kg_55*km_55
  Transport amount in km*km, for sulphuric acid // sulphuric acid production // glo; Transoceanic ship, containers; GLO

## Reference product
- semi-chemical wood pulp // semi-chemical wood pulp // world (without eu+efta+uk): 1

## Inputs
- Electricity from Electricity grid mix 1kV-60kV - AU: 0.152353
- Electricity from Electricity grid mix 1kV-60kV - NZ: 0.0267235
- Electricity from Electricity grid mix 1kV-60kV - RAF: 0.115203
- Electricity from Electricity grid mix 1kV-60kV - RAS w/o CN: 0.086029
- Electricity from Electricity grid mix 1kV-60kV - RNA: 0.195492
- Electricity from Electricity grid mix 1kV-60kV - RSA: 1.23711
- Electricity from Electricity grid mix 1kV-60kV - RU: 0.00509169
- Thermal energy (MJ) from Thermal energy from biogas - EU+EFTA+UK: 0.410011
- Thermal energy (MJ) from Thermal energy from biogas - ROW: 0.481317
- Thermal energy (MJ) from Thermal energy from hard coal - EU+EFTA+UK: 3.7827
- Thermal energy (MJ) from Thermal energy from hard coal - ROW: 4.44056
- Thermal energy (MJ) from Thermal energy from heavy fuel oil (HFO) - EU+EFTA+UK: 0.0221462
- Thermal energy (MJ) from Thermal energy from heavy fuel oil (HFO) - ROW: 0.0259977
- Thermal energy (MJ) from Thermal energy from light fuel oil (LFO) - EU+EFTA+UK: 0.314978
- Thermal energy (MJ) from Thermal energy from light fuel oil (LFO) - ROW: 0.369757
- Thermal energy (MJ) from Thermal energy from lignite - EU+EFTA+UK: 0.32893
- Thermal energy (MJ) from Thermal energy from lignite - ROW: 0.386135
- Thermal energy (MJ) from Thermal energy from LPG - EU+EFTA+UK: 0.0176527
- Thermal energy (MJ) from Thermal energy from LPG - ROW: 0.0207228
- Transport of sodium hydroxide, without water, in 50% solution state by Transoceanic ship, containers - GLO: 16.583; = kg_km_0
- Transport of sodium hydroxide, without water, in 50% solution state by Freight train, diesel traction - EU+EFTA+UK: 6.34727; = kg_km_1
- Transport of sodium hydroxide, without water, in 50% solution state by Freight train, electricity traction - EU+EFTA+UK: 2.15908; = kg_km_2
- Transport of sodium hydroxide, without water, in 50% solution state by Freight train, average - EU+EFTA+UK: 0.050923; = kg_km_3
- Transport of sodium hydroxide, without water, in 50% solution state by Barge - EU+EFTA+UK: 0.223882; = kg_km_4
- Transport of sodium hydroxide, without water, in 50% solution state by Barge - ROW w/o EU+EFTA: 0.457157; = kg_km_5
- Transport of sodium hydroxide, without water, in 50% solution state by Articulated lorry transport, Euro 4, Total weight >32 t - EU+EFTA+UK: 1.58841; = kg_km_6
- Transport of sodium hydroxide, without water, in 50% solution state by Articulated lorry transport, Total weight >32 t, mix Euro 0-5 - ROW w/o EU+EFTA: 4.19212; = kg_km_7
- Transport of chlorine dioxide // chlorine dioxide production // glo by Articulated lorry transport, Euro 4, Total weight >32 t - EU+EFTA+UK: 1.05; = kg_km_8
- Transport of diesel // diesel mix at refinery // au by Articulated lorry transport, Euro 4, Total weight >32 t - EU+EFTA+UK: 0.00232; = kg_km_9
- Transport of diesel // diesel mix at refinery // cn by Articulated lorry transport, Euro 4, Total weight >32 t - EU+EFTA+UK: 0.0299; = kg_km_10
- Transport of diesel // diesel mix at refinery // jp by Articulated lorry transport, Euro 4, Total weight >32 t - EU+EFTA+UK: 0.00798; = kg_km_11
- Transport of diesel // diesel mix at refinery // raf by Articulated lorry transport, Euro 4, Total weight >32 t - EU+EFTA+UK: 0.00561; = kg_km_12
- Transport of diesel // diesel mix at refinery // ras w/o cn by Articulated lorry transport, Euro 4, Total weight >32 t - EU+EFTA+UK: 0.0435; = kg_km_13
- Transport of diesel // diesel mix at refinery // rna by Articulated lorry transport, Euro 4, Total weight >32 t - EU+EFTA+UK: 0.0447; = kg_km_14
- Transport of diesel // diesel mix at refinery // rsa by Articulated lorry transport, Euro 4, Total weight >32 t - EU+EFTA+UK: 0.0105; = kg_km_15
- Transport of diesel // diesel mix at refinery // ru by Articulated lorry transport, Euro 4, Total weight >32 t - EU+EFTA+UK: 0.0123; = kg_km_16
- Transport of edta // edta production // eu+efta+uk by Articulated lorry transport, Euro 4, Total weight >32 t - EU+EFTA+UK: 2.5; = kg_km_17
- Transport of hardwood under bark // hardwood forestry // glo by Articulated lorry transport, Euro 4, Total weight >32 t - EU+EFTA+UK: 1660; = kg_km_18
- Transport of hydrogen peroxide, 50% // hydrogen peroxide, 50% production // eu+efta+uk by Articulated lorry transport, Euro 4, Total weight >32 t - EU+EFTA+UK: 31.8; = kg_km_19
- Transport of lime, packed // lime production, milled, packed // row by Articulated lorry transport, Euro 4, Total weight >32 t - EU+EFTA+UK: 34; = kg_km_20
- Transport of magnesium oxide // magnesium oxide production // eu+efta+uk by Articulated lorry transport, Euro 4, Total weight >32 t - EU+EFTA+UK: 4.24; = kg_km_21
- Transport of sodium chlorate // sodium chlorate production // glo by Articulated lorry transport, Euro 4, Total weight >32 t - EU+EFTA+UK: 0.392; = kg_km_22
- Transport of sodium silicate powder // sodium silicate powder production // eu+efta+uk by Articulated lorry transport, Euro 4, Total weight >32 t - EU+EFTA+UK: 20; = kg_km_23
- Transport of sulphur // sulphur (elemental) at refinery // cn by Articulated lorry transport, Euro 4, Total weight >32 t - EU+EFTA+UK: 1.0447; = kg_km_24
- Transport of sulphur // sulphur (elemental) at refinery // jp by Articulated lorry transport, Euro 4, Total weight >32 t - EU+EFTA+UK: 0.874; = kg_km_25
- Transport of sulphur // sulphur (elemental) at refinery // ras w/o cn by Articulated lorry transport, Euro 4, Total weight >32 t - EU+EFTA+UK: 5.46; = kg_km_26
- Transport of sulphur // sulphur (elemental) at refinery // rna by Articulated lorry transport, Euro 4, Total weight >32 t - EU+EFTA+UK: 3.7; = kg_km_27
- Transport of sulphur // sulphur (elemental) at refinery // rsa by Articulated lorry transport, Euro 4, Total weight >32 t - EU+EFTA+UK: 0.385; = kg_km_28
- Transport of sulphur // sulphur (elemental) at refinery // ru by Articulated lorry transport, Euro 4, Total weight >32 t - EU+EFTA+UK: 1.93; = kg_km_29
- Transport of sulphur dioxide // sulphur dioxide production // glo by Articulated lorry transport, Euro 4, Total weight >32 t - EU+EFTA+UK: 17.5; = kg_km_30
- Transport of sulphuric acid // sulphuric acid production // glo by Articulated lorry transport, Euro 4, Total weight >32 t - EU+EFTA+UK: 0.261; = kg_km_31
- Transport of chlorine dioxide // chlorine dioxide production // glo by Transoceanic ship, containers - GLO: 18.8; = kg_km_32
- Transport of diesel // diesel mix at refinery // au by Transoceanic ship, containers - GLO: 0.0418; = kg_km_33
- Transport of diesel // diesel mix at refinery // cn by Transoceanic ship, containers - GLO: 0.538; = kg_km_34
- Transport of diesel // diesel mix at refinery // jp by Transoceanic ship, containers - GLO: 0.144; = kg_km_35
- Transport of diesel // diesel mix at refinery // raf by Transoceanic ship, containers - GLO: 0.101; = kg_km_36
- Transport of diesel // diesel mix at refinery // ras w/o cn by Transoceanic ship, containers - GLO: 0.783; = kg_km_37
- Transport of diesel // diesel mix at refinery // rna by Transoceanic ship, containers - GLO: 0.805; = kg_km_38
- Transport of diesel // diesel mix at refinery // rsa by Transoceanic ship, containers - GLO: 0.189; = kg_km_39
- Transport of diesel // diesel mix at refinery // ru by Transoceanic ship, containers - GLO: 0.221; = kg_km_40
- Transport of edta // edta production // eu+efta+uk by Transoceanic ship, containers - GLO: 45; = kg_km_41
- Transport of hardwood under bark // hardwood forestry // glo by Transoceanic ship, containers - GLO: 29800; = kg_km_42
- Transport of hydrogen peroxide, 50% // hydrogen peroxide, 50% production // eu+efta+uk by Transoceanic ship, containers - GLO: 572; = kg_km_43
- Transport of lime, packed // lime production, milled, packed // row by Transoceanic ship, containers - GLO: 612; = kg_km_44
- Transport of magnesium oxide // magnesium oxide production // eu+efta+uk by Transoceanic ship, containers - GLO: 76.4; = kg_km_45
- Transport of sodium chlorate // sodium chlorate production // glo by Transoceanic ship, containers - GLO: 7.06; = kg_km_46
- Transport of sodium silicate powder // sodium silicate powder production // eu+efta+uk by Transoceanic ship, containers - GLO: 360; = kg_km_47
- Transport of sulphur // sulphur (elemental) at refinery // cn by Transoceanic ship, containers - GLO: 1.04258; = kg_km_48
- Transport of sulphur // sulphur (elemental) at refinery // jp by Transoceanic ship, containers - GLO: 15.7; = kg_km_49
- Transport of sulphur // sulphur (elemental) at refinery // ras w/o cn by Transoceanic ship, containers - GLO: 98.3; = kg_km_50
- Transport of sulphur // sulphur (elemental) at refinery // rna by Transoceanic ship, containers - GLO: 66.6; = kg_km_51
- Transport of sulphur // sulphur (elemental) at refinery // rsa by Transoceanic ship, containers - GLO: 6.93; = kg_km_52
- Transport of sulphur // sulphur (elemental) at refinery // ru by Transoceanic ship, containers - GLO: 34.7; = kg_km_53
- Transport of sulphur dioxide // sulphur dioxide production // glo by Transoceanic ship, containers - GLO: 315; = kg_km_54
- Transport of sulphuric acid // sulphuric acid production // glo by Transoceanic ship, containers - GLO: 4.7; = kg_km_55
- semi-chemical wood pulp // semi-chemical wood pulp // world (without eu+efta+uk), blackbox: 1
- semi-chemical wood pulp // semi-chemical wood pulp // world (without eu+efta+uk), elementary: 1

## Impact indicators
- Eutrophication marine: 0.00525682
- Ecotoxicity, freshwater: 15.3126
- Land use: 151.78
- Water use: 1.3025
- Resource use, minerals and metals: 4.27309e-6
- Resource use, fossils: 21.7976
- Climate change: 1.90327
- Ozone depletion: 2.82815e-8
- Human toxicity, cancer: 7.63348e-10
- Human toxicity, non-cancer: 1.0828e-8
- EF-particulate Matter: 5.0949e-7
- Ionising radiation, human health: 0.0207438
- Photochemical ozone formation - human health: 0.0139107
- Acidification: 0.0236384
- Eutrophication, terrestrial: 0.0525933
- Eutrophication, freshwater: 7.55348e-5

## Deviations from the LCI method principle
The background data uses:
- the \xe2\x80\x9cRecycled content cut-off\xe2\x80\x9d approach to allocate end-of-life by-products and secondary materials. This allocation is explained in the description of the recycled content system model (http://www.ecoinvent.org/database/system-models-in-ecoinvent-3/cut-off-system-model/allocation-cut-off-by-classification.html).
OR
- EF compliant data

## Deviations from the LCI method approaches
Background data:
- the \xe2\x80\x9cRecycled content cut-off\xe2\x80\x9d approach to allocate end-of-life by-products and secondary materials. This allocation is explained in the description of the recycled content system model (http://www.ecoinvent.org/database/system-models-in-ecoinvent-3/cut-off-system-model/allocation-cut-off-by-classification.html). The ecoinvent database mostly relies on “Allocation – market values” apart for few exceptions particularly in the energy sector. ecoinvent energy data is replaced with EF3.0 core data as per the EF guidelines version 2.0.
OR
- EF compliant data

## Modelling constants
All modelling constants follow the requirements listed in the Tender Specifications 070201/2020/SER/ENV.B1. Completeness: There are no intentional cut-offs in the inventory no matter how small their contribution to all the EF impact categories is. Eventual cut-offs are in compliance with the Guide for EF compliant data sets (JRC 2020), i.e. only if below the 3% cut-off rule. Water use: water use is modelled at country level using separate flows for water withdrawal, water release and water evaporation. Handling multi-functional processes: the following PEF multi- functionality decision hierarchy is applied for resolving all multi- functionality problems: (1) subdivision or system expansion; (2) allocation based on a relevant underlying physical relationship (substitution may apply here); (3) allocation based on some other relationship. Direct land use change: GHG emissions from direct LUC allocated to good/service for 20 years after the LUC occurs, with IPCC default values. Carbon storage and delayed emissions: credits associated with temporary (carbon) storage or delayed emissions up to 300 years are not be considered. Emissions off-setting: are not included. Capital goods (including infrastructures) and their End of life: they are included. System boundaries: system boundaries include all processes linked to the product supply chain (e.g. maintenance). Time period: emissions and removals are modelled as if released or removed at the beginning of the assessment method. Fossil and biogenic carbon emissions and removals: removals and emissions are modelled as follows: All GHG emissions from fossil fuels (including peat and limestone) are modelled consistently with the most updated ILCD list of elementary flows. The non-fossil (biogenic) carbon flows are modelled consistently with the most updated ILCD list of elementary flows.

## Cut-off and completeness
There are no intentional cut-offs in the inventory no matter how small their contribution to all the EF impact categories is. Eventual cut-offs are in compliance with the Guide for EF compliant data sets (JRC 2020), i.e. only if below the 3% cut-off rule. The dataset dry mass and water balance has been checked to ensure the inventory is complete. Capital goods (e.g. infrastructure) and their end-of-life are included.

## Data selection and combination
These datasets include, in both their foreground and background data, links to EF3.0 compliant data.
The relevant background data on energy, transport, and End of Life are from the LCDN data node (http://lcdn.thinkstep.com/Node/).
All other background data in the supply of this product for which no EF3.0 process was available are from ecoinvent v3.7 database (www.ecoinvent.org) or other data sources.

## Data treatment and extrapolations
Several data sources have been used to model the inventory.

## Review details
Internal reviews have been asked to review the plausibility of the unit process, LCIA scores, and DQRs. Internal reviewers have also been asked to review the data for EF compliancy. The consortium is therefore responsible for aspects such as compliancy with the ILCD format, including validation in Look@LCI, and nomenclature.
Internal reviwers have been asked to judge based on the process name, that the unit process models in a complete and representative way the process in the requested location. The review encompassed the plausability of:
- exchanges with nature (elementary flows) as well as exchanges such as product and waste flows.
- meta information (general comment, technology comment, system boundaries, allocation, cut-off rules, etc.). Reviewers were asked to judge if the provided information is enough to understand the content of the process.
- LCIA scores
- DQRs including precision, technology, time and geography. As well as the overall DQR.
External reviewers have been asked to provide their expertise in the field of interest. External reviewers have been asked to review the unit process, including eventual methodological choices, the LCIA scores (provided with contribution scores as well), and DQRs. External reviewers have been provided all the information in a tool developed by the consortium for the purpose of this project.
External reviewers have been asked to judge based on the process name, that the unit process models in a complete and representative way the process in the requested location. The review encompassed:
- Plausability and completeness of exchanges with nature (elementary flows) as well as exchanges such as product and waste flows.
- Review of meta information (general comment, technology comment, system boundaries, allocation, cut-off rules, etc.). Reviewers were asked to judge if the provided information is enough to understand the content of the process.
- Review of properties (biogenic carbon and water content).
- Review of allocation keys.
- Plausability of LCIA scores calculated by the consortium.
- Plausability of DQRs including precision, technology, time and geography. As well as the overall DQR.

## Data sources
- Background Data for Representative products and organisations. EF 3.0 compliant (data stock)
- KCL, 2002. KCL (2002) KCL EcoData - life cycle inventory database. The Finnish Pulp and Paper Research Institute (KCL), Espoo (Finnland).
- Naturvardsverket, 2001. Naturvardsverket (2001) Skogsindustrins utsläpp - avfallsmängder och energiförbrukning 2000. Report 5154. Naturvardsverket (Swedish EPA), Stockholm.
- Tiedemann et al., 2000. Tiedemann A., Böttcher Tiedemann C., Buschardt A., Georgi B., Giersberg G., Goosmann G., Gregor H.-D., Mehlhorn B., Modi A., Neitzel H., Oels H.-J., Schmitz S. and Suhr M. (2000) Ökobilanzen für graphische Papiere. Texte 22/00. Umweltbundesamt, Berlin.
- European Commission, 2000. European Commission (2000) Integrated Pollution Prevention and Control (IPPC) - Reference Document on Best Available Techniques in the Pulp and Pa-per Industry. Institute for Prospective Technological Studies, Sevilla.
- Shackford, L. D., 2003. A comparison of pulping and bleaching of kraft softwood and Eucalyptus Pulps. http://www.celso-foelkel.com.br/artigos/outros/A%20Comparison%20of%20Pulping%20and%20Bleaching%20of%20Kraft%20Softwood%20and%20Eucalyptus%20Pulps.pdf
- Malo, B. A. (1967). Semichemical Hardwood Pulping and Effluent Treatment. Journal (Water Pollution Control Federation), 39(11), 1875–1891. http://www.jstor.org/stable/25035864
- CNMB, ISSUES ABOUT SEMI-CHEMICAL PULPING, consulted on october, 2021: http://www.paperpulping.com/news/Issues-about-semi-chemical-pulping.html
- US EPA, 1995. AP-42: Compilation of Air Emissions Factors. Chemical Pulping, consulted on October 2021: https://www3.epa.gov/ttnchie1/ap42/ch10/final/c10s02.pdf
- Bajpai, P. (2016). Chapter 3 - Pulp and paper production processes and energy overview. Pulp and Paper Industry. Pages 15-49. ISBN 9780128034118. https://doi.org/10.1016/B978-0-12-803411-8.00003-2. Elsevier.
- ecoinvent database v3.7.1, sulfite pulp production, bleached, GLO
- ecoinvent database v3.7.1, stone groundwood pulp production, GLO
- Suhr M, Klein G, Kourti I, Rodrigo Gonzalo M, Giner Santonja G, Roudier S, Delgado Sancho L. Best Available Techniques (BAT) Reference Document for the Production of Pulp, Paper and Board. Industrial Emissions Directive 2010/75/EU (Integrated Pollution Prevention and Control). EUR 27235. Luxembourg (Luxembourg): Publications Office of the European Union; 2015. JRC95678

## Intended applications
Implementation of regular Product Environmental Footprint (PEF) studies and Organisation Environmental Footprint (OEF) studies exclusively under the specified Product groups and sectors as defined in the Product Environmental Footprint Category Rules (PEFCR) and Organisation Environmental Footprint Sectorial Rules (OEFSR) listed in http://ec.europa.eu/environment/eussd/smgp/PEFCR_OEFSR.htm
