# leather, alligator, elementary; technology mix; production mix, at plant; 1 m2

Dataset: ILCD process, Unit process, single operation
Geography: GLO
Reference year: 2018
Valid until: 2024
Classification: Other Services / Other services
LCI method principle: Attributional
LCI method approaches: Allocation - market value
Completeness: All relevant flows quantified
Project: Provision of process-based 3.0 Environmental Footprint-compliant life cycle inventory datasets - Apparel 2 - contract number 070201/2020/840292/SER/ENV.B.1
Generated by: PRé Sustainability B.V.
Owner: PRé Sustainability B.V.
Compliance: Environmental Footprint non-primary supporting data set; Environmental Footprint 3.1
Amounts: no units in this file; such an amount is in the reference unit of its flow, which a separate flow dataset defines
copyright: true
licenseType: Free of charge for some user types or use types
accessRestrictions: Free of charge for all final users implementing a regular Product Environmental Footprint (PEF) studies and Organisation Environmental Footprint (OEF) studies exclusively under the specified Product groups and sectors as defined in the Product Environmental Footprint Category Rules (PEFCR) and Organisation Environmental Footprint Sectorial Rules (OEFSR) listed in http://ec.europa.eu/environment/eussd/smgp/PEFCR_OEFSR.htm and in accordance with the terms and conditions of the EULA (available at https://ecoinvent.lca-data.com/) exclusively until 31st December 2024. Any use of this dataset or any derivative data not within the specific context of one of the PEF/OEF projects or after the end of 2024 is not permitted.

## General comment
Notice: this data set supersedes the EF3.0-compliant version (see link under "preceding data set version" below calculated with the EF3.0). The life cycle inventory is not changed from the original EF3.0 data set. The LCIA results are calculated based on the EF3.1 methods which provide updated characterisation factors in the following impact categories: Climate Change, Ecotoxicity freshwater, Photochemical Ozone Formation, Acidification, Human Toxicity non-cancer, and Human Toxicity cancer. The review report and the data quality ratings refer to the original results. The data set has been updated by the European Commission on the basis of the original EF3.0 data set delivered by the data provider.This sub-process has limited documentation only. For all detailed documentation of the full model to which this data set belongs (such as DQRs, review reports and other technical documentation), please see this process: leather, alligator - GLO []

## Technology and included processes
The data was collected at a reptile farm in the USA . The dataset includes following steps:
- Collection of eggs in the wild (alligator)
- Reptile farming
- Slaughtering and skin salting
- Transport to the tanning facility
- Tanning and finishing

## Reference product
- leather, alligator // leather, alligator // glo, elementary: 1

## Impact indicators
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
## Deviations from the LCI method approaches
Economic allocation at slaughterhouse following a similar decision in the PEF and OEF methods for allocation of multi-output product at slaughterhouse from cattle product

## Modelling constants
All modelling constants follow the requirements listed in the Tender Specifications ENV.B.1/SER/2016/0038vl. Completeness: All known environmental flows are included. All known resource uses and emissions are listed in the inventory. Water use: water use is modelled at country level using separate flows for water withdrawal, water release and water evaporation. Cut-off: All known environmental flows are included. All known resource uses and emissions are listed in the inventory. Handling multi-functional processes: the following PEF multi- functionality decision hierarchy is applied for resolving all multi- functionality problems: (1) subdivision or system expansion; (2) allocation based on a relevant underlying physical relationship (substitution may apply here); (3) allocation based on some other relationship. Direct land use change: GHG emissions from direct LUC allocated to good/service for 20 years after the LUC occurs, with IPCC default values. Carbon storage and delayed emissions: credits associated with temporary (carbon) storage or delayed emissions up to 300 years are not be considered. Emissions off-setting: are not included. Capital goods (including infrastructures) and their End of life: they are included. System boundaries: system boundaries include all processes linked to the product supply chain (e.g. maintenance). Time period: emissions and removals are modelled as if released or removed at the beginning of the assessment method. Fossil and biogenic carbon emissions and removals: removals and emissions are modelled as follows: All GHG emissions from fossil fuels (including peat and limestone) are modelled consistently with the most updated ILCD list of elementary flows. The non-fossil (biogenic) carbon flows are modelled consistently with the most updated ILCD list of elementary flows.

## Cut-off and completeness
All known environmental flows are included. All known resource uses and emissions are listed in the inventory. The dataset dry mass balance has been checked to ensure the inventory is complete. Capital goods (e.g. infrastructure) and their end-of-life are included.

## Data selection and combination
These datasets include, in both their foreground and background data, links to EF3.0 compliant data.
The relevant background data on energy, transport, and End of Life are from the LCDN data node (http://lcdn.thinkstep.com/Node/).
All other background data in the supply of this product for which no EF3.0 process was available are from ecoinvent v3.7 database (www.ecoinvent.org) or other data sources.

## Data treatment and extrapolations
Several data sources have been used to model the inventory.

## Use advice
This data set is a supporting sub-data set and must be used exclusively as sub-data set of its corresponding level-1 partly disaggregated data set (see “General comment” field for exact name and UUID).

## Data sources
- Background Data for Representative products and organisations. EF 3.0 compliant (data stock)
- Quantis International. ‘World Apparel and Footwear Life Cycle Assessment Database (WALDB: Apparel + Footwear)’. Quantis. Accessed 21 July 2021. https://quantis-intl.com/metrics/databases/waldb-apparel-footwear/.
- UNIDO. ‘The Tanning and Industrial Production of Reptile Leather under Conditions Encountered in Developing Countries’, 1971. https://open.unido.org/api/documents/4685419/download/THE%20TANNING%20AND%20INDUSTRIAL%20PRODUCTION%20OF%20REPTILE%20LEATHER%20UNDER%20CONDITIONS%20ENCOUNTERED%20IN%20DEVELOPING%20COUNTRIES%20(02323d.en).

## Intended applications
Implementation of regular Product Environmental Footprint (PEF) studies and Organisation Environmental Footprint (OEF) studies exclusively under the specified Product groups and sectors as defined in the Product Environmental Footprint Category Rules (PEFCR) and Organisation Environmental Footprint Sectorial Rules (OEFSR) listed in http://ec.europa.eu/environment/eussd/smgp/PEFCR_OEFSR.htm
