# particle board production mix; excluding raw materials; production mix, at plant; density = 0, does not include raw materials

Dataset: ILCD process, Partly terminated system
Geography: EU+EFTA+UK
Reference year: 2012
Valid until: 2024
Classification: Materials production / Wood
LCI method principle: Attributional
LCI method approaches: Allocation - market value
Completeness: All relevant flows quantified
Project: Provision of process-based 3.0 Environmental Footprint-compliant life cycle inventory datasets - Renewable materials - contract number 070201/2020/840085/SER/ENV.B.1
Generated by: ecoinvent
Owner: ecoinvent
Compliance: ILCD Data Network - Entry-level; Suggestions for updating the PEF method 2019; ISO 14040 Environmental Management – Life Cycle Assessment – Principles and Framework, 2006; ISO 14044:2006. Environmental Management – Life Cycle Assessment – Requirements and guidelines.; Environmental Footprint 3.1
Review: Dependent internal review by Emilia Moreno Ruiz, Marisa Vieira; Independent review panel by Laura Batlle Bayer
Data quality: Overall quality: Good; Time representativeness: Very good; Geographical representativeness: Good; Technological representativeness: Good; Precision: Good; Methodological appropriateness and consistency: Not applicable
Amounts: no units in this file; such an amount is in the reference unit of its flow, which a separate flow dataset defines
copyright: true
licenseType: Free of charge for some user types or use types
accessRestrictions: Free of charge for all final users implementing a regular Product Environmental Footprint (PEF) studies and Organisation Environmental Footprint (OEF) studies exclusively under the specified Product groups and sectors as defined in the Product Environmental Footprint Category Rules (PEFCR) and Organisation Environmental Footprint Sectorial Rules (OEFSR) listed in http://ec.europa.eu/environment/eussd/smgp/PEFCR_OEFSR.htm and in accordance with the terms and conditions of the EULA (available at https://ecoinvent.lca-data.com/) exclusively until 31st December 2024. Any use of this dataset or any derivative data not within the specific context of one of the PEF/OEF projects or after the end of 2024 is not permitted.

## General comment
Notice: this data set supersedes the EF3.0-compliant version (see link under "preceding data set version" below calculated with the EF3.0). The life cycle inventory is not changed from the original EF3.0 data set. The LCIA results are calculated based on the EF3.1 methods which provide updated characterisation factors in the following impact categories: Climate Change, Ecotoxicity freshwater, Photochemical Ozone Formation, Acidification, Human Toxicity non-cancer, and Human Toxicity cancer. The review report and the data quality ratings refer to the original results. The data set has been updated by the European Commission on the basis of the original EF3.0 data set delivered by the data provider.This activity represents a Gate-to-gate process for the production of 1 m3 of uncoated particleboard. The produced particleboard has a density of 637 kg/m3. Particleboard is an engineered wood product made from wood chips, saw-mill shavings, or saw dust, and a synthetic resin or binder.

## Technology and included processes
The input of wood (195.965 kg), sawdust (24.109 kg), slab and siding ( 124.218 kg), and wood chips (400.1467 kg) are not included in the inventory. Wood chips are not only used as raw material input for the board production but also as fuel. The amount of wood chips included in this datasets represent the amount used as fuel. The process includes transport , direct emissions, energy use, ancillary products, and waste treatment. This dataset is modelled according to the activity ‘particleboard production, uncoated, average glue mix-RER', published in the ecoinvent database 3.7.1. Data is based on a survey among member companies of the European Panel Federation

## Parameters
- kg_0: 1.55173
  Mass in kg, for aluminium sulphate powder // aluminium sulphate powder production // eu+efta+uk; Freight train, average; EU+EFTA+UK
- km_0: 239.732
  Distance in km, for aluminium sulphate powder // aluminium sulphate powder production // eu+efta+uk; Freight train, average; EU+EFTA+UK
- kg_km_0: 372; = kg_0*km_0
  Transport amount in km*km, for aluminium sulphate powder // aluminium sulphate powder production // eu+efta+uk; Freight train, average; EU+EFTA+UK
- kg_1: 1.55173
  Mass in kg, for aluminium sulphate powder // aluminium sulphate powder production // eu+efta+uk; Barge; EU+EFTA+UK
- km_1: 270.021
  Distance in km, for aluminium sulphate powder // aluminium sulphate powder production // eu+efta+uk; Barge; EU+EFTA+UK
- kg_km_1: 419; = kg_1*km_1
  Transport amount in km*km, for aluminium sulphate powder // aluminium sulphate powder production // eu+efta+uk; Barge; EU+EFTA+UK
- kg_2: 1.55173
  Mass in kg, for aluminium sulphate powder // aluminium sulphate powder production // eu+efta+uk; Articulated lorry transport, Euro 4, Total weight >32 t; EU+EFTA+UK
- km_2: 130.177
  Distance in km, for aluminium sulphate powder // aluminium sulphate powder production // eu+efta+uk; Articulated lorry transport, Euro 4, Total weight >32 t; EU+EFTA+UK
- kg_km_2: 202; = kg_2*km_2
  Transport amount in km*km, for aluminium sulphate powder // aluminium sulphate powder production // eu+efta+uk; Articulated lorry transport, Euro 4, Total weight >32 t; EU+EFTA+UK
- kg_3: 4.77227
  Mass in kg, for biodegradable waste to landfill // landfill of biodegradable waste // eu+efta+uk; Articulated lorry transport, Euro 4, Total weight >32 t; EU+EFTA+UK
- km_3: 77
  Distance in km, for biodegradable waste to landfill // landfill of biodegradable waste // eu+efta+uk; Articulated lorry transport, Euro 4, Total weight >32 t; EU+EFTA+UK
- kg_km_3: 367.465; = kg_3*km_3
  Transport amount in km*km, for biodegradable waste to landfill // landfill of biodegradable waste // eu+efta+uk; Articulated lorry transport, Euro 4, Total weight >32 t; EU+EFTA+UK
- kg_4: 0.249131
  Mass in kg, for lubricating oil // lubricants at refinery // eu+efta+uk; Freight train, average; EU+EFTA+UK
- km_4: 240.035
  Distance in km, for lubricating oil // lubricants at refinery // eu+efta+uk; Freight train, average; EU+EFTA+UK
- kg_km_4: 59.8; = kg_4*km_4
  Transport amount in km*km, for lubricating oil // lubricants at refinery // eu+efta+uk; Freight train, average; EU+EFTA+UK
- kg_5: 0.249131
  Mass in kg, for lubricating oil // lubricants at refinery // eu+efta+uk; Barge; EU+EFTA+UK
- km_5: 270.139
  Distance in km, for lubricating oil // lubricants at refinery // eu+efta+uk; Barge; EU+EFTA+UK
- kg_km_5: 67.3; = kg_5*km_5
  Transport amount in km*km, for lubricating oil // lubricants at refinery // eu+efta+uk; Barge; EU+EFTA+UK
- kg_6: 0.249131
  Mass in kg, for lubricating oil // lubricants at refinery // eu+efta+uk; Articulated lorry transport, Euro 4, Total weight >32 t; EU+EFTA+UK
- km_6: 130.052
  Distance in km, for lubricating oil // lubricants at refinery // eu+efta+uk; Articulated lorry transport, Euro 4, Total weight >32 t; EU+EFTA+UK
- kg_km_6: 32.4; = kg_6*km_6
  Transport amount in km*km, for lubricating oil // lubricants at refinery // eu+efta+uk; Articulated lorry transport, Euro 4, Total weight >32 t; EU+EFTA+UK
- kg_7: 9.78267
  Mass in kg, for melamine formaldehyde resin // melamine formaldehyde resin production // eu+efta+uk; Freight train, average; EU+EFTA+UK
- km_7: 240.221
  Distance in km, for melamine formaldehyde resin // melamine formaldehyde resin production // eu+efta+uk; Freight train, average; EU+EFTA+UK
- kg_km_7: 2350; = kg_7*km_7
  Transport amount in km*km, for melamine formaldehyde resin // melamine formaldehyde resin production // eu+efta+uk; Freight train, average; EU+EFTA+UK
- kg_8: 9.78267
  Mass in kg, for melamine formaldehyde resin // melamine formaldehyde resin production // eu+efta+uk; Barge; EU+EFTA+UK
- km_8: 269.865
  Distance in km, for melamine formaldehyde resin // melamine formaldehyde resin production // eu+efta+uk; Barge; EU+EFTA+UK
- kg_km_8: 2640; = kg_8*km_8
  Transport amount in km*km, for melamine formaldehyde resin // melamine formaldehyde resin production // eu+efta+uk; Barge; EU+EFTA+UK
- kg_9: 9.78267
  Mass in kg, for melamine formaldehyde resin // melamine formaldehyde resin production // eu+efta+uk; Articulated lorry transport, Euro 4, Total weight >32 t; EU+EFTA+UK
- km_9: 129.821
  Distance in km, for melamine formaldehyde resin // melamine formaldehyde resin production // eu+efta+uk; Articulated lorry transport, Euro 4, Total weight >32 t; EU+EFTA+UK
- kg_km_9: 1270; = kg_9*km_9
  Transport amount in km*km, for melamine formaldehyde resin // melamine formaldehyde resin production // eu+efta+uk; Articulated lorry transport, Euro 4, Total weight >32 t; EU+EFTA+UK
- kg_10: 3.19474
  Mass in kg, for methylene diphenyl diisocyanate // methylene diphenyl diisocyanate (mdi) production // eu+efta+uk; Freight train, average; EU+EFTA+UK
- km_10: 240.082
  Distance in km, for methylene diphenyl diisocyanate // methylene diphenyl diisocyanate (mdi) production // eu+efta+uk; Freight train, average; EU+EFTA+UK
- kg_km_10: 767; = kg_10*km_10
  Transport amount in km*km, for methylene diphenyl diisocyanate // methylene diphenyl diisocyanate (mdi) production // eu+efta+uk; Freight train, average; EU+EFTA+UK
- kg_11: 3.19474
  Mass in kg, for methylene diphenyl diisocyanate // methylene diphenyl diisocyanate (mdi) production // eu+efta+uk; Barge; EU+EFTA+UK
- km_11: 270.131
  Distance in km, for methylene diphenyl diisocyanate // methylene diphenyl diisocyanate (mdi) production // eu+efta+uk; Barge; EU+EFTA+UK
- kg_km_11: 863; = kg_11*km_11
  Transport amount in km*km, for methylene diphenyl diisocyanate // methylene diphenyl diisocyanate (mdi) production // eu+efta+uk; Barge; EU+EFTA+UK
- kg_12: 3.19474
  Mass in kg, for methylene diphenyl diisocyanate // methylene diphenyl diisocyanate (mdi) production // eu+efta+uk; Articulated lorry transport, Euro 4, Total weight >32 t; EU+EFTA+UK
- km_12: 129.901
  Distance in km, for methylene diphenyl diisocyanate // methylene diphenyl diisocyanate (mdi) production // eu+efta+uk; Articulated lorry transport, Euro 4, Total weight >32 t; EU+EFTA+UK
- kg_km_12: 415; = kg_12*km_12
  Transport amount in km*km, for methylene diphenyl diisocyanate // methylene diphenyl diisocyanate (mdi) production // eu+efta+uk; Articulated lorry transport, Euro 4, Total weight >32 t; EU+EFTA+UK
- kg_13: 2.99631
  Mass in kg, for wax // wax production // eu+efta+uk; Freight train, average; EU+EFTA+UK
- km_13: 239.962
  Distance in km, for wax // wax production // eu+efta+uk; Freight train, average; EU+EFTA+UK
- kg_km_13: 719; = kg_13*km_13
  Transport amount in km*km, for wax // wax production // eu+efta+uk; Freight train, average; EU+EFTA+UK
- kg_14: 2.99631
  Mass in kg, for wax // wax production // eu+efta+uk; Barge; EU+EFTA+UK
- km_14: 269.998
  Distance in km, for wax // wax production // eu+efta+uk; Barge; EU+EFTA+UK
- kg_km_14: 809; = kg_14*km_14
  Transport amount in km*km, for wax // wax production // eu+efta+uk; Barge; EU+EFTA+UK
- kg_15: 2.99631
  Mass in kg, for wax // wax production // eu+efta+uk; Articulated lorry transport, Euro 4, Total weight >32 t; EU+EFTA+UK
- km_15: 130.16
  Distance in km, for wax // wax production // eu+efta+uk; Articulated lorry transport, Euro 4, Total weight >32 t; EU+EFTA+UK
- kg_km_15: 390; = kg_15*km_15
  Transport amount in km*km, for wax // wax production // eu+efta+uk; Articulated lorry transport, Euro 4, Total weight >32 t; EU+EFTA+UK
- kg_16: 1.20051
  Mass in kg, for phenolic resin // phenolic resin production // glo; Freight train, average; EU+EFTA+UK
- km_16: 239.898
  Distance in km, for phenolic resin // phenolic resin production // glo; Freight train, average; EU+EFTA+UK
- kg_km_16: 288; = kg_16*km_16
  Transport amount in km*km, for phenolic resin // phenolic resin production // glo; Freight train, average; EU+EFTA+UK
- kg_17: 1.20051
  Mass in kg, for phenolic resin // phenolic resin production // glo; Barge; EU+EFTA+UK
- km_17: 269.885
  Distance in km, for phenolic resin // phenolic resin production // glo; Barge; EU+EFTA+UK
- kg_km_17: 324; = kg_17*km_17
  Transport amount in km*km, for phenolic resin // phenolic resin production // glo; Barge; EU+EFTA+UK
- kg_18: 1.20051
  Mass in kg, for phenolic resin // phenolic resin production // glo; Articulated lorry transport, Euro 4, Total weight >32 t; EU+EFTA+UK
- km_18: 129.945
  Distance in km, for phenolic resin // phenolic resin production // glo; Articulated lorry transport, Euro 4, Total weight >32 t; EU+EFTA+UK
- kg_km_18: 156; = kg_18*km_18
  Transport amount in km*km, for phenolic resin // phenolic resin production // glo; Articulated lorry transport, Euro 4, Total weight >32 t; EU+EFTA+UK
- kg_19: 0.193534
  Mass in kg, for urea, per kg n, production mix, at plant // urea, per kg n // eu+efta+uk; Freight train, average; EU+EFTA+UK
- km_19: 239.751
  Distance in km, for urea, per kg n, production mix, at plant // urea, per kg n // eu+efta+uk; Freight train, average; EU+EFTA+UK
- kg_km_19: 46.4; = kg_19*km_19
  Transport amount in km*km, for urea, per kg n, production mix, at plant // urea, per kg n // eu+efta+uk; Freight train, average; EU+EFTA+UK
- kg_20: 0.193534
  Mass in kg, for urea, per kg n, production mix, at plant // urea, per kg n // eu+efta+uk; Barge; EU+EFTA+UK
- km_20: 270.237
  Distance in km, for urea, per kg n, production mix, at plant // urea, per kg n // eu+efta+uk; Barge; EU+EFTA+UK
- kg_km_20: 52.3; = kg_20*km_20
  Transport amount in km*km, for urea, per kg n, production mix, at plant // urea, per kg n // eu+efta+uk; Barge; EU+EFTA+UK
- kg_21: 0.193534
  Mass in kg, for urea, per kg n, production mix, at plant // urea, per kg n // eu+efta+uk; Articulated lorry transport, Euro 4, Total weight >32 t; EU+EFTA+UK
- km_21: 130.21
  Distance in km, for urea, per kg n, production mix, at plant // urea, per kg n // eu+efta+uk; Articulated lorry transport, Euro 4, Total weight >32 t; EU+EFTA+UK
- kg_km_21: 25.2; = kg_21*km_21
  Transport amount in km*km, for urea, per kg n, production mix, at plant // urea, per kg n // eu+efta+uk; Articulated lorry transport, Euro 4, Total weight >32 t; EU+EFTA+UK
- kg_22: 44.4486
  Mass in kg, for urea-formaldehyde resin // urea-formaldehyde resin production // eu+efta+uk; Freight train, average; EU+EFTA+UK
- km_22: 240.727
  Distance in km, for urea-formaldehyde resin // urea-formaldehyde resin production // eu+efta+uk; Freight train, average; EU+EFTA+UK
- kg_km_22: 10700; = kg_22*km_22
  Transport amount in km*km, for urea-formaldehyde resin // urea-formaldehyde resin production // eu+efta+uk; Freight train, average; EU+EFTA+UK
- kg_23: 44.4486
  Mass in kg, for urea-formaldehyde resin // urea-formaldehyde resin production // eu+efta+uk; Barge; EU+EFTA+UK
- km_23: 269.975
  Distance in km, for urea-formaldehyde resin // urea-formaldehyde resin production // eu+efta+uk; Barge; EU+EFTA+UK
- kg_km_23: 12000; = kg_23*km_23
  Transport amount in km*km, for urea-formaldehyde resin // urea-formaldehyde resin production // eu+efta+uk; Barge; EU+EFTA+UK
- kg_24: 44.4486
  Mass in kg, for urea-formaldehyde resin // urea-formaldehyde resin production // eu+efta+uk; Articulated lorry transport, Euro 4, Total weight >32 t; EU+EFTA+UK
- km_24: 130.038
  Distance in km, for urea-formaldehyde resin // urea-formaldehyde resin production // eu+efta+uk; Articulated lorry transport, Euro 4, Total weight >32 t; EU+EFTA+UK
- kg_km_24: 5780; = kg_24*km_24
  Transport amount in km*km, for urea-formaldehyde resin // urea-formaldehyde resin production // eu+efta+uk; Articulated lorry transport, Euro 4, Total weight >32 t; EU+EFTA+UK
- kg_25: 1.04818
  Mass in kg, for waste (unspecified) // landfill of inert material (other materials) // eu+efta+uk; Articulated lorry transport, Euro 4, Total weight >32 t; EU+EFTA+UK
- km_25: 77
  Distance in km, for waste (unspecified) // landfill of inert material (other materials) // eu+efta+uk; Articulated lorry transport, Euro 4, Total weight >32 t; EU+EFTA+UK
- kg_km_25: 80.71; = kg_25*km_25
  Transport amount in km*km, for waste (unspecified) // landfill of inert material (other materials) // eu+efta+uk; Articulated lorry transport, Euro 4, Total weight >32 t; EU+EFTA+UK

## Reference product
- particle board excluding raw materials // particle board production mix // eu+efta+uk: 1

## Inputs
- Electricity from Electricity grid mix 1kV-60kV - PL: 48.2903
- Electricity from Electricity grid mix 1kV-60kV - RO: 18.2017
- Electricity from Electricity grid mix 1kV-60kV - DE: 68.7207
- Electricity from Electricity grid mix 1kV-60kV - ES: 15.6015
- Electricity from Electricity grid mix 1kV-60kV - GB: 26.0024
- Electricity from Electricity grid mix 1kV-60kV - IT: 29.3456
- Electricity from Electricity grid mix 1kV-60kV - FR: 43.4612
- Electricity from Electricity grid mix 1kV-60kV - BE: 17.8302
- Electricity from Electricity grid mix 1kV-60kV - AT: 22.2878
- Electricity from Electricity grid mix 1kV-60kV - CZ: 13.3727
- Electricity from Electricity grid mix 1kV-60kV - EU+EFTA+UK: 67.9778
- Thermal energy (MJ) from Thermal energy from natural gas - EU+EFTA+UK: 197.203
- Thermal energy (MJ) from Thermal energy from light fuel oil (LFO) - EU+EFTA+UK: 22.2999
- Thermal energy (MJ) from Thermal energy from heavy fuel oil (HFO) - EU+EFTA+UK: 24.7567
- Transport of aluminium sulphate powder // aluminium sulphate powder production // eu+efta+uk by Freight train, average - EU+EFTA+UK: 372; = kg_km_0
- Transport of aluminium sulphate powder // aluminium sulphate powder production // eu+efta+uk by Barge - EU+EFTA+UK: 419; = kg_km_1
- Transport of aluminium sulphate powder // aluminium sulphate powder production // eu+efta+uk by Articulated lorry transport, Euro 4, Total weight >32 t - EU+EFTA+UK: 202; = kg_km_2
- Transport of biodegradable waste to landfill // landfill of biodegradable waste // eu+efta+uk by Articulated lorry transport, Euro 4, Total weight >32 t - EU+EFTA+UK: 367.465; = kg_km_3
- Transport of lubricating oil // lubricants at refinery // eu+efta+uk by Freight train, average - EU+EFTA+UK: 59.8; = kg_km_4
- Transport of lubricating oil // lubricants at refinery // eu+efta+uk by Barge - EU+EFTA+UK: 67.3; = kg_km_5
- Transport of lubricating oil // lubricants at refinery // eu+efta+uk by Articulated lorry transport, Euro 4, Total weight >32 t - EU+EFTA+UK: 32.4; = kg_km_6
- Transport of melamine formaldehyde resin // melamine formaldehyde resin production // eu+efta+uk by Freight train, average - EU+EFTA+UK: 2350; = kg_km_7
- Transport of melamine formaldehyde resin // melamine formaldehyde resin production // eu+efta+uk by Barge - EU+EFTA+UK: 2640; = kg_km_8
- Transport of melamine formaldehyde resin // melamine formaldehyde resin production // eu+efta+uk by Articulated lorry transport, Euro 4, Total weight >32 t - EU+EFTA+UK: 1270; = kg_km_9
- Transport of methylene diphenyl diisocyanate // methylene diphenyl diisocyanate (mdi) production // eu+efta+uk by Freight train, average - EU+EFTA+UK: 767; = kg_km_10
- Transport of methylene diphenyl diisocyanate // methylene diphenyl diisocyanate (mdi) production // eu+efta+uk by Barge - EU+EFTA+UK: 863; = kg_km_11
- Transport of methylene diphenyl diisocyanate // methylene diphenyl diisocyanate (mdi) production // eu+efta+uk by Articulated lorry transport, Euro 4, Total weight >32 t - EU+EFTA+UK: 415; = kg_km_12
- Transport of wax // wax production // eu+efta+uk by Freight train, average - EU+EFTA+UK: 719; = kg_km_13
- Transport of wax // wax production // eu+efta+uk by Barge - EU+EFTA+UK: 809; = kg_km_14
- Transport of wax // wax production // eu+efta+uk by Articulated lorry transport, Euro 4, Total weight >32 t - EU+EFTA+UK: 390; = kg_km_15
- Transport of phenolic resin // phenolic resin production // glo by Freight train, average - EU+EFTA+UK: 288; = kg_km_16
- Transport of phenolic resin // phenolic resin production // glo by Barge - EU+EFTA+UK: 324; = kg_km_17
- Transport of phenolic resin // phenolic resin production // glo by Articulated lorry transport, Euro 4, Total weight >32 t - EU+EFTA+UK: 156; = kg_km_18
- Transport of urea, per kg n, production mix, at plant // urea, per kg n // eu+efta+uk by Freight train, average - EU+EFTA+UK: 46.4; = kg_km_19
- Transport of urea, per kg n, production mix, at plant // urea, per kg n // eu+efta+uk by Barge - EU+EFTA+UK: 52.3; = kg_km_20
- Transport of urea, per kg n, production mix, at plant // urea, per kg n // eu+efta+uk by Articulated lorry transport, Euro 4, Total weight >32 t - EU+EFTA+UK: 25.2; = kg_km_21
- Transport of urea-formaldehyde resin // urea-formaldehyde resin production // eu+efta+uk by Freight train, average - EU+EFTA+UK: 10700; = kg_km_22
- Transport of urea-formaldehyde resin // urea-formaldehyde resin production // eu+efta+uk by Barge - EU+EFTA+UK: 12000; = kg_km_23
- Transport of urea-formaldehyde resin // urea-formaldehyde resin production // eu+efta+uk by Articulated lorry transport, Euro 4, Total weight >32 t - EU+EFTA+UK: 5780; = kg_km_24
- Transport of waste (unspecified) // landfill of inert material (other materials) // eu+efta+uk by Articulated lorry transport, Euro 4, Total weight >32 t - EU+EFTA+UK: 80.71; = kg_km_25
- particle board excluding raw materials // particle board production mix // eu+efta+uk, blackbox: 1
- particle board excluding raw materials // particle board production mix // eu+efta+uk, elementary: 1

## Impact indicators
- Eutrophication marine: 0.422338
- Ecotoxicity, freshwater: 2332.25
- Land use: 15147.3
- Water use: 253.763
- Resource use, minerals and metals: 0.00130104
- Resource use, fossils: 5496.26
- Climate change: 289.695
- Ozone depletion: 1.07604e-6
- Human toxicity, cancer: 3.20808e-6
- Human toxicity, non-cancer: 2.29441e-6
- EF-particulate Matter: 3.89089e-5
- Ionising radiation, human health: 22.3479
- Photochemical ozone formation - human health: 1.67516
- Acidification: 1.7148
- Eutrophication, terrestrial: 5.02184
- Eutrophication, freshwater: 0.02179

## Deviations from the LCI method principle
The background data uses:
- the \xe2\x80\x9cRecycled content cut-off\xe2\x80\x9d approach to allocate end-of-life by-products and secondary materials. This allocation is explained in the description of the recycled content system model (http://www.ecoinvent.org/database/system-models-in-ecoinvent-3/cut-off-system-model/allocation-cut-off-by-classification.html).
OR
- EF compliant data

## Deviations from the LCI method approaches
Background data:
- the \xe2\x80\x9cRecycled content cut-off\xe2\x80\x9d approach to allocate end-of-life by-products and secondary materials. This allocation is explained in the description of the recycled content system model (http://www.ecoinvent.org/database/system-models-in-ecoinvent-3/cut-off-system-model/allocation-cut-off-by-classification.html). The ecoinvent database mostly relies on “Allocation – market values” apart for few exceptions particularly in the energy sector. ecoinvent energy data is replaced with EF3.0 core data as per the EF guidelines version 2.0.
OR
- EF compliant data

## Modelling constants
All modelling constants follow the requirements listed in the Tender Specifications 070201/2020/SER/ENV.B1. Completeness: There are no intentional cut-offs in the inventory no matter how small their contribution to all the EF impact categories is. Eventual cut-offs are in compliance with the Guide for EF compliant data sets (JRC 2020), i.e. only if below the 3% cut-off rule. Water use: water use is modelled at country level using separate flows for water withdrawal, water release and water evaporation. Handling multi-functional processes: the following PEF multi- functionality decision hierarchy is applied for resolving all multi- functionality problems: (1) subdivision or system expansion; (2) allocation based on a relevant underlying physical relationship (substitution may apply here); (3) allocation based on some other relationship. Direct land use change: GHG emissions from direct LUC allocated to good/service for 20 years after the LUC occurs, with IPCC default values. Carbon storage and delayed emissions: credits associated with temporary (carbon) storage or delayed emissions up to 300 years are not be considered. Emissions off-setting: are not included. Capital goods (including infrastructures) and their End of life: they are included. System boundaries: system boundaries include all processes linked to the product supply chain (e.g. maintenance). Time period: emissions and removals are modelled as if released or removed at the beginning of the assessment method. Fossil and biogenic carbon emissions and removals: removals and emissions are modelled as follows: All GHG emissions from fossil fuels (including peat and limestone) are modelled consistently with the most updated ILCD list of elementary flows. The non-fossil (biogenic) carbon flows are modelled consistently with the most updated ILCD list of elementary flows.

## Cut-off and completeness
There are no intentional cut-offs in the inventory no matter how small their contribution to all the EF impact categories is. Eventual cut-offs are in compliance with the Guide for EF compliant data sets (JRC 2020), i.e. only if below the 3% cut-off rule. The dataset dry mass and water balance has been checked to ensure the inventory is complete. Capital goods (e.g. infrastructure) and their end-of-life are included.

## Data selection and combination
These datasets include, in both their foreground and background data, links to EF3.0 compliant data.
The relevant background data on energy, transport, and End of Life are from the LCDN data node (http://lcdn.thinkstep.com/Node/).
All other background data in the supply of this product for which no EF3.0 process was available are from ecoinvent v3.7 database (www.ecoinvent.org) or other data sources.

## Data treatment and extrapolations
Several data sources have been used to model the inventory.

## Review details
Internal reviews have been asked to review the plausibility of the unit process, LCIA scores, and DQRs. Internal reviewers have also been asked to review the data for EF compliancy. The consortium is therefore responsible for aspects such as compliancy with the ILCD format, including validation in Look@LCI, and nomenclature.
Internal reviwers have been asked to judge based on the process name, that the unit process models in a complete and representative way the process in the requested location. The review encompassed the plausability of:
- exchanges with nature (elementary flows) as well as exchanges such as product and waste flows.
- meta information (general comment, technology comment, system boundaries, allocation, cut-off rules, etc.). Reviewers were asked to judge if the provided information is enough to understand the content of the process.
- LCIA scores
- DQRs including precision, technology, time and geography. As well as the overall DQR.
External reviewers have been asked to provide their expertise in the field of interest. External reviewers have been asked to review the unit process, including eventual methodological choices, the LCIA scores (provided with contribution scores as well), and DQRs. External reviewers have been provided all the information in a tool developed by the consortium for the purpose of this project.
External reviewers have been asked to judge based on the process name, that the unit process models in a complete and representative way the process in the requested location. The review encompassed:
- Plausability and completeness of exchanges with nature (elementary flows) as well as exchanges such as product and waste flows.
- Review of meta information (general comment, technology comment, system boundaries, allocation, cut-off rules, etc.). Reviewers were asked to judge if the provided information is enough to understand the content of the process.
- Review of properties (biogenic carbon and water content).
- Review of allocation keys.
- Plausability of LCIA scores calculated by the consortium.
- Plausability of DQRs including precision, technology, time and geography. As well as the overall DQR.

## Data sources
- Background Data for Representative products and organisations. EF 3.0 compliant (data stock)
- Werner F., particleboard production, uncoated, average glue mix, RER, Allocation, cut-off by classification, ecoinvent database version 3.7.1
- Survey among member companies of the European Panel Federation; emissions profile per MJ wood input from PSI (2014)

## Intended applications
Implementation of regular Product Environmental Footprint (PEF) studies and Organisation Environmental Footprint (OEF) studies exclusively under the specified Product groups and sectors as defined in the Product Environmental Footprint Category Rules (PEFCR) and Organisation Environmental Footprint Sectorial Rules (OEFSR) listed in http://ec.europa.eu/environment/eussd/smgp/PEFCR_OEFSR.htm
