# medium density fibreboard, elementary; technology mix; production mix, at plant

Dataset: ILCD process, Unit process, single operation
Geography: EU+EFTA+UK
Reference year: 2012
Valid until: 2024
Classification: Other Services / Other services
LCI method principle: Attributional
LCI method approaches: Allocation - market value
Completeness: All relevant flows quantified
Project: Provision of process-based 3.0 Environmental Footprint-compliant life cycle inventory datasets - Renewable materials - contract number 070201/2020/840085/SER/ENV.B.1
Generated by: ecoinvent
Owner: ecoinvent
Compliance: Environmental Footprint non-primary supporting data set; Environmental Footprint 3.1
Amounts: no units in this file; such an amount is in the reference unit of its flow, which a separate flow dataset defines
copyright: true
licenseType: Free of charge for some user types or use types
accessRestrictions: Free of charge for all final users implementing a regular Product Environmental Footprint (PEF) studies and Organisation Environmental Footprint (OEF) studies exclusively under the specified Product groups and sectors as defined in the Product Environmental Footprint Category Rules (PEFCR) and Organisation Environmental Footprint Sectorial Rules (OEFSR) listed in http://ec.europa.eu/environment/eussd/smgp/PEFCR_OEFSR.htm and in accordance with the terms and conditions of the EULA (available at https://ecoinvent.lca-data.com/) exclusively until 31st December 2024. Any use of this dataset or any derivative data not within the specific context of one of the PEF/OEF projects or after the end of 2024 is not permitted.

## General comment
Notice: this data set supersedes the EF3.0-compliant version (see link under "preceding data set version" below calculated with the EF3.0). The life cycle inventory is not changed from the original EF3.0 data set. The LCIA results are calculated based on the EF3.1 methods which provide updated characterisation factors in the following impact categories: Climate Change, Ecotoxicity freshwater, Photochemical Ozone Formation, Acidification, Human Toxicity non-cancer, and Human Toxicity cancer. The review report and the data quality ratings refer to the original results. The data set has been updated by the European Commission on the basis of the original EF3.0 data set delivered by the data provider.This sub-process has limited documentation only. For all detailed documentation of the full model to which this data set belongs (such as DQRs, review reports and other technical documentation), please see this process: medium density fibreboard - EU+EFTA+UK []

## Technology and included processes
The process includes transport of raw materials, direct emissions, energy use, ancillary products, and waste treatment. This dataset is modelled according to the activity ‘medium density fibreboard production, uncoated-RER', published in the ecoinvent database 3.7.1. Data is based on a survey among member companies of the European Panel Federation

## Reference product
- medium density fibreboard // medium density fibreboard // eu+efta+uk, elementary: 1

## Inputs
- Water to Cooling, Renewable material resources from water [AL]: 0.000441373
- Water to Cooling, Renewable material resources from water [AT]: 0.00568681
- Water to Cooling, Renewable material resources from water [BA]: 0.000550234
- Water to Cooling, Renewable material resources from water [BE]: 0.00684496
- Water to Cooling, Renewable material resources from water [BG]: 0.00175278
- Water to Cooling, Renewable material resources from water [BY]: 0.00227595
- Water to Cooling, Renewable material resources from water [CH]: 0.00678247
- Water to Cooling, Renewable material resources from water [CZ]: 0.00472055
- Water to Cooling, Renewable material resources from water [DE]: 0.0513747
- Water to Cooling, Renewable material resources from water [DK]: 0.00372525
- Water to Cooling, Renewable material resources from water [EE]: 0.000508688
- Water to Cooling, Renewable material resources from water [ES]: 0.0220463
- Water to Cooling, Renewable material resources from water [FI]: 0.00317756
- Water to Cooling, Renewable material resources from water [FR]: 0.0362396
- Water to Cooling, Renewable material resources from water [GB]: 0.0360134
- Water to Cooling, Renewable material resources from water: 0.000223693
- Water to Cooling, Renewable material resources from water [GR]: 0.00409675
- Water to Cooling, Renewable material resources from water [HR]: 0.00131724
- Water to Cooling, Renewable material resources from water [HU]: 0.00345315
- Water to Cooling, Renewable material resources from water [IE]: 0.00371971
- Water to Cooling, Renewable material resources from water [IS]: 0.000212258
- Water to Cooling, Renewable material resources from water [IT]: 0.0310059
- Water to Cooling, Renewable material resources from water [LT]: 0.00108614
- Water to Cooling, Renewable material resources from water [LU]: 0.000753999
- Water to Cooling, Renewable material resources from water [LV]: 0.000640455
- Water to Cooling, Renewable material resources from water [MD]: 0.000338876
- Water to Cooling, Renewable material resources from water [ME]: 0.000136518
- Water to Cooling, Renewable material resources from water [MK]: 0.000377048
- Water to Cooling, Renewable material resources from water [MT]: 0.000208578
- Water to Cooling, Renewable material resources from water [NL]: 0.0114934
- Water to Cooling, Renewable material resources from water [NO]: 0.00435061
- Water to Cooling, Renewable material resources from water [PL]: 0.0132276
- Water to Cooling, Renewable material resources from water [PT]: 0.00417379
- Water to Cooling, Renewable material resources from water [RO]: 0.00579456
- Water to Cooling, Renewable material resources from water [RS]: 0.00143794
- Water to Cooling, Renewable material resources from water [SE]: 0.00627787
- Water to Cooling, Renewable material resources from water [SI]: 0.000889037
- Water to Cooling, Renewable material resources from water [SK]: 0.0020867
- Water to Cooling, Renewable material resources from water [SM]: 2.59711e-5
- Water to Cooling, Renewable material resources from water [UA]: 0.00611823
- ground water, Renewable material resources from water [AL]: 4.32146e-7
- ground water, Renewable material resources from water [AT]: 5.56792e-6
- ground water, Renewable material resources from water [BA]: 5.38731e-7
- ground water, Renewable material resources from water [BE]: 6.70186e-6
- ground water, Renewable material resources from water [BG]: 1.71613e-6
- ground water, Renewable material resources from water [BY]: 2.22837e-6
- ground water, Renewable material resources from water [CH]: 6.64068e-6
- ground water, Renewable material resources from water [CZ]: 4.62186e-6
- ground water, Renewable material resources from water [DE]: 5.03006e-5
- ground water, Renewable material resources from water [DK]: 3.64737e-6
- ground water, Renewable material resources from water [EE]: 4.98053e-7
- ground water, Renewable material resources from water [ES]: 2.15854e-5
- ground water, Renewable material resources from water [FI]: 3.11113e-6
- ground water, Renewable material resources from water [FR]: 3.5482e-5
- ground water, Renewable material resources from water [GB]: 3.52605e-5
- ground water, Renewable material resources from water: 2.19016e-7
- ground water, Renewable material resources from water [GR]: 4.0111e-6
- ground water, Renewable material resources from water [HR]: 1.2897e-6
- ground water, Renewable material resources from water [HU]: 3.38095e-6
- ground water, Renewable material resources from water [IE]: 3.64195e-6
- ground water, Renewable material resources from water [IS]: 2.0782e-7
- ground water, Renewable material resources from water [IT]: 3.03577e-5
- ground water, Renewable material resources from water [LT]: 1.06343e-6
- ground water, Renewable material resources from water [LU]: 7.38236e-7
- ground water, Renewable material resources from water [LV]: 6.27066e-7
- ground water, Renewable material resources from water [MD]: 3.31792e-7
- ground water, Renewable material resources from water [ME]: 1.33664e-7
- ground water, Renewable material resources from water [MK]: 3.69166e-7
- ground water, Renewable material resources from water [MT]: 2.04217e-7
- ground water, Renewable material resources from water [NL]: 1.12531e-5
- ground water, Renewable material resources from water [NO]: 4.25965e-6
- ground water, Renewable material resources from water [PL]: 1.29511e-5
- ground water, Renewable material resources from water [PT]: 4.08654e-6
- ground water, Renewable material resources from water [RO]: 5.67342e-6
- ground water, Renewable material resources from water [RS]: 1.40788e-6
- ground water, Renewable material resources from water [SE]: 6.14662e-6
- ground water, Renewable material resources from water [SI]: 8.70451e-7
- ground water, Renewable material resources from water [SK]: 2.04308e-6
- ground water, Renewable material resources from water [SM]: 2.54281e-8
- ground water, Renewable material resources from water [UA]: 5.99032e-6
- river water, Renewable material resources from water [AL]: 0.000496737
- river water, Renewable material resources from water [AT]: 0.00640014
- river water, Renewable material resources from water [BA]: 0.000619253
- river water, Renewable material resources from water [BE]: 0.00770356
- river water, Renewable material resources from water [BG]: 0.00197264
- river water, Renewable material resources from water [BY]: 0.00256144
- river water, Renewable material resources from water [CH]: 0.00763323
- river water, Renewable material resources from water [CZ]: 0.00531268
- river water, Renewable material resources from water [DE]: 0.0578189
- river water, Renewable material resources from water [DK]: 0.00419253
- river water, Renewable material resources from water [EE]: 0.000572495
- river water, Renewable material resources from water [ES]: 0.0248117
- river water, Renewable material resources from water [FI]: 0.00357614
- river water, Renewable material resources from water [FR]: 0.0407853
- river water, Renewable material resources from water [GB]: 0.0405307
- river water, Renewable material resources from water: 0.000251752
- river water, Renewable material resources from water [GR]: 0.00461063
- river water, Renewable material resources from water [HR]: 0.00148247
- river water, Renewable material resources from water [HU]: 0.00388629
- river water, Renewable material resources from water [IE]: 0.0041863
- river water, Renewable material resources from water [IS]: 0.000238882
- river water, Renewable material resources from water [IT]: 0.0348951
- river water, Renewable material resources from water [LT]: 0.00122238
- river water, Renewable material resources from water [LU]: 0.000848577
- river water, Renewable material resources from water [LV]: 0.000720791
- river water, Renewable material resources from water [MD]: 0.000381383
- river water, Renewable material resources from water [ME]: 0.000153643
- river water, Renewable material resources from water [MK]: 0.000424343
- river water, Renewable material resources from water [MT]: 0.000234741
- river water, Renewable material resources from water [NL]: 0.0129351
- river water, Renewable material resources from water [NO]: 0.00489633
- river water, Renewable material resources from water [PL]: 0.0148868
- river water, Renewable material resources from water [PT]: 0.00469733
- river water, Renewable material resources from water [RO]: 0.00652141
- river water, Renewable material resources from water [RS]: 0.00161831
- river water, Renewable material resources from water [SE]: 0.00706534
- river water, Renewable material resources from water [SI]: 0.00100055
- river water, Renewable material resources from water [SK]: 0.00234845
- river water, Renewable material resources from water [SM]: 2.92288e-5
- river water, Renewable material resources from water [UA]: 0.00688568

## Outputs
- nitrous oxide, Emissions to air, unspecified: 0.0122419
- ammonia, Emissions to air, unspecified [AL]: 1.4231e-5
- ammonia, Emissions to air, unspecified [AT]: 0.000183357
- ammonia, Emissions to air, unspecified [BA]: 1.77409e-5
- ammonia, Emissions to air, unspecified [BE]: 0.000220699
- ammonia, Emissions to air, unspecified [BG]: 5.6514e-5
- ammonia, Emissions to air, unspecified [BY]: 7.33824e-5
- ammonia, Emissions to air, unspecified [CH]: 0.000218684
- ammonia, Emissions to air, unspecified [CZ]: 0.000152202
- ammonia, Emissions to air, unspecified [DE]: 0.00165645
- ammonia, Emissions to air, unspecified [DK]: 0.000120111
- ammonia, Emissions to air, unspecified [EE]: 1.64014e-5
- ammonia, Emissions to air, unspecified [ES]: 0.000710828
- ammonia, Emissions to air, unspecified [FI]: 0.000102453
- ammonia, Emissions to air, unspecified [FR]: 0.00116846
- ammonia, Emissions to air, unspecified [GB]: 0.00116116
- ammonia, Emissions to air, unspecified: 7.23831e-5
- ammonia, Emissions to air, unspecified [GR]: 0.000132089
- ammonia, Emissions to air, unspecified [HR]: 4.24712e-5
- ammonia, Emissions to air, unspecified [HU]: 0.000111338
- ammonia, Emissions to air, unspecified [IE]: 0.000119933
- ammonia, Emissions to air, unspecified [IT]: 0.000999707
- ammonia, Emissions to air, unspecified [LT]: 3.50198e-5
- ammonia, Emissions to air, unspecified [LU]: 2.43108e-5
- ammonia, Emissions to air, unspecified [LV]: 2.06499e-5
- ammonia, Emissions to air, unspecified [MD]: 1.09262e-5
- ammonia, Emissions to air, unspecified [MK]: 1.2157e-5
- ammonia, Emissions to air, unspecified [NL]: 0.000370577
- ammonia, Emissions to air, unspecified [NO]: 0.000140274
- ammonia, Emissions to air, unspecified [PL]: 0.000426492
- ammonia, Emissions to air, unspecified [PT]: 0.000134574
- ammonia, Emissions to air, unspecified [RO]: 0.000186831
- ammonia, Emissions to air, unspecified [SE]: 0.000202414
- ammonia, Emissions to air, unspecified [SI]: 2.86648e-5
- ammonia, Emissions to air, unspecified [SK]: 6.72805e-5
- ammonia, Emissions to air, unspecified [UA]: 0.000197267
- particles (PM2.5), Emissions to air, unspecified: 0.133064
- non-methane volatile organic compounds, Emissions to air, unspecified: 0.39741
- methane (biogenic), Emissions to air, unspecified: 0.00798384
- chlorine, Emissions to air, unspecified: 0.000958061
- pentachlorophenol, Emissions to air, unspecified: 4.31127e-8
- particles (PM10), Emissions to air, unspecified: 0.079805
- arsenic, Emissions to air, unspecified: 5.32256e-6
- benzene, Emissions to air, unspecified: 0.00484353
- benzo[a]pyrene, Emissions to air, unspecified: 2.66128e-6
- fluorine, Emissions to air, unspecified: 0.000266128
- formaldehyde, Emissions to air, unspecified: 0.138012
- zinc, Emissions to air, unspecified: 0.00159677
- chromium (vi), Emissions to air, unspecified: 2.12902e-7
- cadmium, Emissions to air, unspecified: 3.72579e-6
- m-xylene, Emissions to air, unspecified: 0.000638707
- nickel, Emissions to air, unspecified: 3.19354e-5
- chromium, Emissions to air, unspecified: 2.10773e-5
- manganese, Emissions to air, unspecified: 0.000904835
- carbon dioxide (biogenic), Emissions to air, unspecified: 569.514
- hexachlorobenzene, Emissions to air, unspecified: 3.83224e-11
- magnesium, Emissions to air, unspecified: 0.00191612
- potassium, Emissions to air, unspecified: 0.124548
- sodium, Emissions to air, unspecified: 0.00691933
- calcium, Emissions to air, unspecified: 0.031137
- bromine, Emissions to air, unspecified: 0.000319354
- lead, Emissions to air, unspecified: 0.000133064
- toluene, Emissions to air, unspecified: 0.00159677
- Phosphorus, Emissions to air, unspecified: 0.00159677
- Nitrogen oxides, Emissions to air, unspecified: 0.00941399
- ethyl benzene, Emissions to air, unspecified: 0.000159677
- copper, Emissions to air, unspecified: 0.000117096
- acetaldehyde, Emissions to air, unspecified: 0.000666982
- mercury, Emissions to air, unspecified: 1.59677e-6
- methanol, Emissions to air, unspecified: 0.0179114
- polycyclic aromatic hydrocarbons, Emissions to air, unspecified: 5.90804e-5
- 2,3,7,8-tetrachlorodibenzo-p-dioxin, Emissions to air, unspecified: 1.64999e-10
- sulfur dioxide, Emissions to air, unspecified: 0.0001046
- Nitrogen oxides, Emissions to air, unspecified [AL]: 0.00185085
- Nitrogen oxides, Emissions to air, unspecified [AT]: 0.023847
- Nitrogen oxides, Emissions to air, unspecified [BA]: 0.00230735
- Nitrogen oxides, Emissions to air, unspecified [BE]: 0.0287036
- Nitrogen oxides, Emissions to air, unspecified [BG]: 0.00735008
- Nitrogen oxides, Emissions to air, unspecified [BY]: 0.00954396
- Nitrogen oxides, Emissions to air, unspecified [CH]: 0.0284415
- Nitrogen oxides, Emissions to air, unspecified [CZ]: 0.0197951
- Nitrogen oxides, Emissions to air, unspecified [DE]: 0.215434
- Nitrogen oxides, Emissions to air, unspecified [DK]: 0.0156214
- Nitrogen oxides, Emissions to air, unspecified [EE]: 0.00213313
- Nitrogen oxides, Emissions to air, unspecified [ES]: 0.0924488
- Nitrogen oxides, Emissions to air, unspecified [FI]: 0.0133247
- Nitrogen oxides, Emissions to air, unspecified [FR]: 0.151967
- Nitrogen oxides, Emissions to air, unspecified [GB]: 0.151018
- Nitrogen oxides, Emissions to air, unspecified [GR]: 0.0171793
- Nitrogen oxides, Emissions to air, unspecified [HR]: 0.00552371
- Nitrogen oxides, Emissions to air, unspecified [HU]: 0.0144804
- Nitrogen oxides, Emissions to air, unspecified [IE]: 0.0155982
- Nitrogen oxides, Emissions to air, unspecified [IT]: 0.13002
- Nitrogen oxides, Emissions to air, unspecified [LT]: 0.00455459
- Nitrogen oxides, Emissions to air, unspecified [LU]: 0.00316181
- Nitrogen oxides, Emissions to air, unspecified [LV]: 0.00268568
- Nitrogen oxides, Emissions to air, unspecified [MD]: 0.00142104
- Nitrogen oxides, Emissions to air, unspecified [MK]: 0.00158111
- Nitrogen oxides, Emissions to air, unspecified [NL]: 0.0481964
- Nitrogen oxides, Emissions to air, unspecified [NO]: 0.0182438
- Nitrogen oxides, Emissions to air, unspecified [PL]: 0.0554686
- Nitrogen oxides, Emissions to air, unspecified [PT]: 0.0175023
- Nitrogen oxides, Emissions to air, unspecified [RO]: 0.0242989
- Nitrogen oxides, Emissions to air, unspecified [SE]: 0.0263256
- Nitrogen oxides, Emissions to air, unspecified [SI]: 0.00372808
- Nitrogen oxides, Emissions to air, unspecified [SK]: 0.00875035
- Nitrogen oxides, Emissions to air, unspecified [UA]: 0.0256561
- sulfur dioxide, Emissions to air, unspecified [AL]: 2.0565e-5
- sulfur dioxide, Emissions to air, unspecified [AT]: 0.000264967
- sulfur dioxide, Emissions to air, unspecified [BA]: 2.56372e-5
- sulfur dioxide, Emissions to air, unspecified [BE]: 0.000318929
- sulfur dioxide, Emissions to air, unspecified [BG]: 8.16676e-5
- sulfur dioxide, Emissions to air, unspecified [BY]: 0.000106044
- sulfur dioxide, Emissions to air, unspecified [CH]: 0.000316017
- sulfur dioxide, Emissions to air, unspecified [CZ]: 0.000219946
- sulfur dioxide, Emissions to air, unspecified [DE]: 0.00239371
- sulfur dioxide, Emissions to air, unspecified [DK]: 0.000173571
- sulfur dioxide, Emissions to air, unspecified [EE]: 2.37014e-5
- sulfur dioxide, Emissions to air, unspecified [ES]: 0.00102721
- sulfur dioxide, Emissions to air, unspecified [FI]: 0.000148053
- sulfur dioxide, Emissions to air, unspecified [FR]: 0.00168852
- sulfur dioxide, Emissions to air, unspecified [GB]: 0.00167798
- sulfur dioxide, Emissions to air, unspecified [GR]: 0.000190881
- sulfur dioxide, Emissions to air, unspecified [HR]: 6.13745e-5
- sulfur dioxide, Emissions to air, unspecified [HU]: 0.000160893
- sulfur dioxide, Emissions to air, unspecified [IE]: 0.000173313
- sulfur dioxide, Emissions to air, unspecified [IT]: 0.00144466
- sulfur dioxide, Emissions to air, unspecified [LT]: 5.06066e-5
- sulfur dioxide, Emissions to air, unspecified [LU]: 3.51312e-5
- sulfur dioxide, Emissions to air, unspecified [LV]: 2.98409e-5
- sulfur dioxide, Emissions to air, unspecified [MD]: 1.57893e-5
- sulfur dioxide, Emissions to air, unspecified [MK]: 1.75679e-5
- sulfur dioxide, Emissions to air, unspecified [NL]: 0.000535516
- sulfur dioxide, Emissions to air, unspecified [NO]: 0.000202709
- sulfur dioxide, Emissions to air, unspecified [PL]: 0.000616318
- sulfur dioxide, Emissions to air, unspecified [PT]: 0.00019447
- sulfur dioxide, Emissions to air, unspecified [RO]: 0.000269987
- sulfur dioxide, Emissions to air, unspecified [SE]: 0.000292506
- sulfur dioxide, Emissions to air, unspecified [SI]: 4.14231e-5
- sulfur dioxide, Emissions to air, unspecified [SK]: 9.72262e-5
- sulfur dioxide, Emissions to air, unspecified [UA]: 0.000285068
- carbon monoxide (biogenic), Emissions to air, unspecified: 1.06451
- Hydrocarbons, aliphatic, unsaturated, Emissions to air, unspecified: 0.0164999
- Hydrocarbons, aliphatic, alkanes, unspecified, Emissions to air, unspecified: 0.00484353

## Impact indicators
- Eutrophication marine: 0.466704
- Ecotoxicity, freshwater: 32.065
- Water use: 9.62009
- Climate change: 3.5576
- Human toxicity, cancer: 1.84703e-6
- Human toxicity, non-cancer: 6.19088e-7
- EF-particulate Matter: 3.8329e-5
- Photochemical ozone formation - human health: 1.72703
- Acidification: 0.610511
- Eutrophication, terrestrial: 2.34908
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
## Deviations from the LCI method principle
The background data uses:
- the \xe2\x80\x9cRecycled content cut-off\xe2\x80\x9d approach to allocate end-of-life by-products and secondary materials. This allocation is explained in the description of the recycled content system model (http://www.ecoinvent.org/database/system-models-in-ecoinvent-3/cut-off-system-model/allocation-cut-off-by-classification.html).
OR
- EF compliant data

## Deviations from the LCI method approaches
Background data:
- the \xe2\x80\x9cRecycled content cut-off\xe2\x80\x9d approach to allocate end-of-life by-products and secondary materials. This allocation is explained in the description of the recycled content system model (http://www.ecoinvent.org/database/system-models-in-ecoinvent-3/cut-off-system-model/allocation-cut-off-by-classification.html). The ecoinvent database mostly relies on “Allocation – market values” apart for few exceptions particularly in the energy sector. ecoinvent energy data is replaced with EF3.0 core data as per the EF guidelines version 2.0.
OR
- EF compliant data

## Modelling constants
All modelling constants follow the requirements listed in the Tender Specifications 070201/2020/SER/ENV.B1. Completeness: There are no intentional cut-offs in the inventory no matter how small their contribution to all the EF impact categories is. Eventual cut-offs are in compliance with the Guide for EF compliant data sets (JRC 2020), i.e. only if below the 3% cut-off rule. Water use: water use is modelled at country level using separate flows for water withdrawal, water release and water evaporation. Handling multi-functional processes: the following PEF multi- functionality decision hierarchy is applied for resolving all multi- functionality problems: (1) subdivision or system expansion; (2) allocation based on a relevant underlying physical relationship (substitution may apply here); (3) allocation based on some other relationship. Direct land use change: GHG emissions from direct LUC allocated to good/service for 20 years after the LUC occurs, with IPCC default values. Carbon storage and delayed emissions: credits associated with temporary (carbon) storage or delayed emissions up to 300 years are not be considered. Emissions off-setting: are not included. Capital goods (including infrastructures) and their End of life: they are included. System boundaries: system boundaries include all processes linked to the product supply chain (e.g. maintenance). Time period: emissions and removals are modelled as if released or removed at the beginning of the assessment method. Fossil and biogenic carbon emissions and removals: removals and emissions are modelled as follows: All GHG emissions from fossil fuels (including peat and limestone) are modelled consistently with the most updated ILCD list of elementary flows. The non-fossil (biogenic) carbon flows are modelled consistently with the most updated ILCD list of elementary flows.

## Cut-off and completeness
There are no intentional cut-offs in the inventory no matter how small their contribution to all the EF impact categories is. Eventual cut-offs are in compliance with the Guide for EF compliant data sets (JRC 2020), i.e. only if below the 3% cut-off rule. The dataset dry mass and water balance has been checked to ensure the inventory is complete. Capital goods (e.g. infrastructure) and their end-of-life are included.

## Data selection and combination
These datasets include, in both their foreground and background data, links to EF3.0 compliant data.
The relevant background data on energy, transport, and End of Life are from the LCDN data node (http://lcdn.thinkstep.com/Node/).
All other background data in the supply of this product for which no EF3.0 process was available are from ecoinvent v3.7 database (www.ecoinvent.org) or other data sources.

## Data treatment and extrapolations
Several data sources have been used to model the inventory.

## Use advice
This data set is a supporting sub-data set and must be used exclusively as sub-data set of its corresponding level-1 partly disaggregated data set (see “General comment” field for exact name and UUID).

## Data sources
- Background Data for Representative products and organisations. EF 3.0 compliant (data stock)
- Werner F., medium density fibreboard production, uncoated, RER, Allocation, cut-off by classification, ecoinvent database version 3.7.1
- Survey among member companies of the European Panel Federation; emissions profile per MJ wood input from PSI (2014)

## Intended applications
Implementation of regular Product Environmental Footprint (PEF) studies and Organisation Environmental Footprint (OEF) studies exclusively under the specified Product groups and sectors as defined in the Product Environmental Footprint Category Rules (PEFCR) and Organisation Environmental Footprint Sectorial Rules (OEFSR) listed in http://ec.europa.eu/environment/eussd/smgp/PEFCR_OEFSR.htm
