# bonding, chemical, impregnation, stenter, hot calendering, non-woven fabric, elementary; technology mix; production mix, at plant; service (raw materials excluded)

Dataset: ILCD process, Unit process, single operation
Geography: GLO
Reference year: 2021
Valid until: 2024
Classification: Other Services / Other services
LCI method principle: Attributional
LCI method approaches: Allocation - market value
Completeness: All relevant flows quantified
Project: Provision of process-based 3.0 Environmental Footprint-compliant life cycle inventory datasets - Apparel 1 - contract number 070201/2020/840291/SER/ENV.B.1
Generated by: Life Cycle Indonesia
Owner: PRé Sustainability B.V.
Compliance: Environmental Footprint non-primary supporting data set; Environmental Footprint 3.1
Amounts: no units in this file; such an amount is in the reference unit of its flow, which a separate flow dataset defines
copyright: true
licenseType: Free of charge for some user types or use types
accessRestrictions: Free of charge for all final users implementing a regular Product Environmental Footprint (PEF) studies and Organisation Environmental Footprint (OEF) studies exclusively under the specified Product groups and sectors as defined in the Product Environmental Footprint Category Rules (PEFCR) and Organisation Environmental Footprint Sectorial Rules (OEFSR) listed in http://ec.europa.eu/environment/eussd/smgp/PEFCR_OEFSR.htm and in accordance with the terms and conditions of the EULA (available at https://ecoinvent.lca-data.com/) exclusively until 31st December 2024. Any use of this dataset or any derivative data not within the specific context of one of the PEF/OEF projects or after the end of 2024 is not permitted.

## General comment
Notice: this data set supersedes the EF3.0-compliant version (see link under "preceding data set version" below calculated with the EF3.0). The life cycle inventory is not changed from the original EF3.0 data set. The LCIA results are calculated based on the EF3.1 methods which provide updated characterisation factors in the following impact categories: Climate Change, Ecotoxicity freshwater, Photochemical Ozone Formation, Acidification, Human Toxicity non-cancer, and Human Toxicity cancer. The review report and the data quality ratings refer to the original results. The data set has been updated by the European Commission on the basis of the original EF3.0 data set delivered by the data provider.This sub-process has limited documentation only. For all detailed documentation of the full model to which this data set belongs (such as DQRs, review reports and other technical documentation), please see this process: bonding, chemical, impregnation, stenter, hot calendering, non-woven fabric - GLO []

## Technology and included processes
One of the most common ways to apply binders is saturation, which involves the complete immersion of the web or prebonded (needlepunched or thermal bonded) nonwoven either in a binder bath or by flooding the non-woven (Russel, 2007). The amount of binders needed range from 5-60% weight of the nonwoven fabric for impregnation (Khartik, et al., 2016).

Polyphenylene sulfide fibers can be used for producing heat resistance fabric. In the bonding process. The prebounded web is impregnated with synthetic resins. Preferable thermosetting resins which can be used include epoxy resins (bisphenol A type, bisphenol F type and bisphenol AD type are preferable), phenol resins, vinyl ester resins and unsaturated polyester resins. Among them, bisphenol A type is more preferable for obtaining the shape maintenance of pleats at high temperatures (Kawakami, et al., 1999). To capture the global context, the data provided modelled usage of 5 different resins with equal usage probability.

The impregnated fabric then dried in stenter frames followed by thermal pressing treatment in hot calendering machine. When the nonwoven is passed through the calendar rollers, it is subjected to an extremely uniform pressure along the entire width of the rollers.

The model represents the process of bonding, hence the input raw materials (Fiber Webs or Prebounded FIber) are not included in the model. The user will use this dataset along with the input raw materials. Energy uses and infrastructure are included in the model. There is no direct emission to soil and air since the emission comes from electricity usage, while the hazardous waste comes from waste lube oil and heat transfer fluid oil. The hazardous waste is incinerated in this model. The resin is part of the final product. Hence, there is no waste or emission resulted from the usage of resins. In the model, the finishng process is not included in the scope of this dataset and enegy sources of machines used solely from electricity.

Khartik, T., et al. 2016. Non-woven - Process, Structure, Properties and Applications. New Delhi: Woodhead Publishing India. pp 132
Kawakami, et al. 1999. Fabric. European Patent Office no EP1022375A1
Russel, S.J. 2007. Handbook of Nonwovens. England: Woodhead Publishing Limited. pp 158 - 349

## Reference product
- non-woven fabric // bonding, chemical, impregnation, stenter, hot calendering, non-woven fabric // glo, elementary: 1

## Impact indicators
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
## Deviations from the LCI method principle
The background data uses:
- the \xe2\x80\x9cRecycled content cut-off\xe2\x80\x9d approach to allocate end-of-life by-products and secondary materials. This allocation is explained in the description of the recycled content system model (http://www.ecoinvent.org/database/system-models-in-ecoinvent-3/cut-off-system-model/allocation-cut-off-by-classification.html).
OR
- EF compliant data

## Deviations from the LCI method approaches
Background data:
- the \xe2\x80\x9cRecycled content cut-off\xe2\x80\x9d approach to allocate end-of-life by-products and secondary materials. This allocation is explained in the description of the recycled content system model (http://www.ecoinvent.org/database/system-models-in-ecoinvent-3/cut-off-system-model/allocation-cut-off-by-classification.html). The ecoinvent database mostly relies on “Allocation – market values” apart for few exceptions particularly in the energy sector. ecoinvent energy data is replaced with EF3.0 core data as per the EF guidelines version 2.0.
OR
- EF compliant data

## Modelling constants
All modelling constants follow the requirements listed in the Tender Specifications 070201/2020/SER/ENV.B1. Completeness: There are no intentional cut-offs in the inventory no matter how small their contribution to all the EF impact categories is. Eventual cut-offs are in compliance with the Guide for EF compliant data sets (JRC 2020), i.e. only if below the 3% cut-off rule. Water use: water use is modelled at country level using separate flows for water withdrawal, water release and water evaporation. Handling multi-functional processes: the following PEF multi- functionality decision hierarchy is applied for resolving all multi- functionality problems: (1) subdivision or system expansion; (2) allocation based on a relevant underlying physical relationship (substitution may apply here); (3) allocation based on some other relationship. Direct land use change: GHG emissions from direct LUC allocated to good/service for 20 years after the LUC occurs, with IPCC default values. Carbon storage and delayed emissions: credits associated with temporary (carbon) storage or delayed emissions up to 300 years are not be considered. Emissions off-setting: are not included. Capital goods (including infrastructures) and their End of life: they are included. System boundaries: system boundaries include all processes linked to the product supply chain (e.g. maintenance). Time period: emissions and removals are modelled as if released or removed at the beginning of the assessment method. Fossil and biogenic carbon emissions and removals: removals and emissions are modelled as follows: All GHG emissions from fossil fuels (including peat and limestone) are modelled consistently with the most updated ILCD list of elementary flows. The non-fossil (biogenic) carbon flows are modelled consistently with the most updated ILCD list of elementary flows.

## Cut-off and completeness
There are no intentional cut-offs in the inventory no matter how small their contribution to all the EF impact categories is. Eventual cut-offs are in compliance with the Guide for EF compliant data sets (JRC 2020), i.e. only if below the 3% cut-off rule. The dataset dry mass and water balance has been checked to ensure the inventory is complete. Capital goods (e.g. infrastructure) and their end-of-life are included.

## Data selection and combination
These datasets include, in both their foreground and background data, links to EF3.0 compliant data.
The relevant background data on energy, transport, and End of Life are from the LCDN data node (http://lcdn.thinkstep.com/Node/).
All other background data in the supply of this product for which no EF3.0 process was available are from ecoinvent v3.7 database (www.ecoinvent.org) or other data sources.

## Data treatment and extrapolations
Several data sources have been used to model the inventory.

## Use advice
This data set is a supporting sub-data set and must be used exclusively as sub-data set of its corresponding level-1 partly disaggregated data set (see “General comment” field for exact name and UUID).

## Data sources
- Background Data for Representative products and organisations. EF 3.0 compliant (data stock)
- Prof. Akber Ali Affandi, Ghulam Mohiuddin, Muhammad Daniyal Usman, Muhammad Rashid, Muhammad Saeed, Muhammad Tariq (2010). Oil Consumption In Knitting Machine. Hamdard University, Pakistan.
- UN Data (2018) Statistics Data for Lubricants Productions, http://data.un.org/Data.aspx?q=Lubricants&d=EDATA&f=cmID%3aLU, United Nations Statistics Division, Global.
- T. Karthik, R. Rathinamoorthy, C. Praba Karan. (2016). Non-woven - Process, Structure, Properties and Applications. New Delhi: Woodhead Publishing India. pp 132
- Koji Kawakami, Kiyoshi Aihara, Takehiko Miyoshi (1999). Fabric EP1022375A1. European Patent Office, Europe.
- Buentex (2021) Stenter Frame, https://www.buentex.com/en/product/stenter.html, Buentex Machinery Trading Co., Ltd., China. Alibaba (2021) Heat Setting Stenter Machine, https://www.alibaba.com/product-detail/Heat-Setting-Stenter-Machine_1600151186503.html?spm=a2700.7724857.topad_classic.d_image.40af1b30gHAlMd, Alibaba Group China .
- Lebon (2021) Nonwoven Ironing Machine, Catalog and Company Messages, Qingdao Lebon Industry Co., Ltd., China
- Buentex (2021) Stenter Frame, https://www.buentex.com/en/product/stenter.html, Buentex Machinery Trading Co., Ltd., China. Alibaba (2021) Heat Setting Stenter Machine, https://www.alibaba.com/product-detail/Heat-Setting-Stenter-Machine_1600151186503.html?spm=a2700.7724857.topad_classic.d_image.40af1b30gHAlMd, Alibaba Group China.
- Buentex (2021) Stenter Frame, https://www.buentex.com/en/product/stenter.html, Buentex Machinery Trading Co., Ltd., China.
- Zhuoqi Machinery (2021), Dipping Machine, Catalog & E-mail Company, Changzhou Zhuoqi Machinery Manufacturing Co., Ltd., China
- Lebon (2021) Nonwoven Ironing Machine, https://www.china-lebon.com/128.html, Qingdao Lebon Industry Co., Ltd., China Alibaba (2021) Nonwoven machinery calender ironing machine, https://www.alibaba.com/product-detail/Nonwoven-machinery-calender-ironing-machine-felt_62016069669.html?spm=a2700.galleryofferlist.normal_offer.d_title.54c95cb4TlzyTj, Alibaba Group, China

## Intended applications
Implementation of regular Product Environmental Footprint (PEF) studies and Organisation Environmental Footprint (OEF) studies exclusively under the specified Product groups and sectors as defined in the Product Environmental Footprint Category Rules (PEFCR) and Organisation Environmental Footprint Sectorial Rules (OEFSR) listed in http://ec.europa.eu/environment/eussd/smgp/PEFCR_OEFSR.htm
