# polyurethane foam, 50% bio-based; mix of polyol and MDI; production mix, at plant; partially bio-based

Dataset: ILCD process, Partly terminated system
Geography: GLO
Reference year: 2015
Valid until: 2024
Classification: Materials production / Plastics
LCI method principle: Attributional
LCI method approaches: Allocation - market value
Completeness: All relevant flows quantified
Project: Provision of process-based 3.0 Environmental Footprint-compliant life cycle inventory datasets - Apparel 2 - contract number 070201/2020/840292/SER/ENV.B.1
Generated by: ecoinvent
Owner: PRé Sustainability B.V.
Compliance: ILCD Data Network - Entry-level; Suggestions for updating the PEF method 2019; ISO 14040 Environmental Management – Life Cycle Assessment – Principles and Framework, 2006; ISO 14044:2006. Environmental Management – Life Cycle Assessment – Requirements and guidelines.; Environmental Footprint 3.1
Review: Dependent internal review by Lucia Valsasina, Avraam Symeonidis; Independent review panel by Philippa Notten
Data quality: Overall quality: Good; Time representativeness: Very good; Geographical representativeness: Good; Technological representativeness: Good; Precision: Good; Methodological appropriateness and consistency: Not applicable
Amounts: no units in this file; such an amount is in the reference unit of its flow, which a separate flow dataset defines
copyright: true
licenseType: Free of charge for some user types or use types
accessRestrictions: Free of charge for all final users implementing a regular Product Environmental Footprint (PEF) studies and Organisation Environmental Footprint (OEF) studies exclusively under the specified Product groups and sectors as defined in the Product Environmental Footprint Category Rules (PEFCR) and Organisation Environmental Footprint Sectorial Rules (OEFSR) listed in http://ec.europa.eu/environment/eussd/smgp/PEFCR_OEFSR.htm and in accordance with the terms and conditions of the EULA (available at https://ecoinvent.lca-data.com/) exclusively until 31st December 2024. Any use of this dataset or any derivative data not within the specific context of one of the PEF/OEF projects or after the end of 2024 is not permitted.

## General comment
Notice: this data set supersedes the EF3.0-compliant version (see link under "preceding data set version" below calculated with the EF3.0). The life cycle inventory is not changed from the original EF3.0 data set. The LCIA results are calculated based on the EF3.1 methods which provide updated characterisation factors in the following impact categories: Climate Change, Ecotoxicity freshwater, Photochemical Ozone Formation, Acidification, Human Toxicity non-cancer, and Human Toxicity cancer. The review report and the data quality ratings refer to the original results. The data set has been updated by the European Commission on the basis of the original EF3.0 data set delivered by the data provider.This dataset represents the production of 1 kg of one possible composition of polyurethane (PUR) flexible foam. PUR flexible foam is used for manufacturing products such as mattresses, cushions and car seats. This dataset models the production of PUR foam from polyol and toluene diisocyanate. The inventory is estimated based on industrial data. From reception of raw materials at the factory gate. This activity ends with the production of 1 kg of PUR flexible foam. The dataset doesn't include solvents and additives required for the production of PUR.
References:
Flexible Polyurethane (PU), 2015., Eco-profiles and Environmental Product Declaration of the European Plastics Manufacturers, PlasticsEurope

## Technology and included processes
Partially biogenic polyurethane foam is made by reacting petrochemical-based diisocyanates with biobased polyols. This process uses methylene diphenyl diisocyanate (MDI), while the polyols are 50% of oil based and 50% from soy based.
Flexible PU foams are produced as large blocks using a continuous process with minimal human handling. The raw materials are delivered into a mixing head, which pours the foam mixture onto a pour plate, which delivers the rising foam onto a moving conveyor (usually horizontal, sometimes vertical). Depending on the application the foam will be used for, a number of additives can be added to the formulation to control its properties, density and cell-size. Transports and process waste treatment are included in this dataset.
References:
Flexible Polyurethane (PU), 2015., Eco-profiles and Environmental Product Declaration of the European Plastics Manufacturers, PlasticsEurope
Great Lotus, 2021, About the Company, Great Lotus LTD Available at: http://greatlotus.com/about/
WorldWide Material, 2021. Great Lotus, A Company Overview Available at: www.worldwidematerials.com/GreatLotus.htm

## Parameters
- kg_0: 0.332
  Mass in kg, for polyether polyols (long chain) // polyether polyols (long chain) production // glo; Articulated lorry transport, Euro 4, Total weight >32 t; EU+EFTA+UK
- km_0: 1000
  Distance in km, for polyether polyols (long chain) // polyether polyols (long chain) production // glo; Articulated lorry transport, Euro 4, Total weight >32 t; EU+EFTA+UK
- kg_km_0: 332; = kg_0*km_0
  Transport amount in km*km, for polyether polyols (long chain) // polyether polyols (long chain) production // glo; Articulated lorry transport, Euro 4, Total weight >32 t; EU+EFTA+UK
- kg_1: 0.388
  Mass in kg, for methylene diphenyldiisocyanate // methylene diphenyldiisocyanate production // glo; Articulated lorry transport, Euro 4, Total weight >32 t; EU+EFTA+UK
- km_1: 1000
  Distance in km, for methylene diphenyldiisocyanate // methylene diphenyldiisocyanate production // glo; Articulated lorry transport, Euro 4, Total weight >32 t; EU+EFTA+UK
- kg_km_1: 388; = kg_1*km_1
  Transport amount in km*km, for methylene diphenyldiisocyanate // methylene diphenyldiisocyanate production // glo; Articulated lorry transport, Euro 4, Total weight >32 t; EU+EFTA+UK
- kg_2: 0.332
  Mass in kg, for polyol, biogenic // polyol production, bio-based // glo; Articulated lorry transport, Euro 4, Total weight >32 t; EU+EFTA+UK
- km_2: 1000
  Distance in km, for polyol, biogenic // polyol production, bio-based // glo; Articulated lorry transport, Euro 4, Total weight >32 t; EU+EFTA+UK
- kg_km_2: 332; = kg_2*km_2
  Transport amount in km*km, for polyol, biogenic // polyol production, bio-based // glo; Articulated lorry transport, Euro 4, Total weight >32 t; EU+EFTA+UK
- kg_3: 0.332
  Mass in kg, for polyether polyols (long chain) // polyether polyols (long chain) production // glo; Transoceanic ship, containers; GLO
- km_3: 18012
  Distance in km, for polyether polyols (long chain) // polyether polyols (long chain) production // glo; Transoceanic ship, containers; GLO
- kg_km_3: 5980; = kg_3*km_3
  Transport amount in km*km, for polyether polyols (long chain) // polyether polyols (long chain) production // glo; Transoceanic ship, containers; GLO
- kg_4: 0.388
  Mass in kg, for methylene diphenyldiisocyanate // methylene diphenyldiisocyanate production // glo; Transoceanic ship, containers; GLO
- km_4: 17989.7
  Distance in km, for methylene diphenyldiisocyanate // methylene diphenyldiisocyanate production // glo; Transoceanic ship, containers; GLO
- kg_km_4: 6980; = kg_4*km_4
  Transport amount in km*km, for methylene diphenyldiisocyanate // methylene diphenyldiisocyanate production // glo; Transoceanic ship, containers; GLO
- kg_5: 0.332
  Mass in kg, for polyol, biogenic // polyol production, bio-based // glo; Transoceanic ship, containers; GLO
- km_5: 18012
  Distance in km, for polyol, biogenic // polyol production, bio-based // glo; Transoceanic ship, containers; GLO
- kg_km_5: 5980; = kg_5*km_5
  Transport amount in km*km, for polyol, biogenic // polyol production, bio-based // glo; Transoceanic ship, containers; GLO

## Reference product
- polyurethane foam, {great lotus} // polyurethane foam production, {great lotus} // glo: 1

## Inputs
- Electricity from Electricity grid mix 1kV-60kV - AU: 0.0046
- Electricity from Electricity grid mix 1kV-60kV - EU+EFTA+UK: 0.0672
- Electricity from Electricity grid mix 1kV-60kV - NZ: 0.0009
- Electricity from Electricity grid mix 1kV-60kV - RAF: 0.0147
- Electricity from Electricity grid mix 1kV-60kV - RNA: 0.0984
- Electricity from Electricity grid mix 1kV-60kV - RSA: 0.0334
- Electricity from Electricity grid mix 1kV-60kV - RU: 0.0197
- Transport of polyether polyols (long chain) // polyether polyols (long chain) production // glo by Articulated lorry transport, Euro 4, Total weight >32 t - EU+EFTA+UK: 332; = kg_km_0
- Transport of methylene diphenyldiisocyanate // methylene diphenyldiisocyanate production // glo by Articulated lorry transport, Euro 4, Total weight >32 t - EU+EFTA+UK: 388; = kg_km_1
- Transport of polyol, biogenic // polyol production, bio-based // glo by Articulated lorry transport, Euro 4, Total weight >32 t - EU+EFTA+UK: 332; = kg_km_2
- Transport of polyether polyols (long chain) // polyether polyols (long chain) production // glo by Transoceanic ship, containers - GLO: 5980; = kg_km_3
- Transport of methylene diphenyldiisocyanate // methylene diphenyldiisocyanate production // glo by Transoceanic ship, containers - GLO: 6980; = kg_km_4
- Transport of polyol, biogenic // polyol production, bio-based // glo by Transoceanic ship, containers - GLO: 5980; = kg_km_5
- Electricity from Electricity grid mix 1kV-60kV - CN: 0.100781
- Electricity from Electricity grid mix 1kV-60kV - RAS w/o CN: 0.110419
- polyurethane foam, {great lotus} // polyurethane foam production, {great lotus} // glo, blackbox: 1
- polyurethane foam, {great lotus} // polyurethane foam production, {great lotus} // glo, elementary: 1

## Impact indicators
- Eutrophication marine: 0.0138519
- Ecotoxicity, freshwater: 401.414
- Land use: 205.022
- Water use: 5.74503
- Resource use, minerals and metals: 4.45128e-5
- Resource use, fossils: 85.7
- Climate change: 6.84658
- Ozone depletion: 3.50959e-7
- Human toxicity, cancer: 4.42438e-8
- Human toxicity, non-cancer: 1.00351e-7
- EF-particulate Matter: 5.97801e-7
- Ionising radiation, human health: 0.193881
- Photochemical ozone formation - human health: 0.0250697
- Acidification: 0.0383004
- Eutrophication, terrestrial: 0.0982632
- Eutrophication, freshwater: 0.000626324

## Deviations from the LCI method principle
The background data use the \xe2\x80\x9cRecycled content cut-off\xe2\x80\x9d approach to allocate end-of-life by-products and secondary materials. This allocation is explained in the description of the recycled content system model (http://www.ecoinvent.org/database/system-models-in-ecoinvent-3/cut-off-system-model/allocation-cut-off-by-classification.html).

## Deviations from the LCI method approaches
Background data:
- the \xe2\x80\x9cRecycled content cut-off\xe2\x80\x9d approach to allocate end-of-life by-products and secondary materials. This allocation is explained in the description of the recycled content system model (http://www.ecoinvent.org/database/system-models-in-ecoinvent-3/cut-off-system-model/allocation-cut-off-by-classification.html). The ecoinvent database mostly relies on “Allocation – market values” apart for few exceptions particularly in the energy sector. ecoinvent energy data is replaced with EF3.0 core data as per the EF guidelines version 2.0.
OR
- EF compliant data

## Modelling constants
All modelling constants follow the requirements listed in the Tender Specifications ENV.B.1/SER/2016/0038vl. Completeness: All known environmental flows are included. All known resource uses and emissions are listed in the inventory. Water use: water use is modelled at country level using separate flows for water withdrawal, water release and water evaporation. Cut-off: All known environmental flows are included. All known resource uses and emissions are listed in the inventory. Handling multi-functional processes: the following PEF multi- functionality decision hierarchy is applied for resolving all multi- functionality problems: (1) subdivision or system expansion; (2) allocation based on a relevant underlying physical relationship (substitution may apply here); (3) allocation based on some other relationship. Direct land use change: GHG emissions from direct LUC allocated to good/service for 20 years after the LUC occurs, with IPCC default values. Carbon storage and delayed emissions: credits associated with temporary (carbon) storage or delayed emissions up to 300 years are not be considered. Emissions off-setting: are not included. Capital goods (including infrastructures) and their End of life: they are included. System boundaries: system boundaries include all processes linked to the product supply chain (e.g. maintenance). Time period: emissions and removals are modelled as if released or removed at the beginning of the assessment method. Fossil and biogenic carbon emissions and removals: removals and emissions are modelled as follows: All GHG emissions from fossil fuels (including peat and limestone) are modelled consistently with the most updated ILCD list of elementary flows. The non-fossil (biogenic) carbon flows are modelled consistently with the most updated ILCD list of elementary flows.

## Cut-off and completeness
All known environmental flows are included. All known resource uses and emissions are listed in the inventory. The dataset dry mass balance has been checked to ensure the inventory is complete. Capital goods (e.g. infrastructure) and their end-of-life are included.

## Data selection and combination
These datasets include, in both their foreground and background data, links to EF3.0 compliant data.
The relevant background data on energy, transport, and End of Life are from the LCDN data node (http://lcdn.thinkstep.com/Node/).
All other background data in the supply of this product for which no EF3.0 process was available are from ecoinvent v3.7 database (www.ecoinvent.org) or other data sources.

## Data treatment and extrapolations
Several data sources have been used to model the inventory.

## Review details
Internal reviews have been asked to review the plausibility of the unit process, LCIA scores, and DQRs. Internal reviewers have also been asked to review the data for EF compliancy. The consortium is therefore responsible for aspects such as compliancy with the ILCD format, including validation in Look@LCI, and nomenclature.
Internal reviwers have been asked to judge based on the process name, that the unit process models in a complete and representative way the process in the requested location. The review encompassed the plausability of:
- exchanges with nature (elementary flows) as well as exchanges such as product and waste flows.
- meta information (general comment, technology comment, system boundaries, allocation, cut-off rules, etc.). Reviewers were asked to judge if the provided information is enough to understand the content of the process.
- LCIA scores
- DQRs including precision, technology, time and geography. As well as the overall DQR.
External reviewers have been asked to provide their expertise in the field of interest. External reviewers have been asked to review the unit process, including eventual methodological choices, the LCIA scores (provided with contribution scores as well), and DQRs. External reviewers have been provided all the information in a tool developed by the consortium for the purpose of this project.
External reviewers have been asked to judge based on the process name, that the unit process models in a complete and representative way the process in the requested location. The review encompassed:
- Plausability and completeness of exchanges with nature (elementary flows) as well as exchanges such as product and waste flows.
- Review of meta information (general comment, technology comment, system boundaries, allocation, cut-off rules, etc.). Reviewers were asked to judge if the provided information is enough to understand the content of the process.
- Review of properties (biogenic carbon and water content).
- Review of allocation keys.
- Plausability of LCIA scores calculated by the consortium.
- Plausability of DQRs including precision, technology, time and geography. As well as the overall DQR.

## Data sources
- Background Data for Representative products and organisations. EF 3.0 compliant (data stock)
- ecoinvent Association: LCI datasets for EU Environmental Footprinting (EF) implementation 2016-2021. Polyurethane production; technology mix; production mix, at plant; 100% active substance, RER, 2017, f53b5c18-5c5f-4112-95b7-2cf8938c4bfa, 04.01.001. https://ecoinvent.lca-data.com/. Date of download 05/09/2022
- Great Lotus, 2021, About the Company, Great Lotus LTD Available at: http://greatlotus.com/about/
- WorldWide Material, 2021. Great Lotus, A Company Overview Available at: www.worldwidematerials.com/GreatLotus.htm
- Gendorf, 2020, Umwelterkärung, www.gendorf.de
- ecoinvent (2017-2020). diethylene glycol production, GLO, 404771fd-0895-4763-817c-b4b1090fe06a, 03.00.008. ecoinvent (2017) Data on the Production of Chemicals created for the EU Product Environmental Footprint (PEF) pilot phase implementation, www.ecoinvent.org, ecoinvent Association, Zürich, Switzerland. Restricted use. Download from http://ecoinvent.lcadata.com/

## Intended applications
Implementation of regular Product Environmental Footprint (PEF) studies and Organisation Environmental Footprint (OEF) studies exclusively under the specified Product groups and sectors as defined in the Product Environmental Footprint Category Rules (PEFCR) and Organisation Environmental Footprint Sectorial Rules (OEFSR) listed in http://ec.europa.eu/environment/eussd/smgp/PEFCR_OEFSR.htm
