# lamination, flame; lamination process; average service, at plant; 1 kg of flame laminated fabric

Dataset: ILCD process, Partly terminated system
Geography: GLO
Reference year: 2021
Valid until: 2024
Classification: Systems / Textiles, furnitures and other interiors
LCI method principle: Attributional
LCI method approaches: Allocation - market value
Completeness: All relevant flows quantified
Project: Provision of process-based 3.0 Environmental Footprint-compliant life cycle inventory datasets - Apparel 1 - contract number 070201/2020/840291/SER/ENV.B.1
Generated by: Metsims Sustainability Consulting
Owner: PRé Sustainability B.V.
Compliance: ILCD Data Network - Entry-level; Suggestions for updating the PEF method 2019; ISO 14040 Environmental Management – Life Cycle Assessment – Principles and Framework, 2006; ISO 14044:2006. Environmental Management – Life Cycle Assessment – Requirements and guidelines.; Environmental Footprint 3.1
Review: Dependent internal review by Avraam Symeonidis, Emilia Moreno Ruiz; Independent review panel by Madhuri Nigam
Data quality: Overall quality: Good; Time representativeness: Very good; Geographical representativeness: Fair; Technological representativeness: Good; Precision: Good; Methodological appropriateness and consistency: Not applicable
Amounts: no units in this file; such an amount is in the reference unit of its flow, which a separate flow dataset defines
copyright: true
licenseType: Free of charge for some user types or use types
accessRestrictions: Free of charge for all final users implementing a regular Product Environmental Footprint (PEF) studies and Organisation Environmental Footprint (OEF) studies exclusively under the specified Product groups and sectors as defined in the Product Environmental Footprint Category Rules (PEFCR) and Organisation Environmental Footprint Sectorial Rules (OEFSR) listed in http://ec.europa.eu/environment/eussd/smgp/PEFCR_OEFSR.htm and in accordance with the terms and conditions of the EULA (available at https://ecoinvent.lca-data.com/) exclusively until 31st December 2024. Any use of this dataset or any derivative data not within the specific context of one of the PEF/OEF projects or after the end of 2024 is not permitted.

## General comment
Notice: this data set supersedes the EF3.0-compliant version (see link under "preceding data set version" below calculated with the EF3.0). The life cycle inventory is not changed from the original EF3.0 data set. The LCIA results are calculated based on the EF3.1 methods which provide updated characterisation factors in the following impact categories: Climate Change, Ecotoxicity freshwater, Photochemical Ozone Formation, Acidification, Human Toxicity non-cancer, and Human Toxicity cancer. The review report and the data quality ratings refer to the original results. The data set has been updated by the European Commission on the basis of the original EF3.0 data set delivered by the data provider.The process covers textile flame lamination process for 1 kg laminated fabric. The process involves softening the surface of polyurethane foam with a naked flame and using the molten foam itself as the adhesive. As a result of combustion of gas, air emissions occur.

This production process data represent an average layered fabric that has 3.5 layers. Derived from the mix of 2,3,4 and 5 layered laminated fabric datasets. For the certain layered fabric, aveage layer number of layer must be considered. Polyurethane adhesive consumption is included to dataset.

Waste rate is assumed as 1 kg at 1 tonne production.

## Technology and included processes
This dataset consists of 2-5 layers flame lamination process mixture.

Flame lamination is used to adhere polyurethane foam to a textile material. A web of foam from a supply roller is passed over a gas flame and combined with the textile material from a second roller in the first nip of a three-bowl system. The foam-laminated textile material is then passed through the second nip and wound up on a third roller.

In this dataset, machine electricity, gas consumption and gas comupustion emissions were included in the model. Additionally polyurethane foam were included to dataset.

A user employing this service within their models should use it along with an 1.001 kg of material to produce an 1 kg of laminated fabric. 0.001 kg of waste shall also be added. A user is responsible for defining the nature of the recycling and/or disposal of this waste. Additionally, a user is responsible for accounting transportation expenditures for all extra input and output materials that need to be modelled alongside this service.*

*Waste rate is assumed.

## Parameters
- kg_0: 0.00589932
  Mass in kg, for butane; Transoceanic ship, containers; GLO
- km_0: 601.207
  Distance in km, for butane; Transoceanic ship, containers; GLO
- kg_km_0: 3.54671; = kg_0*km_0
  Transport amount in km*km, for butane; Transoceanic ship, containers; GLO
- kg_1: 0.00589932
  Mass in kg, for butane; Freight train, diesel traction; EU+EFTA+UK
- km_1: 230.116
  Distance in km, for butane; Freight train, diesel traction; EU+EFTA+UK
- kg_km_1: 1.35753; = kg_1*km_1
  Transport amount in km*km, for butane; Freight train, diesel traction; EU+EFTA+UK
- kg_2: 0.00589932
  Mass in kg, for butane; Freight train, electricity traction; EU+EFTA+UK
- km_2: 78.2762
  Distance in km, for butane; Freight train, electricity traction; EU+EFTA+UK
- kg_km_2: 0.461776; = kg_2*km_2
  Transport amount in km*km, for butane; Freight train, electricity traction; EU+EFTA+UK
- kg_3: 0.00589932
  Mass in kg, for butane; Freight train, average; EU+EFTA+UK
- km_3: 1.84618
  Distance in km, for butane; Freight train, average; EU+EFTA+UK
- kg_km_3: 0.0108912; = kg_3*km_3
  Transport amount in km*km, for butane; Freight train, average; EU+EFTA+UK
- kg_4: 0.00589932
  Mass in kg, for butane; Barge; EU+EFTA+UK
- km_4: 8.1167
  Distance in km, for butane; Barge; EU+EFTA+UK
- kg_km_4: 0.047883; = kg_4*km_4
  Transport amount in km*km, for butane; Barge; EU+EFTA+UK
- kg_5: 0.00589932
  Mass in kg, for butane; Barge; ROW w/o EU+EFTA
- km_5: 16.5739
  Distance in km, for butane; Barge; ROW w/o EU+EFTA
- kg_km_5: 0.0977749; = kg_5*km_5
  Transport amount in km*km, for butane; Barge; ROW w/o EU+EFTA
- kg_6: 0.00589932
  Mass in kg, for butane; Articulated lorry transport, Euro 4, Total weight >32 t; EU+EFTA+UK
- km_6: 57.5867
  Distance in km, for butane; Articulated lorry transport, Euro 4, Total weight >32 t; EU+EFTA+UK
- kg_km_6: 0.339723; = kg_6*km_6
  Transport amount in km*km, for butane; Articulated lorry transport, Euro 4, Total weight >32 t; EU+EFTA+UK
- kg_7: 0.00589932
  Mass in kg, for butane; Articulated lorry transport, Total weight >32 t, mix Euro 0-5; ROW w/o EU+EFTA
- km_7: 151.982
  Distance in km, for butane; Articulated lorry transport, Total weight >32 t, mix Euro 0-5; ROW w/o EU+EFTA
- kg_km_7: 0.896593; = kg_7*km_7
  Transport amount in km*km, for butane; Articulated lorry transport, Total weight >32 t, mix Euro 0-5; ROW w/o EU+EFTA
- kg_8: 0.75
  Mass in kg, for polyurethane foam // polyurethane foam production // glo; Articulated lorry transport, Euro 4, Total weight >32 t; EU+EFTA+UK
- km_8: 1000
  Distance in km, for polyurethane foam // polyurethane foam production // glo; Articulated lorry transport, Euro 4, Total weight >32 t; EU+EFTA+UK
- kg_km_8: 750; = kg_8*km_8
  Transport amount in km*km, for polyurethane foam // polyurethane foam production // glo; Articulated lorry transport, Euro 4, Total weight >32 t; EU+EFTA+UK
- kg_9: 0.75
  Mass in kg, for polyurethane foam // polyurethane foam production // glo; Transoceanic ship, containers; GLO
- km_9: 18000
  Distance in km, for polyurethane foam // polyurethane foam production // glo; Transoceanic ship, containers; GLO
- kg_km_9: 13500; = kg_9*km_9
  Transport amount in km*km, for polyurethane foam // polyurethane foam production // glo; Transoceanic ship, containers; GLO

## Reference product
- lamination, flame // lamination, flame // glo: 1

## Inputs
- Transport of butane by Transoceanic ship, containers - GLO: 3.54671; = kg_km_0
- Transport of butane by Freight train, diesel traction - EU+EFTA+UK: 1.35753; = kg_km_1
- Transport of butane by Freight train, electricity traction - EU+EFTA+UK: 0.461776; = kg_km_2
- Transport of butane by Freight train, average - EU+EFTA+UK: 0.0108912; = kg_km_3
- Transport of butane by Barge - EU+EFTA+UK: 0.047883; = kg_km_4
- Transport of butane by Barge - ROW w/o EU+EFTA: 0.0977749; = kg_km_5
- Transport of butane by Articulated lorry transport, Euro 4, Total weight >32 t - EU+EFTA+UK: 0.339723; = kg_km_6
- Transport of butane by Articulated lorry transport, Total weight >32 t, mix Euro 0-5 - ROW w/o EU+EFTA: 0.896593; = kg_km_7
- Electricity from Electricity grid mix 1kV-60kV - AU: 0.0011
- Electricity from Electricity grid mix 1kV-60kV - EU+EFTA+UK: 0.0159
- Electricity from Electricity grid mix 1kV-60kV - NZ: 0.0002
- Electricity from Electricity grid mix 1kV-60kV - RAF: 0.0035
- Electricity from Electricity grid mix 1kV-60kV - RNA: 0.0233
- Electricity from Electricity grid mix 1kV-60kV - RSA: 0.0079
- Electricity from Electricity grid mix 1kV-60kV - RU: 0.0047
- Transport of polyurethane foam // polyurethane foam production // glo by Articulated lorry transport, Euro 4, Total weight >32 t - EU+EFTA+UK: 750; = kg_km_8
- Transport of polyurethane foam // polyurethane foam production // glo by Transoceanic ship, containers - GLO: 13500; = kg_km_9
- Electricity from Electricity grid mix 1kV-60kV - CN: 0.0238591
- Electricity from Electricity grid mix 1kV-60kV - RAS w/o CN: 0.0261409
- lamination, flame // lamination, flame // glo, blackbox: 1
- lamination, flame // lamination, flame // glo, elementary: 1

## Impact indicators
- Eutrophication marine: 0.00857073
- Ecotoxicity, freshwater: 33.5393
- Land use: 14.1914
- Water use: 1.97197
- Resource use, minerals and metals: 3.12816e-5
- Resource use, fossils: 65.1473
- Climate change: 3.11749
- Ozone depletion: 1.29625e-7
- Human toxicity, cancer: 1.9552e-9
- Human toxicity, non-cancer: 2.24844e-8
- EF-particulate Matter: 5.55288e-7
- Ionising radiation, human health: 0.0819305
- Photochemical ozone formation - human health: 0.0187515
- Acidification: 0.0271106
- Eutrophication, terrestrial: 0.0679982
- Eutrophication, freshwater: 0.000137464

## Deviations from the LCI method principle
The background data uses:
- the \xe2\x80\x9cRecycled content cut-off\xe2\x80\x9d approach to allocate end-of-life by-products and secondary materials. This allocation is explained in the description of the recycled content system model (http://www.ecoinvent.org/database/system-models-in-ecoinvent-3/cut-off-system-model/allocation-cut-off-by-classification.html).
OR
- EF compliant data

## Deviations from the LCI method approaches
Background data:
- the \xe2\x80\x9cRecycled content cut-off\xe2\x80\x9d approach to allocate end-of-life by-products and secondary materials. This allocation is explained in the description of the recycled content system model (http://www.ecoinvent.org/database/system-models-in-ecoinvent-3/cut-off-system-model/allocation-cut-off-by-classification.html). The ecoinvent database mostly relies on “Allocation – market values” apart for few exceptions particularly in the energy sector. ecoinvent energy data is replaced with EF3.0 core data as per the EF guidelines version 2.0.
OR
- EF compliant data

## Modelling constants
All modelling constants follow the requirements listed in the Tender Specifications 070201/2020/SER/ENV.B1. Completeness: There are no intentional cut-offs in the inventory no matter how small their contribution to all the EF impact categories is. Eventual cut-offs are in compliance with the Guide for EF compliant data sets (JRC 2020), i.e. only if below the 3% cut-off rule. Water use: water use is modelled at country level using separate flows for water withdrawal, water release and water evaporation. Handling multi-functional processes: the following PEF multi- functionality decision hierarchy is applied for resolving all multi- functionality problems: (1) subdivision or system expansion; (2) allocation based on a relevant underlying physical relationship (substitution may apply here); (3) allocation based on some other relationship. Direct land use change: GHG emissions from direct LUC allocated to good/service for 20 years after the LUC occurs, with IPCC default values. Carbon storage and delayed emissions: credits associated with temporary (carbon) storage or delayed emissions up to 300 years are not be considered. Emissions off-setting: are not included. Capital goods (including infrastructures) and their End of life: they are included. System boundaries: system boundaries include all processes linked to the product supply chain (e.g. maintenance). Time period: emissions and removals are modelled as if released or removed at the beginning of the assessment method. Fossil and biogenic carbon emissions and removals: removals and emissions are modelled as follows: All GHG emissions from fossil fuels (including peat and limestone) are modelled consistently with the most updated ILCD list of elementary flows. The non-fossil (biogenic) carbon flows are modelled consistently with the most updated ILCD list of elementary flows.

## Cut-off and completeness
There are no intentional cut-offs in the inventory no matter how small their contribution to all the EF impact categories is. Eventual cut-offs are in compliance with the Guide for EF compliant data sets (JRC 2020), i.e. only if below the 3% cut-off rule. The dataset dry mass and water balance has been checked to ensure the inventory is complete. Capital goods (e.g. infrastructure) and their end-of-life are included.

## Data selection and combination
These datasets include, in both their foreground and background data, links to EF3.0 compliant data.
The relevant background data on energy, transport, and End of Life are from the LCDN data node (http://lcdn.thinkstep.com/Node/).
All other background data in the supply of this product for which no EF3.0 process was available are from ecoinvent v3.7 database (www.ecoinvent.org) or other data sources.

## Data treatment and extrapolations
Several data sources have been used to model the inventory.

## Review details
Internal reviews have been asked to review the plausibility of the unit process, LCIA scores, and DQRs. Internal reviewers have also been asked to review the data for EF compliancy. The consortium is therefore responsible for aspects such as compliancy with the ILCD format, including validation in Look@LCI, and nomenclature.
Internal reviwers have been asked to judge based on the process name, that the unit process models in a complete and representative way the process in the requested location. The review encompassed the plausability of:
- exchanges with nature (elementary flows) as well as exchanges such as product and waste flows.
- meta information (general comment, technology comment, system boundaries, allocation, cut-off rules, etc.). Reviewers were asked to judge if the provided information is enough to understand the content of the process.
- LCIA scores
- DQRs including precision, technology, time and geography. As well as the overall DQR.
External reviewers have been asked to provide their expertise in the field of interest. External reviewers have been asked to review the unit process, including eventual methodological choices, the LCIA scores (provided with contribution scores as well), and DQRs. External reviewers have been provided all the information in a tool developed by the consortium for the purpose of this project.
External reviewers have been asked to judge based on the process name, that the unit process models in a complete and representative way the process in the requested location. The review encompassed:
- Plausability and completeness of exchanges with nature (elementary flows) as well as exchanges such as product and waste flows.
- Review of meta information (general comment, technology comment, system boundaries, allocation, cut-off rules, etc.). Reviewers were asked to judge if the provided information is enough to understand the content of the process.
- Review of properties (biogenic carbon and water content).
- Review of allocation keys.
- Plausability of LCIA scores calculated by the consortium.
- Plausability of DQRs including precision, technology, time and geography. As well as the overall DQR.

## Data sources
- Background Data for Representative products and organisations. EF 3.0 compliant (data stock)
- Fung, W. (2005). Coated and laminated textiles in sportswear. In Textiles in sport (pp. 134-174). Woodhead Publishing.
- WF-2005SS Sampling Flame Lamination Machine, http://www.worldfly.co.kr/eng/product/, Web Access: 10.02.2021
- Acurex Environmental Corporation, Aul E. & Associates Inc., Pechan E. H. & Associates Inc. 1993. Emission factor documentation for AP-42 section 1.5 Liquefied Petroleum Gas Combustion. Supplement B, October 1996. U. S. Environmental Protection Agency, Research Triangle Park, NC, U.S.A.
- Singha, K. (2012). A review on coating & lamination in textiles: processes and applications. American Journal of Polymer Science, 2(3), 39-49.
- Kecin, İ. (2018). Teknik Tekstil için Laminasyon Poliüretanları, https://www.turkchem.net/teknik-tekstil-icin-laminasyon-poliuretanlari.html, Access Date: 09.04.2021
- Laminating Adhesive For Nylon/ Fabric To Foam | Chemix Guru, https://www.chemixguru.com/laminating-adhesive-for-nylon/, Access Date: 09.04.2021

## Intended applications
Implementation of regular Product Environmental Footprint (PEF) studies and Organisation Environmental Footprint (OEF) studies exclusively under the specified Product groups and sectors as defined in the Product Environmental Footprint Category Rules (PEFCR) and Organisation Environmental Footprint Sectorial Rules (OEFSR) listed in http://ec.europa.eu/environment/eussd/smgp/PEFCR_OEFSR.htm
