# leather, cattle, wet-white metal free tanned; technology mix; production mix, at tannery; m2

Dataset: ILCD process, Partly terminated system
Geography: GLO
Reference year: 2020
Valid until: 2024
Classification: Materials production / Other materials
LCI method principle: Attributional
LCI method approaches: Allocation - market value
Completeness: All relevant flows quantified
Project: Provision of process-based 3.0 Environmental Footprint-compliant life cycle inventory datasets - Apparel 1 - contract number 070201/2020/840291/SER/ENV.B.1
Generated by: PRé Sustainability B.V.
Owner: PRé Sustainability B.V.
Compliance: ILCD Data Network - Entry-level; Suggestions for updating the PEF method 2019; ISO 14040 Environmental Management – Life Cycle Assessment – Principles and Framework, 2006; ISO 14044:2006. Environmental Management – Life Cycle Assessment – Requirements and guidelines.; Environmental Footprint 3.1
Review: Dependent internal review by Avraam Symeonidis, Marisa Vieira; Independent review panel by Madhuri Nigam
Data quality: Overall quality: Good; Time representativeness: Good; Geographical representativeness: Very good; Technological representativeness: Very good; Precision: Good; Methodological appropriateness and consistency: Not applicable
Amounts: no units in this file; such an amount is in the reference unit of its flow, which a separate flow dataset defines
copyright: true
licenseType: Free of charge for some user types or use types
accessRestrictions: Free of charge for all final users implementing a regular Product Environmental Footprint (PEF) studies and Organisation Environmental Footprint (OEF) studies exclusively under the specified Product groups and sectors as defined in the Product Environmental Footprint Category Rules (PEFCR) and Organisation Environmental Footprint Sectorial Rules (OEFSR) listed in http://ec.europa.eu/environment/eussd/smgp/PEFCR_OEFSR.htm and in accordance with the terms and conditions of the EULA (available at https://ecoinvent.lca-data.com/) exclusively until 31st December 2024. Any use of this dataset or any derivative data not within the specific context of one of the PEF/OEF projects or after the end of 2024 is not permitted.

## General comment
Notice: this data set supersedes the EF3.0-compliant version (see link under "preceding data set version" below calculated with the EF3.0). The life cycle inventory is not changed from the original EF3.0 data set. The LCIA results are calculated based on the EF3.1 methods which provide updated characterisation factors in the following impact categories: Climate Change, Ecotoxicity freshwater, Photochemical Ozone Formation, Acidification, Human Toxicity non-cancer, and Human Toxicity cancer. The review report and the data quality ratings refer to the original results. The data set has been updated by the European Commission on the basis of the original EF3.0 data set delivered by the data provider.The dataset describes the tanning and finishing of 1m2 cattle leather, of around 1.5 kg/m2 density and 1.9 mm thickness. 7.4 kg raw hide are required per m2 finished leather.

Note this model is for chrome-free wet-white metal-free tanning, and must not be used for wet-white pre-tanned leather. Wet-white pre-tanned leather involves a (p)re-tanning stage to improve the properties of the leather, before chrome tanning with a smaller (but still significant) amount of chrome (Ludvík and Buljan, 2000; Mhlanga et al., 2010).

Sources reporting values per tonne raw hide, are converted from mass per tonne raw hide to per m2 using conversion factor of kg_hide_per_m2_leather = 7.4 (default) based on Table 7, p.8 and Annex 5, Leather PEFCR, 2018. Average weighted by end-use and proportion of animal type in each end use. This is a parameter that can be adjusted if the value is known

# Thickness
Leather of 1.9 mm (+-0.3mm) thickness is considered as a functional unit. This is an estimated global average across all cattle leather types based on data from a number of sources, primarily retailers and a leather chemical supplier and is weighted by market shares of each end-uses (Table 19, UNIDO, 2011; bestleather.org, 2021; tandyleather.com, 2021; www.leatherhidestore.com, 2021; BASF, 2003). Bovine leather of about 1.6 mm thick was considered the most widely used material for clothing [UNIDO, 2011], but leather accessories and footwear, which are much thicker, have a significant market share, Footwear 54% around 2010 globally, [Table 19, UNIDO, 2011], hence giving a value possibly in between two use cases.

# Density
Density of 1.50 kg/m2 for cattle leather averaged across different leather types is based on
Thanikaivelan, Shelly, and Ramkumar, ‘Gauge Length Effect on the Tensile Properties of Leather’.; Pati, Chaudhary, and Subramani, ‘Biochemical Method for Extraction and Reuse of Protein and Chromium from Chrome Leather Shavings’.; Clarke, ‘Some Density Data on Leather’.; Dilek et al., ‘Evaluation of Collagen Hydrolysate on the Performance Properties of DifferentWet-White Tanned Leathers’.; BASF, 2003; COTANCE, 2021, personal communications; De Rosa-Giglio et al., ‘PRODUCT ENVIRONMENTAL FOOTPRINT CATEGORY RULES Leather’.; Andrea Fontanella et al., ‘Leather PEF Screening Report in the Context of the EU Product Environmental Footprint Category Rules (PEFCR) Pilots’.

Note that density depends on whether full-grain (with the more dense corium layer) or split-grain (without) leathers are used.

# Energy
Assuming 85 % (68.3 MJ) out of a total 80 MJ of primary energy per m2 finished leather is in the form of thermal energy, and 15% (12.0 MJ) in the form of electrical energy, based on Table 3.22, p.83, BAT, 2013. Note that the energy composition may vary significantly (Laurenti, 2016).

Total primary energy: 80 MJ/m2 finished leather, based on an unweighted average of energy consumption from the following sources:
- Black et al, Leather BAT 2013;
Laurenti et al, 2016;
EPD, Dani Leather 2020;
COTANCE and IndustriAll-Europe, 2020, SER 2020

# Water
Water usage is based on Table 3, IFC 2007; Tables 23-4, Fontanella, 2015; FAO, based on RIVM 1992 (plus others for water volume); Fig 3a, Laurenti, 2016; Lofrano, et al, 2008; COTANCE, 2020

Standard error of mean: 26 m3 water/m2 leather

# Waste Water and Emissions
Waste water is used to balance the mass in the model. Emissions are averaged from a mix of tanning techniques and regions, see comments on the exchanges for the sources used for each emission.

Mass waste water = Mass of inputs – mass of leather out – mass of emissions (to water and air) – mass of textile machinery
where Mass of leather = density of leather (kg/m3) × thickness of leather (m) × area leather (m2)
The proportion of tanning agents and other synthetic compounds being absorbed into the final leather or being emitted into the water stream cannot be determined in general from the data used, and varies strongly based on the tannery parameters.

## Technology and included processes
Wet-white metal-free tanning – a variety of tanning techniques that avoid the use of chromium or heavy metals in the tanning process. Metal-free tanning agent production is modelled as a separate intermediate process, and has inputs of each of the tanning agents listed in Annex 7 Leather PEFCR, 2019. The modelled substances within the aggregated model tanning agent (to represent impacts averaged over all possible wet-white metal-free tanning techniques) are: acetaldehyde, Alkylbenzene sulfonate, chemical, organic (as a proxy for chemicals with no corresponding model), formaldehyde, maleic anhydride, phenolic resin, Polycarboxylate, and styrene.
Stages in Leather tanning for non-chrome tanned leather (starting with pelt) (BASF, 2003, p. 104)
1. De-liming/Bating
2. Pickling/Pre-tanning
3. Samming/shaving
4. Tanning
5. Basifying

System boundaries: The dataset describes the tanning and finishing of cattle leather. The inventory includes the following flows:
- Electricity and heat use
- Chemicals: tanning agent, wetting agents, liming agents, fatliquors and other agents used in the processing of leather
- Water
- Emissions to water
- Transport of chemicals, and raw materials

It does not include:
- Packaging materials
- Certain chemicals in the intermediate pre-tanning and coating processes have been replaced with proxies where there is no exact match (see comments on exchanges)

## Parameters
- kg_0: 0.74
  Mass in kg, for wet-white metal-free tanning agent mix // wet-white metal-free tanning agent production // glo; Articulated lorry transport, Euro 4, Total weight >32 t; EU+EFTA+UK
- km_0: 1000
  Distance in km, for wet-white metal-free tanning agent mix // wet-white metal-free tanning agent production // glo; Articulated lorry transport, Euro 4, Total weight >32 t; EU+EFTA+UK
- kg_km_0: 740; = kg_0*km_0
  Transport amount in km*km, for wet-white metal-free tanning agent mix // wet-white metal-free tanning agent production // glo; Articulated lorry transport, Euro 4, Total weight >32 t; EU+EFTA+UK
- kg_1: 0.02442
  Mass in kg, for beef, fresh hides // beef, fresh hides // br; Articulated lorry transport, Euro 4, Total weight >32 t; EU+EFTA+UK
- km_1: 1000
  Distance in km, for beef, fresh hides // beef, fresh hides // br; Articulated lorry transport, Euro 4, Total weight >32 t; EU+EFTA+UK
- kg_km_1: 24.42; = kg_1*km_1
  Transport amount in km*km, for beef, fresh hides // beef, fresh hides // br; Articulated lorry transport, Euro 4, Total weight >32 t; EU+EFTA+UK
- kg_2: 3.0266
  Mass in kg, for beef, fresh hides // beef, fresh hides // eu+efta+uk; Articulated lorry transport, Euro 4, Total weight >32 t; EU+EFTA+UK
- km_2: 1000
  Distance in km, for beef, fresh hides // beef, fresh hides // eu+efta+uk; Articulated lorry transport, Euro 4, Total weight >32 t; EU+EFTA+UK
- kg_km_2: 3026.6; = kg_2*km_2
  Transport amount in km*km, for beef, fresh hides // beef, fresh hides // eu+efta+uk; Articulated lorry transport, Euro 4, Total weight >32 t; EU+EFTA+UK
- kg_3: 1.8944
  Mass in kg, for beef, fresh hides // beef, fresh hides // glo; Articulated lorry transport, Euro 4, Total weight >32 t; EU+EFTA+UK
- km_3: 1000
  Distance in km, for beef, fresh hides // beef, fresh hides // glo; Articulated lorry transport, Euro 4, Total weight >32 t; EU+EFTA+UK
- kg_km_3: 1894.4; = kg_3*km_3
  Transport amount in km*km, for beef, fresh hides // beef, fresh hides // glo; Articulated lorry transport, Euro 4, Total weight >32 t; EU+EFTA+UK
- kg_4: 2.4124
  Mass in kg, for beef, fresh hides // beef, fresh hides // us; Articulated lorry transport, Euro 4, Total weight >32 t; EU+EFTA+UK
- km_4: 427
  Distance in km, for beef, fresh hides // beef, fresh hides // us; Articulated lorry transport, Euro 4, Total weight >32 t; EU+EFTA+UK
- kg_km_4: 1030.09; = kg_4*km_4
  Transport amount in km*km, for beef, fresh hides // beef, fresh hides // us; Articulated lorry transport, Euro 4, Total weight >32 t; EU+EFTA+UK
- kg_5: 1.332
  Mass in kg, for sodium chloride powder // sodium chloride powder production // eu+efta+uk; Articulated lorry transport, Euro 4, Total weight >32 t; EU+EFTA+UK
- km_5: 1000
  Distance in km, for sodium chloride powder // sodium chloride powder production // eu+efta+uk; Articulated lorry transport, Euro 4, Total weight >32 t; EU+EFTA+UK
- kg_km_5: 1332; = kg_5*km_5
  Transport amount in km*km, for sodium chloride powder // sodium chloride powder production // eu+efta+uk; Articulated lorry transport, Euro 4, Total weight >32 t; EU+EFTA+UK
- kg_6: 3.19049
  Mass in kg, for biodegradable waste to landfill // landfill of biodegradable waste // eu+efta+uk; Articulated lorry transport, Euro 4, Total weight >32 t; EU+EFTA+UK
- km_6: 77
  Distance in km, for biodegradable waste to landfill // landfill of biodegradable waste // eu+efta+uk; Articulated lorry transport, Euro 4, Total weight >32 t; EU+EFTA+UK
- kg_km_6: 245.668; = kg_6*km_6
  Transport amount in km*km, for biodegradable waste to landfill // landfill of biodegradable waste // eu+efta+uk; Articulated lorry transport, Euro 4, Total weight >32 t; EU+EFTA+UK
- kg_7: 0.74
  Mass in kg, for wet-white metal-free tanning agent mix // wet-white metal-free tanning agent production // glo; Transoceanic ship, containers; GLO
- km_7: 18000
  Distance in km, for wet-white metal-free tanning agent mix // wet-white metal-free tanning agent production // glo; Transoceanic ship, containers; GLO
- kg_km_7: 13320; = kg_7*km_7
  Transport amount in km*km, for wet-white metal-free tanning agent mix // wet-white metal-free tanning agent production // glo; Transoceanic ship, containers; GLO
- kg_8: 0.02442
  Mass in kg, for beef, fresh hides // beef, fresh hides // br; Transoceanic ship, containers; GLO
- km_8: 18000
  Distance in km, for beef, fresh hides // beef, fresh hides // br; Transoceanic ship, containers; GLO
- kg_km_8: 439.56; = kg_8*km_8
  Transport amount in km*km, for beef, fresh hides // beef, fresh hides // br; Transoceanic ship, containers; GLO
- kg_9: 3.0266
  Mass in kg, for beef, fresh hides // beef, fresh hides // eu+efta+uk; Transoceanic ship, containers; GLO
- km_9: 18000
  Distance in km, for beef, fresh hides // beef, fresh hides // eu+efta+uk; Transoceanic ship, containers; GLO
- kg_km_9: 54478.8; = kg_9*km_9
  Transport amount in km*km, for beef, fresh hides // beef, fresh hides // eu+efta+uk; Transoceanic ship, containers; GLO
- kg_10: 1.8944
  Mass in kg, for beef, fresh hides // beef, fresh hides // glo; Transoceanic ship, containers; GLO
- km_10: 18000
  Distance in km, for beef, fresh hides // beef, fresh hides // glo; Transoceanic ship, containers; GLO
- kg_km_10: 34099.2; = kg_10*km_10
  Transport amount in km*km, for beef, fresh hides // beef, fresh hides // glo; Transoceanic ship, containers; GLO
- kg_11: 2.4124
  Mass in kg, for beef, fresh hides // beef, fresh hides // us; Transoceanic ship, containers; GLO
- km_11: 7690
  Distance in km, for beef, fresh hides // beef, fresh hides // us; Transoceanic ship, containers; GLO
- kg_km_11: 18551.4; = kg_11*km_11
  Transport amount in km*km, for beef, fresh hides // beef, fresh hides // us; Transoceanic ship, containers; GLO
- kg_12: 1.332
  Mass in kg, for sodium chloride powder // sodium chloride powder production // eu+efta+uk; Transoceanic ship, containers; GLO
- km_12: 18000
  Distance in km, for sodium chloride powder // sodium chloride powder production // eu+efta+uk; Transoceanic ship, containers; GLO
- kg_km_12: 23976; = kg_12*km_12
  Transport amount in km*km, for sodium chloride powder // sodium chloride powder production // eu+efta+uk; Transoceanic ship, containers; GLO

## Reference product
- leather, cattle, wet-white metal free tanned // leather, cattle, wet-white metal free tanned // glo: 1

## Inputs
- Electricity from Electricity grid mix 1kV-60kV - AT: 0.363934
- Electricity from Electricity grid mix 1kV-60kV - AU: 0.232918
- Electricity from Electricity grid mix 1kV-60kV - BE: 0.0873443
- Electricity from Electricity grid mix 1kV-60kV - BG: 0.00873443
- Electricity from Electricity grid mix 1kV-60kV - BR: 1.10636
- Electricity from Electricity grid mix 1kV-60kV - CA: 0.145574
- Electricity from Electricity grid mix 1kV-60kV - CH: 0.0640525
- Electricity from Electricity grid mix 1kV-60kV - CN: 0.567738
- Electricity from Electricity grid mix 1kV-60kV - CZ: 0.033482
- Electricity from Electricity grid mix 1kV-60kV - DE: 0.596852
- Electricity from Electricity grid mix 1kV-60kV - DK: 0.0873443
- Electricity from Electricity grid mix 1kV-60kV - ES: 0.363934
- Electricity from Electricity grid mix 1kV-60kV - EU+EFTA+UK: 0.209626
- Electricity from Electricity grid mix 1kV-60kV - FI: 0.0160131
- Electricity from Electricity grid mix 1kV-60kV - FR: 0.363934
- Electricity from Electricity grid mix 1kV-60kV - GB: 0.247475
- Electricity from Electricity grid mix 1kV-60kV - GR: 0.00582295
- Electricity from Electricity grid mix 1kV-60kV - HR: 0.061141
- Electricity from Electricity grid mix 1kV-60kV - HU: 0.0232918
- Electricity from Electricity grid mix 1kV-60kV - IE: 0.0640525
- Electricity from Electricity grid mix 1kV-60kV - IN: 0.320262
- Electricity from Electricity grid mix 1kV-60kV - IT: 2.91148
- Electricity from Electricity grid mix 1kV-60kV - JP: 0.0873443
- Electricity from Electricity grid mix 1kV-60kV - LT: 0.0145574
- Electricity from Electricity grid mix 1kV-60kV - NL: 0.33482
- Electricity from Electricity grid mix 1kV-60kV - NO: 0.0262033
- Electricity from Electricity grid mix 1kV-60kV - NZ: 0.131016
- Electricity from Electricity grid mix 1kV-60kV - PL: 0.247475
- Electricity from Electricity grid mix 1kV-60kV - PT: 0.0873443
- Electricity from Electricity grid mix 1kV-60kV - RAF: 0.234374
- Electricity from Electricity grid mix 1kV-60kV - RAS w/o CN: 2.28842
- Electricity from Electricity grid mix 1kV-60kV - RNA: 1.49941
- Electricity from Electricity grid mix 1kV-60kV - RO: 0.0727869
- Electricity from Electricity grid mix 1kV-60kV - RSA: 1.33346
- Electricity from Electricity grid mix 1kV-60kV - RU: 0.0873443
- Electricity from Electricity grid mix 1kV-60kV - SE: 0.0727869
- Electricity from Electricity grid mix 1kV-60kV - SI: 0.0509508
- Electricity from Electricity grid mix 1kV-60kV - SK: 0.0727869
- Thermal energy (MJ) from Thermal energy from heavy fuel oil (HFO) - EU+EFTA+UK: 2.68493
- Thermal energy (MJ) from Thermal energy from heavy fuel oil (HFO) - ROW: 3.28158
- Thermal energy (MJ) from Thermal energy from natural gas - EU+EFTA+UK: 34.5495
- Thermal energy (MJ) from Thermal energy from natural gas - ROW: 42.2272
- Transport of wet-white metal-free tanning agent mix // wet-white metal-free tanning agent production // glo by Articulated lorry transport, Euro 4, Total weight >32 t - EU+EFTA+UK: 740; = kg_km_0
- Transport of beef, fresh hides // beef, fresh hides // br by Articulated lorry transport, Euro 4, Total weight >32 t - EU+EFTA+UK: 24.42; = kg_km_1
- Transport of beef, fresh hides // beef, fresh hides // eu+efta+uk by Articulated lorry transport, Euro 4, Total weight >32 t - EU+EFTA+UK: 3026.6; = kg_km_2
- Transport of beef, fresh hides // beef, fresh hides // glo by Articulated lorry transport, Euro 4, Total weight >32 t - EU+EFTA+UK: 1894.4; = kg_km_3
- Transport of beef, fresh hides // beef, fresh hides // us by Articulated lorry transport, Euro 4, Total weight >32 t - EU+EFTA+UK: 1030.09; = kg_km_4
- Transport of sodium chloride powder // sodium chloride powder production // eu+efta+uk by Articulated lorry transport, Euro 4, Total weight >32 t - EU+EFTA+UK: 1332; = kg_km_5
- Transport of biodegradable waste to landfill // landfill of biodegradable waste // eu+efta+uk by Articulated lorry transport, Euro 4, Total weight >32 t - EU+EFTA+UK: 245.668; = kg_km_6
- Transport of wet-white metal-free tanning agent mix // wet-white metal-free tanning agent production // glo by Transoceanic ship, containers - GLO: 13320; = kg_km_7
- Transport of beef, fresh hides // beef, fresh hides // br by Transoceanic ship, containers - GLO: 439.56; = kg_km_8
- Transport of beef, fresh hides // beef, fresh hides // eu+efta+uk by Transoceanic ship, containers - GLO: 54478.8; = kg_km_9
- Transport of beef, fresh hides // beef, fresh hides // glo by Transoceanic ship, containers - GLO: 34099.2; = kg_km_10
- Transport of beef, fresh hides // beef, fresh hides // us by Transoceanic ship, containers - GLO: 18551.4; = kg_km_11
- Transport of sodium chloride powder // sodium chloride powder production // eu+efta+uk by Transoceanic ship, containers - GLO: 23976; = kg_km_12
- leather, cattle, wet-white metal free tanned // leather, cattle, wet-white metal free tanned // glo, blackbox: 1
- leather, cattle, wet-white metal free tanned // leather, cattle, wet-white metal free tanned // glo, elementary: 1

## Impact indicators
- Eutrophication marine: 0.708999
- Ecotoxicity, freshwater: 2618.81
- Land use: 6415.84
- Water use: 30.5608
- Resource use, minerals and metals: 8.55049e-5
- Resource use, fossils: 526.527
- Climate change: 77.7018
- Ozone depletion: 5.32198e-6
- Human toxicity, cancer: 1.22037e-7
- Human toxicity, non-cancer: 1.19233e-5
- EF-particulate Matter: 1.60396e-5
- Ionising radiation, human health: 1.67049
- Photochemical ozone formation - human health: 0.419132
- Acidification: 1.86759
- Eutrophication, terrestrial: 7.89891
- Eutrophication, freshwater: 0.0100599

## Deviations from the LCI method principle
The background data uses:
- the \xe2\x80\x9cRecycled content cut-off\xe2\x80\x9d approach to allocate end-of-life by-products and secondary materials. This allocation is explained in the description of the recycled content system model (http://www.ecoinvent.org/database/system-models-in-ecoinvent-3/cut-off-system-model/allocation-cut-off-by-classification.html).
OR
- EF compliant data

## Deviations from the LCI method approaches
Background data:
- the \xe2\x80\x9cRecycled content cut-off\xe2\x80\x9d approach to allocate end-of-life by-products and secondary materials. This allocation is explained in the description of the recycled content system model (http://www.ecoinvent.org/database/system-models-in-ecoinvent-3/cut-off-system-model/allocation-cut-off-by-classification.html). The ecoinvent database mostly relies on “Allocation – market values” apart for few exceptions particularly in the energy sector. ecoinvent energy data is replaced with EF3.0 core data as per the EF guidelines version 2.0.
OR
- EF compliant data

## Modelling constants
All modelling constants follow the requirements listed in the Tender Specifications 070201/2020/SER/ENV.B1. Completeness: There are no intentional cut-offs in the inventory no matter how small their contribution to all the EF impact categories is. Eventual cut-offs are in compliance with the Guide for EF compliant data sets (JRC 2020), i.e. only if below the 3% cut-off rule. Water use: water use is modelled at country level using separate flows for water withdrawal, water release and water evaporation. Handling multi-functional processes: the following PEF multi- functionality decision hierarchy is applied for resolving all multi- functionality problems: (1) subdivision or system expansion; (2) allocation based on a relevant underlying physical relationship (substitution may apply here); (3) allocation based on some other relationship. Direct land use change: GHG emissions from direct LUC allocated to good/service for 20 years after the LUC occurs, with IPCC default values. Carbon storage and delayed emissions: credits associated with temporary (carbon) storage or delayed emissions up to 300 years are not be considered. Emissions off-setting: are not included. Capital goods (including infrastructures) and their End of life: they are included. System boundaries: system boundaries include all processes linked to the product supply chain (e.g. maintenance). Time period: emissions and removals are modelled as if released or removed at the beginning of the assessment method. Fossil and biogenic carbon emissions and removals: removals and emissions are modelled as follows: All GHG emissions from fossil fuels (including peat and limestone) are modelled consistently with the most updated ILCD list of elementary flows. The non-fossil (biogenic) carbon flows are modelled consistently with the most updated ILCD list of elementary flows.

## Cut-off and completeness
There are no intentional cut-offs in the inventory no matter how small their contribution to all the EF impact categories is. Eventual cut-offs are in compliance with the Guide for EF compliant data sets (JRC 2020), i.e. only if below the 3% cut-off rule. The dataset dry mass and water balance has been checked to ensure the inventory is complete. Capital goods (e.g. infrastructure) and their end-of-life are included.

## Data selection and combination
These datasets include, in both their foreground and background data, links to EF3.0 compliant data.
The relevant background data on energy, transport, and End of Life are from the LCDN data node (http://lcdn.thinkstep.com/Node/).
All other background data in the supply of this product for which no EF3.0 process was available are from ecoinvent v3.7 database (www.ecoinvent.org) or other data sources.

## Data treatment and extrapolations
Several data sources have been used to model the inventory.

## Review details
Internal reviews have been asked to review the plausibility of the unit process, LCIA scores, and DQRs. Internal reviewers have also been asked to review the data for EF compliancy. The consortium is therefore responsible for aspects such as compliancy with the ILCD format, including validation in Look@LCI, and nomenclature.
Internal reviwers have been asked to judge based on the process name, that the unit process models in a complete and representative way the process in the requested location. The review encompassed the plausability of:
- exchanges with nature (elementary flows) as well as exchanges such as product and waste flows.
- meta information (general comment, technology comment, system boundaries, allocation, cut-off rules, etc.). Reviewers were asked to judge if the provided information is enough to understand the content of the process.
- LCIA scores
- DQRs including precision, technology, time and geography. As well as the overall DQR.
External reviewers have been asked to provide their expertise in the field of interest. External reviewers have been asked to review the unit process, including eventual methodological choices, the LCIA scores (provided with contribution scores as well), and DQRs. External reviewers have been provided all the information in a tool developed by the consortium for the purpose of this project.
External reviewers have been asked to judge based on the process name, that the unit process models in a complete and representative way the process in the requested location. The review encompassed:
- Plausability and completeness of exchanges with nature (elementary flows) as well as exchanges such as product and waste flows.
- Review of meta information (general comment, technology comment, system boundaries, allocation, cut-off rules, etc.). Reviewers were asked to judge if the provided information is enough to understand the content of the process.
- Review of properties (biogenic carbon and water content).
- Review of allocation keys.
- Plausability of LCIA scores calculated by the consortium.
- Plausability of DQRs including precision, technology, time and geography. As well as the overall DQR.

## Data sources
- Background Data for Representative products and organisations. EF 3.0 compliant (data stock)
- De Rosa-Giglio, Fontanella, Gonzalez-Quijano, Ioannidis, Nucci, and Brugnoli. ‘PRODUCT ENVIRONMENTAL FOOTPRINT CATEGORY RULES Leather’, 25 April 2018.
- BASF. ‘BASF Pocket Book for the Leather Technologist’, no. 4 (2003). https://www.academia.edu/32384925/Book_for_Leather_BASF_pdf.
- Pant, R, L Zampori, European Commission, and Joint Research Centre. Suggestions for Updating the Organisation Environmental Footprint (OEF) Method., 2019. http://publications.europa.eu/publication/manifestation_identifier/PUB_KJNA29682ENN.
- Andrea Fontanella, Benedetta Nucci, Primiano De Rosa-Giglio, and Ioannis Ioannidis. ‘Leather PEF Screening Report in the Context of the EU Product Environmental Footprint Category Rules (PEFCR) Pilots’, 11 November 2015.
- UNIDO. ‘Future Trends in the World Leather and Leather Products Industry and Trade’, 2010. https://leatherpanel.org/sites/default/files/publications-attachments/future_trends_in_the_world_leather_and_leather_products_industry_and_trade.pdf.
- UNIDO Leatherpanel, J. Buljan, and I. Kral. ‘INTRODUCTION TO TREATMENT OF TANNERY EFFLUENTS’, 2011. https://leatherpanel.org/sites/default/files/publications-attachments/introduction_to_treatment_of_tannery_effluents.pdf.
- COTANCE and industriAll-Europe. ‘European Leather Industry - SOCIAL & ENVIRONMENTAL REPORT 2020’, 2020. https://www.euroleather.com/doc/SER/European%20Leather%20Industry%20-%20Social%20and%20Environmental%20Report%202020%20-%20EN%20web.pdf.
- Khwaja, A R, Rashmi Singh, and S N Tandon. ‘MONITORING OF GANGA WATER AND SEDIMENTS VIS-À-VIS TANNERY POLLUTION AT KANPUR (INDIA): A CASE STUDY’, n.d., 17.
- IFC, World Bank Group. ‘Environmental, Health, and Safety Guidelines for Tanning and Leather Finishing’. International Finance Corporation, 30 April 2007. https://www.ifc.org/wps/wcm/connect/e497d468-6fbe-462e-86a9-e3ff55ea0236/Final%2B-%2BTanning%2Band%2BLeather%2BFinishing.pdf?MOD=AJPERES&CVID=jqezJDY&id=1323152378134.
- Banuraman, Saritha. ‘Treatability Study of Tannery Effluent by Enhanced Primary Treatment’, 2013. https://citeseerx.ist.psu.edu/viewdoc/download?doi=10.1.1.417.417&rep=rep1&type=pdf.
- FOOD AND AGRICULTURE ORGANIZATION OF THE UNITED NATIONS. ‘Guidelines for Slaughtering, Meat Cutting and Further Processing’. FAO ANIMAL PRODUCTION AND HEALTH PAPER, 1991. http://www.fao.org/3/T0279E/T0279E05.htm.
- Miljögiraff. ‘EPD Dani Leather for Furniture, Footwear and Leather Goods (S-P-00344)’, 4 April 2012. https://portal.environdec.com/api/api/v1/EPDLibrary/Files/54434c97-7440-4562-41bf-08d8dc8471b1/Data.
- Hou, X, X Xie, and X Huo. ‘Chemical Composition and Nutritive Value of Leather Meals in Broilers’, 2001, 1.
- OEC. ‘The Observatory of Economic Complexity’. Accessed 3 May 2021. https://oec.world/ Note: Trade data from 2016-19

## Intended applications
Implementation of regular Product Environmental Footprint (PEF) studies and Organisation Environmental Footprint (OEF) studies exclusively under the specified Product groups and sectors as defined in the Product Environmental Footprint Category Rules (PEFCR) and Organisation Environmental Footprint Sectorial Rules (OEFSR) listed in http://ec.europa.eu/environment/eussd/smgp/PEFCR_OEFSR.htm
