# washing, acid; washing, pottasium permanganate and phosphoric acid; production mix, at plant; service

Dataset: ILCD process, Partly terminated system
Geography: GLO
Reference year: 2021
Valid until: 2024
Classification: Systems / Textiles, furnitures and other interiors
LCI method principle: Attributional
LCI method approaches: Allocation - market value
Completeness: All relevant flows quantified
Project: Provision of process-based 3.0 Environmental Footprint-compliant life cycle inventory datasets - Apparel 1 - contract number 070201/2020/840291/SER/ENV.B.1
Generated by: Life Cycle Indonesia
Owner: PRé Sustainability B.V.
Compliance: ILCD Data Network - Entry-level; Suggestions for updating the PEF method 2019; ISO 14040 Environmental Management – Life Cycle Assessment – Principles and Framework, 2006; ISO 14044:2006. Environmental Management – Life Cycle Assessment – Requirements and guidelines.; Environmental Footprint 3.1
Review: Dependent internal review by Avraam Symeonidis, Emilia Moreno Ruiz; Independent review panel by Fábio Valebona
Data quality: Overall quality: Good; Time representativeness: Very good; Geographical representativeness: Fair; Technological representativeness: Very good; Precision: Good; Methodological appropriateness and consistency: Not applicable
Amounts: no units in this file; such an amount is in the reference unit of its flow, which a separate flow dataset defines
copyright: true
licenseType: Free of charge for some user types or use types
accessRestrictions: Free of charge for all final users implementing a regular Product Environmental Footprint (PEF) studies and Organisation Environmental Footprint (OEF) studies exclusively under the specified Product groups and sectors as defined in the Product Environmental Footprint Category Rules (PEFCR) and Organisation Environmental Footprint Sectorial Rules (OEFSR) listed in http://ec.europa.eu/environment/eussd/smgp/PEFCR_OEFSR.htm and in accordance with the terms and conditions of the EULA (available at https://ecoinvent.lca-data.com/) exclusively until 31st December 2024. Any use of this dataset or any derivative data not within the specific context of one of the PEF/OEF projects or after the end of 2024 is not permitted.

## General comment
Notice: this data set supersedes the EF3.0-compliant version (see link under "preceding data set version" below calculated with the EF3.0). The life cycle inventory is not changed from the original EF3.0 data set. The LCIA results are calculated based on the EF3.1 methods which provide updated characterisation factors in the following impact categories: Climate Change, Ecotoxicity freshwater, Photochemical Ozone Formation, Acidification, Human Toxicity non-cancer, and Human Toxicity cancer. The review report and the data quality ratings refer to the original results. The data set has been updated by the European Commission on the basis of the original EF3.0 data set delivered by the data provider.Acid washing, also known as ice or snow washing uses pumice stones soaked in bleach to alter colour in a nonuniform manner to create often splotchy, yellowish patterns. This finish provide the jeans with sharp contrast in tonal colour. This wash was achieved by soaking stones in bleaching solution, treatment in wash liquor, followed by neutralisation. The porous pumice stones can be soaked in chlorine or pottasium permanganate (PP) bleach. Stones are used to deposit a chemical on the garments to strip off the colour. This chemical deposit removes colour only from the outer surface of the garments and produces a frosted appearance (Choudury, 2017).

Choudhury, Asim Kumar Roy. 2017. Principle of textile finishing. United Kingdom: Elsevier. pp 399-400

## Technology and included processes
Acid washing is normally carried out by tumbling the garments with pumice stones presoaked in a bleach solutions. In this model, pottasium permanganate and phosphoric acid are used as a soaking solution. While the neutralization uses sodium sulphite solution.

The activity starts by desizing the fabric. Stones will be saturated with bleach solution and dried before use. The Fabric and stones are put into dry washing machine for washing process. Then, the fabric would be neutralized and washed before dried in hydroextractor and drying machine. Materials entering the process are included as well as energy uses and infrastructure. In this model, the infrastructure of desizing machine is not included as the machine is usually linked to other processes too. The cycle time used to calculate the infrastructure of other machine is based on approximation to industrial data and other process. The chemical used in this process is assumed to be generated as waste water. The disintegrated stone is considered hazardous waste since it soaked in bleach and acid. Another hazardous waste comes from waste lube oil. The consumption of lubricating oil using a thermobonding oven as a proxy.

Choudhury, Asim Kumar Roy. 2017. Principle of textile finishing. United Kingdom: Elsevier. pp 400

## Parameters
- kg_0: 0.0353002
  Mass in kg, for pumice; Transoceanic ship, bulk; GLO
- km_0: 1201.36
  Distance in km, for pumice; Transoceanic ship, bulk; GLO
- kg_km_0: 42.4083; = kg_0*km_0
  Transport amount in km*km, for pumice; Transoceanic ship, bulk; GLO
- kg_1: 0.0353002
  Mass in kg, for pumice; Freight train, diesel traction; EU+EFTA+UK
- km_1: 148.312
  Distance in km, for pumice; Freight train, diesel traction; EU+EFTA+UK
- kg_km_1: 5.23545; = kg_1*km_1
  Transport amount in km*km, for pumice; Freight train, diesel traction; EU+EFTA+UK
- kg_2: 0.0353002
  Mass in kg, for pumice; Freight train, electricity traction; EU+EFTA+UK
- km_2: 50.4497
  Distance in km, for pumice; Freight train, electricity traction; EU+EFTA+UK
- kg_km_2: 1.78088; = kg_2*km_2
  Transport amount in km*km, for pumice; Freight train, electricity traction; EU+EFTA+UK
- kg_3: 0.0353002
  Mass in kg, for pumice; Freight train, average; EU+EFTA+UK
- km_3: 1.18988
  Distance in km, for pumice; Freight train, average; EU+EFTA+UK
- kg_km_3: 0.042003; = kg_3*km_3
  Transport amount in km*km, for pumice; Freight train, average; EU+EFTA+UK
- kg_4: 0.0353002
  Mass in kg, for pumice; Barge; EU+EFTA+UK
- km_4: 11.4079
  Distance in km, for pumice; Barge; EU+EFTA+UK
- kg_km_4: 0.402702; = kg_4*km_4
  Transport amount in km*km, for pumice; Barge; EU+EFTA+UK
- kg_5: 0.0353002
  Mass in kg, for pumice; Barge; ROW w/o EU+EFTA
- km_5: 23.2944
  Distance in km, for pumice; Barge; ROW w/o EU+EFTA
- kg_km_5: 0.822298; = kg_5*km_5
  Transport amount in km*km, for pumice; Barge; ROW w/o EU+EFTA
- kg_6: 0.0353002
  Mass in kg, for pumice; Articulated lorry transport, Total weight <7.5 t, mix Euro 0-5; EU+EFTA+UK
- km_6: 15.7098
  Distance in km, for pumice; Articulated lorry transport, Total weight <7.5 t, mix Euro 0-5; EU+EFTA+UK
- kg_km_6: 0.554559; = kg_6*km_6
  Transport amount in km*km, for pumice; Articulated lorry transport, Total weight <7.5 t, mix Euro 0-5; EU+EFTA+UK
- kg_7: 0.0353002
  Mass in kg, for pumice; Articulated lorry transport, Euro 4, Total weight >32 t; EU+EFTA+UK
- km_7: 146.669
  Distance in km, for pumice; Articulated lorry transport, Euro 4, Total weight >32 t; EU+EFTA+UK
- kg_km_7: 5.17743; = kg_7*km_7
  Transport amount in km*km, for pumice; Articulated lorry transport, Euro 4, Total weight >32 t; EU+EFTA+UK
- kg_8: 0.0353002
  Mass in kg, for pumice; Articulated lorry transport, Total weight >32 t, mix Euro 0-5; ROW w/o EU+EFTA
- km_8: 387.087
  Distance in km, for pumice; Articulated lorry transport, Total weight >32 t, mix Euro 0-5; ROW w/o EU+EFTA
- kg_km_8: 13.6642; = kg_8*km_8
  Transport amount in km*km, for pumice; Articulated lorry transport, Total weight >32 t, mix Euro 0-5; ROW w/o EU+EFTA
- kg_9: 0.002857
  Mass in kg, for potassium permanganate // potassium permanganate production // eu+efta+uk; Articulated lorry transport, Euro 4, Total weight >32 t; EU+EFTA+UK
- km_9: 1001.05
  Distance in km, for potassium permanganate // potassium permanganate production // eu+efta+uk; Articulated lorry transport, Euro 4, Total weight >32 t; EU+EFTA+UK
- kg_km_9: 2.86; = kg_9*km_9
  Transport amount in km*km, for potassium permanganate // potassium permanganate production // eu+efta+uk; Articulated lorry transport, Euro 4, Total weight >32 t; EU+EFTA+UK
- kg_10: 0.000714
  Mass in kg, for phosphoric acid // phosphoric acid production // glo; Articulated lorry transport, Euro 4, Total weight >32 t; EU+EFTA+UK
- km_10: 1000
  Distance in km, for phosphoric acid // phosphoric acid production // glo; Articulated lorry transport, Euro 4, Total weight >32 t; EU+EFTA+UK
- kg_km_10: 0.714; = kg_10*km_10
  Transport amount in km*km, for phosphoric acid // phosphoric acid production // glo; Articulated lorry transport, Euro 4, Total weight >32 t; EU+EFTA+UK
- kg_11: 0.018
  Mass in kg, for soap // soap production // glo; Articulated lorry transport, Euro 4, Total weight >32 t; EU+EFTA+UK
- km_11: 1000
  Distance in km, for soap // soap production // glo; Articulated lorry transport, Euro 4, Total weight >32 t; EU+EFTA+UK
- kg_km_11: 18; = kg_11*km_11
  Transport amount in km*km, for soap // soap production // glo; Articulated lorry transport, Euro 4, Total weight >32 t; EU+EFTA+UK
- kg_12: 0.004
  Mass in kg, for sodium sulphite // sodium sulphite production // eu+efta+uk; Articulated lorry transport, Euro 4, Total weight >32 t; EU+EFTA+UK
- km_12: 1000
  Distance in km, for sodium sulphite // sodium sulphite production // eu+efta+uk; Articulated lorry transport, Euro 4, Total weight >32 t; EU+EFTA+UK
- kg_km_12: 4; = kg_12*km_12
  Transport amount in km*km, for sodium sulphite // sodium sulphite production // eu+efta+uk; Articulated lorry transport, Euro 4, Total weight >32 t; EU+EFTA+UK
- kg_13: 2.56397e-6
  Mass in kg, for lubricating oil // lubricants at refinery // cn; Articulated lorry transport, Euro 4, Total weight >32 t; EU+EFTA+UK
- km_13: 1000
  Distance in km, for lubricating oil // lubricants at refinery // cn; Articulated lorry transport, Euro 4, Total weight >32 t; EU+EFTA+UK
- kg_km_13: 0.00256397; = kg_13*km_13
  Transport amount in km*km, for lubricating oil // lubricants at refinery // cn; Articulated lorry transport, Euro 4, Total weight >32 t; EU+EFTA+UK
- kg_14: 6.16233e-7
  Mass in kg, for lubricating oil // lubricants at refinery // raf; Articulated lorry transport, Euro 4, Total weight >32 t; EU+EFTA+UK
- km_14: 1000
  Distance in km, for lubricating oil // lubricants at refinery // raf; Articulated lorry transport, Euro 4, Total weight >32 t; EU+EFTA+UK
- kg_km_14: 0.000616233; = kg_14*km_14
  Transport amount in km*km, for lubricating oil // lubricants at refinery // raf; Articulated lorry transport, Euro 4, Total weight >32 t; EU+EFTA+UK
- kg_15: 1.61486e-5
  Mass in kg, for lubricating oil // lubricants at refinery // ras w/o cn; Articulated lorry transport, Euro 4, Total weight >32 t; EU+EFTA+UK
- km_15: 1000
  Distance in km, for lubricating oil // lubricants at refinery // ras w/o cn; Articulated lorry transport, Euro 4, Total weight >32 t; EU+EFTA+UK
- kg_km_15: 0.0161486; = kg_15*km_15
  Transport amount in km*km, for lubricating oil // lubricants at refinery // ras w/o cn; Articulated lorry transport, Euro 4, Total weight >32 t; EU+EFTA+UK
- kg_16: 1.26053e-5
  Mass in kg, for lubricating oil // lubricants at refinery // rna; Articulated lorry transport, Euro 4, Total weight >32 t; EU+EFTA+UK
- km_16: 1000
  Distance in km, for lubricating oil // lubricants at refinery // rna; Articulated lorry transport, Euro 4, Total weight >32 t; EU+EFTA+UK
- kg_km_16: 0.0126053; = kg_16*km_16
  Transport amount in km*km, for lubricating oil // lubricants at refinery // rna; Articulated lorry transport, Euro 4, Total weight >32 t; EU+EFTA+UK
- kg_17: 1.50207e-6
  Mass in kg, for lubricating oil // lubricants at refinery // rsa; Articulated lorry transport, Euro 4, Total weight >32 t; EU+EFTA+UK
- km_17: 1000
  Distance in km, for lubricating oil // lubricants at refinery // rsa; Articulated lorry transport, Euro 4, Total weight >32 t; EU+EFTA+UK
- kg_km_17: 0.00150207; = kg_17*km_17
  Transport amount in km*km, for lubricating oil // lubricants at refinery // rsa; Articulated lorry transport, Euro 4, Total weight >32 t; EU+EFTA+UK
- kg_18: 1.33535e-5
  Mass in kg, for lubricating oil // lubricants at refinery // ru; Articulated lorry transport, Euro 4, Total weight >32 t; EU+EFTA+UK
- km_18: 1000
  Distance in km, for lubricating oil // lubricants at refinery // ru; Articulated lorry transport, Euro 4, Total weight >32 t; EU+EFTA+UK
- kg_km_18: 0.0133535; = kg_18*km_18
  Transport amount in km*km, for lubricating oil // lubricants at refinery // ru; Articulated lorry transport, Euro 4, Total weight >32 t; EU+EFTA+UK
- kg_19: 8.22561e-6
  Mass in kg, for lubricating oil // lubricants at refinery // eu+efta+uk; Articulated lorry transport, Euro 4, Total weight >32 t; EU+EFTA+UK
- km_19: 1000.53
  Distance in km, for lubricating oil // lubricants at refinery // eu+efta+uk; Articulated lorry transport, Euro 4, Total weight >32 t; EU+EFTA+UK
- kg_km_19: 0.00823; = kg_19*km_19
  Transport amount in km*km, for lubricating oil // lubricants at refinery // eu+efta+uk; Articulated lorry transport, Euro 4, Total weight >32 t; EU+EFTA+UK
- kg_20: 0.583333
  Mass in kg, for waste (unspecified) // landfill of inert material (other materials) // eu+efta+uk; Articulated lorry transport, Euro 4, Total weight >32 t; EU+EFTA+UK
- km_20: 70
  Distance in km, for waste (unspecified) // landfill of inert material (other materials) // eu+efta+uk; Articulated lorry transport, Euro 4, Total weight >32 t; EU+EFTA+UK
- kg_km_20: 40.8333; = kg_20*km_20
  Transport amount in km*km, for waste (unspecified) // landfill of inert material (other materials) // eu+efta+uk; Articulated lorry transport, Euro 4, Total weight >32 t; EU+EFTA+UK
- kg_21: 0.002857
  Mass in kg, for potassium permanganate // potassium permanganate production // eu+efta+uk; Transoceanic ship, containers; GLO
- km_21: 17990.9
  Distance in km, for potassium permanganate // potassium permanganate production // eu+efta+uk; Transoceanic ship, containers; GLO
- kg_km_21: 51.4; = kg_21*km_21
  Transport amount in km*km, for potassium permanganate // potassium permanganate production // eu+efta+uk; Transoceanic ship, containers; GLO
- kg_22: 0.000714
  Mass in kg, for phosphoric acid // phosphoric acid production // glo; Transoceanic ship, containers; GLO
- km_22: 18067.2
  Distance in km, for phosphoric acid // phosphoric acid production // glo; Transoceanic ship, containers; GLO
- kg_km_22: 12.9; = kg_22*km_22
  Transport amount in km*km, for phosphoric acid // phosphoric acid production // glo; Transoceanic ship, containers; GLO
- kg_23: 0.018
  Mass in kg, for soap // soap production // glo; Transoceanic ship, containers; GLO
- km_23: 18000
  Distance in km, for soap // soap production // glo; Transoceanic ship, containers; GLO
- kg_km_23: 324; = kg_23*km_23
  Transport amount in km*km, for soap // soap production // glo; Transoceanic ship, containers; GLO
- kg_24: 0.004
  Mass in kg, for sodium sulphite // sodium sulphite production // eu+efta+uk; Transoceanic ship, containers; GLO
- km_24: 18000
  Distance in km, for sodium sulphite // sodium sulphite production // eu+efta+uk; Transoceanic ship, containers; GLO
- kg_km_24: 72; = kg_24*km_24
  Transport amount in km*km, for sodium sulphite // sodium sulphite production // eu+efta+uk; Transoceanic ship, containers; GLO
- kg_25: 2.56397e-6
  Mass in kg, for lubricating oil // lubricants at refinery // cn; Transoceanic ship, containers; GLO
- km_25: 18000
  Distance in km, for lubricating oil // lubricants at refinery // cn; Transoceanic ship, containers; GLO
- kg_km_25: 0.0461515; = kg_25*km_25
  Transport amount in km*km, for lubricating oil // lubricants at refinery // cn; Transoceanic ship, containers; GLO
- kg_26: 6.16233e-7
  Mass in kg, for lubricating oil // lubricants at refinery // raf; Transoceanic ship, containers; GLO
- km_26: 18000
  Distance in km, for lubricating oil // lubricants at refinery // raf; Transoceanic ship, containers; GLO
- kg_km_26: 0.0110922; = kg_26*km_26
  Transport amount in km*km, for lubricating oil // lubricants at refinery // raf; Transoceanic ship, containers; GLO
- kg_27: 1.61486e-5
  Mass in kg, for lubricating oil // lubricants at refinery // ras w/o cn; Transoceanic ship, containers; GLO
- km_27: 18000
  Distance in km, for lubricating oil // lubricants at refinery // ras w/o cn; Transoceanic ship, containers; GLO
- kg_km_27: 0.290675; = kg_27*km_27
  Transport amount in km*km, for lubricating oil // lubricants at refinery // ras w/o cn; Transoceanic ship, containers; GLO
- kg_28: 1.26053e-5
  Mass in kg, for lubricating oil // lubricants at refinery // rna; Transoceanic ship, containers; GLO
- km_28: 18000
  Distance in km, for lubricating oil // lubricants at refinery // rna; Transoceanic ship, containers; GLO
- kg_km_28: 0.226895; = kg_28*km_28
  Transport amount in km*km, for lubricating oil // lubricants at refinery // rna; Transoceanic ship, containers; GLO
- kg_29: 1.50207e-6
  Mass in kg, for lubricating oil // lubricants at refinery // rsa; Transoceanic ship, containers; GLO
- km_29: 18000
  Distance in km, for lubricating oil // lubricants at refinery // rsa; Transoceanic ship, containers; GLO
- kg_km_29: 0.0270372; = kg_29*km_29
  Transport amount in km*km, for lubricating oil // lubricants at refinery // rsa; Transoceanic ship, containers; GLO
- kg_30: 1.33535e-5
  Mass in kg, for lubricating oil // lubricants at refinery // ru; Transoceanic ship, containers; GLO
- km_30: 18000
  Distance in km, for lubricating oil // lubricants at refinery // ru; Transoceanic ship, containers; GLO
- kg_km_30: 0.240364; = kg_30*km_30
  Transport amount in km*km, for lubricating oil // lubricants at refinery // ru; Transoceanic ship, containers; GLO
- kg_31: 8.22561e-6
  Mass in kg, for lubricating oil // lubricants at refinery // eu+efta+uk; Transoceanic ship, containers; GLO
- km_31: 17992.6
  Distance in km, for lubricating oil // lubricants at refinery // eu+efta+uk; Transoceanic ship, containers; GLO
- kg_km_31: 0.148; = kg_31*km_31
  Transport amount in km*km, for lubricating oil // lubricants at refinery // eu+efta+uk; Transoceanic ship, containers; GLO

## Reference product
- washing, acid // washing, acid // glo: 1

## Inputs
- Electricity from Electricity grid mix 1kV-60kV - AU: 0.0194
- Electricity from Electricity grid mix 1kV-60kV - EU+EFTA+UK: 0.2849
- Electricity from Electricity grid mix 1kV-60kV - NZ: 0.0037
- Electricity from Electricity grid mix 1kV-60kV - RAF: 0.0622
- Electricity from Electricity grid mix 1kV-60kV - RNA: 0.4171
- Electricity from Electricity grid mix 1kV-60kV - RSA: 0.1414
- Electricity from Electricity grid mix 1kV-60kV - RU: 0.0835
- Transport of pumice by Transoceanic ship, bulk - GLO: 42.4083; = kg_km_0
- Transport of pumice by Freight train, diesel traction - EU+EFTA+UK: 5.23545; = kg_km_1
- Transport of pumice by Freight train, electricity traction - EU+EFTA+UK: 1.78088; = kg_km_2
- Transport of pumice by Freight train, average - EU+EFTA+UK: 0.042003; = kg_km_3
- Transport of pumice by Barge - EU+EFTA+UK: 0.402702; = kg_km_4
- Transport of pumice by Barge - ROW w/o EU+EFTA: 0.822298; = kg_km_5
- Transport of pumice by Articulated lorry transport, Total weight <7.5 t, mix Euro 0-5 - EU+EFTA+UK: 0.554559; = kg_km_6
- Transport of pumice by Articulated lorry transport, Euro 4, Total weight >32 t - EU+EFTA+UK: 5.17743; = kg_km_7
- Transport of pumice by Articulated lorry transport, Total weight >32 t, mix Euro 0-5 - ROW w/o EU+EFTA: 13.6642; = kg_km_8
- Thermal energy (MJ) from Thermal energy from hard coal - ROW: 2.1555
- Thermal energy (MJ) from Thermal energy from heavy fuel oil (HFO) - ROW: 0.0479
- Thermal energy (MJ) from Thermal energy from light fuel oil (LFO) - ROW: 0.6706
- Thermal energy (MJ) from Thermal energy from natural gas - ROW: 1.916
- Transport of potassium permanganate // potassium permanganate production // eu+efta+uk by Articulated lorry transport, Euro 4, Total weight >32 t - EU+EFTA+UK: 2.86; = kg_km_9
- Transport of phosphoric acid // phosphoric acid production // glo by Articulated lorry transport, Euro 4, Total weight >32 t - EU+EFTA+UK: 0.714; = kg_km_10
- Transport of soap // soap production // glo by Articulated lorry transport, Euro 4, Total weight >32 t - EU+EFTA+UK: 18; = kg_km_11
- Transport of sodium sulphite // sodium sulphite production // eu+efta+uk by Articulated lorry transport, Euro 4, Total weight >32 t - EU+EFTA+UK: 4; = kg_km_12
- Transport of lubricating oil // lubricants at refinery // cn by Articulated lorry transport, Euro 4, Total weight >32 t - EU+EFTA+UK: 0.00256397; = kg_km_13
- Transport of lubricating oil // lubricants at refinery // raf by Articulated lorry transport, Euro 4, Total weight >32 t - EU+EFTA+UK: 0.000616233; = kg_km_14
- Transport of lubricating oil // lubricants at refinery // ras w/o cn by Articulated lorry transport, Euro 4, Total weight >32 t - EU+EFTA+UK: 0.0161486; = kg_km_15
- Transport of lubricating oil // lubricants at refinery // rna by Articulated lorry transport, Euro 4, Total weight >32 t - EU+EFTA+UK: 0.0126053; = kg_km_16
- Transport of lubricating oil // lubricants at refinery // rsa by Articulated lorry transport, Euro 4, Total weight >32 t - EU+EFTA+UK: 0.00150207; = kg_km_17
- Transport of lubricating oil // lubricants at refinery // ru by Articulated lorry transport, Euro 4, Total weight >32 t - EU+EFTA+UK: 0.0133535; = kg_km_18
- Transport of lubricating oil // lubricants at refinery // eu+efta+uk by Articulated lorry transport, Euro 4, Total weight >32 t - EU+EFTA+UK: 0.00823; = kg_km_19
- Transport of waste (unspecified) // landfill of inert material (other materials) // eu+efta+uk by Articulated lorry transport, Euro 4, Total weight >32 t - EU+EFTA+UK: 40.8333; = kg_km_20
- Transport of potassium permanganate // potassium permanganate production // eu+efta+uk by Transoceanic ship, containers - GLO: 51.4; = kg_km_21
- Transport of phosphoric acid // phosphoric acid production // glo by Transoceanic ship, containers - GLO: 12.9; = kg_km_22
- Transport of soap // soap production // glo by Transoceanic ship, containers - GLO: 324; = kg_km_23
- Transport of sodium sulphite // sodium sulphite production // eu+efta+uk by Transoceanic ship, containers - GLO: 72; = kg_km_24
- Transport of lubricating oil // lubricants at refinery // cn by Transoceanic ship, containers - GLO: 0.0461515; = kg_km_25
- Transport of lubricating oil // lubricants at refinery // raf by Transoceanic ship, containers - GLO: 0.0110922; = kg_km_26
- Transport of lubricating oil // lubricants at refinery // ras w/o cn by Transoceanic ship, containers - GLO: 0.290675; = kg_km_27
- Transport of lubricating oil // lubricants at refinery // rna by Transoceanic ship, containers - GLO: 0.226895; = kg_km_28
- Transport of lubricating oil // lubricants at refinery // rsa by Transoceanic ship, containers - GLO: 0.0270372; = kg_km_29
- Transport of lubricating oil // lubricants at refinery // ru by Transoceanic ship, containers - GLO: 0.240364; = kg_km_30
- Transport of lubricating oil // lubricants at refinery // eu+efta+uk by Transoceanic ship, containers - GLO: 0.148; = kg_km_31
- Electricity from Electricity grid mix 1kV-60kV - CN: 0.427221
- Electricity from Electricity grid mix 1kV-60kV - RAS w/o CN: 0.468079
- washing, acid // washing, acid // glo, blackbox: 1
- washing, acid // washing, acid // glo, elementary: 1

## Impact indicators
- Eutrophication marine: 0.00137338
- Ecotoxicity, freshwater: 6.83094
- Land use: 7.15976
- Water use: 0.827941
- Resource use, minerals and metals: 7.85051e-7
- Resource use, fossils: 13.2279
- Climate change: 1.12501
- Ozone depletion: 3.90929e-9
- Human toxicity, cancer: 9.48433e-10
- Human toxicity, non-cancer: 1.16248e-8
- EF-particulate Matter: 3.00425e-7
- Ionising radiation, human health: 0.0305449
- Photochemical ozone formation - human health: 0.00302905
- Acidification: 0.00592297
- Eutrophication, terrestrial: 0.0111833
- Eutrophication, freshwater: 4.33432e-5

## Deviations from the LCI method principle
The background data uses:
- the \xe2\x80\x9cRecycled content cut-off\xe2\x80\x9d approach to allocate end-of-life by-products and secondary materials. This allocation is explained in the description of the recycled content system model (http://www.ecoinvent.org/database/system-models-in-ecoinvent-3/cut-off-system-model/allocation-cut-off-by-classification.html).
OR
- EF compliant data

## Deviations from the LCI method approaches
Background data:
- the \xe2\x80\x9cRecycled content cut-off\xe2\x80\x9d approach to allocate end-of-life by-products and secondary materials. This allocation is explained in the description of the recycled content system model (http://www.ecoinvent.org/database/system-models-in-ecoinvent-3/cut-off-system-model/allocation-cut-off-by-classification.html). The ecoinvent database mostly relies on “Allocation – market values” apart for few exceptions particularly in the energy sector. ecoinvent energy data is replaced with EF3.0 core data as per the EF guidelines version 2.0.
OR
- EF compliant data

## Modelling constants
All modelling constants follow the requirements listed in the Tender Specifications 070201/2020/SER/ENV.B1. Completeness: There are no intentional cut-offs in the inventory no matter how small their contribution to all the EF impact categories is. Eventual cut-offs are in compliance with the Guide for EF compliant data sets (JRC 2020), i.e. only if below the 3% cut-off rule. Water use: water use is modelled at country level using separate flows for water withdrawal, water release and water evaporation. Handling multi-functional processes: the following PEF multi- functionality decision hierarchy is applied for resolving all multi- functionality problems: (1) subdivision or system expansion; (2) allocation based on a relevant underlying physical relationship (substitution may apply here); (3) allocation based on some other relationship. Direct land use change: GHG emissions from direct LUC allocated to good/service for 20 years after the LUC occurs, with IPCC default values. Carbon storage and delayed emissions: credits associated with temporary (carbon) storage or delayed emissions up to 300 years are not be considered. Emissions off-setting: are not included. Capital goods (including infrastructures) and their End of life: they are included. System boundaries: system boundaries include all processes linked to the product supply chain (e.g. maintenance). Time period: emissions and removals are modelled as if released or removed at the beginning of the assessment method. Fossil and biogenic carbon emissions and removals: removals and emissions are modelled as follows: All GHG emissions from fossil fuels (including peat and limestone) are modelled consistently with the most updated ILCD list of elementary flows. The non-fossil (biogenic) carbon flows are modelled consistently with the most updated ILCD list of elementary flows.

## Cut-off and completeness
There are no intentional cut-offs in the inventory no matter how small their contribution to all the EF impact categories is. Eventual cut-offs are in compliance with the Guide for EF compliant data sets (JRC 2020), i.e. only if below the 3% cut-off rule. The dataset dry mass and water balance has been checked to ensure the inventory is complete. Capital goods (e.g. infrastructure) and their end-of-life are included.

## Data selection and combination
These datasets include, in both their foreground and background data, links to EF3.0 compliant data.
The relevant background data on energy, transport, and End of Life are from the LCDN data node (http://lcdn.thinkstep.com/Node/).
All other background data in the supply of this product for which no EF3.0 process was available are from ecoinvent v3.7 database (www.ecoinvent.org) or other data sources.

## Data treatment and extrapolations
Several data sources have been used to model the inventory.

## Review details
Internal reviews have been asked to review the plausibility of the unit process, LCIA scores, and DQRs. Internal reviewers have also been asked to review the data for EF compliancy. The consortium is therefore responsible for aspects such as compliancy with the ILCD format, including validation in Look@LCI, and nomenclature.
Internal reviwers have been asked to judge based on the process name, that the unit process models in a complete and representative way the process in the requested location. The review encompassed the plausability of:
- exchanges with nature (elementary flows) as well as exchanges such as product and waste flows.
- meta information (general comment, technology comment, system boundaries, allocation, cut-off rules, etc.). Reviewers were asked to judge if the provided information is enough to understand the content of the process.
- LCIA scores
- DQRs including precision, technology, time and geography. As well as the overall DQR.
External reviewers have been asked to provide their expertise in the field of interest. External reviewers have been asked to review the unit process, including eventual methodological choices, the LCIA scores (provided with contribution scores as well), and DQRs. External reviewers have been provided all the information in a tool developed by the consortium for the purpose of this project.
External reviewers have been asked to judge based on the process name, that the unit process models in a complete and representative way the process in the requested location. The review encompassed:
- Plausability and completeness of exchanges with nature (elementary flows) as well as exchanges such as product and waste flows.
- Review of meta information (general comment, technology comment, system boundaries, allocation, cut-off rules, etc.). Reviewers were asked to judge if the provided information is enough to understand the content of the process.
- Review of properties (biogenic carbon and water content).
- Review of allocation keys.
- Plausability of LCIA scores calculated by the consortium.
- Plausability of DQRs including precision, technology, time and geography. As well as the overall DQR.

## Data sources
- Background Data for Representative products and organisations. EF 3.0 compliant (data stock)
- Quantis Data (2021)
- Asim Kumar Roy Choudhury, (2017). Principle of textile finishing. Elsevier, Duxfod, United Kingdom.
- Westex (2021) Benefits of Westex Synthetic Stones, https://westexstones.com/, Westex Synthetic Stones, Şişli-Istanbul, Turkey
- Tupesa (2021) Stone Washers, https://www.tupesa.com/index.php?route=product/product&product_id=50, Tupesa Maquinaria Textil, Girona, Spain.
- Tupesa (2021) Eco Washers, https://www.tupesa.com/index.php?route=product/product&path=72_59&product_id=51, Tupesa Maquinaria Textil, Girona, Spain.
- Tupesa (2021) EXTRACTOR Hidroextractors, https://www.tupesa.com/index.php?route=product/product&path=72_62&product_id=63, Tupesa Maquinaria Textil, Girona, Spain.
- Tupesa (2021) SC -2 Dryers, https://www.tupesa.com/index.php?route=product/product&path=72_63&product_id=70, Tupesa Maquinaria Textil, Girona, Spain.
- Lebon (2021) Nonwoven Oven Machine, Catalog and Company Messages, Qingdao Lebon Industry Co., Ltd., China
- Monoroma Hossain, Md. Shakhawat Hossain Rony, K. M. Faridul Hasan, Md. Kawsar Hossain, Md. Azharul Hossain, and Yang Zhou, (2017). Effective Mechanical and Chemical Washing Process in Garment Industries. American Journal of Applied Physics Vol 2, Wuhan, China.

## Intended applications
Implementation of regular Product Environmental Footprint (PEF) studies and Organisation Environmental Footprint (OEF) studies exclusively under the specified Product groups and sectors as defined in the Product Environmental Footprint Category Rules (PEFCR) and Organisation Environmental Footprint Sectorial Rules (OEFSR) listed in http://ec.europa.eu/environment/eussd/smgp/PEFCR_OEFSR.htm
