# sanitary and household papers (tissue paper), elementary; technology mix; production mix, at plant; kg

Dataset: ILCD process, Unit process, single operation
Geography: EU+EFTA+UK
Reference year: 2019
Valid until: 2024
Classification: Other Services / Other services
LCI method principle: Attributional
LCI method approaches: Allocation - market value
Completeness: All relevant flows quantified
Project: Provision of process-based 3.0 Environmental Footprint-compliant life cycle inventory datasets - Renewable materials - contract number 070201/2020/840085/SER/ENV.B.1
Generated by: RISE
Owner: ETS
Compliance: Environmental Footprint non-primary supporting data set; Environmental Footprint 3.1
Amounts: no units in this file; such an amount is in the reference unit of its flow, which a separate flow dataset defines
copyright: true
licenseType: Free of charge for some user types or use types
accessRestrictions: Free of charge for all final users implementing a regular Product Environmental Footprint (PEF) studies and Organisation Environmental Footprint (OEF) studies exclusively under the specified Product groups and sectors as defined in the Product Environmental Footprint Category Rules (PEFCR) and Organisation Environmental Footprint Sectorial Rules (OEFSR) listed in http://ec.europa.eu/environment/eussd/smgp/PEFCR_OEFSR.htm and in accordance with the terms and conditions of the EULA (available at https://ecoinvent.lca-data.com/) exclusively until 31st December 2024. Any use of this dataset or any derivative data not within the specific context of one of the PEF/OEF projects or after the end of 2024 is not permitted.

## General comment
Notice: this data set supersedes the EF3.0-compliant version (see link under "preceding data set version" below calculated with the EF3.0). The life cycle inventory is not changed from the original EF3.0 data set. The LCIA results are calculated based on the EF3.1 methods which provide updated characterisation factors in the following impact categories: Climate Change, Ecotoxicity freshwater, Photochemical Ozone Formation, Acidification, Human Toxicity non-cancer, and Human Toxicity cancer. The review report and the data quality ratings refer to the original results. The data set has been updated by the European Commission on the basis of the original EF3.0 data set delivered by the data provider.This sub-process has limited documentation only. For all detailed documentation of the full model to which this data set belongs (such as DQRs, review reports and other technical documentation), please see this process: sanitary and household papers (tissue paper) - EU+EFTA+UK []

## Technology and included processes
The activity represents average European production of tissue paper, considered at the parent reel before conversion to finished products.
Tissue paper is manufactured in a tissue paper mill from virgin fibres or recovered fibres or a mixture of these. Where virgin fibres are used, production of pulp and production of tissue paper is typically a non-integrated process – i.e., the mills purchase market virgin pulp rather than manufacturing their own pulp from wood onsite.
Different processes are used to manufacture different types of tissue paper with different characteristics. The way of drying the tissue determines most of the tissue characteristics. The two main processes in use are conventional tissue-making and through-air drying process (TAD). The most common process is the conventional tissue paper machine with a conventional Yankee dryer. The tissue sheet is formed on a moving fabric, where water is removed by drainage. The sheet is then transferred to a felt where more water is removed by pressing and vacuum. Here the tissue sheet is compressed. For full drying, the sheet is transferred to a Yankee cylinder and dried by adding steam to the cylinder and blowing hot air onto the tissue surface. Finally, the tissue is removed from the Yankee cylinder by a creping blade and the sheet is reeled up.
The activity includes the following processes: deinking and pulp production from paper for recycling, stock preparation, refining, and operation of the paper machine, drying, reeling and reel winding, supporting activities used in paper production, e.g. water and solid waste treatment, onsite electricity and steam generation.
The following air emissions were reported in the survey: Dust, CO2 (fossil and biogenic), NOx (as NO2), and SOx (as SO2)-
For a more complete air emission profile, additional air emissions (beyond the ones listed above) were added for the combustion of the external fuels using ecoinvent LCI datasets for combustion of different fuels as proxy. Proxies for the air emissions were calculated based on: Heavy fuel oil: "heat production, heavy fuel oil, at industrial furnace 1MW” Natural gas: "heat production, natural gas, at industrial furnace >100kW”, Peat: "heat production, lignite briquette, at stove 5-15kW” Biofuel - scrap wood: "heat production, wood chips from industry, at furnace 1000kW”, coal: “heat production, at hard coal industrial furnace 1-10MW, Europe without Switzerland”
The amount of infrastructure (paper mill, integrated) was taken from the dataset " Hischier R., tissue paper production, RER, Undefined, ecoinvent database version 3.3.”
The production of paper based fully or partly on paper for recycling takes place in integrated processes for almost all cases. The share of recycled pulp in non-integrated mills (so recycled pulp produced dried and transported to a paper mill for making recycled paper) is around 3%. In the INTERMEDIATE PAPER PRODUCT PEFCR (2018) it is set that: "The PEF profile shall be calculated and reported using A equal to 1.". This dataset is therefore modelled as such.

## Reference product
- sanitary and household papers (tissue paper) // sanitary and household papers (tissue paper) // eu+efta+uk, elementary: 1

## Inputs
- ground water, Renewable material resources from water [AL]: 8.01264e-6
- ground water, Renewable material resources from water [AT]: 0.000103238
- ground water, Renewable material resources from water [BA]: 9.98889e-6
- ground water, Renewable material resources from water [BE]: 0.000124263
- ground water, Renewable material resources from water [BG]: 3.18197e-5
- ground water, Renewable material resources from water [BY]: 4.13174e-5
- ground water, Renewable material resources from water [CH]: 0.000123128
- ground water, Renewable material resources from water [CZ]: 8.56964e-5
- ground water, Renewable material resources from water [DE]: 0.00093265
- ground water, Renewable material resources from water [DK]: 6.76278e-5
- ground water, Renewable material resources from water [EE]: 9.23466e-6
- ground water, Renewable material resources from water [ES]: 0.000400226
- ground water, Renewable material resources from water [FI]: 5.76851e-5
- ground water, Renewable material resources from water [FR]: 0.000657889
- ground water, Renewable material resources from water [GB]: 0.000653782
- ground water, Renewable material resources from water: 4.06089e-6
- ground water, Renewable material resources from water [GR]: 7.43719e-5
- ground water, Renewable material resources from water [HR]: 2.39131e-5
- ground water, Renewable material resources from water [HU]: 6.2688e-5
- ground water, Renewable material resources from water [IE]: 6.75272e-5
- ground water, Renewable material resources from water [IS]: 3.8533e-6
- ground water, Renewable material resources from water [IT]: 0.000562877
- ground water, Renewable material resources from water [LT]: 1.97176e-5
- ground water, Renewable material resources from water [LU]: 1.3688e-5
- ground water, Renewable material resources from water [LV]: 1.16267e-5
- ground water, Renewable material resources from water [MD]: 6.15192e-6
- ground water, Renewable material resources from water [ME]: 2.47834e-6
- ground water, Renewable material resources from water [MK]: 6.84489e-6
- ground water, Renewable material resources from water [MT]: 3.7865e-6
- ground water, Renewable material resources from water [NL]: 0.00020865
- ground water, Renewable material resources from water [NO]: 7.89804e-5
- ground water, Renewable material resources from water [PL]: 0.000240133
- ground water, Renewable material resources from water [PT]: 7.57706e-5
- ground water, Renewable material resources from water [RO]: 0.000105194
- ground water, Renewable material resources from water [RS]: 2.61042e-5
- ground water, Renewable material resources from water [SE]: 0.000113968
- ground water, Renewable material resources from water [SI]: 1.61395e-5
- ground water, Renewable material resources from water [SK]: 3.78818e-5
- ground water, Renewable material resources from water [SM]: 4.71476e-7
- ground water, Renewable material resources from water [UA]: 0.00011107
- freshwater, Renewable material resources from water: 1.09457e-5
- freshwater, Renewable material resources from water [AT]: 0.000278267
- freshwater, Renewable material resources from water [BA]: 2.69241e-5
- freshwater, Renewable material resources from water [BE]: 0.000334938
- freshwater, Renewable material resources from water [BG]: 8.57671e-5
- freshwater, Renewable material resources from water [CH]: 0.00033188
- freshwater, Renewable material resources from water [CZ]: 0.000230986
- freshwater, Renewable material resources from water [DE]: 0.00251387
- freshwater, Renewable material resources from water [DK]: 0.000182284
- freshwater, Renewable material resources from water [EE]: 2.48911e-5
- freshwater, Renewable material resources from water [ES]: 0.00107877
- freshwater, Renewable material resources from water [FI]: 0.000155485
- freshwater, Renewable material resources from water [FR]: 0.00177328
- freshwater, Renewable material resources from water [GB]: 0.00176221
- freshwater, Renewable material resources from water [GR]: 0.000200462
- freshwater, Renewable material resources from water [HU]: 0.00016897
- freshwater, Renewable material resources from water [IE]: 0.000182013
- freshwater, Renewable material resources from water [IS]: 1.03862e-5
- freshwater, Renewable material resources from water [IT]: 0.00151718
- freshwater, Renewable material resources from water [LT]: 5.31469e-5
- freshwater, Renewable material resources from water [LU]: 3.68947e-5
- freshwater, Renewable material resources from water [LV]: 3.13388e-5
- freshwater, Renewable material resources from water [MK]: 1.84497e-5
- freshwater, Renewable material resources from water [NL]: 0.000562397
- freshwater, Renewable material resources from water [NO]: 0.000212884
- freshwater, Renewable material resources from water [PL]: 0.000647255
- freshwater, Renewable material resources from water [PT]: 0.000204232
- freshwater, Renewable material resources from water [RO]: 0.00028354
- freshwater, Renewable material resources from water [RS]: 7.03615e-5
- freshwater, Renewable material resources from water [SE]: 0.000307189
- freshwater, Renewable material resources from water [SI]: 4.35024e-5
- freshwater, Renewable material resources from water [SK]: 0.000102107
- freshwater, Renewable material resources from water [UA]: 0.000299378
- freshwater, Renewable material resources from water [AL]: 2.15973e-5
- freshwater, Renewable material resources from water [BY]: 0.000111367
- freshwater, Renewable material resources from water [HR]: 6.44553e-5
- freshwater, Renewable material resources from water [MD]: 1.65819e-5
- freshwater, Renewable material resources from water [ME]: 6.68013e-6
- freshwater, Renewable material resources from water [MT]: 1.02061e-5
- freshwater, Renewable material resources from water [SM]: 1.27082e-6

## Outputs
- carbon dioxide (fossil), Emissions to urban air close to ground: 0.474
- Water, Emissions to fresh water [AL]: 2.11204e-5
- Water, Emissions to fresh water [AT]: 0.000272123
- Water, Emissions to fresh water [BA]: 2.63296e-5
- Water, Emissions to fresh water [BE]: 0.000327543
- Water, Emissions to fresh water [BG]: 8.38734e-5
- Water, Emissions to fresh water [BY]: 0.000108908
- Water, Emissions to fresh water [CH]: 0.000324553
- Water, Emissions to fresh water [CZ]: 0.000225886
- Water, Emissions to fresh water [DE]: 0.00245836
- Water, Emissions to fresh water [DK]: 0.000178259
- Water, Emissions to fresh water [EE]: 2.43416e-5
- Water, Emissions to fresh water [ES]: 0.00105495
- Water, Emissions to fresh water [FI]: 0.000152052
- Water, Emissions to fresh water [FR]: 0.00173413
- Water, Emissions to fresh water [GB]: 0.0017233
- Water, Emissions to fresh water: 1.07041e-5
- Water, Emissions to fresh water [GR]: 0.000196036
- Water, Emissions to fresh water [HR]: 6.30322e-5
- Water, Emissions to fresh water [HU]: 0.000165239
- Water, Emissions to fresh water [IE]: 0.000177995
- Water, Emissions to fresh water [IS]: 1.01569e-5
- Water, Emissions to fresh water [IT]: 0.00148368
- Water, Emissions to fresh water [LT]: 5.19734e-5
- Water, Emissions to fresh water [LU]: 3.60801e-5
- Water, Emissions to fresh water [LV]: 3.06468e-5
- Water, Emissions to fresh water [MD]: 1.62158e-5
- Water, Emissions to fresh water [ME]: 6.53264e-6
- Water, Emissions to fresh water [MK]: 1.80424e-5
- Water, Emissions to fresh water [MT]: 9.9808e-6
- Water, Emissions to fresh water [NL]: 0.00054998
- Water, Emissions to fresh water [NO]: 0.000208184
- Water, Emissions to fresh water [PL]: 0.000632965
- Water, Emissions to fresh water [PT]: 0.000199723
- Water, Emissions to fresh water [RO]: 0.00027728
- Water, Emissions to fresh water [RS]: 6.8808e-5
- Water, Emissions to fresh water [SE]: 0.000300407
- Water, Emissions to fresh water [SI]: 4.25419e-5
- Water, Emissions to fresh water [SK]: 9.98522e-5
- Water, Emissions to fresh water [SM]: 1.24276e-6
- Water, Emissions to fresh water [UA]: 0.000292768
- particles (PM2.5), Emissions to air, unspecified: 1.0212e-5
- biological oxygen demand, Emissions to fresh water: 0.000392139
- chemical oxygen demand, Emissions to sea water: 0.00202227
- Water, Emissions to sea water: 2.94442e-5
- Water from cooling, Emissions to fresh water [AT]: 9.23869e-5
- Water from cooling, Emissions to fresh water [BA]: 8.939e-6
- Water from cooling, Emissions to fresh water [BE]: 0.000111202
- Water from cooling, Emissions to fresh water [BG]: 2.84753e-5
- Water from cooling, Emissions to fresh water [CH]: 0.000110187
- Water from cooling, Emissions to fresh water [CZ]: 7.66892e-5
- Water from cooling, Emissions to fresh water [DE]: 0.000834623
- Water from cooling, Emissions to fresh water [DK]: 6.05197e-5
- Water from cooling, Emissions to fresh water [EE]: 8.26404e-6
- Water from cooling, Emissions to fresh water [ES]: 0.00035816
- Water from cooling, Emissions to fresh water [FI]: 5.16221e-5
- Water from cooling, Emissions to fresh water [FR]: 0.000588741
- Water from cooling, Emissions to fresh water [GB]: 0.000585066
- Water from cooling, Emissions to fresh water: 3.63407e-6
- Water from cooling, Emissions to fresh water [GR]: 6.6555e-5
- Water from cooling, Emissions to fresh water [HU]: 5.60992e-5
- Water from cooling, Emissions to fresh water [IE]: 6.04298e-5
- Water from cooling, Emissions to fresh water [IS]: 3.4483e-6
- Water from cooling, Emissions to fresh water [IT]: 0.000503716
- Water from cooling, Emissions to fresh water [LT]: 1.76452e-5
- Water from cooling, Emissions to fresh water [LU]: 1.22493e-5
- Water from cooling, Emissions to fresh water [LV]: 1.04047e-5
- Water from cooling, Emissions to fresh water [MK]: 6.12545e-6
- Water from cooling, Emissions to fresh water [NL]: 0.00018672
- Water from cooling, Emissions to fresh water [NO]: 7.06791e-5
- Water from cooling, Emissions to fresh water [PL]: 0.000214894
- Water from cooling, Emissions to fresh water [PT]: 6.78067e-5
- Water from cooling, Emissions to fresh water [RO]: 9.41374e-5
- Water from cooling, Emissions to fresh water [RS]: 2.33605e-5
- Water from cooling, Emissions to fresh water [SE]: 0.000101989
- Water from cooling, Emissions to fresh water [SI]: 1.44431e-5
- Water from cooling, Emissions to fresh water [SK]: 3.39002e-5
- Water from cooling, Emissions to fresh water [UA]: 9.93956e-5
- adsorbable organic halogen compounds, Emissions to fresh water: 4.65102e-6
- Suspended solids, unspecified, Emissions to water, unspecified: 0.000502538
- sulfur dioxide, Emissions to air, unspecified (long-term): 4.08765e-7
- ammonia, Emissions to urban air close to ground: 1.34298e-8
- acetic acid, Emissions to urban air close to ground: 1.01571e-6
- formaldehyde, Emissions to urban air close to ground: 8.19769e-7
- hydrogen sulfide, Emissions to urban air close to ground: 1.09788e-9
- acetone, Emissions to urban air close to ground: 2.28988e-9
- ammonia, Emissions to urban air close to ground [AL]: 2.64037e-9
- ammonia, Emissions to urban air close to ground [AT]: 3.40195e-8
- ammonia, Emissions to urban air close to ground [BA]: 3.2916e-9
- ammonia, Emissions to urban air close to ground [BE]: 4.09478e-8
- ammonia, Emissions to urban air close to ground [BG]: 1.04854e-8
- ammonia, Emissions to urban air close to ground [BY]: 1.36152e-8
- ammonia, Emissions to urban air close to ground [CH]: 4.0574e-8
- ammonia, Emissions to urban air close to ground [CZ]: 2.82392e-8
- ammonia, Emissions to urban air close to ground [DE]: 3.07332e-7
- ammonia, Emissions to urban air close to ground [DK]: 2.22851e-8
- ammonia, Emissions to urban air close to ground [EE]: 3.04306e-9
- ammonia, Emissions to urban air close to ground [ES]: 1.31885e-7
- ammonia, Emissions to urban air close to ground [FI]: 1.90087e-8
- ammonia, Emissions to urban air close to ground [FR]: 2.16792e-7
- ammonia, Emissions to urban air close to ground [GB]: 2.15438e-7
- ammonia, Emissions to urban air close to ground [GR]: 2.45075e-8
- ammonia, Emissions to urban air close to ground [HR]: 7.87997e-9
- ammonia, Emissions to urban air close to ground [HU]: 2.06573e-8
- ammonia, Emissions to urban air close to ground [IE]: 2.2252e-8
- ammonia, Emissions to urban air close to ground [IT]: 1.85483e-7
- ammonia, Emissions to urban air close to ground [LT]: 6.49746e-9
- ammonia, Emissions to urban air close to ground [LU]: 4.51056e-9
- ammonia, Emissions to urban air close to ground [LV]: 3.83132e-9
- ammonia, Emissions to urban air close to ground [MD]: 2.02722e-9
- ammonia, Emissions to urban air close to ground [MK]: 2.25557e-9
- ammonia, Emissions to urban air close to ground [NL]: 6.87557e-8
- ammonia, Emissions to urban air close to ground [NO]: 2.60261e-8
- ammonia, Emissions to urban air close to ground [PL]: 7.91301e-8
- ammonia, Emissions to urban air close to ground [PT]: 2.49684e-8
- ammonia, Emissions to urban air close to ground [RO]: 3.46641e-8
- ammonia, Emissions to urban air close to ground [SE]: 3.75553e-8
- ammonia, Emissions to urban air close to ground [SI]: 5.31838e-9
- ammonia, Emissions to urban air close to ground [SK]: 1.2483e-8
- ammonia, Emissions to urban air close to ground [UA]: 3.66004e-8
- phenol, Emissions to urban air close to ground: 5.4894e-9
- chlorine, Emissions to urban air close to ground: 1.7774e-7
- toluene, Emissions to urban air close to ground: 1.66524e-6
- carbon monoxide (fossil), Emissions to urban air close to ground: 7.36098e-5
- ethylene, Emissions to urban air close to ground: 7.94244e-7
- acetaldehyde, Emissions to urban air close to ground: 6.92343e-8
- methanol, Emissions to urban air close to ground: 7.78558e-9
- propionic acid, Emissions to urban air close to ground: 1.34207e-7
- dinitrogen, Emissions to fresh water: 6.09132e-5
- non-methane volatile organic compounds, Emissions to urban air close to ground: 7.36967e-6
- benzene, Emissions to urban air close to ground: 3.71509e-6
- nitrous oxide, Emissions to urban air close to ground: 3.11482e-6
- zinc, Emissions to urban air close to ground: 2.97673e-7
- particles (PM2.5 - PM10), Emissions to urban air close to ground: 5.658e-6
- nickel, Emissions to urban air close to ground: 1.69739e-8
- selenium, Emissions to urban air close to ground: 2.4844e-9
- chromium, Emissions to urban air close to ground: 8.24206e-9
- lead, Emissions to urban air close to ground: 3.90617e-8
- cadmium, Emissions to urban air close to ground: 1.02069e-9
- copper, Emissions to urban air close to ground: 2.48313e-8
- methane (fossil), Emissions to urban air close to ground: 1.83098e-5
- xylene (all isomers), Emissions to urban air close to ground: 5.1726e-8
- Water, Emissions to urban air close to ground: 0.00168619
- pentachlorophenol, Emissions to urban air close to ground: 7.99829e-12
- arsenic, Emissions to urban air close to ground: 5.66082e-9
- benzo[a]pyrene, Emissions to urban air close to ground: 7.82379e-10
- carbon dioxide (biogenic), Emissions to urban air close to ground: 0.28107
- cobalt, Emissions to urban air close to ground: 1.40954e-9
- ethanol, Emissions to urban air close to ground: 4.57975e-9
- fluorine, Emissions to urban air close to ground: 4.93722e-8
- iron, Emissions to urban air close to ground: 8.46753e-7
- m-xylene, Emissions to urban air close to ground: 1.18493e-7
- hydrogen chloride, Emissions to urban air close to ground: 6.3342e-6
- polycyclic aromatic hydrocarbons, Emissions to urban air close to ground: 7.80731e-8
- manganese, Emissions to urban air close to ground: 1.71568e-7
- pentane, Emissions to urban air close to ground: 8.05244e-6
- hexachlorobenzene, Emissions to urban air close to ground: 7.10959e-15
- Hydrocarbons, aromatic, Emissions to urban air close to ground: 2.28988e-9
- magnesium, Emissions to urban air close to ground: 1.026e-6
- potassium, Emissions to urban air close to ground: 2.33181e-5
- sodium, Emissions to urban air close to ground: 1.41798e-6
- calcium, Emissions to urban air close to ground: 6.5279e-6
- vanadium, Emissions to urban air close to ground: 2.2599e-8
- bromine, Emissions to urban air close to ground: 6.08825e-8
- n-butane, Emissions to urban air close to ground: 4.69726e-6
- Hydrocarbons, aliphatic, unsaturated, Emissions to urban air close to ground: 3.19391e-6
- Hydrocarbons, aliphatic, alkanes, unspecified, Emissions to urban air close to ground: 1.04011e-6
- carbon monoxide (biogenic), Emissions to urban air close to ground: 0.000296233
- Phosphorus, Emissions to urban air close to ground: 3.07135e-7
- ethyl benzene, Emissions to urban air close to ground: 2.96233e-8
- chromium (vi), Emissions to urban air close to ground: 4.78823e-10
- molybdenum, Emissions to urban air close to ground: 1.3419e-9
- mercury, Emissions to urban air close to ground: 1.06508e-9
- methane (biogenic), Emissions to urban air close to ground: 2.96233e-6
- hydrogen fluoride, Emissions to urban air close to ground: 1.97344e-7
- propane, Emissions to urban air close to ground: 1.60728e-6
- 2,3,7,8-tetrachlorodibenzo-p-dioxin, Emissions to urban air close to ground: 3.39401e-14
- ethane, Emissions to urban air close to ground: 3.97122e-7
- lead-210, Emissions to urban air close to ground: 7.88632e-6
- antimony, Emissions to urban air close to ground: 5.226e-10
- polonium-210, Emissions to urban air close to ground: 1.44232e-5
- radium-226, Emissions to urban air close to ground: 2.03518e-6
- thallium, Emissions to urban air close to ground: 2.4622e-10
- tin, Emissions to urban air close to ground: 1.20112e-10
- titanium, Emissions to urban air close to ground: 6.15075e-8
- boron, Emissions to urban air close to ground: 1.98609e-7
- Silicon, Emissions to urban air close to ground: 3.7768e-6
- acetylene, Emissions to urban air close to ground: 1.32374e-7
- beryllium, Emissions to urban air close to ground: 2.23026e-10
- aluminium, Emissions to urban air close to ground: 1.78872e-6
- iodine, Emissions to urban air close to ground: 2.26608e-9
- barium, Emissions to urban air close to ground: 2.23026e-8
- propene, Emissions to urban air close to ground: 1.32374e-7
- radon-222, Emissions to urban air close to ground: 1.98875e-7
- strontium, Emissions to urban air close to ground: 3.23518e-8
- uranium-238, Emissions to urban air close to ground: 1.69672e-6
- particles (PM10), Emissions to urban air close to ground: 3.0084e-5
- potassium-40, Emissions to urban air close to ground: 2.27531e-6
- radium-228, Emissions to urban air close to ground: 1.01668e-5
- scandium, Emissions to urban air close to ground: 2.02188e-10
- thorium-232, Emissions to urban air close to ground: 5.92862e-7
- Uranium, Emissions to urban air close to ground: 4.47492e-10
- Thorium, Emissions to urban air close to ground: 3.2769e-10
- radon-220, Emissions to urban air close to ground: 1.98875e-7
- thorium-228, Emissions to urban air close to ground: 9.33523e-7
- nitrogen dioxide, Emissions to urban air close to ground [AL]: 6.2438e-7
- nitrogen dioxide, Emissions to urban air close to ground [AT]: 8.04475e-6
- nitrogen dioxide, Emissions to urban air close to ground [BA]: 7.78379e-7
- nitrogen dioxide, Emissions to urban air close to ground [BE]: 9.6831e-6
- nitrogen dioxide, Emissions to urban air close to ground [BG]: 2.47954e-6
- nitrogen dioxide, Emissions to urban air close to ground [BY]: 3.21964e-6
- nitrogen dioxide, Emissions to urban air close to ground [CH]: 9.5947e-6
- nitrogen dioxide, Emissions to urban air close to ground [CZ]: 6.67784e-6
- nitrogen dioxide, Emissions to urban air close to ground [DE]: 7.26762e-5
- nitrogen dioxide, Emissions to urban air close to ground [DK]: 5.26986e-6
- nitrogen dioxide, Emissions to urban air close to ground [EE]: 7.19606e-7
- nitrogen dioxide, Emissions to urban air close to ground [ES]: 3.11874e-5
- nitrogen dioxide, Emissions to urban air close to ground [FI]: 4.49508e-6
- nitrogen dioxide, Emissions to urban air close to ground [FR]: 5.12657e-5
- nitrogen dioxide, Emissions to urban air close to ground [GB]: 5.09457e-5
- nitrogen dioxide, Emissions to urban air close to ground: 3.17579e-6
- nitrogen dioxide, Emissions to urban air close to ground [GR]: 5.79539e-6
- nitrogen dioxide, Emissions to urban air close to ground [HR]: 1.86341e-6
- nitrogen dioxide, Emissions to urban air close to ground [HU]: 4.88493e-6
- nitrogen dioxide, Emissions to urban air close to ground [IE]: 5.26203e-6
- nitrogen dioxide, Emissions to urban air close to ground [IT]: 4.38619e-5
- nitrogen dioxide, Emissions to urban air close to ground [LT]: 1.53648e-6
- nitrogen dioxide, Emissions to urban air close to ground [LU]: 1.06663e-6
- nitrogen dioxide, Emissions to urban air close to ground [LV]: 9.06008e-7
- nitrogen dioxide, Emissions to urban air close to ground [MD]: 4.79385e-7
- nitrogen dioxide, Emissions to urban air close to ground [MK]: 5.33385e-7
- nitrogen dioxide, Emissions to urban air close to ground [NL]: 1.6259e-5
- nitrogen dioxide, Emissions to urban air close to ground [NO]: 6.15451e-6
- nitrogen dioxide, Emissions to urban air close to ground [PL]: 1.87122e-5
- nitrogen dioxide, Emissions to urban air close to ground [PT]: 5.90438e-6
- nitrogen dioxide, Emissions to urban air close to ground [RO]: 8.19718e-6
- nitrogen dioxide, Emissions to urban air close to ground [SE]: 8.88088e-6
- nitrogen dioxide, Emissions to urban air close to ground [SI]: 1.25766e-6
- nitrogen dioxide, Emissions to urban air close to ground [SK]: 2.95192e-6
- nitrogen dioxide, Emissions to urban air close to ground [UA]: 8.65505e-6
- Water from cooling, Emissions to fresh water [AL]: 7.17046e-6
- Water from cooling, Emissions to fresh water [BY]: 3.69747e-5
- Water from cooling, Emissions to fresh water [HR]: 2.13997e-5
- Water from cooling, Emissions to fresh water [MD]: 5.50532e-6
- Water from cooling, Emissions to fresh water [ME]: 2.21785e-6
- Water from cooling, Emissions to fresh water [MT]: 3.38852e-6
- Water from cooling, Emissions to fresh water [SM]: 4.21921e-7
- phosphorus, total, Emissions to fresh water: 1.23672e-5
- sulfur dioxide, Emissions to air, unspecified (long-term) [AL]: 8.03658e-8
- sulfur dioxide, Emissions to air, unspecified (long-term) [AT]: 1.03546e-6
- sulfur dioxide, Emissions to air, unspecified (long-term) [BA]: 1.00187e-7
- sulfur dioxide, Emissions to air, unspecified (long-term) [BE]: 1.24634e-6
- sulfur dioxide, Emissions to air, unspecified (long-term) [BG]: 3.19148e-7
- sulfur dioxide, Emissions to air, unspecified (long-term) [BY]: 4.14409e-7
- sulfur dioxide, Emissions to air, unspecified (long-term) [CH]: 1.23496e-6
- sulfur dioxide, Emissions to air, unspecified (long-term) [CZ]: 8.59524e-7
- sulfur dioxide, Emissions to air, unspecified (long-term) [DE]: 9.35437e-6
- sulfur dioxide, Emissions to air, unspecified (long-term) [DK]: 6.78299e-7
- sulfur dioxide, Emissions to air, unspecified (long-term) [EE]: 9.26226e-8
- sulfur dioxide, Emissions to air, unspecified (long-term) [ES]: 4.01422e-6
- sulfur dioxide, Emissions to air, unspecified (long-term) [FI]: 5.78575e-7
- sulfur dioxide, Emissions to air, unspecified (long-term) [FR]: 6.59855e-6
- sulfur dioxide, Emissions to air, unspecified (long-term) [GB]: 6.55736e-6
- sulfur dioxide, Emissions to air, unspecified (long-term) [GR]: 7.45942e-7
- sulfur dioxide, Emissions to air, unspecified (long-term) [HR]: 2.39845e-7
- sulfur dioxide, Emissions to air, unspecified (long-term) [HU]: 6.28754e-7
- sulfur dioxide, Emissions to air, unspecified (long-term) [IE]: 6.7729e-7
- sulfur dioxide, Emissions to air, unspecified (long-term) [IT]: 5.64559e-6
- sulfur dioxide, Emissions to air, unspecified (long-term) [LT]: 1.97765e-7
- sulfur dioxide, Emissions to air, unspecified (long-term) [LU]: 1.37289e-7
- sulfur dioxide, Emissions to air, unspecified (long-term) [LV]: 1.16615e-7
- sulfur dioxide, Emissions to air, unspecified (long-term) [MD]: 6.17031e-8
- sulfur dioxide, Emissions to air, unspecified (long-term) [MK]: 6.86535e-8
- sulfur dioxide, Emissions to air, unspecified (long-term) [NL]: 2.09274e-6
- sulfur dioxide, Emissions to air, unspecified (long-term) [NO]: 7.92164e-7
- sulfur dioxide, Emissions to air, unspecified (long-term) [PL]: 2.40851e-6
- sulfur dioxide, Emissions to air, unspecified (long-term) [PT]: 7.5997e-7
- sulfur dioxide, Emissions to air, unspecified (long-term) [RO]: 1.05508e-6
- sulfur dioxide, Emissions to air, unspecified (long-term) [SE]: 1.14308e-6
- sulfur dioxide, Emissions to air, unspecified (long-term) [SI]: 1.61877e-7
- sulfur dioxide, Emissions to air, unspecified (long-term) [SK]: 3.7995e-7
- sulfur dioxide, Emissions to air, unspecified (long-term) [UA]: 1.11402e-6

## Impact indicators
- Eutrophication marine: 0.000157313
- Ecotoxicity, freshwater: 0.0232649
- Land use: 0
- Water use: 0.0135201
- Resource use, minerals and metals: 0
- Resource use, fossils: 0
- Climate change: 0.475476
- Ozone depletion: 0
- Human toxicity, cancer: 2.97818e-11
- Human toxicity, non-cancer: 2.492e-10
- EF-particulate Matter: 5.17209e-9
- Ionising radiation, human health: 2.33537e-6
- Photochemical ozone formation - human health: 0.00043392
- Acidification: 0.000255889
- Eutrophication, terrestrial: 0.000781212
- Eutrophication, freshwater: 1.23672e-5

## Deviations from the LCI method principle
The background data uses:
- the \xe2\x80\x9cRecycled content cut-off\xe2\x80\x9d approach to allocate end-of-life by-products and secondary materials. This allocation is explained in the description of the recycled content system model (http://www.ecoinvent.org/database/system-models-in-ecoinvent-3/cut-off-system-model/allocation-cut-off-by-classification.html).
OR
- EF compliant data

## Deviations from the LCI method approaches
Background data:
- the \xe2\x80\x9cRecycled content cut-off\xe2\x80\x9d approach to allocate end-of-life by-products and secondary materials. This allocation is explained in the description of the recycled content system model (http://www.ecoinvent.org/database/system-models-in-ecoinvent-3/cut-off-system-model/allocation-cut-off-by-classification.html). The ecoinvent database mostly relies on “Allocation – market values” apart for few exceptions particularly in the energy sector. ecoinvent energy data is replaced with EF3.0 core data as per the EF guidelines version 2.0.
OR
- EF compliant data

## Modelling constants
All modelling constants follow the requirements listed in the Tender Specifications 070201/2020/SER/ENV.B1. Completeness: There are no intentional cut-offs in the inventory no matter how small their contribution to all the EF impact categories is. Eventual cut-offs are in compliance with the Guide for EF compliant data sets (JRC 2020), i.e. only if below the 3% cut-off rule. Water use: water use is modelled at country level using separate flows for water withdrawal, water release and water evaporation. Handling multi-functional processes: the following PEF multi- functionality decision hierarchy is applied for resolving all multi- functionality problems: (1) subdivision or system expansion; (2) allocation based on a relevant underlying physical relationship (substitution may apply here); (3) allocation based on some other relationship. Direct land use change: GHG emissions from direct LUC allocated to good/service for 20 years after the LUC occurs, with IPCC default values. Carbon storage and delayed emissions: credits associated with temporary (carbon) storage or delayed emissions up to 300 years are not be considered. Emissions off-setting: are not included. Capital goods (including infrastructures) and their End of life: they are included. System boundaries: system boundaries include all processes linked to the product supply chain (e.g. maintenance). Time period: emissions and removals are modelled as if released or removed at the beginning of the assessment method. Fossil and biogenic carbon emissions and removals: removals and emissions are modelled as follows: All GHG emissions from fossil fuels (including peat and limestone) are modelled consistently with the most updated ILCD list of elementary flows. The non-fossil (biogenic) carbon flows are modelled consistently with the most updated ILCD list of elementary flows.

## Cut-off and completeness
There are no intentional cut-offs in the inventory no matter how small their contribution to all the EF impact categories is. Eventual cut-offs are in compliance with the Guide for EF compliant data sets (JRC 2020), i.e. only if below the 3% cut-off rule. The dataset dry mass and water balance has been checked to ensure the inventory is complete. Capital goods (e.g. infrastructure) and their end-of-life are included.

## Data selection and combination
These datasets include, in both their foreground and background data, links to EF3.0 compliant data.
The relevant background data on energy, transport, and End of Life are from the LCDN data node (http://lcdn.thinkstep.com/Node/).
All other background data in the supply of this product for which no EF3.0 process was available are from ecoinvent v3.7 database (www.ecoinvent.org) or other data sources.

## Data treatment and extrapolations
Several data sources have been used to model the inventory.

## Use advice
This data set is a supporting sub-data set and must be used exclusively as sub-data set of its corresponding level-1 partly disaggregated data set (see “General comment” field for exact name and UUID).

## Data sources
- Background Data for Representative products and organisations. EF 3.0 compliant (data stock)
- RISE Research Institutes of Sweden on behalf of the European Tissue Symposium (ETS), (2021). Gate-to-gate life cycle inventory data for average European tissue paper production. available from ETS on request

## Intended applications
Implementation of regular Product Environmental Footprint (PEF) studies and Organisation Environmental Footprint (OEF) studies exclusively under the specified Product groups and sectors as defined in the Product Environmental Footprint Category Rules (PEFCR) and Organisation Environmental Footprint Sectorial Rules (OEFSR) listed in http://ec.europa.eu/environment/eussd/smgp/PEFCR_OEFSR.htm
