# coating, hotmelt glue, 2 times (for 3 layers); Finishing; technology mix; textile service for 1 kg of fabric

Dataset: ILCD process, Partly terminated system
Geography: GLO
Reference year: 2002
Valid until: 2024
Classification: Systems / Textiles, furnitures and other interiors
LCI method principle: Attributional
LCI method approaches: Allocation - market value
Completeness: All relevant flows quantified
Project: Provision of process-based 3.0 Environmental Footprint-compliant life cycle inventory datasets - Apparel 2 - contract number 070201/2020/840292/SER/ENV.B.1
Generated by: CADIS
Owner: PRé Sustainability B.V.
Compliance: ILCD Data Network - Entry-level; Suggestions for updating the PEF method 2019; ISO 14040 Environmental Management – Life Cycle Assessment – Principles and Framework, 2006; ISO 14044:2006. Environmental Management – Life Cycle Assessment – Requirements and guidelines.; Environmental Footprint 3.1
Review: Dependent internal review by Avraam Symeonidis, Emilia Moreno Ruiz; Independent review panel by Madhuri Nigam
Data quality: Overall quality: Good; Time representativeness: Very good; Geographical representativeness: Fair; Technological representativeness: Very good; Precision: Good; Methodological appropriateness and consistency: Not applicable
Amounts: no units in this file; such an amount is in the reference unit of its flow, which a separate flow dataset defines
copyright: true
licenseType: Free of charge for some user types or use types
accessRestrictions: Free of charge for all final users implementing a regular Product Environmental Footprint (PEF) studies and Organisation Environmental Footprint (OEF) studies exclusively under the specified Product groups and sectors as defined in the Product Environmental Footprint Category Rules (PEFCR) and Organisation Environmental Footprint Sectorial Rules (OEFSR) listed in http://ec.europa.eu/environment/eussd/smgp/PEFCR_OEFSR.htm and in accordance with the terms and conditions of the EULA (available at https://ecoinvent.lca-data.com/) exclusively until 31st December 2024. Any use of this dataset or any derivative data not within the specific context of one of the PEF/OEF projects or after the end of 2024 is not permitted.

## General comment
Notice: this data set supersedes the EF3.0-compliant version (see link under "preceding data set version" below calculated with the EF3.0). The life cycle inventory is not changed from the original EF3.0 data set. The LCIA results are calculated based on the EF3.1 methods which provide updated characterisation factors in the following impact categories: Climate Change, Ecotoxicity freshwater, Photochemical Ozone Formation, Acidification, Human Toxicity non-cancer, and Human Toxicity cancer. The review report and the data quality ratings refer to the original results. The data set has been updated by the European Commission on the basis of the original EF3.0 data set delivered by the data provider.This activity is modeled as a service, so no input of textile is considered. A user employing this service within their models should use it along with 1 kg of fabric. Three layer process (application of two coating process). It is assumed that the complete coating process shall be repeated completely for each layer. Energy consumption for hotmelting and coating (0.04 kWh/kg) was calculated from manufacturer specification NJSumino (2021) considering a power consumption of 110 kW, an average working speed of 125 m/min, the maximum fabric width (2.8 m) and a fabric weight of 330 g/m2. The glue coated onto the fabric was calculated from manufacturer specification of maximum extrusion power of 200 kg/h. The formulation of the PVC coating was obtained from Fung (2002) containing PVC resin (50%), plasticizer (35%), filler (13%), heat stabilizer (13%) and dispersing agent (1%). No light stabilizers nor pigments were considered for this coating formulation. Heat use (4 MJ/kg) for drying and curing in stenter was obtained from Mazo-Restrepo et al. (2021). A user employing this service within their models should use it along with 1 kg of fabric. Life expectancy of coating machine is assumed to be 25 years (UNFCCC, 2012) with an average coating capacity of 25 kg/h and a machine weight of 983 kg (IKEGAI, 2021), assuming 12 h/d operating time and 30 days per month. Land use from factory building was calculated based on (EUREKA, 2021) from a total area of 325 thousand square meters, divided into five sub-productive areas: knitting, dyeing, finishing, and home textiles. The respective area (1/5) of total building area (65,000 m2) is divided by the total production capacity of the building in 60 years (assumed life span of the building), with a daily production of 100,000 meters of finished fabric and a fabric weight of 300 grams per square meter (EUREKA, 2021).

## Technology and included processes
Coating is the application of polymer onto a textile as a paste, foam or viscous liquid. The application of polymer is made such that coating cannot be detached. In hotmelt glue coating process (also known as meltblown glue) one or more layers of thermoplastic melt spun filaments and one or more layers of finer thermoplastic microfibers which are bonded by heat. With the application of force, the filaments are elongated to form a microporous structure. Hotmelts are 100% polymers containing neither water nor organic solvents; therefore, drying/curing in an oven is not required. Textiles produced with hotmelt technology may have application for safety and working clothing, functional sportswear, filter textiles, automotive interior textiles and medical textiles.

## Parameters
- kg_0: 0.0290781
  Mass in kg, for polyvinyl chloride, petrochemical // polyvinyl chloride (pvc) production, fossil fuel-based // glo; Articulated lorry transport, Euro 4, Total weight >32 t; EU+EFTA+UK
- km_0: 1000
  Distance in km, for polyvinyl chloride, petrochemical // polyvinyl chloride (pvc) production, fossil fuel-based // glo; Articulated lorry transport, Euro 4, Total weight >32 t; EU+EFTA+UK
- kg_km_0: 29.0781; = kg_0*km_0
  Transport amount in km*km, for polyvinyl chloride, petrochemical // polyvinyl chloride (pvc) production, fossil fuel-based // glo; Articulated lorry transport, Euro 4, Total weight >32 t; EU+EFTA+UK
- kg_1: 0.0203547
  Mass in kg, for dioctyl adipate // dioctyl adipate (doa) production // glo; Articulated lorry transport, Euro 4, Total weight >32 t; EU+EFTA+UK
- km_1: 1000
  Distance in km, for dioctyl adipate // dioctyl adipate (doa) production // glo; Articulated lorry transport, Euro 4, Total weight >32 t; EU+EFTA+UK
- kg_km_1: 20.3547; = kg_1*km_1
  Transport amount in km*km, for dioctyl adipate // dioctyl adipate (doa) production // glo; Articulated lorry transport, Euro 4, Total weight >32 t; EU+EFTA+UK
- kg_2: 0.00726953
  Mass in kg, for calcium carbonate // calcium carbonate production // eu+efta+uk; Articulated lorry transport, Euro 4, Total weight >32 t; EU+EFTA+UK
- km_2: 1000
  Distance in km, for calcium carbonate // calcium carbonate production // eu+efta+uk; Articulated lorry transport, Euro 4, Total weight >32 t; EU+EFTA+UK
- kg_km_2: 7.26953; = kg_2*km_2
  Transport amount in km*km, for calcium carbonate // calcium carbonate production // eu+efta+uk; Articulated lorry transport, Euro 4, Total weight >32 t; EU+EFTA+UK
- kg_3: 0.000726953
  Mass in kg, for barium zinc stearate // barium zinc stearate production // eu+efta+uk; Articulated lorry transport, Euro 4, Total weight >32 t; EU+EFTA+UK
- km_3: 999.999
  Distance in km, for barium zinc stearate // barium zinc stearate production // eu+efta+uk; Articulated lorry transport, Euro 4, Total weight >32 t; EU+EFTA+UK
- kg_km_3: 0.726952; = kg_3*km_3
  Transport amount in km*km, for barium zinc stearate // barium zinc stearate production // eu+efta+uk; Articulated lorry transport, Euro 4, Total weight >32 t; EU+EFTA+UK
- kg_4: 0.000290781
  Mass in kg, for polyvinyl alcohol granulate (pval) mix // polyvinyl alcohol granulate (pval) mix production // glo; Articulated lorry transport, Euro 4, Total weight >32 t; EU+EFTA+UK
- km_4: 1000
  Distance in km, for polyvinyl alcohol granulate (pval) mix // polyvinyl alcohol granulate (pval) mix production // glo; Articulated lorry transport, Euro 4, Total weight >32 t; EU+EFTA+UK
- kg_km_4: 0.290782; = kg_4*km_4
  Transport amount in km*km, for polyvinyl alcohol granulate (pval) mix // polyvinyl alcohol granulate (pval) mix production // glo; Articulated lorry transport, Euro 4, Total weight >32 t; EU+EFTA+UK
- kg_5: 0.0290781
  Mass in kg, for polyvinyl chloride, petrochemical // polyvinyl chloride (pvc) production, fossil fuel-based // glo; Transoceanic ship, containers; GLO
- km_5: 18000
  Distance in km, for polyvinyl chloride, petrochemical // polyvinyl chloride (pvc) production, fossil fuel-based // glo; Transoceanic ship, containers; GLO
- kg_km_5: 523.406; = kg_5*km_5
  Transport amount in km*km, for polyvinyl chloride, petrochemical // polyvinyl chloride (pvc) production, fossil fuel-based // glo; Transoceanic ship, containers; GLO
- kg_6: 0.0203547
  Mass in kg, for dioctyl adipate // dioctyl adipate (doa) production // glo; Transoceanic ship, containers; GLO
- km_6: 18000
  Distance in km, for dioctyl adipate // dioctyl adipate (doa) production // glo; Transoceanic ship, containers; GLO
- kg_km_6: 366.384; = kg_6*km_6
  Transport amount in km*km, for dioctyl adipate // dioctyl adipate (doa) production // glo; Transoceanic ship, containers; GLO
- kg_7: 0.00726953
  Mass in kg, for calcium carbonate // calcium carbonate production // eu+efta+uk; Transoceanic ship, containers; GLO
- km_7: 18000
  Distance in km, for calcium carbonate // calcium carbonate production // eu+efta+uk; Transoceanic ship, containers; GLO
- kg_km_7: 130.852; = kg_7*km_7
  Transport amount in km*km, for calcium carbonate // calcium carbonate production // eu+efta+uk; Transoceanic ship, containers; GLO
- kg_8: 0.000726953
  Mass in kg, for barium zinc stearate // barium zinc stearate production // eu+efta+uk; Transoceanic ship, containers; GLO
- km_8: 18000
  Distance in km, for barium zinc stearate // barium zinc stearate production // eu+efta+uk; Transoceanic ship, containers; GLO
- kg_km_8: 13.0851; = kg_8*km_8
  Transport amount in km*km, for barium zinc stearate // barium zinc stearate production // eu+efta+uk; Transoceanic ship, containers; GLO
- kg_9: 0.000290781
  Mass in kg, for polyvinyl alcohol granulate (pval) mix // polyvinyl alcohol granulate (pval) mix production // glo; Transoceanic ship, containers; GLO
- km_9: 18000.1
  Distance in km, for polyvinyl alcohol granulate (pval) mix // polyvinyl alcohol granulate (pval) mix production // glo; Transoceanic ship, containers; GLO
- kg_km_9: 5.23408; = kg_9*km_9
  Transport amount in km*km, for polyvinyl alcohol granulate (pval) mix // polyvinyl alcohol granulate (pval) mix production // glo; Transoceanic ship, containers; GLO

## Reference product
- coating, hotmelt glue, 2 times (for 3 layers) // coating, hotmelt glue, 2 times (for 3 layers) // glo: 1

## Inputs
- Electricity from Electricity grid mix 1kV-60kV - AU: 0.0032
- Electricity from Electricity grid mix 1kV-60kV - EU+EFTA+UK: 0.0478
- Electricity from Electricity grid mix 1kV-60kV - NZ: 0.0006
- Electricity from Electricity grid mix 1kV-60kV - RAF: 0.0104
- Electricity from Electricity grid mix 1kV-60kV - RNA: 0.07
- Electricity from Electricity grid mix 1kV-60kV - RSA: 0.0238
- Electricity from Electricity grid mix 1kV-60kV - RU: 0.014
- Thermal energy (MJ) from Thermal energy from LPG - ROW: 8
- Transport of polyvinyl chloride, petrochemical // polyvinyl chloride (pvc) production, fossil fuel-based // glo by Articulated lorry transport, Euro 4, Total weight >32 t - EU+EFTA+UK: 29.0781; = kg_km_0
- Transport of dioctyl adipate // dioctyl adipate (doa) production // glo by Articulated lorry transport, Euro 4, Total weight >32 t - EU+EFTA+UK: 20.3547; = kg_km_1
- Transport of calcium carbonate // calcium carbonate production // eu+efta+uk by Articulated lorry transport, Euro 4, Total weight >32 t - EU+EFTA+UK: 7.26953; = kg_km_2
- Transport of barium zinc stearate // barium zinc stearate production // eu+efta+uk by Articulated lorry transport, Euro 4, Total weight >32 t - EU+EFTA+UK: 0.726952; = kg_km_3
- Transport of polyvinyl alcohol granulate (pval) mix // polyvinyl alcohol granulate (pval) mix production // glo by Articulated lorry transport, Euro 4, Total weight >32 t - EU+EFTA+UK: 0.290782; = kg_km_4
- Transport of polyvinyl chloride, petrochemical // polyvinyl chloride (pvc) production, fossil fuel-based // glo by Transoceanic ship, containers - GLO: 523.406; = kg_km_5
- Transport of dioctyl adipate // dioctyl adipate (doa) production // glo by Transoceanic ship, containers - GLO: 366.384; = kg_km_6
- Transport of calcium carbonate // calcium carbonate production // eu+efta+uk by Transoceanic ship, containers - GLO: 130.852; = kg_km_7
- Transport of barium zinc stearate // barium zinc stearate production // eu+efta+uk by Transoceanic ship, containers - GLO: 13.0851; = kg_km_8
- Transport of polyvinyl alcohol granulate (pval) mix // polyvinyl alcohol granulate (pval) mix production // glo by Transoceanic ship, containers - GLO: 5.23408; = kg_km_9
- Electricity from Electricity grid mix 1kV-60kV - CN: 0.0716727
- Electricity from Electricity grid mix 1kV-60kV - RAS w/o CN: 0.0785273
- coating, hotmelt glue, 2 times (for 3 layers) // coating, hotmelt glue, 2 times (for 3 layers) // glo, blackbox: 1
- coating, hotmelt glue, 2 times (for 3 layers) // coating, hotmelt glue, 2 times (for 3 layers) // glo, elementary: 1

## Impact indicators
- Eutrophication marine: 0.000831254
- Ecotoxicity, freshwater: 14.9973
- Land use: 2.35773
- Water use: 0.0871431
- Resource use, minerals and metals: 3.50986e-6
- Resource use, fossils: 14.0622
- Climate change: 1.03141
- Ozone depletion: 3.14117e-8
- Human toxicity, cancer: 6.40229e-10
- Human toxicity, non-cancer: 5.43366e-9
- EF-particulate Matter: 7.12909e-8
- Ionising radiation, human health: 0.0095723
- Photochemical ozone formation - human health: 0.00254513
- Acidification: 0.00360841
- Eutrophication, terrestrial: 0.0102093
- Eutrophication, freshwater: 1.2016e-5

## Deviations from the LCI method principle
The background data uses:
- the \xe2\x80\x9cRecycled content cut-off\xe2\x80\x9d approach to allocate end-of-life by-products and secondary materials. This allocation is explained in the description of the recycled content system model (http://www.ecoinvent.org/database/system-models-in-ecoinvent-3/cut-off-system-model/allocation-cut-off-by-classification.html).
OR
- EF compliant data

## Deviations from the LCI method approaches
Background data:
- the \xe2\x80\x9cRecycled content cut-off\xe2\x80\x9d approach to allocate end-of-life by-products and secondary materials. This allocation is explained in the description of the recycled content system model (http://www.ecoinvent.org/database/system-models-in-ecoinvent-3/cut-off-system-model/allocation-cut-off-by-classification.html). The ecoinvent database mostly relies on “Allocation – market values” apart for few exceptions particularly in the energy sector. ecoinvent energy data is replaced with EF3.0 core data as per the EF guidelines version 2.0.
OR
- EF compliant data

## Modelling constants
All modelling constants follow the requirements listed in the Tender Specifications 070201/2020/SER/ENV.B1. Completeness: There are no intentional cut-offs in the inventory no matter how small their contribution to all the EF impact categories is. Eventual cut-offs are in compliance with the Guide for EF compliant data sets (JRC 2020), i.e. only if below the 3% cut-off rule. Water use: water use is modelled at country level using separate flows for water withdrawal, water release and water evaporation. Handling multi-functional processes: the following PEF multi- functionality decision hierarchy is applied for resolving all multi- functionality problems: (1) subdivision or system expansion; (2) allocation based on a relevant underlying physical relationship (substitution may apply here); (3) allocation based on some other relationship. Direct land use change: GHG emissions from direct LUC allocated to good/service for 20 years after the LUC occurs, with IPCC default values. Carbon storage and delayed emissions: credits associated with temporary (carbon) storage or delayed emissions up to 300 years are not be considered. Emissions off-setting: are not included. Capital goods (including infrastructures) and their End of life: they are included. System boundaries: system boundaries include all processes linked to the product supply chain (e.g. maintenance). Time period: emissions and removals are modelled as if released or removed at the beginning of the assessment method. Fossil and biogenic carbon emissions and removals: removals and emissions are modelled as follows: All GHG emissions from fossil fuels (including peat and limestone) are modelled consistently with the most updated ILCD list of elementary flows. The non-fossil (biogenic) carbon flows are modelled consistently with the most updated ILCD list of elementary flows.

## Cut-off and completeness
There are no intentional cut-offs in the inventory no matter how small their contribution to all the EF impact categories is. Eventual cut-offs are in compliance with the Guide for EF compliant data sets (JRC 2020), i.e. only if below the 3% cut-off rule. The dataset dry mass and water balance has been checked to ensure the inventory is complete. Capital goods (e.g. infrastructure) and their end-of-life are included.

## Data selection and combination
These datasets include, in both their foreground and background data, links to EF3.0 compliant data.
The relevant background data on energy, transport, and End of Life are from the LCDN data node (http://lcdn.thinkstep.com/Node/).
All other background data in the supply of this product for which no EF3.0 process was available are from ecoinvent v3.7 database (www.ecoinvent.org) or other data sources.

## Data treatment and extrapolations
Several data sources have been used to model the inventory.

## Review details
Internal reviews have been asked to review the plausibility of the unit process, LCIA scores, and DQRs. Internal reviewers have also been asked to review the data for EF compliancy. The consortium is therefore responsible for aspects such as compliancy with the ILCD format, including validation in Look@LCI, and nomenclature.
Internal reviwers have been asked to judge based on the process name, that the unit process models in a complete and representative way the process in the requested location. The review encompassed the plausability of:
- exchanges with nature (elementary flows) as well as exchanges such as product and waste flows.
- meta information (general comment, technology comment, system boundaries, allocation, cut-off rules, etc.). Reviewers were asked to judge if the provided information is enough to understand the content of the process.
- LCIA scores
- DQRs including precision, technology, time and geography. As well as the overall DQR.
External reviewers have been asked to provide their expertise in the field of interest. External reviewers have been asked to review the unit process, including eventual methodological choices, the LCIA scores (provided with contribution scores as well), and DQRs. External reviewers have been provided all the information in a tool developed by the consortium for the purpose of this project.
External reviewers have been asked to judge based on the process name, that the unit process models in a complete and representative way the process in the requested location. The review encompassed:
- Plausability and completeness of exchanges with nature (elementary flows) as well as exchanges such as product and waste flows.
- Review of meta information (general comment, technology comment, system boundaries, allocation, cut-off rules, etc.). Reviewers were asked to judge if the provided information is enough to understand the content of the process.
- Review of properties (biogenic carbon and water content).
- Review of allocation keys.
- Plausability of LCIA scores calculated by the consortium.
- Plausability of DQRs including precision, technology, time and geography. As well as the overall DQR.

## Data sources
- Background Data for Representative products and organisations. EF 3.0 compliant (data stock)
- Fung W (2002) Coated and laminated textiles. Woodhead Publishing Limited in association with The Textile Institute Woodhead Publishing Ltd ISBN 1 85573 576 8
- NJSumino (2021) Single-layer Extrusion casting film lamination machine. Nanjing Sumino Precision Machinery Co.,Ltd
- Mazo-Restrepo R, Alvarado P, Cacua K (2021) Analysis of potential waste heat recovery from a stenter in a textile plant.. DYNA, 88(217), pp. 292-302, April - June, 2021.
- UNFCCC (2012) COMPONENT PROJECT ACTIVITIES DESIGN DOCUMENT (CPA-DD). Accessed online August 8th 2021: http://gec.jp/gec/jp/Activities/cdm-fs/2012/2012_cdmfs01_jPear_bangladesh_cpa-dd.pdf
- DONGGUAN (2021) Semi-Automatic 3 Roller Rubber Calender Machine. Accesed online August 10th 2021: https://www.tradeindia.com/products/3-roller-rubber-calender-machine-6155687.html
- EUREKA (2021) Production activities in line with the “green factory” approach in the textile sector. Accessed online August 8th 2021: https://eureka-eurogia-green.eu/offering_expertise/production-activities-in-line-with-the-green-factory-approach-in-the-textile-sector-13-04-2021/

## Intended applications
Implementation of regular Product Environmental Footprint (PEF) studies and Organisation Environmental Footprint (OEF) studies exclusively under the specified Product groups and sectors as defined in the Product Environmental Footprint Category Rules (PEFCR) and Organisation Environmental Footprint Sectorial Rules (OEFSR) listed in http://ec.europa.eu/environment/eussd/smgp/PEFCR_OEFSR.htm
