# hot melt; injection process; production mix, at plant

Dataset: ILCD process, Partly terminated system
Geography: EU+EFTA+UK
Reference year: 2021
Valid until: 2024
Classification: Systems / Textiles, furnitures and other interiors
LCI method principle: Attributional
LCI method approaches: Allocation - market value
Completeness: All relevant flows quantified
Project: Provision of process-based 3.0 Environmental Footprint-compliant life cycle inventory datasets - Apparel 1 - contract number 070201/2020/840291/SER/ENV.B.1
Generated by: Life Cycle Indonesia
Owner: PRé Sustainability B.V.
Compliance: ILCD Data Network - Entry-level; Suggestions for updating the PEF method 2019; ISO 14040 Environmental Management – Life Cycle Assessment – Principles and Framework, 2006; ISO 14044:2006. Environmental Management – Life Cycle Assessment – Requirements and guidelines.; Environmental Footprint 3.1
Review: Dependent internal review by Avraam Symeonidis, Emilia Moreno Ruiz; Independent review panel by Madhuri Nigam
Data quality: Overall quality: Good; Time representativeness: Very good; Geographical representativeness: Good; Technological representativeness: Good; Precision: Good; Methodological appropriateness and consistency: Not applicable
Amounts: no units in this file; such an amount is in the reference unit of its flow, which a separate flow dataset defines
copyright: true
licenseType: Free of charge for some user types or use types
accessRestrictions: Free of charge for all final users implementing a regular Product Environmental Footprint (PEF) studies and Organisation Environmental Footprint (OEF) studies exclusively under the specified Product groups and sectors as defined in the Product Environmental Footprint Category Rules (PEFCR) and Organisation Environmental Footprint Sectorial Rules (OEFSR) listed in http://ec.europa.eu/environment/eussd/smgp/PEFCR_OEFSR.htm and in accordance with the terms and conditions of the EULA (available at https://ecoinvent.lca-data.com/) exclusively until 31st December 2024. Any use of this dataset or any derivative data not within the specific context of one of the PEF/OEF projects or after the end of 2024 is not permitted.

## General comment
Notice: this data set supersedes the EF3.0-compliant version (see link under "preceding data set version" below calculated with the EF3.0). The life cycle inventory is not changed from the original EF3.0 data set. The LCIA results are calculated based on the EF3.1 methods which provide updated characterisation factors in the following impact categories: Climate Change, Ecotoxicity freshwater, Photochemical Ozone Formation, Acidification, Human Toxicity non-cancer, and Human Toxicity cancer. The review report and the data quality ratings refer to the original results. The data set has been updated by the European Commission on the basis of the original EF3.0 data set delivered by the data provider.Hot melts are thermoplastic materials that can be easily spread or poured when heated. When the hot melt is in a fluid state, it flows into the yam on the back of tufted carpet. When the hot melt is cooled, the coating solidifies and forms a bond to the carpet. This same hot melt composition can be used to laminate a secondarybacking to the carpet (Moody & Needles, 2004)

A hot melt adhesive, heated to at least its softening point is applied to the base layer on the opposite side of the base layer from the side adjacent to the pile forming yarn. A hot melt adhesive may be forced through the base layer into bond forming contact with the pile forming yarn, and the adhesive is then allowed to cool, either passively or by active cooling to a temperature below its softening temperature to thereby bond the pile forming yarn to the base layer (Machell, 1984).

A user employing this service within their models should use it along with an 0.71 kg of adhesives to produce 1 kg of hot melt carpet, 0.000004 kg of waste (resulted from lubricating oil, approximated amount) shall also be added. A user is responsible for defining the nature of recycling and/or disposal of this waste. Additionally, a user is responsible for accounting transportation expenditures of all extra input and output materials that need to be modelled alongside this service.

Machell, Greville (1984). Method for making a hot melt adhesive bonded pile fabric, https://patents.google.com/patent/US4576665A/en, United States Patent
Van Moody, Howard L. Needles (2004). Tufted Carpets, https://doi.org/10.1016/B978-188420799-0.50012-9, William Andrew Publishing, United States

## Technology and included processes
Hot melt compounds must have the correct components to achieve maximum performance and manufacturability. These compounds can contain polymers, resins, waxes, stabilizers, fillers, and oils. In this model, the adhesives glue is made from 35% EVA (Ethylene Vinyl Acetate), 35% Tackifier, and 30% Filler (Moody & Needles, 2004).

The activity starts when the material enter the process. The materials entering the process are energy uses and infrastructure. There is no direct emission to soil and air since the emission comes from electricity usage, while the hazardous waste comes from waste lube oil. In the model, enegy sources of machine is used solely from electricity. The consumption of lubricating oil using a thermobonding oven as a proxy.

Van Moody, Howard L. Needles (2004). Tufted Carpets, https://doi.org/10.1016/B978-188420799-0.50012-9, William Andrew Publishing, United States

## Parameters
- kg_0: 0.289776
  Mass in kg, for ethylene-vinyl acetate (eva) // ethylene-vinyl acetate (eva) production // eu+efta+uk; Articulated lorry transport, Euro 4, Total weight >32 t; EU+EFTA+UK
- km_0: 130
  Distance in km, for ethylene-vinyl acetate (eva) // ethylene-vinyl acetate (eva) production // eu+efta+uk; Articulated lorry transport, Euro 4, Total weight >32 t; EU+EFTA+UK
- kg_km_0: 37.6708; = kg_0*km_0
  Transport amount in km*km, for ethylene-vinyl acetate (eva) // ethylene-vinyl acetate (eva) production // eu+efta+uk; Articulated lorry transport, Euro 4, Total weight >32 t; EU+EFTA+UK
- kg_1: 0.289776
  Mass in kg, for resin, hydrogenated petroleum // resin, hydrogenated petroleum production // glo; Articulated lorry transport, Euro 4, Total weight >32 t; EU+EFTA+UK
- km_1: 130
  Distance in km, for resin, hydrogenated petroleum // resin, hydrogenated petroleum production // glo; Articulated lorry transport, Euro 4, Total weight >32 t; EU+EFTA+UK
- kg_km_1: 37.6708; = kg_1*km_1
  Transport amount in km*km, for resin, hydrogenated petroleum // resin, hydrogenated petroleum production // glo; Articulated lorry transport, Euro 4, Total weight >32 t; EU+EFTA+UK
- kg_2: 0.248379
  Mass in kg, for calcium carbonate // calcium carbonate production // eu+efta+uk; Articulated lorry transport, Euro 4, Total weight >32 t; EU+EFTA+UK
- km_2: 130
  Distance in km, for calcium carbonate // calcium carbonate production // eu+efta+uk; Articulated lorry transport, Euro 4, Total weight >32 t; EU+EFTA+UK
- kg_km_2: 32.2893; = kg_2*km_2
  Transport amount in km*km, for calcium carbonate // calcium carbonate production // eu+efta+uk; Articulated lorry transport, Euro 4, Total weight >32 t; EU+EFTA+UK
- kg_3: 4.02781e-6
  Mass in kg, for lubricating oil // lubricants at refinery // eu+efta+uk; Articulated lorry transport, Euro 4, Total weight >32 t; EU+EFTA+UK
- km_3: 130.096
  Distance in km, for lubricating oil // lubricants at refinery // eu+efta+uk; Articulated lorry transport, Euro 4, Total weight >32 t; EU+EFTA+UK
- kg_km_3: 0.000524; = kg_3*km_3
  Transport amount in km*km, for lubricating oil // lubricants at refinery // eu+efta+uk; Articulated lorry transport, Euro 4, Total weight >32 t; EU+EFTA+UK
- kg_4: 0.289776
  Mass in kg, for ethylene-vinyl acetate (eva) // ethylene-vinyl acetate (eva) production // eu+efta+uk; Barge; EU+EFTA+UK
- km_4: 270
  Distance in km, for ethylene-vinyl acetate (eva) // ethylene-vinyl acetate (eva) production // eu+efta+uk; Barge; EU+EFTA+UK
- kg_km_4: 78.2395; = kg_4*km_4
  Transport amount in km*km, for ethylene-vinyl acetate (eva) // ethylene-vinyl acetate (eva) production // eu+efta+uk; Barge; EU+EFTA+UK
- kg_5: 0.289776
  Mass in kg, for resin, hydrogenated petroleum // resin, hydrogenated petroleum production // glo; Barge; EU+EFTA+UK
- km_5: 270
  Distance in km, for resin, hydrogenated petroleum // resin, hydrogenated petroleum production // glo; Barge; EU+EFTA+UK
- kg_km_5: 78.2395; = kg_5*km_5
  Transport amount in km*km, for resin, hydrogenated petroleum // resin, hydrogenated petroleum production // glo; Barge; EU+EFTA+UK
- kg_6: 0.248379
  Mass in kg, for calcium carbonate // calcium carbonate production // eu+efta+uk; Barge; EU+EFTA+UK
- km_6: 270
  Distance in km, for calcium carbonate // calcium carbonate production // eu+efta+uk; Barge; EU+EFTA+UK
- kg_km_6: 67.0624; = kg_6*km_6
  Transport amount in km*km, for calcium carbonate // calcium carbonate production // eu+efta+uk; Barge; EU+EFTA+UK
- kg_7: 4.02781e-6
  Mass in kg, for lubricating oil // lubricants at refinery // eu+efta+uk; Barge; EU+EFTA+UK
- km_7: 270.122
  Distance in km, for lubricating oil // lubricants at refinery // eu+efta+uk; Barge; EU+EFTA+UK
- kg_km_7: 0.001088; = kg_7*km_7
  Transport amount in km*km, for lubricating oil // lubricants at refinery // eu+efta+uk; Barge; EU+EFTA+UK
- kg_8: 0.289776
  Mass in kg, for ethylene-vinyl acetate (eva) // ethylene-vinyl acetate (eva) production // eu+efta+uk; Freight train, average; EU+EFTA+UK
- km_8: 240
  Distance in km, for ethylene-vinyl acetate (eva) // ethylene-vinyl acetate (eva) production // eu+efta+uk; Freight train, average; EU+EFTA+UK
- kg_km_8: 69.5462; = kg_8*km_8
  Transport amount in km*km, for ethylene-vinyl acetate (eva) // ethylene-vinyl acetate (eva) production // eu+efta+uk; Freight train, average; EU+EFTA+UK
- kg_9: 0.289776
  Mass in kg, for resin, hydrogenated petroleum // resin, hydrogenated petroleum production // glo; Freight train, average; EU+EFTA+UK
- km_9: 240
  Distance in km, for resin, hydrogenated petroleum // resin, hydrogenated petroleum production // glo; Freight train, average; EU+EFTA+UK
- kg_km_9: 69.5462; = kg_9*km_9
  Transport amount in km*km, for resin, hydrogenated petroleum // resin, hydrogenated petroleum production // glo; Freight train, average; EU+EFTA+UK
- kg_10: 0.248379
  Mass in kg, for calcium carbonate // calcium carbonate production // eu+efta+uk; Freight train, average; EU+EFTA+UK
- km_10: 240
  Distance in km, for calcium carbonate // calcium carbonate production // eu+efta+uk; Freight train, average; EU+EFTA+UK
- kg_km_10: 59.611; = kg_10*km_10
  Transport amount in km*km, for calcium carbonate // calcium carbonate production // eu+efta+uk; Freight train, average; EU+EFTA+UK
- kg_11: 4.02781e-6
  Mass in kg, for lubricating oil // lubricants at refinery // eu+efta+uk; Freight train, average; EU+EFTA+UK
- km_11: 240.081
  Distance in km, for lubricating oil // lubricants at refinery // eu+efta+uk; Freight train, average; EU+EFTA+UK
- kg_km_11: 0.000967; = kg_11*km_11
  Transport amount in km*km, for lubricating oil // lubricants at refinery // eu+efta+uk; Freight train, average; EU+EFTA+UK

## Reference product
- hot melt // hot melt // eu+efta+uk: 1

## Inputs
- Electricity from Electricity grid mix 1kV-60kV - EU+EFTA+UK: 0.0695687
- Transport of ethylene-vinyl acetate (eva) // ethylene-vinyl acetate (eva) production // eu+efta+uk by Articulated lorry transport, Euro 4, Total weight >32 t - EU+EFTA+UK: 37.6708; = kg_km_0
- Transport of resin, hydrogenated petroleum // resin, hydrogenated petroleum production // glo by Articulated lorry transport, Euro 4, Total weight >32 t - EU+EFTA+UK: 37.6708; = kg_km_1
- Transport of calcium carbonate // calcium carbonate production // eu+efta+uk by Articulated lorry transport, Euro 4, Total weight >32 t - EU+EFTA+UK: 32.2893; = kg_km_2
- Transport of lubricating oil // lubricants at refinery // eu+efta+uk by Articulated lorry transport, Euro 4, Total weight >32 t - EU+EFTA+UK: 0.000524; = kg_km_3
- Transport of ethylene-vinyl acetate (eva) // ethylene-vinyl acetate (eva) production // eu+efta+uk by Barge - EU+EFTA+UK: 78.2395; = kg_km_4
- Transport of resin, hydrogenated petroleum // resin, hydrogenated petroleum production // glo by Barge - EU+EFTA+UK: 78.2395; = kg_km_5
- Transport of calcium carbonate // calcium carbonate production // eu+efta+uk by Barge - EU+EFTA+UK: 67.0624; = kg_km_6
- Transport of lubricating oil // lubricants at refinery // eu+efta+uk by Barge - EU+EFTA+UK: 0.001088; = kg_km_7
- Transport of ethylene-vinyl acetate (eva) // ethylene-vinyl acetate (eva) production // eu+efta+uk by Freight train, average - EU+EFTA+UK: 69.5462; = kg_km_8
- Transport of resin, hydrogenated petroleum // resin, hydrogenated petroleum production // glo by Freight train, average - EU+EFTA+UK: 69.5462; = kg_km_9
- Transport of calcium carbonate // calcium carbonate production // eu+efta+uk by Freight train, average - EU+EFTA+UK: 59.611; = kg_km_10
- Transport of lubricating oil // lubricants at refinery // eu+efta+uk by Freight train, average - EU+EFTA+UK: 0.000967; = kg_km_11
- hot melt // hot melt // eu+efta+uk, blackbox: 1
- hot melt // hot melt // eu+efta+uk, elementary: 1

## Impact indicators
- Eutrophication marine: 0.00271818
- Ecotoxicity, freshwater: 32.0523
- Land use: 3.30366
- Water use: 0.577807
- Resource use, minerals and metals: 1.02518e-5
- Resource use, fossils: 45.5024
- Climate change: 1.73788
- Ozone depletion: 2.48523e-8
- Human toxicity, cancer: 1.30816e-9
- Human toxicity, non-cancer: 1.28915e-8
- EF-particulate Matter: 1.94101e-7
- Ionising radiation, human health: 0.0576534
- Photochemical ozone formation - human health: 0.00877201
- Acidification: 0.0118918
- Eutrophication, terrestrial: 0.0295288
- Eutrophication, freshwater: 4.20766e-5

## Deviations from the LCI method principle
The background data uses:
- the \xe2\x80\x9cRecycled content cut-off\xe2\x80\x9d approach to allocate end-of-life by-products and secondary materials. This allocation is explained in the description of the recycled content system model (http://www.ecoinvent.org/database/system-models-in-ecoinvent-3/cut-off-system-model/allocation-cut-off-by-classification.html).
OR
- EF compliant data

## Deviations from the LCI method approaches
Background data:
- the \xe2\x80\x9cRecycled content cut-off\xe2\x80\x9d approach to allocate end-of-life by-products and secondary materials. This allocation is explained in the description of the recycled content system model (http://www.ecoinvent.org/database/system-models-in-ecoinvent-3/cut-off-system-model/allocation-cut-off-by-classification.html). The ecoinvent database mostly relies on “Allocation – market values” apart for few exceptions particularly in the energy sector. ecoinvent energy data is replaced with EF3.0 core data as per the EF guidelines version 2.0.
OR
- EF compliant data

## Modelling constants
All modelling constants follow the requirements listed in the Tender Specifications 070201/2020/SER/ENV.B1. Completeness: There are no intentional cut-offs in the inventory no matter how small their contribution to all the EF impact categories is. Eventual cut-offs are in compliance with the Guide for EF compliant data sets (JRC 2020), i.e. only if below the 3% cut-off rule. Water use: water use is modelled at country level using separate flows for water withdrawal, water release and water evaporation. Handling multi-functional processes: the following PEF multi- functionality decision hierarchy is applied for resolving all multi- functionality problems: (1) subdivision or system expansion; (2) allocation based on a relevant underlying physical relationship (substitution may apply here); (3) allocation based on some other relationship. Direct land use change: GHG emissions from direct LUC allocated to good/service for 20 years after the LUC occurs, with IPCC default values. Carbon storage and delayed emissions: credits associated with temporary (carbon) storage or delayed emissions up to 300 years are not be considered. Emissions off-setting: are not included. Capital goods (including infrastructures) and their End of life: they are included. System boundaries: system boundaries include all processes linked to the product supply chain (e.g. maintenance). Time period: emissions and removals are modelled as if released or removed at the beginning of the assessment method. Fossil and biogenic carbon emissions and removals: removals and emissions are modelled as follows: All GHG emissions from fossil fuels (including peat and limestone) are modelled consistently with the most updated ILCD list of elementary flows. The non-fossil (biogenic) carbon flows are modelled consistently with the most updated ILCD list of elementary flows.

## Cut-off and completeness
There are no intentional cut-offs in the inventory no matter how small their contribution to all the EF impact categories is. Eventual cut-offs are in compliance with the Guide for EF compliant data sets (JRC 2020), i.e. only if below the 3% cut-off rule. The dataset dry mass and water balance has been checked to ensure the inventory is complete. Capital goods (e.g. infrastructure) and their end-of-life are included.

## Data selection and combination
These datasets include, in both their foreground and background data, links to EF3.0 compliant data.
The relevant background data on energy, transport, and End of Life are from the LCDN data node (http://lcdn.thinkstep.com/Node/).
All other background data in the supply of this product for which no EF3.0 process was available are from ecoinvent v3.7 database (www.ecoinvent.org) or other data sources.

## Data treatment and extrapolations
Several data sources have been used to model the inventory.

## Review details
Internal reviews have been asked to review the plausibility of the unit process, LCIA scores, and DQRs. Internal reviewers have also been asked to review the data for EF compliancy. The consortium is therefore responsible for aspects such as compliancy with the ILCD format, including validation in Look@LCI, and nomenclature.
Internal reviwers have been asked to judge based on the process name, that the unit process models in a complete and representative way the process in the requested location. The review encompassed the plausability of:
- exchanges with nature (elementary flows) as well as exchanges such as product and waste flows.
- meta information (general comment, technology comment, system boundaries, allocation, cut-off rules, etc.). Reviewers were asked to judge if the provided information is enough to understand the content of the process.
- LCIA scores
- DQRs including precision, technology, time and geography. As well as the overall DQR.
External reviewers have been asked to provide their expertise in the field of interest. External reviewers have been asked to review the unit process, including eventual methodological choices, the LCIA scores (provided with contribution scores as well), and DQRs. External reviewers have been provided all the information in a tool developed by the consortium for the purpose of this project.
External reviewers have been asked to judge based on the process name, that the unit process models in a complete and representative way the process in the requested location. The review encompassed:
- Plausability and completeness of exchanges with nature (elementary flows) as well as exchanges such as product and waste flows.
- Review of meta information (general comment, technology comment, system boundaries, allocation, cut-off rules, etc.). Reviewers were asked to judge if the provided information is enough to understand the content of the process.
- Review of properties (biogenic carbon and water content).
- Review of allocation keys.
- Plausability of LCIA scores calculated by the consortium.
- Plausability of DQRs including precision, technology, time and geography. As well as the overall DQR.

## Data sources
- Background Data for Representative products and organisations. EF 3.0 compliant (data stock)
- UN Data (2018) Statistics Data for Lubricants Productions, http://data.un.org/Data.aspx?q=Lubricants&d=EDATA&f=cmID%3aLU, United Nations Statistics Division, Global.
- San Ren Xing (2021) Adhesive tape hot melt adhesive coating machine, http://www.qdsrxjx.com/en/ProductList.asp?SortID=42, Qingdao SanRenXing Machinery CO,.LTD, Qingdao, China
- Van Moody, Howard L. Needles (2004). Tufted Carpets, https://doi.org/10.1016/B978-188420799-0.50012-9, William Andrew Publishing, United States
- Flexituff (2021) Non Woven Floor Covering Carpets, http://flexituff.com/nonwoven-retail/, Flexituff Ventures International Limited, Madhya Pradesh, India

## Intended applications
Implementation of regular Product Environmental Footprint (PEF) studies and Organisation Environmental Footprint (OEF) studies exclusively under the specified Product groups and sectors as defined in the Product Environmental Footprint Category Rules (PEFCR) and Organisation Environmental Footprint Sectorial Rules (OEFSR) listed in http://ec.europa.eu/environment/eussd/smgp/PEFCR_OEFSR.htm
