# curing, dry, foam or spray; finishing chemical application; production mix, at plant; service

Dataset: ILCD process, Partly terminated system
Geography: GLO
Reference year: 2021
Valid until: 2024
Classification: Systems / Textiles, furnitures and other interiors
LCI method principle: Attributional
LCI method approaches: Allocation - market value
Completeness: All relevant flows quantified
Project: Provision of process-based 3.0 Environmental Footprint-compliant life cycle inventory datasets - Apparel 2 - contract number 070201/2020/840292/SER/ENV.B.1
Generated by: Life Cycle Indonesia
Owner: PRé Sustainability B.V.
Compliance: ILCD Data Network - Entry-level; Suggestions for updating the PEF method 2019; ISO 14040 Environmental Management – Life Cycle Assessment – Principles and Framework, 2006; ISO 14044:2006. Environmental Management – Life Cycle Assessment – Requirements and guidelines.; Environmental Footprint 3.1
Review: Dependent internal review by Avraam Symeonidis, Emilia Moreno Ruiz; Independent review panel by Fábio Valebona
Data quality: Overall quality: Very good; Time representativeness: Very good; Geographical representativeness: Good; Technological representativeness: Very good; Precision: Good; Methodological appropriateness and consistency: Not applicable
Amounts: no units in this file; such an amount is in the reference unit of its flow, which a separate flow dataset defines
copyright: true
licenseType: Free of charge for some user types or use types
accessRestrictions: Free of charge for all final users implementing a regular Product Environmental Footprint (PEF) studies and Organisation Environmental Footprint (OEF) studies exclusively under the specified Product groups and sectors as defined in the Product Environmental Footprint Category Rules (PEFCR) and Organisation Environmental Footprint Sectorial Rules (OEFSR) listed in http://ec.europa.eu/environment/eussd/smgp/PEFCR_OEFSR.htm and in accordance with the terms and conditions of the EULA (available at https://ecoinvent.lca-data.com/) exclusively until 31st December 2024. Any use of this dataset or any derivative data not within the specific context of one of the PEF/OEF projects or after the end of 2024 is not permitted.

## General comment
Notice: this data set supersedes the EF3.0-compliant version (see link under "preceding data set version" below calculated with the EF3.0). The life cycle inventory is not changed from the original EF3.0 data set. The LCIA results are calculated based on the EF3.1 methods which provide updated characterisation factors in the following impact categories: Climate Change, Ecotoxicity freshwater, Photochemical Ozone Formation, Acidification, Human Toxicity non-cancer, and Human Toxicity cancer. The review report and the data quality ratings refer to the original results. The data set has been updated by the European Commission on the basis of the original EF3.0 data set delivered by the data provider.Curing or fixation is also a thermal treatment, generally at a temperature much higher than that of drying. The same equipment used to dry fabric is also used for curing, provided the equipment is capable of reaching curing temperatures. In many finishing procedures, drying and curing are done in two successive steps. Each step will have its own individual specified conditions. Stenter or tenter is usually used for curing. The temperature in each zone can be independently set to a profile of any drying and curing conditions desired. The chambers are equipped with hot-air distribution heads that blow hot air directly onto the top and bottom of the fabric. The number of chamber depend on the process requirement (Choudhury, 2017)

One of the method to apply finishes is by spraying. Overlapping spray patterns coud lead to an unacceptable, uneven finish. This can be done with very low viscosity chemicals and no exact penetration of chemicals inside the textile (Choudhury. 2017). As there are difficulties in conventional spraying methods such as nozzles are frequently clogged and excessive pollution, indirect spray applications have been demonstrated. In these systems, the spray is generated by pumping the finishing solution by a proportioning pump from a well onto the center of a rapidly rotating set of spinning discs or rotors (Baysigit, 2021). Spraying technique requires less water, chemicals, and energy for drying and curing. Different types of functional finishes, such as antimicrobial, softness, hardness, and water repellent, can be applied by this technique. The result of spraying is a high level of uniformity by uniform droplet size (Samanta, et al., 2019).

Samanta, K. K., Pandit, P., Samanta, P., & Basak, S. (2019). Water consumption in textile processing and sustainable approaches for its conservation. Water in Textiles and Fashion, 41–59.
Choudhury, Asim Kumar Roy. 2017. Principle of textile finishing. United Kingdom: Elsevier. pp 15-17, 495
Baysigit, Zeynep Omerogullari. 2021. Application Technologies for Functional Finishing of Textile Materials. DOI: 10.5772/intechopen.95956

## Technology and included processes
In spraying application, the chemical is applied through spray bars. With controlled flow, the amount of applied finish can be set to desired add-on. Curing process can be dong in stenter machine as long as the temperature adequate for the curing process as the amount of chamber in stenter can also be adjusted to suit the application. Steam stenter with high-pressure steam from boiler can provide temperature up to 165 which adequate for dying and curing (Choudhury, 2017).

This is a finishing chemical application process using a pad dry-cure. The process includes the use of spraying machine, dryer, and stenter for curing. The spraying machine is proxy to Spray Coating Lamination Machine. The amount of chemicals used is not includes in this dataset. The process includes energy, lube oil consumption and infrastructure. There is no direct emission to air since the emission comes from electricity usage, while hazardous waste comes from waste lube oil. In the model, the energy sources of machines used from electricity and steam. The consumption of lubricating oil for drying-curing/stenter machine using a thermobonding oven as a proxy, while spraying machine using a hot calendering machine as a proxy. The GSM of the fabric is assumed to be 135 GSM cotton fabric

Choudhury, Asim Kumar Roy. 2017. Principle of textile finishing. United Kingdom: Elsevier. pp 15-17, 495

## Parameters
- kg_0: 1.44538e-6
  Mass in kg, for lubricating oil // lubricants at refinery // cn; Articulated lorry transport, Euro 4, Total weight >32 t; EU+EFTA+UK
- km_0: 1000
  Distance in km, for lubricating oil // lubricants at refinery // cn; Articulated lorry transport, Euro 4, Total weight >32 t; EU+EFTA+UK
- kg_km_0: 0.00144538; = kg_0*km_0
  Transport amount in km*km, for lubricating oil // lubricants at refinery // cn; Articulated lorry transport, Euro 4, Total weight >32 t; EU+EFTA+UK
- kg_1: 4.637e-6
  Mass in kg, for lubricating oil // lubricants at refinery // eu+efta+uk; Articulated lorry transport, Euro 4, Total weight >32 t; EU+EFTA+UK
- km_1: 1000
  Distance in km, for lubricating oil // lubricants at refinery // eu+efta+uk; Articulated lorry transport, Euro 4, Total weight >32 t; EU+EFTA+UK
- kg_km_1: 0.004637; = kg_1*km_1
  Transport amount in km*km, for lubricating oil // lubricants at refinery // eu+efta+uk; Articulated lorry transport, Euro 4, Total weight >32 t; EU+EFTA+UK
- kg_2: 3.47387e-7
  Mass in kg, for lubricating oil // lubricants at refinery // raf; Articulated lorry transport, Euro 4, Total weight >32 t; EU+EFTA+UK
- km_2: 1000
  Distance in km, for lubricating oil // lubricants at refinery // raf; Articulated lorry transport, Euro 4, Total weight >32 t; EU+EFTA+UK
- kg_km_2: 0.000347387; = kg_2*km_2
  Transport amount in km*km, for lubricating oil // lubricants at refinery // raf; Articulated lorry transport, Euro 4, Total weight >32 t; EU+EFTA+UK
- kg_3: 9.1034e-6
  Mass in kg, for lubricating oil // lubricants at refinery // ras w/o cn; Articulated lorry transport, Euro 4, Total weight >32 t; EU+EFTA+UK
- km_3: 1000
  Distance in km, for lubricating oil // lubricants at refinery // ras w/o cn; Articulated lorry transport, Euro 4, Total weight >32 t; EU+EFTA+UK
- kg_km_3: 0.0091034; = kg_3*km_3
  Transport amount in km*km, for lubricating oil // lubricants at refinery // ras w/o cn; Articulated lorry transport, Euro 4, Total weight >32 t; EU+EFTA+UK
- kg_4: 7.10592e-6
  Mass in kg, for lubricating oil // lubricants at refinery // rna; Articulated lorry transport, Euro 4, Total weight >32 t; EU+EFTA+UK
- km_4: 1000
  Distance in km, for lubricating oil // lubricants at refinery // rna; Articulated lorry transport, Euro 4, Total weight >32 t; EU+EFTA+UK
- kg_km_4: 0.00710592; = kg_4*km_4
  Transport amount in km*km, for lubricating oil // lubricants at refinery // rna; Articulated lorry transport, Euro 4, Total weight >32 t; EU+EFTA+UK
- kg_5: 8.46756e-7
  Mass in kg, for lubricating oil // lubricants at refinery // rsa; Articulated lorry transport, Euro 4, Total weight >32 t; EU+EFTA+UK
- km_5: 1000
  Distance in km, for lubricating oil // lubricants at refinery // rsa; Articulated lorry transport, Euro 4, Total weight >32 t; EU+EFTA+UK
- kg_km_5: 0.000846756; = kg_5*km_5
  Transport amount in km*km, for lubricating oil // lubricants at refinery // rsa; Articulated lorry transport, Euro 4, Total weight >32 t; EU+EFTA+UK
- kg_6: 7.52775e-6
  Mass in kg, for lubricating oil // lubricants at refinery // ru; Articulated lorry transport, Euro 4, Total weight >32 t; EU+EFTA+UK
- km_6: 1000
  Distance in km, for lubricating oil // lubricants at refinery // ru; Articulated lorry transport, Euro 4, Total weight >32 t; EU+EFTA+UK
- kg_km_6: 0.00752775; = kg_6*km_6
  Transport amount in km*km, for lubricating oil // lubricants at refinery // ru; Articulated lorry transport, Euro 4, Total weight >32 t; EU+EFTA+UK
- kg_7: 1.44538e-6
  Mass in kg, for lubricating oil // lubricants at refinery // cn; Transoceanic ship, containers; GLO
- km_7: 18000
  Distance in km, for lubricating oil // lubricants at refinery // cn; Transoceanic ship, containers; GLO
- kg_km_7: 0.0260168; = kg_7*km_7
  Transport amount in km*km, for lubricating oil // lubricants at refinery // cn; Transoceanic ship, containers; GLO
- kg_8: 4.637e-6
  Mass in kg, for lubricating oil // lubricants at refinery // eu+efta+uk; Transoceanic ship, containers; GLO
- km_8: 18000
  Distance in km, for lubricating oil // lubricants at refinery // eu+efta+uk; Transoceanic ship, containers; GLO
- kg_km_8: 0.0834659; = kg_8*km_8
  Transport amount in km*km, for lubricating oil // lubricants at refinery // eu+efta+uk; Transoceanic ship, containers; GLO
- kg_9: 3.47387e-7
  Mass in kg, for lubricating oil // lubricants at refinery // raf; Transoceanic ship, containers; GLO
- km_9: 18000
  Distance in km, for lubricating oil // lubricants at refinery // raf; Transoceanic ship, containers; GLO
- kg_km_9: 0.00625296; = kg_9*km_9
  Transport amount in km*km, for lubricating oil // lubricants at refinery // raf; Transoceanic ship, containers; GLO
- kg_10: 9.1034e-6
  Mass in kg, for lubricating oil // lubricants at refinery // ras w/o cn; Transoceanic ship, containers; GLO
- km_10: 18000
  Distance in km, for lubricating oil // lubricants at refinery // ras w/o cn; Transoceanic ship, containers; GLO
- kg_km_10: 0.163861; = kg_10*km_10
  Transport amount in km*km, for lubricating oil // lubricants at refinery // ras w/o cn; Transoceanic ship, containers; GLO
- kg_11: 7.10592e-6
  Mass in kg, for lubricating oil // lubricants at refinery // rna; Transoceanic ship, containers; GLO
- km_11: 18000
  Distance in km, for lubricating oil // lubricants at refinery // rna; Transoceanic ship, containers; GLO
- kg_km_11: 0.127907; = kg_11*km_11
  Transport amount in km*km, for lubricating oil // lubricants at refinery // rna; Transoceanic ship, containers; GLO
- kg_12: 8.46756e-7
  Mass in kg, for lubricating oil // lubricants at refinery // rsa; Transoceanic ship, containers; GLO
- km_12: 18000
  Distance in km, for lubricating oil // lubricants at refinery // rsa; Transoceanic ship, containers; GLO
- kg_km_12: 0.0152416; = kg_12*km_12
  Transport amount in km*km, for lubricating oil // lubricants at refinery // rsa; Transoceanic ship, containers; GLO
- kg_13: 7.52775e-6
  Mass in kg, for lubricating oil // lubricants at refinery // ru; Transoceanic ship, containers; GLO
- km_13: 18000
  Distance in km, for lubricating oil // lubricants at refinery // ru; Transoceanic ship, containers; GLO
- kg_km_13: 0.1355; = kg_13*km_13
  Transport amount in km*km, for lubricating oil // lubricants at refinery // ru; Transoceanic ship, containers; GLO

## Reference product
- curing, dry, foam or spray // curing, dry, foam or spray // glo: 1

## Inputs
- Electricity from Electricity grid mix 1kV-60kV - AU: 0.0067
- Electricity from Electricity grid mix 1kV-60kV - EU+EFTA+UK: 0.0991
- Electricity from Electricity grid mix 1kV-60kV - NZ: 0.0013
- Electricity from Electricity grid mix 1kV-60kV - RAF: 0.0217
- Electricity from Electricity grid mix 1kV-60kV - RNA: 0.1451
- Electricity from Electricity grid mix 1kV-60kV - RSA: 0.0492
- Electricity from Electricity grid mix 1kV-60kV - RU: 0.0289
- Transport of lubricating oil // lubricants at refinery // cn by Articulated lorry transport, Euro 4, Total weight >32 t - EU+EFTA+UK: 0.00144538; = kg_km_0
- Transport of lubricating oil // lubricants at refinery // eu+efta+uk by Articulated lorry transport, Euro 4, Total weight >32 t - EU+EFTA+UK: 0.004637; = kg_km_1
- Transport of lubricating oil // lubricants at refinery // raf by Articulated lorry transport, Euro 4, Total weight >32 t - EU+EFTA+UK: 0.000347387; = kg_km_2
- Transport of lubricating oil // lubricants at refinery // ras w/o cn by Articulated lorry transport, Euro 4, Total weight >32 t - EU+EFTA+UK: 0.0091034; = kg_km_3
- Transport of lubricating oil // lubricants at refinery // rna by Articulated lorry transport, Euro 4, Total weight >32 t - EU+EFTA+UK: 0.00710592; = kg_km_4
- Transport of lubricating oil // lubricants at refinery // rsa by Articulated lorry transport, Euro 4, Total weight >32 t - EU+EFTA+UK: 0.000846756; = kg_km_5
- Transport of lubricating oil // lubricants at refinery // ru by Articulated lorry transport, Euro 4, Total weight >32 t - EU+EFTA+UK: 0.00752775; = kg_km_6
- Transport of lubricating oil // lubricants at refinery // cn by Transoceanic ship, containers - GLO: 0.0260168; = kg_km_7
- Transport of lubricating oil // lubricants at refinery // eu+efta+uk by Transoceanic ship, containers - GLO: 0.0834659; = kg_km_8
- Transport of lubricating oil // lubricants at refinery // raf by Transoceanic ship, containers - GLO: 0.00625296; = kg_km_9
- Transport of lubricating oil // lubricants at refinery // ras w/o cn by Transoceanic ship, containers - GLO: 0.163861; = kg_km_10
- Transport of lubricating oil // lubricants at refinery // rna by Transoceanic ship, containers - GLO: 0.127907; = kg_km_11
- Transport of lubricating oil // lubricants at refinery // rsa by Transoceanic ship, containers - GLO: 0.0152416; = kg_km_12
- Transport of lubricating oil // lubricants at refinery // ru by Transoceanic ship, containers - GLO: 0.1355; = kg_km_13
- Electricity from Electricity grid mix 1kV-60kV - CN: 0.148547
- Electricity from Electricity grid mix 1kV-60kV - RAS w/o CN: 0.162753
- curing, dry, foam or spray // curing, dry, foam or spray // glo, blackbox: 1
- curing, dry, foam or spray // curing, dry, foam or spray // glo, elementary: 1

## Impact indicators
- Eutrophication marine: 0.00011073
- Ecotoxicity, freshwater: 0.566719
- Land use: 0.168956
- Water use: 0.0414571
- Resource use, minerals and metals: 8.24028e-8
- Resource use, fossils: 1.68841
- Climate change: 0.127793
- Ozone depletion: 1.91886e-11
- Human toxicity, cancer: 7.86579e-11
- Human toxicity, non-cancer: 7.46652e-10
- EF-particulate Matter: 3.04306e-8
- Ionising radiation, human health: 0.00918925
- Photochemical ozone formation - human health: 0.00033959
- Acidification: 0.000813147
- Eutrophication, terrestrial: 0.00120619
- Eutrophication, freshwater: 3.32403e-7

## Deviations from the LCI method principle
The background data uses:
- the \xe2\x80\x9cRecycled content cut-off\xe2\x80\x9d approach to allocate end-of-life by-products and secondary materials. This allocation is explained in the description of the recycled content system model (http://www.ecoinvent.org/database/system-models-in-ecoinvent-3/cut-off-system-model/allocation-cut-off-by-classification.html).
OR
- EF compliant data

## Deviations from the LCI method approaches
Background data:
- the \xe2\x80\x9cRecycled content cut-off\xe2\x80\x9d approach to allocate end-of-life by-products and secondary materials. This allocation is explained in the description of the recycled content system model (http://www.ecoinvent.org/database/system-models-in-ecoinvent-3/cut-off-system-model/allocation-cut-off-by-classification.html). The ecoinvent database mostly relies on “Allocation – market values” apart for few exceptions particularly in the energy sector. ecoinvent energy data is replaced with EF3.0 core data as per the EF guidelines version 2.0.
OR
- EF compliant data

## Modelling constants
All modelling constants follow the requirements listed in the Tender Specifications 070201/2020/SER/ENV.B1. Completeness: There are no intentional cut-offs in the inventory no matter how small their contribution to all the EF impact categories is. Eventual cut-offs are in compliance with the Guide for EF compliant data sets (JRC 2020), i.e. only if below the 3% cut-off rule. Water use: water use is modelled at country level using separate flows for water withdrawal, water release and water evaporation. Handling multi-functional processes: the following PEF multi- functionality decision hierarchy is applied for resolving all multi- functionality problems: (1) subdivision or system expansion; (2) allocation based on a relevant underlying physical relationship (substitution may apply here); (3) allocation based on some other relationship. Direct land use change: GHG emissions from direct LUC allocated to good/service for 20 years after the LUC occurs, with IPCC default values. Carbon storage and delayed emissions: credits associated with temporary (carbon) storage or delayed emissions up to 300 years are not be considered. Emissions off-setting: are not included. Capital goods (including infrastructures) and their End of life: they are included. System boundaries: system boundaries include all processes linked to the product supply chain (e.g. maintenance). Time period: emissions and removals are modelled as if released or removed at the beginning of the assessment method. Fossil and biogenic carbon emissions and removals: removals and emissions are modelled as follows: All GHG emissions from fossil fuels (including peat and limestone) are modelled consistently with the most updated ILCD list of elementary flows. The non-fossil (biogenic) carbon flows are modelled consistently with the most updated ILCD list of elementary flows.

## Cut-off and completeness
There are no intentional cut-offs in the inventory no matter how small their contribution to all the EF impact categories is. Eventual cut-offs are in compliance with the Guide for EF compliant data sets (JRC 2020), i.e. only if below the 3% cut-off rule. The dataset dry mass and water balance has been checked to ensure the inventory is complete. Capital goods (e.g. infrastructure) and their end-of-life are included.

## Data selection and combination
These datasets include, in both their foreground and background data, links to EF3.0 compliant data.
The relevant background data on energy, transport, and End of Life are from the LCDN data node (http://lcdn.thinkstep.com/Node/).
All other background data in the supply of this product for which no EF3.0 process was available are from ecoinvent v3.7 database (www.ecoinvent.org) or other data sources.

## Data treatment and extrapolations
Several data sources have been used to model the inventory.

## Review details
Internal reviews have been asked to review the plausibility of the unit process, LCIA scores, and DQRs. Internal reviewers have also been asked to review the data for EF compliancy. The consortium is therefore responsible for aspects such as compliancy with the ILCD format, including validation in Look@LCI, and nomenclature.
Internal reviwers have been asked to judge based on the process name, that the unit process models in a complete and representative way the process in the requested location. The review encompassed the plausability of:
- exchanges with nature (elementary flows) as well as exchanges such as product and waste flows.
- meta information (general comment, technology comment, system boundaries, allocation, cut-off rules, etc.). Reviewers were asked to judge if the provided information is enough to understand the content of the process.
- LCIA scores
- DQRs including precision, technology, time and geography. As well as the overall DQR.
External reviewers have been asked to provide their expertise in the field of interest. External reviewers have been asked to review the unit process, including eventual methodological choices, the LCIA scores (provided with contribution scores as well), and DQRs. External reviewers have been provided all the information in a tool developed by the consortium for the purpose of this project.
External reviewers have been asked to judge based on the process name, that the unit process models in a complete and representative way the process in the requested location. The review encompassed:
- Plausability and completeness of exchanges with nature (elementary flows) as well as exchanges such as product and waste flows.
- Review of meta information (general comment, technology comment, system boundaries, allocation, cut-off rules, etc.). Reviewers were asked to judge if the provided information is enough to understand the content of the process.
- Review of properties (biogenic carbon and water content).
- Review of allocation keys.
- Plausability of LCIA scores calculated by the consortium.
- Plausability of DQRs including precision, technology, time and geography. As well as the overall DQR.

## Data sources
- Background Data for Representative products and organisations. EF 3.0 compliant (data stock)
- UN Data (2018) Statistics Data for Lubricants Productions, http://data.un.org/Data.aspx?q=Lubricants&d=EDATA&f=cmID%3aLU, United Nations Statistics Division, Global
- NDC (2021) NDC NTH1750 Hot Melt Spray Coating Lamination Machine, https://www.ndccn.com/ndc-nth1750-hot-melt-spray-coating-lamination-machine_p37.html, NDC Hot Melt Adhesive Application System Co., Ltd , Fujian, China
- Chowdhury, Kawser Parveen (2018) Effect of Special Finishes on the Functional Properties of Cotton Fabrics, Journal of Textile Science and Technology, 4, 49-66, https://file.scirp.org/pdf/JTST_2018050815303131.pdf, Bangladesh
- Finestart (2017) Open Width Compactor(Dryer, Stenter and Compactor 3in1), http://www.finestart.com.cn/index.php?m=content&c=index&a=show&catid=55&id=62, Shandong Finestart Imp.& Exp. Co.,Ltd., Shandong, China
- Lebon Machinery (2021), Nonwoven Ironing Machine, Catalog and Company Massages, Qingdao Lebon Industry Co., Ltd., China
- Lebon (2021) Nonwoven Oven Machine, Catalog and Company Messages, Qingdao Lebon Industry Co., Ltd., China
- A. Madhu and S. Pal (2011). Low wet pick-up techniques in textile finishing, Man-Made Textiles in India, Paripat, India.

## Intended applications
Implementation of regular Product Environmental Footprint (PEF) studies and Organisation Environmental Footprint (OEF) studies exclusively under the specified Product groups and sectors as defined in the Product Environmental Footprint Category Rules (PEFCR) and Organisation Environmental Footprint Sectorial Rules (OEFSR) listed in http://ec.europa.eu/environment/eussd/smgp/PEFCR_OEFSR.htm
