# sewing, elementary; sewing process; production mix, at plant; service for 1 pair

Dataset: ILCD process, Unit process, single operation
Geography: GLO
Reference year: 2021
Valid until: 2024
Classification: Other Services / Other services
LCI method principle: Attributional
LCI method approaches: Allocation - market value
Completeness: All relevant flows quantified
Project: Provision of process-based 3.0 Environmental Footprint-compliant life cycle inventory datasets - Apparel 1 - contract number 070201/2020/840291/SER/ENV.B.1
Generated by: Life Cycle Indonesia
Owner: PRé Sustainability B.V.
Compliance: Environmental Footprint non-primary supporting data set; Environmental Footprint 3.1
Amounts: no units in this file; such an amount is in the reference unit of its flow, which a separate flow dataset defines
copyright: true
licenseType: Free of charge for some user types or use types
accessRestrictions: Free of charge for all final users implementing a regular Product Environmental Footprint (PEF) studies and Organisation Environmental Footprint (OEF) studies exclusively under the specified Product groups and sectors as defined in the Product Environmental Footprint Category Rules (PEFCR) and Organisation Environmental Footprint Sectorial Rules (OEFSR) listed in http://ec.europa.eu/environment/eussd/smgp/PEFCR_OEFSR.htm and in accordance with the terms and conditions of the EULA (available at https://ecoinvent.lca-data.com/) exclusively until 31st December 2024. Any use of this dataset or any derivative data not within the specific context of one of the PEF/OEF projects or after the end of 2024 is not permitted.

## General comment
Notice: this data set supersedes the EF3.0-compliant version (see link under "preceding data set version" below calculated with the EF3.0). The life cycle inventory is not changed from the original EF3.0 data set. The LCIA results are calculated based on the EF3.1 methods which provide updated characterisation factors in the following impact categories: Climate Change, Ecotoxicity freshwater, Photochemical Ozone Formation, Acidification, Human Toxicity non-cancer, and Human Toxicity cancer. The review report and the data quality ratings refer to the original results. The data set has been updated by the European Commission on the basis of the original EF3.0 data set delivered by the data provider.This sub-process has limited documentation only. For all detailed documentation of the full model to which this data set belongs (such as DQRs, review reports and other technical documentation), please see this process: sewing - GLO []

## Technology and included processes
A sewing machine is a mechanical (or electrical) device that joins fabric using thread, like manual sewing. Sewing machines make a stitch, called a sewing-machine stitch, usually using two threads although machines exist that stitch using one, three, four, or more threads. (Apparel Search, 2010)

The special machinery features for shoe upper sewing are: post bed/cylinder bed, compound feed/unison feed, alternating top feed mechanism, and roller presser foot/roller feed dog. The post and cylinder bed machines work on average between 2400 spm to 3000 spm and come in a variety of feed systems in combination with wheel feed. The automatic back-tacking device ensures a “stitch-in-stitch” back-tacking. Automatic thread trimmer, presser-foot lift, and back-tacking with push-button contribute to its high productivity. Other machines used are zigzag, pattern taking, insoling, and also flatbed machines. Programmable pattern tacking machines are used for decorative stitches, decorative patch attaches, and other cycle operations. Specialized over seaming machines are used for insoling purposes.

Source: https://apparelresources.com/business-news/manufacturing/sewing-athletic-shoe-upper/ (Apparel resources, 2008)

However, there are also two main types of shoe construction that require stitching which are the Goodyear Welted and Blake Stitch.
Goodyear welting was created by Charles Goodyear, Jr. in 1869 to industrialize shoemaking. A double-stitching method is employed whereby the welt wraps around the upper of the shoe and serves to hold the different layers together. Two separate stitches are made with the Goodyear welting machine on the outside of the shoe; the first to connect the upper, insole, and the welt, the second stitch attaches the outsole to the top layer. On the other hand, blake stitch construction was Invented in 1856 by Lyman Reed Blake. This technique is done with what is called the “single stitch” method whereby the shoe’s upper is folded underneath the insole and then stitched into place with a single thread connecting the insole, the upper, and the outsole on the inside of the shoe.

Source: https://www.beckettsimonon.com/blogs/resources/goodyear-welting-or-blake-stitching-which-is-better

This process includes industrial sewing machines that use electrical power. Types of machines considered include double stitching sewing machines and flatbed sewing machines. Thread consumption is also included and using a stitching machine as a proxy. In addition infrastructure of the machine is included in the data. There is no direct emission to the air since the emission comes from electricity usage, while hazardous waste comes from the waste lube oil. The consumption of lubricating oil using a stitch bonding machine (150 L/30 years) as a proxy. Transport for supporting material is also included in this dataset.

## Reference product
- sewing, footwear // sewing // glo, elementary: 1

## Impact indicators
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
## Deviations from the LCI method principle
The background data uses:
- the \xe2\x80\x9cRecycled content cut-off\xe2\x80\x9d approach to allocate end-of-life by-products and secondary materials. This allocation is explained in the description of the recycled content system model (http://www.ecoinvent.org/database/system-models-in-ecoinvent-3/cut-off-system-model/allocation-cut-off-by-classification.html).
OR
- EF compliant data

## Deviations from the LCI method approaches
Background data:
- the \xe2\x80\x9cRecycled content cut-off\xe2\x80\x9d approach to allocate end-of-life by-products and secondary materials. This allocation is explained in the description of the recycled content system model (http://www.ecoinvent.org/database/system-models-in-ecoinvent-3/cut-off-system-model/allocation-cut-off-by-classification.html). The ecoinvent database mostly relies on “Allocation – market values” apart for few exceptions particularly in the energy sector. ecoinvent energy data is replaced with EF3.0 core data as per the EF guidelines version 2.0.
OR
- EF compliant data

## Modelling constants
All modelling constants follow the requirements listed in the Tender Specifications 070201/2020/SER/ENV.B1. Completeness: There are no intentional cut-offs in the inventory no matter how small their contribution to all the EF impact categories is. Eventual cut-offs are in compliance with the Guide for EF compliant data sets (JRC 2020), i.e. only if below the 3% cut-off rule. Water use: water use is modelled at country level using separate flows for water withdrawal, water release and water evaporation. Handling multi-functional processes: the following PEF multi- functionality decision hierarchy is applied for resolving all multi- functionality problems: (1) subdivision or system expansion; (2) allocation based on a relevant underlying physical relationship (substitution may apply here); (3) allocation based on some other relationship. Direct land use change: GHG emissions from direct LUC allocated to good/service for 20 years after the LUC occurs, with IPCC default values. Carbon storage and delayed emissions: credits associated with temporary (carbon) storage or delayed emissions up to 300 years are not be considered. Emissions off-setting: are not included. Capital goods (including infrastructures) and their End of life: they are included. System boundaries: system boundaries include all processes linked to the product supply chain (e.g. maintenance). Time period: emissions and removals are modelled as if released or removed at the beginning of the assessment method. Fossil and biogenic carbon emissions and removals: removals and emissions are modelled as follows: All GHG emissions from fossil fuels (including peat and limestone) are modelled consistently with the most updated ILCD list of elementary flows. The non-fossil (biogenic) carbon flows are modelled consistently with the most updated ILCD list of elementary flows.

## Cut-off and completeness
There are no intentional cut-offs in the inventory no matter how small their contribution to all the EF impact categories is. Eventual cut-offs are in compliance with the Guide for EF compliant data sets (JRC 2020), i.e. only if below the 3% cut-off rule. The dataset dry mass and water balance has been checked to ensure the inventory is complete. Capital goods (e.g. infrastructure) and their end-of-life are included.

## Data selection and combination
These datasets include, in both their foreground and background data, links to EF3.0 compliant data.
The relevant background data on energy, transport, and End of Life are from the LCDN data node (http://lcdn.thinkstep.com/Node/).
All other background data in the supply of this product for which no EF3.0 process was available are from ecoinvent v3.7 database (www.ecoinvent.org) or other data sources.

## Data treatment and extrapolations
Several data sources have been used to model the inventory.

## Use advice
This data set is a supporting sub-data set and must be used exclusively as sub-data set of its corresponding level-1 partly disaggregated data set (see “General comment” field for exact name and UUID).

## Data sources
- Background Data for Representative products and organisations. EF 3.0 compliant (data stock)
- Quantis Data (2021) for stitching
- Cotex (2021) Stitch Bonding Machine, Catalog and Company Email, Suzhou Cotex International Co., Ltd., China.
- UN Data (2018) Statistics Data for Lubricants Productions, http://data.un.org/Data.aspx?q=Lubricants&d=EDATA&f=cmID%3aLU, United Nations Statistics Division, Global.
- SVIT (2021), 03028P15 Sole Stitching Machine, http://www.svitmachinery.com/03028P15_eng.php, SVIT Machinery Company s r.o. (Ltd.), Czech
- NAT Hellas (2021), Blake sewing machine Falan F500 https://www.nathellas.com/katalog.php?t=kshow&cat=Machines&id=BLAKE-SEWING-MACHINE, NAT Hellas.co, Italy
- Jing Neng (2021), JN-4400 Single Needle Flat Bed Compound Feed Heavy Duty Shoes, Handbags, Leather sewing machine http://www.jingnengsew.cn/product/269753670-807329346/Single_Needle_Flat_Bed_Compound_Feed_Heavy_Duty_Shoes_Handbags_Leather_Sewing_Machine.html?spm=a2700.shop_plser.41413.13.67cb7a5cK1lRYs, Dongguan Jingneng Machinery Technology Co., Ltd., Guangdong, China
- James V. (2021) Life Expectancy: How Long Will My Sewing Machine Last?, https://sewingiscool.com/life-expectancy-how-long-will-my-sewing-machine-last/, Sewing is Cool

## Intended applications
Implementation of regular Product Environmental Footprint (PEF) studies and Organisation Environmental Footprint (OEF) studies exclusively under the specified Product groups and sectors as defined in the Product Environmental Footprint Category Rules (PEFCR) and Organisation Environmental Footprint Sectorial Rules (OEFSR) listed in http://ec.europa.eu/environment/eussd/smgp/PEFCR_OEFSR.htm
