# construction seine nets (including beach seines and boat, scottish/danish seines); surrounding net at beach, Scottish and anchor net; production mix, at plant; Construction of a 1000 m long and 150 m deep seine net, with total mass of 23.6 tonnes.

Dataset: ILCD process, Partly terminated system
Geography: EU+EFTA+UK
Reference year: 2021
Valid until: 2024
Classification: Systems / Other systems
LCI method principle: Attributional
LCI method approaches: Allocation - market value
Completeness: All relevant flows quantified
Project: Provision of process-based 3.0 Environmental Footprint-compliant life cycle inventory datasets - Others - contract number 070201/2020/840235/SER/ENV.B.1
Generated by: The Green House
Owner: PRé Sustainability B.V.
Compliance: ILCD Data Network - Entry-level; Suggestions for updating the PEF method 2019; ISO 14040 Environmental Management – Life Cycle Assessment – Principles and Framework, 2006; ISO 14044:2006. Environmental Management – Life Cycle Assessment – Requirements and guidelines.; Environmental Footprint 3.1
Review: Dependent internal review by Avraam Symeonidis, Emilia Moreno Ruiz; Independent review panel by Angel Avadi
Data quality: Overall quality: Good; Time representativeness: Very good; Geographical representativeness: Good; Technological representativeness: Good; Precision: Good; Methodological appropriateness and consistency: Not applicable
Amounts: no units in this file; such an amount is in the reference unit of its flow, which a separate flow dataset defines
copyright: true
licenseType: Free of charge for some user types or use types
accessRestrictions: Free of charge for all final users implementing a regular Product Environmental Footprint (PEF) studies and Organisation Environmental Footprint (OEF) studies exclusively under the specified Product groups and sectors as defined in the Product Environmental Footprint Category Rules (PEFCR) and Organisation Environmental Footprint Sectorial Rules (OEFSR) listed in http://ec.europa.eu/environment/eussd/smgp/PEFCR_OEFSR.htm and in accordance with the terms and conditions of the EULA (available at https://ecoinvent.lca-data.com/) exclusively until 31st December 2024. Any use of this dataset or any derivative data not within the specific context of one of the PEF/OEF projects or after the end of 2024 is not permitted.

## General comment
Notice: this data set supersedes the EF3.0-compliant version (see link under "preceding data set version" below calculated with the EF3.0). The life cycle inventory is not changed from the original EF3.0 data set. The LCIA results are calculated based on the EF3.1 methods which provide updated characterisation factors in the following impact categories: Climate Change, Ecotoxicity freshwater, Photochemical Ozone Formation, Acidification, Human Toxicity non-cancer, and Human Toxicity cancer. The review report and the data quality ratings refer to the original results. The data set has been updated by the European Commission on the basis of the original EF3.0 data set delivered by the data provider.The dataset models one seine net, which is 1,000 m long and 150 m deep, with a total mass of 23.6 tonnes.Seine nets came in various forms, such as beach and Scottish seines. Beach seines use a large net to surrounding an entire school of fish close to a beach with a weighted net. Sottish and anchor seines utilise large nets that are set befofre being drawn towards a stationary boat to capture fish.

## Technology and included processes
The dataset is based on general materials of construction, as well as the quantity of material per square meter of net from the Agribalyse database. References: Agribalyse (2021) Agribalyse 3.0 database; MSC (2021) Fishing methods and gear types. Marine Stewardship Council (MSC). Available at: https://www.msc.org/what-we-are-doing/our-approach/fishing-methods-and-gear-types; Seafish (2021) Fishing gear database. Available at: https://www.seafish.org/responsible-sourcing/fishing-gear-database/; M. P Remesan, Renjith, R.K., 2017. Design and Operation of Trawls, in: Recent Trends in Harvest and Post-Harvest Technologies in Fisheries. Central Institute of Fisheries Technology, Kochi, India.

## Parameters
- kg_0: 8.37353
  Mass in kg, for lead; Transoceanic ship, containers; GLO
- km_0: 166453
  Distance in km, for lead; Transoceanic ship, containers; GLO
- kg_km_0: 1.3938e6; = kg_0*km_0
  Transport amount in km*km, for lead; Transoceanic ship, containers; GLO
- kg_1: 8.37353
  Mass in kg, for lead; Freight train, diesel traction; EU+EFTA+UK
- km_1: 117178
  Distance in km, for lead; Freight train, diesel traction; EU+EFTA+UK
- kg_km_1: 981192; = kg_1*km_1
  Transport amount in km*km, for lead; Freight train, diesel traction; EU+EFTA+UK
- kg_2: 8.37353
  Mass in kg, for lead; Freight train, electricity traction; EU+EFTA+UK
- km_2: 39859.1
  Distance in km, for lead; Freight train, electricity traction; EU+EFTA+UK
- kg_km_2: 333761; = kg_2*km_2
  Transport amount in km*km, for lead; Freight train, electricity traction; EU+EFTA+UK
- kg_3: 8.37353
  Mass in kg, for lead; Freight train, average; EU+EFTA+UK
- km_3: 940.095
  Distance in km, for lead; Freight train, average; EU+EFTA+UK
- kg_km_3: 7871.92; = kg_3*km_3
  Transport amount in km*km, for lead; Freight train, average; EU+EFTA+UK
- kg_4: 8.37353
  Mass in kg, for lead; Barge; EU+EFTA+UK
- km_4: 5467.4
  Distance in km, for lead; Barge; EU+EFTA+UK
- kg_km_4: 45781.4; = kg_4*km_4
  Transport amount in km*km, for lead; Barge; EU+EFTA+UK
- kg_5: 8.37353
  Mass in kg, for lead; Barge; ROW w/o EU+EFTA
- km_5: 11164.2
  Distance in km, for lead; Barge; ROW w/o EU+EFTA
- kg_km_5: 93483.5; = kg_5*km_5
  Transport amount in km*km, for lead; Barge; ROW w/o EU+EFTA
- kg_6: 8.37353
  Mass in kg, for lead; Articulated lorry transport, Euro 4, Total weight >32 t; EU+EFTA+UK
- km_6: 45499.8
  Distance in km, for lead; Articulated lorry transport, Euro 4, Total weight >32 t; EU+EFTA+UK
- kg_km_6: 380994; = kg_6*km_6
  Transport amount in km*km, for lead; Articulated lorry transport, Euro 4, Total weight >32 t; EU+EFTA+UK
- kg_7: 8.37353
  Mass in kg, for lead; Articulated lorry transport, Total weight >32 t, mix Euro 0-5; ROW w/o EU+EFTA
- km_7: 120083
  Distance in km, for lead; Articulated lorry transport, Total weight >32 t, mix Euro 0-5; ROW w/o EU+EFTA
- kg_km_7: 1.00552e6; = kg_7*km_7
  Transport amount in km*km, for lead; Articulated lorry transport, Total weight >32 t, mix Euro 0-5; ROW w/o EU+EFTA
- kg_8: 1608.55
  Mass in kg, for ethylene-vinyl acetate (eva) // ethylene-vinyl acetate (eva) production // eu+efta+uk; Articulated lorry transport, Euro 4, Total weight >32 t; EU+EFTA+UK
- km_8: 130
  Distance in km, for ethylene-vinyl acetate (eva) // ethylene-vinyl acetate (eva) production // eu+efta+uk; Articulated lorry transport, Euro 4, Total weight >32 t; EU+EFTA+UK
- kg_km_8: 209112; = kg_8*km_8
  Transport amount in km*km, for ethylene-vinyl acetate (eva) // ethylene-vinyl acetate (eva) production // eu+efta+uk; Articulated lorry transport, Euro 4, Total weight >32 t; EU+EFTA+UK
- kg_9: 1397.14
  Mass in kg, for high density polyethylene, petrochemical // high density polyethylene (hdpe) production, fossil fuel-based // glo; Articulated lorry transport, Euro 4, Total weight >32 t; EU+EFTA+UK
- km_9: 130
  Distance in km, for high density polyethylene, petrochemical // high density polyethylene (hdpe) production, fossil fuel-based // glo; Articulated lorry transport, Euro 4, Total weight >32 t; EU+EFTA+UK
- kg_km_9: 181628; = kg_9*km_9
  Transport amount in km*km, for high density polyethylene, petrochemical // high density polyethylene (hdpe) production, fossil fuel-based // glo; Articulated lorry transport, Euro 4, Total weight >32 t; EU+EFTA+UK
- kg_10: 14116.9
  Mass in kg, for polyamide 6.6 // polyamide 6.6 production // eu+efta+uk; Articulated lorry transport, Euro 4, Total weight >32 t; EU+EFTA+UK
- km_10: 130
  Distance in km, for polyamide 6.6 // polyamide 6.6 production // eu+efta+uk; Articulated lorry transport, Euro 4, Total weight >32 t; EU+EFTA+UK
- kg_km_10: 1.8352e6; = kg_10*km_10
  Transport amount in km*km, for polyamide 6.6 // polyamide 6.6 production // eu+efta+uk; Articulated lorry transport, Euro 4, Total weight >32 t; EU+EFTA+UK
- kg_11: 3836.5
  Mass in kg, for waste (unspecified) // landfill of inert (lead) // eu+efta+uk; Articulated lorry transport, Euro 4, Total weight >32 t; EU+EFTA+UK
- km_11: 77
  Distance in km, for waste (unspecified) // landfill of inert (lead) // eu+efta+uk; Articulated lorry transport, Euro 4, Total weight >32 t; EU+EFTA+UK
- kg_km_11: 295411; = kg_11*km_11
  Transport amount in km*km, for waste (unspecified) // landfill of inert (lead) // eu+efta+uk; Articulated lorry transport, Euro 4, Total weight >32 t; EU+EFTA+UK
- kg_12: 2667.44
  Mass in kg, for waste (unspecified) // landfill of inert (steel) // eu+efta+uk; Articulated lorry transport, Euro 4, Total weight >32 t; EU+EFTA+UK
- km_12: 77
  Distance in km, for waste (unspecified) // landfill of inert (steel) // eu+efta+uk; Articulated lorry transport, Euro 4, Total weight >32 t; EU+EFTA+UK
- kg_km_12: 205393; = kg_12*km_12
  Transport amount in km*km, for waste (unspecified) // landfill of inert (steel) // eu+efta+uk; Articulated lorry transport, Euro 4, Total weight >32 t; EU+EFTA+UK
- kg_13: 17122.6
  Mass in kg, for waste (unspecified) // landfill of inert material (other materials) // eu+efta+uk; Articulated lorry transport, Euro 4, Total weight >32 t; EU+EFTA+UK
- km_13: 77
  Distance in km, for waste (unspecified) // landfill of inert material (other materials) // eu+efta+uk; Articulated lorry transport, Euro 4, Total weight >32 t; EU+EFTA+UK
- kg_km_13: 1.31844e6; = kg_13*km_13
  Transport amount in km*km, for waste (unspecified) // landfill of inert material (other materials) // eu+efta+uk; Articulated lorry transport, Euro 4, Total weight >32 t; EU+EFTA+UK
- kg_14: 1608.55
  Mass in kg, for ethylene-vinyl acetate (eva) // ethylene-vinyl acetate (eva) production // eu+efta+uk; Barge; EU+EFTA+UK
- km_14: 270
  Distance in km, for ethylene-vinyl acetate (eva) // ethylene-vinyl acetate (eva) production // eu+efta+uk; Barge; EU+EFTA+UK
- kg_km_14: 434309; = kg_14*km_14
  Transport amount in km*km, for ethylene-vinyl acetate (eva) // ethylene-vinyl acetate (eva) production // eu+efta+uk; Barge; EU+EFTA+UK
- kg_15: 1397.14
  Mass in kg, for high density polyethylene, petrochemical // high density polyethylene (hdpe) production, fossil fuel-based // glo; Barge; EU+EFTA+UK
- km_15: 270
  Distance in km, for high density polyethylene, petrochemical // high density polyethylene (hdpe) production, fossil fuel-based // glo; Barge; EU+EFTA+UK
- kg_km_15: 377228; = kg_15*km_15
  Transport amount in km*km, for high density polyethylene, petrochemical // high density polyethylene (hdpe) production, fossil fuel-based // glo; Barge; EU+EFTA+UK
- kg_16: 14116.9
  Mass in kg, for polyamide 6.6 // polyamide 6.6 production // eu+efta+uk; Barge; EU+EFTA+UK
- km_16: 270
  Distance in km, for polyamide 6.6 // polyamide 6.6 production // eu+efta+uk; Barge; EU+EFTA+UK
- kg_km_16: 3.81157e6; = kg_16*km_16
  Transport amount in km*km, for polyamide 6.6 // polyamide 6.6 production // eu+efta+uk; Barge; EU+EFTA+UK
- kg_17: 1608.55
  Mass in kg, for ethylene-vinyl acetate (eva) // ethylene-vinyl acetate (eva) production // eu+efta+uk; Freight train, average; EU+EFTA+UK
- km_17: 240
  Distance in km, for ethylene-vinyl acetate (eva) // ethylene-vinyl acetate (eva) production // eu+efta+uk; Freight train, average; EU+EFTA+UK
- kg_km_17: 386052; = kg_17*km_17
  Transport amount in km*km, for ethylene-vinyl acetate (eva) // ethylene-vinyl acetate (eva) production // eu+efta+uk; Freight train, average; EU+EFTA+UK
- kg_18: 1397.14
  Mass in kg, for high density polyethylene, petrochemical // high density polyethylene (hdpe) production, fossil fuel-based // glo; Freight train, average; EU+EFTA+UK
- km_18: 240
  Distance in km, for high density polyethylene, petrochemical // high density polyethylene (hdpe) production, fossil fuel-based // glo; Freight train, average; EU+EFTA+UK
- kg_km_18: 335313; = kg_18*km_18
  Transport amount in km*km, for high density polyethylene, petrochemical // high density polyethylene (hdpe) production, fossil fuel-based // glo; Freight train, average; EU+EFTA+UK
- kg_19: 14116.9
  Mass in kg, for polyamide 6.6 // polyamide 6.6 production // eu+efta+uk; Freight train, average; EU+EFTA+UK
- km_19: 240
  Distance in km, for polyamide 6.6 // polyamide 6.6 production // eu+efta+uk; Freight train, average; EU+EFTA+UK
- kg_km_19: 3.38806e6; = kg_19*km_19
  Transport amount in km*km, for polyamide 6.6 // polyamide 6.6 production // eu+efta+uk; Freight train, average; EU+EFTA+UK

## Reference product
- construction seine nets (including beach seines and boat, scottish/danish seines) // construction seine nets (including beach seines and boat, scottish/danish seines) // eu+efta+uk: 1

## Inputs
- Transport of lead by Transoceanic ship, containers - GLO: 1.3938e6; = kg_km_0
- Transport of lead by Freight train, diesel traction - EU+EFTA+UK: 981192; = kg_km_1
- Transport of lead by Freight train, electricity traction - EU+EFTA+UK: 333761; = kg_km_2
- Transport of lead by Freight train, average - EU+EFTA+UK: 7871.92; = kg_km_3
- Transport of lead by Barge - EU+EFTA+UK: 45781.4; = kg_km_4
- Transport of lead by Barge - ROW w/o EU+EFTA: 93483.5; = kg_km_5
- Transport of lead by Articulated lorry transport, Euro 4, Total weight >32 t - EU+EFTA+UK: 380994; = kg_km_6
- Transport of lead by Articulated lorry transport, Total weight >32 t, mix Euro 0-5 - ROW w/o EU+EFTA: 1.00552e6; = kg_km_7
- Transport of ethylene-vinyl acetate (eva) // ethylene-vinyl acetate (eva) production // eu+efta+uk by Articulated lorry transport, Euro 4, Total weight >32 t - EU+EFTA+UK: 209112; = kg_km_8
- Transport of high density polyethylene, petrochemical // high density polyethylene (hdpe) production, fossil fuel-based // glo by Articulated lorry transport, Euro 4, Total weight >32 t - EU+EFTA+UK: 181628; = kg_km_9
- Transport of polyamide 6.6 // polyamide 6.6 production // eu+efta+uk by Articulated lorry transport, Euro 4, Total weight >32 t - EU+EFTA+UK: 1.8352e6; = kg_km_10
- Transport of waste (unspecified) // landfill of inert (lead) // eu+efta+uk by Articulated lorry transport, Euro 4, Total weight >32 t - EU+EFTA+UK: 295411; = kg_km_11
- Transport of waste (unspecified) // landfill of inert (steel) // eu+efta+uk by Articulated lorry transport, Euro 4, Total weight >32 t - EU+EFTA+UK: 205393; = kg_km_12
- Transport of waste (unspecified) // landfill of inert material (other materials) // eu+efta+uk by Articulated lorry transport, Euro 4, Total weight >32 t - EU+EFTA+UK: 1.31844e6; = kg_km_13
- Transport of ethylene-vinyl acetate (eva) // ethylene-vinyl acetate (eva) production // eu+efta+uk by Barge - EU+EFTA+UK: 434309; = kg_km_14
- Transport of high density polyethylene, petrochemical // high density polyethylene (hdpe) production, fossil fuel-based // glo by Barge - EU+EFTA+UK: 377228; = kg_km_15
- Transport of polyamide 6.6 // polyamide 6.6 production // eu+efta+uk by Barge - EU+EFTA+UK: 3.81157e6; = kg_km_16
- Transport of ethylene-vinyl acetate (eva) // ethylene-vinyl acetate (eva) production // eu+efta+uk by Freight train, average - EU+EFTA+UK: 386052; = kg_km_17
- Transport of high density polyethylene, petrochemical // high density polyethylene (hdpe) production, fossil fuel-based // glo by Freight train, average - EU+EFTA+UK: 335313; = kg_km_18
- Transport of polyamide 6.6 // polyamide 6.6 production // eu+efta+uk by Freight train, average - EU+EFTA+UK: 3.38806e6; = kg_km_19
- construction seine nets (including beach seines and boat, scottish/danish seines) // construction seine nets (including beach seines and boat, scottish/danish seines) // eu+efta+uk, blackbox: 1
- construction seine nets (including beach seines and boat, scottish/danish seines) // construction seine nets (including beach seines and boat, scottish/danish seines) // eu+efta+uk, elementary: 1

## Impact indicators
- Eutrophication marine: 136.362
- Ecotoxicity, freshwater: 1.85656e6
- Land use: 379651
- Water use: 63624.4
- Resource use, minerals and metals: 6.58706
- Resource use, fossils: 2.2099e6
- Climate change: 189629
- Ozone depletion: 0.00091397
- Human toxicity, cancer: 0.000175975
- Human toxicity, non-cancer: 0.00358844
- EF-particulate Matter: 0.00961913
- Ionising radiation, human health: 10517.2
- Photochemical ozone formation - human health: 378.142
- Acidification: 657.518
- Eutrophication, terrestrial: 1294.85
- Eutrophication, freshwater: 10.124

## Deviations from the LCI method principle
The background data use the \xe2\x80\x9cRecycled content cut-off\xe2\x80\x9d approach to allocate end-of-life by-products and secondary materials. This allocation is explained in the description of the recycled content system model (http://www.ecoinvent.org/database/system-models-in-ecoinvent-3/cut-off-system-model/allocation-cut-off-by-classification.html).

## Deviations from the LCI method approaches
Background data:
- the \xe2\x80\x9cRecycled content cut-off\xe2\x80\x9d approach to allocate end-of-life by-products and secondary materials. This allocation is explained in the description of the recycled content system model (http://www.ecoinvent.org/database/system-models-in-ecoinvent-3/cut-off-system-model/allocation-cut-off-by-classification.html). The ecoinvent database mostly relies on “Allocation – market values” apart for few exceptions particularly in the energy sector. ecoinvent energy data is replaced with EF3.0 core data as per the EF guidelines version 2.0.
OR
- EF compliant data

## Modelling constants
All modelling constants follow the requirements listed in the Tender Specifications ENV.B.1/SER/2016/0038vl. Completeness: All known environmental flows are included. All known resource uses and emissions are listed in the inventory. Water use: water use is modelled at country level using separate flows for water withdrawal, water release and water evaporation. Cut-off: All known environmental flows are included. All known resource uses and emissions are listed in the inventory. Handling multi-functional processes: the following PEF multi- functionality decision hierarchy is applied for resolving all multi- functionality problems: (1) subdivision or system expansion; (2) allocation based on a relevant underlying physical relationship (substitution may apply here); (3) allocation based on some other relationship. Direct land use change: GHG emissions from direct LUC allocated to good/service for 20 years after the LUC occurs, with IPCC default values. Carbon storage and delayed emissions: credits associated with temporary (carbon) storage or delayed emissions up to 300 years are not be considered. Emissions off-setting: are not included. Capital goods (including infrastructures) and their End of life: they are included. System boundaries: system boundaries include all processes linked to the product supply chain (e.g. maintenance). Time period: emissions and removals are modelled as if released or removed at the beginning of the assessment method. Fossil and biogenic carbon emissions and removals: removals and emissions are modelled as follows: All GHG emissions from fossil fuels (including peat and limestone) are modelled consistently with the most updated ILCD list of elementary flows. The non-fossil (biogenic) carbon flows are modelled consistently with the most updated ILCD list of elementary flows.

## Cut-off and completeness
All known environmental flows are included. All known resource uses and emissions are listed in the inventory. The dataset dry mass balance has been checked to ensure the inventory is complete. Capital goods (e.g. infrastructure) and their end-of-life are included.

## Data selection and combination
These datasets include, in both their foreground and background data, links to EF3.0 compliant data.
The relevant background data on energy, transport, and End of Life are from the LCDN data node (http://lcdn.thinkstep.com/Node/).
All other background data in the supply of this product for which no EF3.0 process was available are from ecoinvent v3.7 database (www.ecoinvent.org) or other data sources.

## Data treatment and extrapolations
Several data sources have been used to model the inventory.

## Review details
Internal reviews have been asked to review the plausibility of the unit process, LCIA scores, and DQRs. Internal reviewers have also been asked to review the data for EF compliancy. The consortium is therefore responsible for aspects such as compliancy with the ILCD format, including validation in Look@LCI, and nomenclature.
Internal reviwers have been asked to judge based on the process name, that the unit process models in a complete and representative way the process in the requested location. The review encompassed the plausability of:
- exchanges with nature (elementary flows) as well as exchanges such as product and waste flows.
- meta information (general comment, technology comment, system boundaries, allocation, cut-off rules, etc.). Reviewers were asked to judge if the provided information is enough to understand the content of the process.
- LCIA scores
- DQRs including precision, technology, time and geography. As well as the overall DQR.
External reviewers have been asked to provide their expertise in the field of interest. External reviewers have been asked to review the unit process, including eventual methodological choices, the LCIA scores (provided with contribution scores as well), and DQRs. External reviewers have been provided all the information in a tool developed by the consortium for the purpose of this project.
External reviewers have been asked to judge based on the process name, that the unit process models in a complete and representative way the process in the requested location. The review encompassed:
- Plausability and completeness of exchanges with nature (elementary flows) as well as exchanges such as product and waste flows.
- Review of meta information (general comment, technology comment, system boundaries, allocation, cut-off rules, etc.). Reviewers were asked to judge if the provided information is enough to understand the content of the process.
- Review of properties (biogenic carbon and water content).
- Review of allocation keys.
- Plausability of LCIA scores calculated by the consortium.
- Plausability of DQRs including precision, technology, time and geography. As well as the overall DQR.

## Data sources
- Background Data for Representative products and organisations. EF 3.0 compliant (data stock)
- Agribalyse (2021) Agribalyse 3.0 database
- MSC (2021) Fishing methods and gear types. Marine Stewardship Council (MSC). Available at: https://www.msc.org/what-we-are-doing/our-approach/fishing-methods-and-gear-types
- Seafish (2021) Fishing gear database. Available at: https://www.seafish.org/responsible-sourcing/fishing-gear-database/
- M. P Remesan, Renjith, R.K., 2017. Design and Operation of Trawls, in: Recent Trends in Harvest and Post-Harvest Technologies in Fisheries. Central Institute of Fisheries Technology, Kochi, India.

## Intended applications
Implementation of regular Product Environmental Footprint (PEF) studies and Organisation Environmental Footprint (OEF) studies exclusively under the specified Product groups and sectors as defined in the Product Environmental Footprint Category Rules (PEFCR) and Organisation Environmental Footprint Sectorial Rules (OEFSR) listed in http://ec.europa.eu/environment/eussd/smgp/PEFCR_OEFSR.htm
