# washing, stone; technology mix; production mix, at plant; service

Dataset: ILCD process, Partly terminated system
Geography: GLO
Reference year: 2019
Valid until: 2024
Classification: Systems / Textiles, furnitures and other interiors
LCI method principle: Attributional
LCI method approaches: Allocation - market value
Completeness: All relevant flows quantified
Project: Provision of process-based 3.0 Environmental Footprint-compliant life cycle inventory datasets - Apparel 2 - contract number 070201/2020/840292/SER/ENV.B.1
Generated by: Life Cycle Indonesia
Owner: PRé Sustainability B.V.
Compliance: ILCD Data Network - Entry-level; Suggestions for updating the PEF method 2019; ISO 14040 Environmental Management – Life Cycle Assessment – Principles and Framework, 2006; ISO 14044:2006. Environmental Management – Life Cycle Assessment – Requirements and guidelines.; Environmental Footprint 3.1
Review: Dependent internal review by Avraam Symeonidis, Emilia Moreno Ruiz; Independent review panel by Fábio Valebona
Data quality: Overall quality: Good; Time representativeness: Very good; Geographical representativeness: Good; Technological representativeness: Good; Precision: Good; Methodological appropriateness and consistency: Not applicable
Amounts: no units in this file; such an amount is in the reference unit of its flow, which a separate flow dataset defines
copyright: true
licenseType: Free of charge for some user types or use types
accessRestrictions: Free of charge for all final users implementing a regular Product Environmental Footprint (PEF) studies and Organisation Environmental Footprint (OEF) studies exclusively under the specified Product groups and sectors as defined in the Product Environmental Footprint Category Rules (PEFCR) and Organisation Environmental Footprint Sectorial Rules (OEFSR) listed in http://ec.europa.eu/environment/eussd/smgp/PEFCR_OEFSR.htm and in accordance with the terms and conditions of the EULA (available at https://ecoinvent.lca-data.com/) exclusively until 31st December 2024. Any use of this dataset or any derivative data not within the specific context of one of the PEF/OEF projects or after the end of 2024 is not permitted.

## General comment
Notice: this data set supersedes the EF3.0-compliant version (see link under "preceding data set version" below calculated with the EF3.0). The life cycle inventory is not changed from the original EF3.0 data set. The LCIA results are calculated based on the EF3.1 methods which provide updated characterisation factors in the following impact categories: Climate Change, Ecotoxicity freshwater, Photochemical Ozone Formation, Acidification, Human Toxicity non-cancer, and Human Toxicity cancer. The review report and the data quality ratings refer to the original results. The data set has been updated by the European Commission on the basis of the original EF3.0 data set delivered by the data provider.Industrial garment wash processes main focus is to remove starch, dust and dirt from the garments. There are several type of washing methods, can be classified to mechanical and chemical washing. Stone washing is one of the mechanical washing methods. It is usually used in denim goods. Stonewashed denims would have a lightly distressed, vintage look. Pumice is one of the important components of stonewashed apparel. It is used to abrade the surface of the fabric to obtain a surface pattern effect with colour contrast and softer hand.
Aside from pumice stone, synthethics stones have been developed to subtitute pumice stone such as silicate, plastic, rubber, or Portland cement. Perlite, naturally occuring silicon rock, is aslo an option. The heated form of perlite does the same function as pumices stones during stone washing (Choudhury, 2017).

Choudhury, Asim Kumar Roy. 2017. Principle of textile finishing. United Kingdom: Elsevier. pp 383-395

## Technology and included processes
The stone-to-fabric weight ratio for stone washing varies from 0.5 - 3 : 1, depends on the degree of abrasion needed to achieved the desired result. The stones can be reused until they completely diistegrate or wash down the drain. The subtitute of pumice stone expected to have a higher durability, can be reused from 50 - 300 cycles. Therefore, the durability of pumice stone assumed to be maximum reused for 50 cycles. The cycles can last up 30-90 minutes, depending upan the deisred effect. the liquor ratio for water used in stone washing process is 5-8 :1. Scouring additives is not used in this model. after washing, the fabric need to washed/rinsed several times to get rid of the disintegrated stones (Choudhury, 2017).

In this model, the desizing process precedent to the process is not covered. The model covered stone washing and rinsing process. There are several stones used in the process and they are equally proportioned.

The activity starts when the raw materials enter the process. Materials entering the process are included as well as energy uses and infrastructure. There is no direct emission to air since the emission comes from electricity usage, while the emission to water comes from wastewater and waste lube oil. The amount of wastewater assumed same as water input, no water uptakes from wet fabrics input. The disintegrated stone and wasted fiber is considered as non hazardous waste and transported to landfill. The waste is aprroximated by the amount of microfiber generated from household laundry. In the model, the finishng process is not included in the scope of this dataset and enegy sources of machines used solely from electricity.

Choudhury, Asim Kumar Roy. 2017. Principle of textile finishing. United Kingdom: Elsevier. pp 383-395

## Parameters
- kg_0: 0.0025
  Mass in kg, for cement, Portland; Freight train, diesel traction; EU+EFTA+UK
- km_0: 17.425
  Distance in km, for cement, Portland; Freight train, diesel traction; EU+EFTA+UK
- kg_km_0: 0.0435625; = kg_0*km_0
  Transport amount in km*km, for cement, Portland; Freight train, diesel traction; EU+EFTA+UK
- kg_1: 0.0025
  Mass in kg, for cement, Portland; Freight train, electricity traction; EU+EFTA+UK
- km_1: 7.175
  Distance in km, for cement, Portland; Freight train, electricity traction; EU+EFTA+UK
- kg_km_1: 0.0179375; = kg_1*km_1
  Transport amount in km*km, for cement, Portland; Freight train, electricity traction; EU+EFTA+UK
- kg_2: 0.0025
  Mass in kg, for cement, Portland; Freight train, average; EU+EFTA+UK
- km_2: 0.4
  Distance in km, for cement, Portland; Freight train, average; EU+EFTA+UK
- kg_km_2: 0.001; = kg_2*km_2
  Transport amount in km*km, for cement, Portland; Freight train, average; EU+EFTA+UK
- kg_3: 0.0025
  Mass in kg, for cement, Portland; Articulated lorry transport, Total weight <7.5 t, mix Euro 0-5; EU+EFTA+UK
- km_3: 0.135413
  Distance in km, for cement, Portland; Articulated lorry transport, Total weight <7.5 t, mix Euro 0-5; EU+EFTA+UK
- kg_km_3: 0.000338531; = kg_3*km_3
  Transport amount in km*km, for cement, Portland; Articulated lorry transport, Total weight <7.5 t, mix Euro 0-5; EU+EFTA+UK
- kg_4: 0.0025
  Mass in kg, for cement, Portland; Articulated lorry transport, Total weight >32 t, mix Euro 0-5; ROW w/o EU+EFTA
- km_4: 106.9
  Distance in km, for cement, Portland; Articulated lorry transport, Total weight >32 t, mix Euro 0-5; ROW w/o EU+EFTA
- kg_km_4: 0.26725; = kg_4*km_4
  Transport amount in km*km, for cement, Portland; Articulated lorry transport, Total weight >32 t, mix Euro 0-5; ROW w/o EU+EFTA
- kg_5: 0.000151287
  Mass in kg, for perlite; Transoceanic ship, bulk; GLO
- km_5: 22308.7
  Distance in km, for perlite; Transoceanic ship, bulk; GLO
- kg_km_5: 3.375; = kg_5*km_5
  Transport amount in km*km, for perlite; Transoceanic ship, bulk; GLO
- kg_6: 0.000151287
  Mass in kg, for perlite; Freight train, diesel traction; EU+EFTA+UK
- km_6: 6128.6
  Distance in km, for perlite; Freight train, diesel traction; EU+EFTA+UK
- kg_km_6: 0.927175; = kg_6*km_6
  Transport amount in km*km, for perlite; Freight train, diesel traction; EU+EFTA+UK
- kg_7: 0.000151287
  Mass in kg, for perlite; Freight train, electricity traction; EU+EFTA+UK
- km_7: 2084.7
  Distance in km, for perlite; Freight train, electricity traction; EU+EFTA+UK
- kg_km_7: 0.315387; = kg_7*km_7
  Transport amount in km*km, for perlite; Freight train, electricity traction; EU+EFTA+UK
- kg_8: 0.000151287
  Mass in kg, for perlite; Freight train, average; EU+EFTA+UK
- km_8: 49.1686
  Distance in km, for perlite; Freight train, average; EU+EFTA+UK
- kg_km_8: 0.00743855; = kg_8*km_8
  Transport amount in km*km, for perlite; Freight train, average; EU+EFTA+UK
- kg_9: 0.000151287
  Mass in kg, for perlite; Articulated lorry transport, Euro 4, Total weight >32 t; EU+EFTA+UK
- km_9: 190.715
  Distance in km, for perlite; Articulated lorry transport, Euro 4, Total weight >32 t; EU+EFTA+UK
- kg_km_9: 0.0288526; = kg_9*km_9
  Transport amount in km*km, for perlite; Articulated lorry transport, Euro 4, Total weight >32 t; EU+EFTA+UK
- kg_10: 0.000151287
  Mass in kg, for perlite; Articulated lorry transport, Total weight >32 t, mix Euro 0-5; ROW w/o EU+EFTA
- km_10: 503.333
  Distance in km, for perlite; Articulated lorry transport, Total weight >32 t, mix Euro 0-5; ROW w/o EU+EFTA
- kg_km_10: 0.0761474; = kg_10*km_10
  Transport amount in km*km, for perlite; Articulated lorry transport, Total weight >32 t, mix Euro 0-5; ROW w/o EU+EFTA
- kg_11: 0.00882505
  Mass in kg, for pumice; Transoceanic ship, bulk; GLO
- km_11: 1201.36
  Distance in km, for pumice; Transoceanic ship, bulk; GLO
- kg_km_11: 10.6021; = kg_11*km_11
  Transport amount in km*km, for pumice; Transoceanic ship, bulk; GLO
- kg_12: 0.00882505
  Mass in kg, for pumice; Freight train, diesel traction; EU+EFTA+UK
- km_12: 148.312
  Distance in km, for pumice; Freight train, diesel traction; EU+EFTA+UK
- kg_km_12: 1.30886; = kg_12*km_12
  Transport amount in km*km, for pumice; Freight train, diesel traction; EU+EFTA+UK
- kg_13: 0.00882505
  Mass in kg, for pumice; Freight train, electricity traction; EU+EFTA+UK
- km_13: 50.4497
  Distance in km, for pumice; Freight train, electricity traction; EU+EFTA+UK
- kg_km_13: 0.445221; = kg_13*km_13
  Transport amount in km*km, for pumice; Freight train, electricity traction; EU+EFTA+UK
- kg_14: 0.00882505
  Mass in kg, for pumice; Freight train, average; EU+EFTA+UK
- km_14: 1.18988
  Distance in km, for pumice; Freight train, average; EU+EFTA+UK
- kg_km_14: 0.0105007; = kg_14*km_14
  Transport amount in km*km, for pumice; Freight train, average; EU+EFTA+UK
- kg_15: 0.00882505
  Mass in kg, for pumice; Barge; EU+EFTA+UK
- km_15: 11.4079
  Distance in km, for pumice; Barge; EU+EFTA+UK
- kg_km_15: 0.100675; = kg_15*km_15
  Transport amount in km*km, for pumice; Barge; EU+EFTA+UK
- kg_16: 0.00882505
  Mass in kg, for pumice; Barge; ROW w/o EU+EFTA
- km_16: 23.2944
  Distance in km, for pumice; Barge; ROW w/o EU+EFTA
- kg_km_16: 0.205575; = kg_16*km_16
  Transport amount in km*km, for pumice; Barge; ROW w/o EU+EFTA
- kg_17: 0.00882505
  Mass in kg, for pumice; Articulated lorry transport, Total weight <7.5 t, mix Euro 0-5; EU+EFTA+UK
- km_17: 15.7098
  Distance in km, for pumice; Articulated lorry transport, Total weight <7.5 t, mix Euro 0-5; EU+EFTA+UK
- kg_km_17: 0.13864; = kg_17*km_17
  Transport amount in km*km, for pumice; Articulated lorry transport, Total weight <7.5 t, mix Euro 0-5; EU+EFTA+UK
- kg_18: 0.00882505
  Mass in kg, for pumice; Articulated lorry transport, Euro 4, Total weight >32 t; EU+EFTA+UK
- km_18: 146.669
  Distance in km, for pumice; Articulated lorry transport, Euro 4, Total weight >32 t; EU+EFTA+UK
- kg_km_18: 1.29436; = kg_18*km_18
  Transport amount in km*km, for pumice; Articulated lorry transport, Euro 4, Total weight >32 t; EU+EFTA+UK
- kg_19: 0.00882505
  Mass in kg, for pumice; Articulated lorry transport, Total weight >32 t, mix Euro 0-5; ROW w/o EU+EFTA
- km_19: 387.087
  Distance in km, for pumice; Articulated lorry transport, Total weight >32 t, mix Euro 0-5; ROW w/o EU+EFTA
- kg_km_19: 3.41606; = kg_19*km_19
  Transport amount in km*km, for pumice; Articulated lorry transport, Total weight >32 t, mix Euro 0-5; ROW w/o EU+EFTA
- kg_20: 0.00082437
  Mass in kg, for synthetic rubber; Transoceanic ship, containers; GLO
- km_20: 1591.52
  Distance in km, for synthetic rubber; Transoceanic ship, containers; GLO
- kg_km_20: 1.312; = kg_20*km_20
  Transport amount in km*km, for synthetic rubber; Transoceanic ship, containers; GLO
- kg_21: 0.00082437
  Mass in kg, for synthetic rubber; Freight train, diesel traction; EU+EFTA+UK
- km_21: 649.406
  Distance in km, for synthetic rubber; Freight train, diesel traction; EU+EFTA+UK
- kg_km_21: 0.535351; = kg_21*km_21
  Transport amount in km*km, for synthetic rubber; Freight train, diesel traction; EU+EFTA+UK
- kg_22: 0.00082437
  Mass in kg, for synthetic rubber; Freight train, electricity traction; EU+EFTA+UK
- km_22: 220.901
  Distance in km, for synthetic rubber; Freight train, electricity traction; EU+EFTA+UK
- kg_km_22: 0.182104; = kg_22*km_22
  Transport amount in km*km, for synthetic rubber; Freight train, electricity traction; EU+EFTA+UK
- kg_23: 0.00082437
  Mass in kg, for synthetic rubber; Freight train, average; EU+EFTA+UK
- km_23: 5.21006
  Distance in km, for synthetic rubber; Freight train, average; EU+EFTA+UK
- kg_km_23: 0.00429502; = kg_23*km_23
  Transport amount in km*km, for synthetic rubber; Freight train, average; EU+EFTA+UK
- kg_24: 0.00082437
  Mass in kg, for synthetic rubber; Articulated lorry transport, Euro 4, Total weight >32 t; EU+EFTA+UK
- km_24: 375.328
  Distance in km, for synthetic rubber; Articulated lorry transport, Euro 4, Total weight >32 t; EU+EFTA+UK
- kg_km_24: 0.309409; = kg_24*km_24
  Transport amount in km*km, for synthetic rubber; Articulated lorry transport, Euro 4, Total weight >32 t; EU+EFTA+UK
- kg_25: 0.00082437
  Mass in kg, for synthetic rubber; Articulated lorry transport, Total weight >32 t, mix Euro 0-5; ROW w/o EU+EFTA
- km_25: 990.564
  Distance in km, for synthetic rubber; Articulated lorry transport, Total weight >32 t, mix Euro 0-5; ROW w/o EU+EFTA
- kg_km_25: 0.816591; = kg_25*km_25
  Transport amount in km*km, for synthetic rubber; Articulated lorry transport, Total weight >32 t, mix Euro 0-5; ROW w/o EU+EFTA
- kg_26: 2.77861e-6
  Mass in kg, for lubricating oil // lubricants at refinery // eu+efta+uk; Articulated lorry transport, Euro 4, Total weight >32 t; EU+EFTA+UK
- km_26: 1000.5
  Distance in km, for lubricating oil // lubricants at refinery // eu+efta+uk; Articulated lorry transport, Euro 4, Total weight >32 t; EU+EFTA+UK
- kg_km_26: 0.00278; = kg_26*km_26
  Transport amount in km*km, for lubricating oil // lubricants at refinery // eu+efta+uk; Articulated lorry transport, Euro 4, Total weight >32 t; EU+EFTA+UK
- kg_27: 5.07397e-7
  Mass in kg, for lubricating oil // lubricants at refinery // rsa; Articulated lorry transport, Euro 4, Total weight >32 t; EU+EFTA+UK
- km_27: 1000
  Distance in km, for lubricating oil // lubricants at refinery // rsa; Articulated lorry transport, Euro 4, Total weight >32 t; EU+EFTA+UK
- kg_km_27: 0.000507397; = kg_27*km_27
  Transport amount in km*km, for lubricating oil // lubricants at refinery // rsa; Articulated lorry transport, Euro 4, Total weight >32 t; EU+EFTA+UK
- kg_28: 2.08163e-7
  Mass in kg, for lubricating oil // lubricants at refinery // raf; Articulated lorry transport, Euro 4, Total weight >32 t; EU+EFTA+UK
- km_28: 1000
  Distance in km, for lubricating oil // lubricants at refinery // raf; Articulated lorry transport, Euro 4, Total weight >32 t; EU+EFTA+UK
- kg_km_28: 0.000208163; = kg_28*km_28
  Transport amount in km*km, for lubricating oil // lubricants at refinery // raf; Articulated lorry transport, Euro 4, Total weight >32 t; EU+EFTA+UK
- kg_29: 5.45499e-6
  Mass in kg, for lubricating oil // lubricants at refinery // ras w/o cn; Articulated lorry transport, Euro 4, Total weight >32 t; EU+EFTA+UK
- km_29: 1000
  Distance in km, for lubricating oil // lubricants at refinery // ras w/o cn; Articulated lorry transport, Euro 4, Total weight >32 t; EU+EFTA+UK
- kg_km_29: 0.00545499; = kg_29*km_29
  Transport amount in km*km, for lubricating oil // lubricants at refinery // ras w/o cn; Articulated lorry transport, Euro 4, Total weight >32 t; EU+EFTA+UK
- kg_30: 4.51082e-6
  Mass in kg, for lubricating oil // lubricants at refinery // ru; Articulated lorry transport, Euro 4, Total weight >32 t; EU+EFTA+UK
- km_30: 1000
  Distance in km, for lubricating oil // lubricants at refinery // ru; Articulated lorry transport, Euro 4, Total weight >32 t; EU+EFTA+UK
- kg_km_30: 0.00451082; = kg_30*km_30
  Transport amount in km*km, for lubricating oil // lubricants at refinery // ru; Articulated lorry transport, Euro 4, Total weight >32 t; EU+EFTA+UK
- kg_31: 4.25805e-6
  Mass in kg, for lubricating oil // lubricants at refinery // rna; Articulated lorry transport, Euro 4, Total weight >32 t; EU+EFTA+UK
- km_31: 1000
  Distance in km, for lubricating oil // lubricants at refinery // rna; Articulated lorry transport, Euro 4, Total weight >32 t; EU+EFTA+UK
- kg_km_31: 0.00425805; = kg_31*km_31
  Transport amount in km*km, for lubricating oil // lubricants at refinery // rna; Articulated lorry transport, Euro 4, Total weight >32 t; EU+EFTA+UK
- kg_32: 8.66107e-7
  Mass in kg, for lubricating oil // lubricants at refinery // cn; Articulated lorry transport, Euro 4, Total weight >32 t; EU+EFTA+UK
- km_32: 1000
  Distance in km, for lubricating oil // lubricants at refinery // cn; Articulated lorry transport, Euro 4, Total weight >32 t; EU+EFTA+UK
- kg_km_32: 0.000866107; = kg_32*km_32
  Transport amount in km*km, for lubricating oil // lubricants at refinery // cn; Articulated lorry transport, Euro 4, Total weight >32 t; EU+EFTA+UK
- kg_33: 5.07397e-7
  Mass in kg, for lubricating oil // lubricants at refinery // rsa; Transoceanic ship, containers; GLO
- km_33: 18000
  Distance in km, for lubricating oil // lubricants at refinery // rsa; Transoceanic ship, containers; GLO
- kg_km_33: 0.00913315; = kg_33*km_33
  Transport amount in km*km, for lubricating oil // lubricants at refinery // rsa; Transoceanic ship, containers; GLO
- kg_34: 2.08163e-7
  Mass in kg, for lubricating oil // lubricants at refinery // raf; Transoceanic ship, containers; GLO
- km_34: 18000
  Distance in km, for lubricating oil // lubricants at refinery // raf; Transoceanic ship, containers; GLO
- kg_km_34: 0.00374694; = kg_34*km_34
  Transport amount in km*km, for lubricating oil // lubricants at refinery // raf; Transoceanic ship, containers; GLO
- kg_35: 2.77861e-6
  Mass in kg, for lubricating oil // lubricants at refinery // eu+efta+uk; Transoceanic ship, containers; GLO
- km_35: 17994.6
  Distance in km, for lubricating oil // lubricants at refinery // eu+efta+uk; Transoceanic ship, containers; GLO
- kg_km_35: 0.05; = kg_35*km_35
  Transport amount in km*km, for lubricating oil // lubricants at refinery // eu+efta+uk; Transoceanic ship, containers; GLO
- kg_36: 5.45499e-6
  Mass in kg, for lubricating oil // lubricants at refinery // ras w/o cn; Transoceanic ship, containers; GLO
- km_36: 18000
  Distance in km, for lubricating oil // lubricants at refinery // ras w/o cn; Transoceanic ship, containers; GLO
- kg_km_36: 0.0981898; = kg_36*km_36
  Transport amount in km*km, for lubricating oil // lubricants at refinery // ras w/o cn; Transoceanic ship, containers; GLO
- kg_37: 4.51082e-6
  Mass in kg, for lubricating oil // lubricants at refinery // ru; Transoceanic ship, containers; GLO
- km_37: 18000
  Distance in km, for lubricating oil // lubricants at refinery // ru; Transoceanic ship, containers; GLO
- kg_km_37: 0.0811947; = kg_37*km_37
  Transport amount in km*km, for lubricating oil // lubricants at refinery // ru; Transoceanic ship, containers; GLO
- kg_38: 4.25805e-6
  Mass in kg, for lubricating oil // lubricants at refinery // rna; Transoceanic ship, containers; GLO
- km_38: 18000
  Distance in km, for lubricating oil // lubricants at refinery // rna; Transoceanic ship, containers; GLO
- kg_km_38: 0.0766449; = kg_38*km_38
  Transport amount in km*km, for lubricating oil // lubricants at refinery // rna; Transoceanic ship, containers; GLO
- kg_39: 8.66107e-7
  Mass in kg, for lubricating oil // lubricants at refinery // cn; Transoceanic ship, containers; GLO
- km_39: 18000
  Distance in km, for lubricating oil // lubricants at refinery // cn; Transoceanic ship, containers; GLO
- kg_km_39: 0.0155899; = kg_39*km_39
  Transport amount in km*km, for lubricating oil // lubricants at refinery // cn; Transoceanic ship, containers; GLO
- kg_40: 0.000136779
  Mass in kg, for washing machine; Transoceanic ship, containers; GLO
- km_40: 737
  Distance in km, for washing machine; Transoceanic ship, containers; GLO
- kg_km_40: 0.100806; = kg_40*km_40
  Transport amount in km*km, for washing machine; Transoceanic ship, containers; GLO
- kg_41: 0.000136779
  Mass in kg, for washing machine; Freight train, diesel traction; EU+EFTA+UK
- km_41: 13.3513
  Distance in km, for washing machine; Freight train, diesel traction; EU+EFTA+UK
- kg_km_41: 0.00182618; = kg_41*km_41
  Transport amount in km*km, for washing machine; Freight train, diesel traction; EU+EFTA+UK
- kg_42: 0.000136779
  Mass in kg, for washing machine; Freight train, electricity traction; EU+EFTA+UK
- km_42: 4.54157
  Distance in km, for washing machine; Freight train, electricity traction; EU+EFTA+UK
- kg_km_42: 0.000621193; = kg_42*km_42
  Transport amount in km*km, for washing machine; Freight train, electricity traction; EU+EFTA+UK
- kg_43: 0.000136779
  Mass in kg, for washing machine; Freight train, average; EU+EFTA+UK
- km_43: 0.107115
  Distance in km, for washing machine; Freight train, average; EU+EFTA+UK
- kg_km_43: 1.46511e-5; = kg_43*km_43
  Transport amount in km*km, for washing machine; Freight train, average; EU+EFTA+UK
- kg_44: 0.000136779
  Mass in kg, for washing machine; Barge; EU+EFTA+UK
- km_44: 0.328736
  Distance in km, for washing machine; Barge; EU+EFTA+UK
- kg_km_44: 4.49643e-5; = kg_44*km_44
  Transport amount in km*km, for washing machine; Barge; EU+EFTA+UK
- kg_45: 0.000136779
  Mass in kg, for washing machine; Barge; ROW w/o EU+EFTA
- km_45: 0.671264
  Distance in km, for washing machine; Barge; ROW w/o EU+EFTA
- kg_km_45: 9.1815e-5; = kg_45*km_45
  Transport amount in km*km, for washing machine; Barge; ROW w/o EU+EFTA
- kg_46: 0.000136779
  Mass in kg, for washing machine; Articulated lorry transport, Total weight <7.5 t, mix Euro 0-5; EU+EFTA+UK
- km_46: 9.50673
  Distance in km, for washing machine; Articulated lorry transport, Total weight <7.5 t, mix Euro 0-5; EU+EFTA+UK
- kg_km_46: 0.00130032; = kg_46*km_46
  Transport amount in km*km, for washing machine; Articulated lorry transport, Total weight <7.5 t, mix Euro 0-5; EU+EFTA+UK
- kg_47: 0.000136779
  Mass in kg, for washing machine; Articulated lorry transport, Euro 4, Total weight >32 t; EU+EFTA+UK
- km_47: 86.5577
  Distance in km, for washing machine; Articulated lorry transport, Euro 4, Total weight >32 t; EU+EFTA+UK
- kg_km_47: 0.0118393; = kg_47*km_47
  Transport amount in km*km, for washing machine; Articulated lorry transport, Euro 4, Total weight >32 t; EU+EFTA+UK
- kg_48: 0.000136779
  Mass in kg, for washing machine; Articulated lorry transport, Total weight >32 t, mix Euro 0-5; ROW w/o EU+EFTA
- km_48: 228.442
  Distance in km, for washing machine; Articulated lorry transport, Total weight >32 t, mix Euro 0-5; ROW w/o EU+EFTA
- kg_km_48: 0.0312462; = kg_48*km_48
  Transport amount in km*km, for washing machine; Articulated lorry transport, Total weight >32 t, mix Euro 0-5; ROW w/o EU+EFTA

## Reference product
- washing, stone // washing, stone // glo: 1

## Inputs
- Transport of cement, Portland by Freight train, diesel traction - EU+EFTA+UK: 0.0435625; = kg_km_0
- Transport of cement, Portland by Freight train, electricity traction - EU+EFTA+UK: 0.0179375; = kg_km_1
- Transport of cement, Portland by Freight train, average - EU+EFTA+UK: 0.001; = kg_km_2
- Transport of cement, Portland by Articulated lorry transport, Total weight <7.5 t, mix Euro 0-5 - EU+EFTA+UK: 0.000338531; = kg_km_3
- Transport of cement, Portland by Articulated lorry transport, Total weight >32 t, mix Euro 0-5 - ROW w/o EU+EFTA: 0.26725; = kg_km_4
- Electricity from Electricity grid mix 1kV-60kV - AU: 0.0022
- Electricity from Electricity grid mix 1kV-60kV - EU+EFTA+UK: 0.0323
- Electricity from Electricity grid mix 1kV-60kV - NZ: 0.0004
- Electricity from Electricity grid mix 1kV-60kV - RAF: 0.0071
- Electricity from Electricity grid mix 1kV-60kV - RNA: 0.0473
- Electricity from Electricity grid mix 1kV-60kV - RSA: 0.0161
- Electricity from Electricity grid mix 1kV-60kV - RU: 0.0095
- Transport of perlite by Transoceanic ship, bulk - GLO: 3.375; = kg_km_5
- Transport of perlite by Freight train, diesel traction - EU+EFTA+UK: 0.927175; = kg_km_6
- Transport of perlite by Freight train, electricity traction - EU+EFTA+UK: 0.315387; = kg_km_7
- Transport of perlite by Freight train, average - EU+EFTA+UK: 0.00743855; = kg_km_8
- Transport of perlite by Articulated lorry transport, Euro 4, Total weight >32 t - EU+EFTA+UK: 0.0288526; = kg_km_9
- Transport of perlite by Articulated lorry transport, Total weight >32 t, mix Euro 0-5 - ROW w/o EU+EFTA: 0.0761474; = kg_km_10
- Transport of pumice by Transoceanic ship, bulk - GLO: 10.6021; = kg_km_11
- Transport of pumice by Freight train, diesel traction - EU+EFTA+UK: 1.30886; = kg_km_12
- Transport of pumice by Freight train, electricity traction - EU+EFTA+UK: 0.445221; = kg_km_13
- Transport of pumice by Freight train, average - EU+EFTA+UK: 0.0105007; = kg_km_14
- Transport of pumice by Barge - EU+EFTA+UK: 0.100675; = kg_km_15
- Transport of pumice by Barge - ROW w/o EU+EFTA: 0.205575; = kg_km_16
- Transport of pumice by Articulated lorry transport, Total weight <7.5 t, mix Euro 0-5 - EU+EFTA+UK: 0.13864; = kg_km_17
- Transport of pumice by Articulated lorry transport, Euro 4, Total weight >32 t - EU+EFTA+UK: 1.29436; = kg_km_18
- Transport of pumice by Articulated lorry transport, Total weight >32 t, mix Euro 0-5 - ROW w/o EU+EFTA: 3.41606; = kg_km_19
- Transport of synthetic rubber by Transoceanic ship, containers - GLO: 1.312; = kg_km_20
- Transport of synthetic rubber by Freight train, diesel traction - EU+EFTA+UK: 0.535351; = kg_km_21
- Transport of synthetic rubber by Freight train, electricity traction - EU+EFTA+UK: 0.182104; = kg_km_22
- Transport of synthetic rubber by Freight train, average - EU+EFTA+UK: 0.00429502; = kg_km_23
- Transport of synthetic rubber by Articulated lorry transport, Euro 4, Total weight >32 t - EU+EFTA+UK: 0.309409; = kg_km_24
- Transport of synthetic rubber by Articulated lorry transport, Total weight >32 t, mix Euro 0-5 - ROW w/o EU+EFTA: 0.816591; = kg_km_25
- Transport of lubricating oil // lubricants at refinery // eu+efta+uk by Articulated lorry transport, Euro 4, Total weight >32 t - EU+EFTA+UK: 0.00278; = kg_km_26
- Transport of lubricating oil // lubricants at refinery // rsa by Articulated lorry transport, Euro 4, Total weight >32 t - EU+EFTA+UK: 0.000507397; = kg_km_27
- Transport of lubricating oil // lubricants at refinery // raf by Articulated lorry transport, Euro 4, Total weight >32 t - EU+EFTA+UK: 0.000208163; = kg_km_28
- Transport of lubricating oil // lubricants at refinery // ras w/o cn by Articulated lorry transport, Euro 4, Total weight >32 t - EU+EFTA+UK: 0.00545499; = kg_km_29
- Transport of lubricating oil // lubricants at refinery // ru by Articulated lorry transport, Euro 4, Total weight >32 t - EU+EFTA+UK: 0.00451082; = kg_km_30
- Transport of lubricating oil // lubricants at refinery // rna by Articulated lorry transport, Euro 4, Total weight >32 t - EU+EFTA+UK: 0.00425805; = kg_km_31
- Transport of lubricating oil // lubricants at refinery // cn by Articulated lorry transport, Euro 4, Total weight >32 t - EU+EFTA+UK: 0.000866107; = kg_km_32
- Transport of lubricating oil // lubricants at refinery // rsa by Transoceanic ship, containers - GLO: 0.00913315; = kg_km_33
- Transport of lubricating oil // lubricants at refinery // raf by Transoceanic ship, containers - GLO: 0.00374694; = kg_km_34
- Transport of lubricating oil // lubricants at refinery // eu+efta+uk by Transoceanic ship, containers - GLO: 0.05; = kg_km_35
- Transport of lubricating oil // lubricants at refinery // ras w/o cn by Transoceanic ship, containers - GLO: 0.0981898; = kg_km_36
- Transport of lubricating oil // lubricants at refinery // ru by Transoceanic ship, containers - GLO: 0.0811947; = kg_km_37
- Transport of lubricating oil // lubricants at refinery // rna by Transoceanic ship, containers - GLO: 0.0766449; = kg_km_38
- Transport of lubricating oil // lubricants at refinery // cn by Transoceanic ship, containers - GLO: 0.0155899; = kg_km_39
- Transport of washing machine by Transoceanic ship, containers - GLO: 0.100806; = kg_km_40
- Transport of washing machine by Freight train, diesel traction - EU+EFTA+UK: 0.00182618; = kg_km_41
- Transport of washing machine by Freight train, electricity traction - EU+EFTA+UK: 0.000621193; = kg_km_42
- Transport of washing machine by Freight train, average - EU+EFTA+UK: 1.46511e-5; = kg_km_43
- Transport of washing machine by Barge - EU+EFTA+UK: 4.49643e-5; = kg_km_44
- Transport of washing machine by Barge - ROW w/o EU+EFTA: 9.1815e-5; = kg_km_45
- Transport of washing machine by Articulated lorry transport, Total weight <7.5 t, mix Euro 0-5 - EU+EFTA+UK: 0.00130032; = kg_km_46
- Transport of washing machine by Articulated lorry transport, Euro 4, Total weight >32 t - EU+EFTA+UK: 0.0118393; = kg_km_47
- Transport of washing machine by Articulated lorry transport, Total weight >32 t, mix Euro 0-5 - ROW w/o EU+EFTA: 0.0312462; = kg_km_48
- Electricity from Electricity grid mix 1kV-60kV - CN: 0.0484816
- Electricity from Electricity grid mix 1kV-60kV - RAS w/o CN: 0.0531184
- washing, stone // washing, stone // glo, blackbox: 1
- washing, stone // washing, stone // glo, elementary: 1

## Impact indicators
- Eutrophication marine: 0.000229507
- Ecotoxicity, freshwater: 1.84905
- Land use: -0.418986
- Water use: 0.404745
- Resource use, minerals and metals: 2.3755e-7
- Resource use, fossils: 0.963336
- Climate change: 0.232981
- Ozone depletion: 1.41101e-9
- Human toxicity, cancer: 1.52564e-10
- Human toxicity, non-cancer: 2.98361e-9
- EF-particulate Matter: 1.13696e-8
- Ionising radiation, human health: 0.00157671
- Photochemical ozone formation - human health: 0.000329047
- Acidification: 0.000435051
- Eutrophication, terrestrial: 0.00070808
- Eutrophication, freshwater: 3.28269e-5

## Deviations from the LCI method principle
The background data uses:
- the \xe2\x80\x9cRecycled content cut-off\xe2\x80\x9d approach to allocate end-of-life by-products and secondary materials. This allocation is explained in the description of the recycled content system model (http://www.ecoinvent.org/database/system-models-in-ecoinvent-3/cut-off-system-model/allocation-cut-off-by-classification.html).
OR
- EF compliant data

## Deviations from the LCI method approaches
Background data:
- the \xe2\x80\x9cRecycled content cut-off\xe2\x80\x9d approach to allocate end-of-life by-products and secondary materials. This allocation is explained in the description of the recycled content system model (http://www.ecoinvent.org/database/system-models-in-ecoinvent-3/cut-off-system-model/allocation-cut-off-by-classification.html). The ecoinvent database mostly relies on “Allocation – market values” apart for few exceptions particularly in the energy sector. ecoinvent energy data is replaced with EF3.0 core data as per the EF guidelines version 2.0.
OR
- EF compliant data

## Modelling constants
All modelling constants follow the requirements listed in the Tender Specifications 070201/2020/SER/ENV.B1. Completeness: There are no intentional cut-offs in the inventory no matter how small their contribution to all the EF impact categories is. Eventual cut-offs are in compliance with the Guide for EF compliant data sets (JRC 2020), i.e. only if below the 3% cut-off rule. Water use: water use is modelled at country level using separate flows for water withdrawal, water release and water evaporation. Handling multi-functional processes: the following PEF multi- functionality decision hierarchy is applied for resolving all multi- functionality problems: (1) subdivision or system expansion; (2) allocation based on a relevant underlying physical relationship (substitution may apply here); (3) allocation based on some other relationship. Direct land use change: GHG emissions from direct LUC allocated to good/service for 20 years after the LUC occurs, with IPCC default values. Carbon storage and delayed emissions: credits associated with temporary (carbon) storage or delayed emissions up to 300 years are not be considered. Emissions off-setting: are not included. Capital goods (including infrastructures) and their End of life: they are included. System boundaries: system boundaries include all processes linked to the product supply chain (e.g. maintenance). Time period: emissions and removals are modelled as if released or removed at the beginning of the assessment method. Fossil and biogenic carbon emissions and removals: removals and emissions are modelled as follows: All GHG emissions from fossil fuels (including peat and limestone) are modelled consistently with the most updated ILCD list of elementary flows. The non-fossil (biogenic) carbon flows are modelled consistently with the most updated ILCD list of elementary flows.

## Cut-off and completeness
There are no intentional cut-offs in the inventory no matter how small their contribution to all the EF impact categories is. Eventual cut-offs are in compliance with the Guide for EF compliant data sets (JRC 2020), i.e. only if below the 3% cut-off rule. The dataset dry mass and water balance has been checked to ensure the inventory is complete. Capital goods (e.g. infrastructure) and their end-of-life are included.

## Data selection and combination
These datasets include, in both their foreground and background data, links to EF3.0 compliant data.
The relevant background data on energy, transport, and End of Life are from the LCDN data node (http://lcdn.thinkstep.com/Node/).
All other background data in the supply of this product for which no EF3.0 process was available are from ecoinvent v3.7 database (www.ecoinvent.org) or other data sources.

## Data treatment and extrapolations
Several data sources have been used to model the inventory.

## Review details
Internal reviews have been asked to review the plausibility of the unit process, LCIA scores, and DQRs. Internal reviewers have also been asked to review the data for EF compliancy. The consortium is therefore responsible for aspects such as compliancy with the ILCD format, including validation in Look@LCI, and nomenclature.
Internal reviwers have been asked to judge based on the process name, that the unit process models in a complete and representative way the process in the requested location. The review encompassed the plausability of:
- exchanges with nature (elementary flows) as well as exchanges such as product and waste flows.
- meta information (general comment, technology comment, system boundaries, allocation, cut-off rules, etc.). Reviewers were asked to judge if the provided information is enough to understand the content of the process.
- LCIA scores
- DQRs including precision, technology, time and geography. As well as the overall DQR.
External reviewers have been asked to provide their expertise in the field of interest. External reviewers have been asked to review the unit process, including eventual methodological choices, the LCIA scores (provided with contribution scores as well), and DQRs. External reviewers have been provided all the information in a tool developed by the consortium for the purpose of this project.
External reviewers have been asked to judge based on the process name, that the unit process models in a complete and representative way the process in the requested location. The review encompassed:
- Plausability and completeness of exchanges with nature (elementary flows) as well as exchanges such as product and waste flows.
- Review of meta information (general comment, technology comment, system boundaries, allocation, cut-off rules, etc.). Reviewers were asked to judge if the provided information is enough to understand the content of the process.
- Review of properties (biogenic carbon and water content).
- Review of allocation keys.
- Plausability of LCIA scores calculated by the consortium.
- Plausability of DQRs including precision, technology, time and geography. As well as the overall DQR.

## Data sources
- Background Data for Representative products and organisations. EF 3.0 compliant (data stock)
- UN Data (2018) Statistics Data for Lubricants Productions, http://data.un.org/Data.aspx?q=Lubricants&d=EDATA&f=cmID%3aLU, United Nations Statistics Division, Global.
- Tupesa (2021) Stone Washers, https://www.tupesa.com/index.php?route=product/product&product_id=50, Tupesa Maquinaria Textil, Girona, Spain.
- Asim Kumar Roy Choudhury, (2017). Principle of textile finishing. Elsevier, Duxfod, United Kingdom.
- Lebon (2021) Nonwoven Oven Machine, Catalog and Company Messages, Qingdao Lebon Industry Co., Ltd., China
- Westex (2021) Benefits of Westex Synthetic Stones, https://westexstones.com/, Westex Synthetic Stones, Şişli-Istanbul, Turkey
- Neil J. Lant, Adam S. Hayward, Madusha M. D. Peththawadu, Kelly J. Sheridan, John R. Dean (2020) Microfiber release from real soiled consumer laundry and the impact of fabric care products and washing conditions, https://doi.org/10.1371/journal.pone.0233332, PLos ONE, United Kingdom

## Intended applications
Implementation of regular Product Environmental Footprint (PEF) studies and Organisation Environmental Footprint (OEF) studies exclusively under the specified Product groups and sectors as defined in the Product Environmental Footprint Category Rules (PEFCR) and Organisation Environmental Footprint Sectorial Rules (OEFSR) listed in http://ec.europa.eu/environment/eussd/smgp/PEFCR_OEFSR.htm
