# bleached sulphite pulp, softwood; technology mix; production mix, at plant; dry mass 0.9 kg, carbon content, non fossil 0.494

Dataset: ILCD process, Partly terminated system
Geography: WORLD (WITHOUT EU+EFTA+UK, US AND CA)
Reference year: 2016
Valid until: 2024
Classification: Materials production / Paper and cardboards
LCI method principle: Attributional
LCI method approaches: Allocation - market value
Completeness: All relevant flows quantified
Project: Provision of process-based 3.0 Environmental Footprint-compliant life cycle inventory datasets - Renewable materials - contract number 070201/2020/840085/SER/ENV.B.1
Generated by: ecoinvent
Owner: ecoinvent
Compliance: ILCD Data Network - Entry-level; Suggestions for updating the PEF method 2019; ISO 14040 Environmental Management – Life Cycle Assessment – Principles and Framework, 2006; ISO 14044:2006. Environmental Management – Life Cycle Assessment – Requirements and guidelines.; Environmental Footprint 3.1
Review: Dependent internal review by Lucia Valsasina, Emilia Moreno Ruiz; Independent review panel by Michael Sturges
Data quality: Overall quality: Good; Time representativeness: Very good; Geographical representativeness: Good; Technological representativeness: Good; Precision: Good; Methodological appropriateness and consistency: Not applicable
Amounts: no units in this file; such an amount is in the reference unit of its flow, which a separate flow dataset defines
copyright: true
licenseType: Free of charge for some user types or use types
accessRestrictions: Free of charge for all final users implementing a regular Product Environmental Footprint (PEF) studies and Organisation Environmental Footprint (OEF) studies exclusively under the specified Product groups and sectors as defined in the Product Environmental Footprint Category Rules (PEFCR) and Organisation Environmental Footprint Sectorial Rules (OEFSR) listed in http://ec.europa.eu/environment/eussd/smgp/PEFCR_OEFSR.htm and in accordance with the terms and conditions of the EULA (available at https://ecoinvent.lca-data.com/) exclusively until 31st December 2024. Any use of this dataset or any derivative data not within the specific context of one of the PEF/OEF projects or after the end of 2024 is not permitted.

## General comment
Notice: this data set supersedes the EF3.0-compliant version (see link under "preceding data set version" below calculated with the EF3.0). The life cycle inventory is not changed from the original EF3.0 data set. The LCIA results are calculated based on the EF3.1 methods which provide updated characterisation factors in the following impact categories: Climate Change, Ecotoxicity freshwater, Photochemical Ozone Formation, Acidification, Human Toxicity non-cancer, and Human Toxicity cancer. The review report and the data quality ratings refer to the original results. The data set has been updated by the European Commission on the basis of the original EF3.0 data set delivered by the data provider.Cradle-to-gate production of 1 kg of bleached sulphite pulp, from primary softwood, including (but not limited to) transport, raw materials, direct emissions, energy use, ancillary products and internal recycling activities or waste treatment.

## Technology and included processes
The activity represents the average production of bleached chemical pulp following the acidic sulfite process in Europe. The dataset aggregates the most common bleaching technologies: Total Chlorine Free (TCF) and Elemental Chlorine Free (ECF).This dataset is modelled according to the activity Hischier, R sulfite pulp production, bleached, RER, Allocation, cut-off by classification, ecoinvent database version 3.8. The dataset is updated with electricity and thermal energy requirements reported by Bajpai (2016) as well as pulp yield retrieved from Suhr et al. (2015).

## Parameters
- kg_0: 0.0016
  Mass in kg, for chlorine dioxide // chlorine dioxide production // glo; Articulated lorry transport, Euro 4, Total weight >32 t; EU+EFTA+UK
- km_0: 1000
  Distance in km, for chlorine dioxide // chlorine dioxide production // glo; Articulated lorry transport, Euro 4, Total weight >32 t; EU+EFTA+UK
- kg_km_0: 1.6; = kg_0*km_0
  Transport amount in km*km, for chlorine dioxide // chlorine dioxide production // glo; Articulated lorry transport, Euro 4, Total weight >32 t; EU+EFTA+UK
- kg_1: 0.0016
  Mass in kg, for chlorine dioxide // chlorine dioxide production // glo; Transoceanic ship, containers; GLO
- km_1: 18000
  Distance in km, for chlorine dioxide // chlorine dioxide production // glo; Transoceanic ship, containers; GLO
- kg_km_1: 28.8; = kg_1*km_1
  Transport amount in km*km, for chlorine dioxide // chlorine dioxide production // glo; Transoceanic ship, containers; GLO
- kg_2: 3.54677e-6
  Mass in kg, for diesel // diesel mix at refinery // au; Articulated lorry transport, Euro 4, Total weight >32 t; EU+EFTA+UK
- km_2: 1000.91
  Distance in km, for diesel // diesel mix at refinery // au; Articulated lorry transport, Euro 4, Total weight >32 t; EU+EFTA+UK
- kg_km_2: 0.00355; = kg_2*km_2
  Transport amount in km*km, for diesel // diesel mix at refinery // au; Articulated lorry transport, Euro 4, Total weight >32 t; EU+EFTA+UK
- kg_3: 3.54677e-6
  Mass in kg, for diesel // diesel mix at refinery // au; Transoceanic ship, containers; GLO
- km_3: 18016.4
  Distance in km, for diesel // diesel mix at refinery // au; Transoceanic ship, containers; GLO
- kg_km_3: 0.0639; = kg_3*km_3
  Transport amount in km*km, for diesel // diesel mix at refinery // au; Transoceanic ship, containers; GLO
- kg_4: 4.58053e-5
  Mass in kg, for diesel // diesel mix at refinery // cn; Articulated lorry transport, Euro 4, Total weight >32 t; EU+EFTA+UK
- km_4: 999.884
  Distance in km, for diesel // diesel mix at refinery // cn; Articulated lorry transport, Euro 4, Total weight >32 t; EU+EFTA+UK
- kg_km_4: 0.0458; = kg_4*km_4
  Transport amount in km*km, for diesel // diesel mix at refinery // cn; Articulated lorry transport, Euro 4, Total weight >32 t; EU+EFTA+UK
- kg_5: 4.58053e-5
  Mass in kg, for diesel // diesel mix at refinery // cn; Transoceanic ship, containers; GLO
- km_5: 17989.2
  Distance in km, for diesel // diesel mix at refinery // cn; Transoceanic ship, containers; GLO
- kg_km_5: 0.824; = kg_5*km_5
  Transport amount in km*km, for diesel // diesel mix at refinery // cn; Transoceanic ship, containers; GLO
- kg_6: 1.2228e-5
  Mass in kg, for diesel // diesel mix at refinery // jp; Articulated lorry transport, Euro 4, Total weight >32 t; EU+EFTA+UK
- km_6: 997.713
  Distance in km, for diesel // diesel mix at refinery // jp; Articulated lorry transport, Euro 4, Total weight >32 t; EU+EFTA+UK
- kg_km_6: 0.0122; = kg_6*km_6
  Transport amount in km*km, for diesel // diesel mix at refinery // jp; Articulated lorry transport, Euro 4, Total weight >32 t; EU+EFTA+UK
- kg_7: 1.2228e-5
  Mass in kg, for diesel // diesel mix at refinery // jp; Transoceanic ship, containers; GLO
- km_7: 17991.5
  Distance in km, for diesel // diesel mix at refinery // jp; Transoceanic ship, containers; GLO
- kg_km_7: 0.22; = kg_7*km_7
  Transport amount in km*km, for diesel // diesel mix at refinery // jp; Transoceanic ship, containers; GLO
- kg_8: 8.58602e-6
  Mass in kg, for diesel // diesel mix at refinery // raf; Articulated lorry transport, Euro 4, Total weight >32 t; EU+EFTA+UK
- km_8: 1000.46
  Distance in km, for diesel // diesel mix at refinery // raf; Articulated lorry transport, Euro 4, Total weight >32 t; EU+EFTA+UK
- kg_km_8: 0.00859; = kg_8*km_8
  Transport amount in km*km, for diesel // diesel mix at refinery // raf; Articulated lorry transport, Euro 4, Total weight >32 t; EU+EFTA+UK
- kg_9: 8.58602e-6
  Mass in kg, for diesel // diesel mix at refinery // raf; Transoceanic ship, containers; GLO
- km_9: 18052.6
  Distance in km, for diesel // diesel mix at refinery // raf; Transoceanic ship, containers; GLO
- kg_km_9: 0.155; = kg_9*km_9
  Transport amount in km*km, for diesel // diesel mix at refinery // raf; Transoceanic ship, containers; GLO
- kg_10: 6.65968e-5
  Mass in kg, for diesel // diesel mix at refinery // ras w/o cn; Articulated lorry transport, Euro 4, Total weight >32 t; EU+EFTA+UK
- km_10: 1000.05
  Distance in km, for diesel // diesel mix at refinery // ras w/o cn; Articulated lorry transport, Euro 4, Total weight >32 t; EU+EFTA+UK
- kg_km_10: 0.0666; = kg_10*km_10
  Transport amount in km*km, for diesel // diesel mix at refinery // ras w/o cn; Articulated lorry transport, Euro 4, Total weight >32 t; EU+EFTA+UK
- kg_11: 6.65968e-5
  Mass in kg, for diesel // diesel mix at refinery // ras w/o cn; Transoceanic ship, containers; GLO
- km_11: 18018.9
  Distance in km, for diesel // diesel mix at refinery // ras w/o cn; Transoceanic ship, containers; GLO
- kg_km_11: 1.2; = kg_11*km_11
  Transport amount in km*km, for diesel // diesel mix at refinery // ras w/o cn; Transoceanic ship, containers; GLO
- kg_12: 6.8437e-5
  Mass in kg, for diesel // diesel mix at refinery // rna; Articulated lorry transport, Euro 4, Total weight >32 t; EU+EFTA+UK
- km_12: 999.46
  Distance in km, for diesel // diesel mix at refinery // rna; Articulated lorry transport, Euro 4, Total weight >32 t; EU+EFTA+UK
- kg_km_12: 0.0684; = kg_12*km_12
  Transport amount in km*km, for diesel // diesel mix at refinery // rna; Articulated lorry transport, Euro 4, Total weight >32 t; EU+EFTA+UK
- kg_13: 6.8437e-5
  Mass in kg, for diesel // diesel mix at refinery // rna; Transoceanic ship, containers; GLO
- km_13: 17972.7
  Distance in km, for diesel // diesel mix at refinery // rna; Transoceanic ship, containers; GLO
- kg_km_13: 1.23; = kg_13*km_13
  Transport amount in km*km, for diesel // diesel mix at refinery // rna; Transoceanic ship, containers; GLO
- kg_14: 1.60286e-5
  Mass in kg, for diesel // diesel mix at refinery // rsa; Articulated lorry transport, Euro 4, Total weight >32 t; EU+EFTA+UK
- km_14: 998.219
  Distance in km, for diesel // diesel mix at refinery // rsa; Articulated lorry transport, Euro 4, Total weight >32 t; EU+EFTA+UK
- kg_km_14: 0.016; = kg_14*km_14
  Transport amount in km*km, for diesel // diesel mix at refinery // rsa; Articulated lorry transport, Euro 4, Total weight >32 t; EU+EFTA+UK
- kg_15: 1.60286e-5
  Mass in kg, for diesel // diesel mix at refinery // rsa; Transoceanic ship, containers; GLO
- km_15: 17967.9
  Distance in km, for diesel // diesel mix at refinery // rsa; Transoceanic ship, containers; GLO
- kg_km_15: 0.288; = kg_15*km_15
  Transport amount in km*km, for diesel // diesel mix at refinery // rsa; Transoceanic ship, containers; GLO
- kg_16: 1.87716e-5
  Mass in kg, for diesel // diesel mix at refinery // ru; Articulated lorry transport, Euro 4, Total weight >32 t; EU+EFTA+UK
- km_16: 1001.51
  Distance in km, for diesel // diesel mix at refinery // ru; Articulated lorry transport, Euro 4, Total weight >32 t; EU+EFTA+UK
- kg_km_16: 0.0188; = kg_16*km_16
  Transport amount in km*km, for diesel // diesel mix at refinery // ru; Articulated lorry transport, Euro 4, Total weight >32 t; EU+EFTA+UK
- kg_17: 1.87716e-5
  Mass in kg, for diesel // diesel mix at refinery // ru; Transoceanic ship, containers; GLO
- km_17: 18005.9
  Distance in km, for diesel // diesel mix at refinery // ru; Transoceanic ship, containers; GLO
- kg_km_17: 0.338; = kg_17*km_17
  Transport amount in km*km, for diesel // diesel mix at refinery // ru; Transoceanic ship, containers; GLO
- kg_18: 0.0257
  Mass in kg, for hydrogen peroxide, 50% // hydrogen peroxide, 50% production // eu+efta+uk; Articulated lorry transport, Euro 4, Total weight >32 t; EU+EFTA+UK
- km_18: 1000
  Distance in km, for hydrogen peroxide, 50% // hydrogen peroxide, 50% production // eu+efta+uk; Articulated lorry transport, Euro 4, Total weight >32 t; EU+EFTA+UK
- kg_km_18: 25.7; = kg_18*km_18
  Transport amount in km*km, for hydrogen peroxide, 50% // hydrogen peroxide, 50% production // eu+efta+uk; Articulated lorry transport, Euro 4, Total weight >32 t; EU+EFTA+UK
- kg_19: 0.0257
  Mass in kg, for hydrogen peroxide, 50% // hydrogen peroxide, 50% production // eu+efta+uk; Transoceanic ship, containers; GLO
- km_19: 18015.6
  Distance in km, for hydrogen peroxide, 50% // hydrogen peroxide, 50% production // eu+efta+uk; Transoceanic ship, containers; GLO
- kg_km_19: 463; = kg_19*km_19
  Transport amount in km*km, for hydrogen peroxide, 50% // hydrogen peroxide, 50% production // eu+efta+uk; Transoceanic ship, containers; GLO
- kg_20: 0.0521
  Mass in kg, for lime, packed // lime production, milled, packed // row; Articulated lorry transport, Euro 4, Total weight >32 t; EU+EFTA+UK
- km_20: 1000
  Distance in km, for lime, packed // lime production, milled, packed // row; Articulated lorry transport, Euro 4, Total weight >32 t; EU+EFTA+UK
- kg_km_20: 52.1; = kg_20*km_20
  Transport amount in km*km, for lime, packed // lime production, milled, packed // row; Articulated lorry transport, Euro 4, Total weight >32 t; EU+EFTA+UK
- kg_21: 0.0521
  Mass in kg, for lime, packed // lime production, milled, packed // row; Transoceanic ship, containers; GLO
- km_21: 18003.8
  Distance in km, for lime, packed // lime production, milled, packed // row; Transoceanic ship, containers; GLO
- kg_km_21: 938; = kg_21*km_21
  Transport amount in km*km, for lime, packed // lime production, milled, packed // row; Transoceanic ship, containers; GLO
- kg_22: 0.0065
  Mass in kg, for magnesium oxide // magnesium oxide production // eu+efta+uk; Articulated lorry transport, Euro 4, Total weight >32 t; EU+EFTA+UK
- km_22: 1000
  Distance in km, for magnesium oxide // magnesium oxide production // eu+efta+uk; Articulated lorry transport, Euro 4, Total weight >32 t; EU+EFTA+UK
- kg_km_22: 6.5; = kg_22*km_22
  Transport amount in km*km, for magnesium oxide // magnesium oxide production // eu+efta+uk; Articulated lorry transport, Euro 4, Total weight >32 t; EU+EFTA+UK
- kg_23: 0.0065
  Mass in kg, for magnesium oxide // magnesium oxide production // eu+efta+uk; Transoceanic ship, containers; GLO
- km_23: 18000
  Distance in km, for magnesium oxide // magnesium oxide production // eu+efta+uk; Transoceanic ship, containers; GLO
- kg_km_23: 117; = kg_23*km_23
  Transport amount in km*km, for magnesium oxide // magnesium oxide production // eu+efta+uk; Transoceanic ship, containers; GLO
- kg_24: 0.0119
  Mass in kg, for oxygen // oxygen production // eu+efta+uk; Articulated lorry transport, Euro 4, Total weight >32 t; EU+EFTA+UK
- km_24: 1000
  Distance in km, for oxygen // oxygen production // eu+efta+uk; Articulated lorry transport, Euro 4, Total weight >32 t; EU+EFTA+UK
- kg_km_24: 11.9; = kg_24*km_24
  Transport amount in km*km, for oxygen // oxygen production // eu+efta+uk; Articulated lorry transport, Euro 4, Total weight >32 t; EU+EFTA+UK
- kg_25: 0.0119
  Mass in kg, for oxygen // oxygen production // eu+efta+uk; Transoceanic ship, containers; GLO
- km_25: 17983.2
  Distance in km, for oxygen // oxygen production // eu+efta+uk; Transoceanic ship, containers; GLO
- kg_km_25: 214; = kg_25*km_25
  Transport amount in km*km, for oxygen // oxygen production // eu+efta+uk; Transoceanic ship, containers; GLO
- kg_26: 0.0006
  Mass in kg, for sodium chlorate // sodium chlorate production // glo; Articulated lorry transport, Euro 4, Total weight >32 t; EU+EFTA+UK
- km_26: 1000
  Distance in km, for sodium chlorate // sodium chlorate production // glo; Articulated lorry transport, Euro 4, Total weight >32 t; EU+EFTA+UK
- kg_km_26: 0.6; = kg_26*km_26
  Transport amount in km*km, for sodium chlorate // sodium chlorate production // glo; Articulated lorry transport, Euro 4, Total weight >32 t; EU+EFTA+UK
- kg_27: 0.0006
  Mass in kg, for sodium chlorate // sodium chlorate production // glo; Transoceanic ship, containers; GLO
- km_27: 18000
  Distance in km, for sodium chlorate // sodium chlorate production // glo; Transoceanic ship, containers; GLO
- kg_km_27: 10.8; = kg_27*km_27
  Transport amount in km*km, for sodium chlorate // sodium chlorate production // glo; Transoceanic ship, containers; GLO
- kg_28: 0.0424
  Mass in kg, for sodium hydroxide // sodium hydroxide production // eu+efta+uk; Articulated lorry transport, Euro 4, Total weight >32 t; EU+EFTA+UK
- km_28: 1000
  Distance in km, for sodium hydroxide // sodium hydroxide production // eu+efta+uk; Articulated lorry transport, Euro 4, Total weight >32 t; EU+EFTA+UK
- kg_km_28: 42.4; = kg_28*km_28
  Transport amount in km*km, for sodium hydroxide // sodium hydroxide production // eu+efta+uk; Articulated lorry transport, Euro 4, Total weight >32 t; EU+EFTA+UK
- kg_29: 0.0424
  Mass in kg, for sodium hydroxide // sodium hydroxide production // eu+efta+uk; Transoceanic ship, containers; GLO
- km_29: 17995.3
  Distance in km, for sodium hydroxide // sodium hydroxide production // eu+efta+uk; Transoceanic ship, containers; GLO
- kg_km_29: 763; = kg_29*km_29
  Transport amount in km*km, for sodium hydroxide // sodium hydroxide production // eu+efta+uk; Transoceanic ship, containers; GLO
- kg_30: 0.0256
  Mass in kg, for sulphur // sulphur production // eu+efta+uk; Articulated lorry transport, Euro 4, Total weight >32 t; EU+EFTA+UK
- km_30: 1000
  Distance in km, for sulphur // sulphur production // eu+efta+uk; Articulated lorry transport, Euro 4, Total weight >32 t; EU+EFTA+UK
- kg_km_30: 25.6; = kg_30*km_30
  Transport amount in km*km, for sulphur // sulphur production // eu+efta+uk; Articulated lorry transport, Euro 4, Total weight >32 t; EU+EFTA+UK
- kg_31: 0.0256
  Mass in kg, for sulphur // sulphur production // eu+efta+uk; Transoceanic ship, containers; GLO
- km_31: 18007.8
  Distance in km, for sulphur // sulphur production // eu+efta+uk; Transoceanic ship, containers; GLO
- kg_km_31: 461; = kg_31*km_31
  Transport amount in km*km, for sulphur // sulphur production // eu+efta+uk; Transoceanic ship, containers; GLO
- kg_32: 0.0268
  Mass in kg, for sulphur dioxide // sulphur dioxide production // glo; Articulated lorry transport, Euro 4, Total weight >32 t; EU+EFTA+UK
- km_32: 1000
  Distance in km, for sulphur dioxide // sulphur dioxide production // glo; Articulated lorry transport, Euro 4, Total weight >32 t; EU+EFTA+UK
- kg_km_32: 26.8; = kg_32*km_32
  Transport amount in km*km, for sulphur dioxide // sulphur dioxide production // glo; Articulated lorry transport, Euro 4, Total weight >32 t; EU+EFTA+UK
- kg_33: 0.0268
  Mass in kg, for sulphur dioxide // sulphur dioxide production // glo; Transoceanic ship, containers; GLO
- km_33: 17985.1
  Distance in km, for sulphur dioxide // sulphur dioxide production // glo; Transoceanic ship, containers; GLO
- kg_km_33: 482; = kg_33*km_33
  Transport amount in km*km, for sulphur dioxide // sulphur dioxide production // glo; Transoceanic ship, containers; GLO
- kg_34: 0.0004
  Mass in kg, for sulphuric acid // sulphuric acid production // glo; Articulated lorry transport, Euro 4, Total weight >32 t; EU+EFTA+UK
- km_34: 1000
  Distance in km, for sulphuric acid // sulphuric acid production // glo; Articulated lorry transport, Euro 4, Total weight >32 t; EU+EFTA+UK
- kg_km_34: 0.4; = kg_34*km_34
  Transport amount in km*km, for sulphuric acid // sulphuric acid production // glo; Articulated lorry transport, Euro 4, Total weight >32 t; EU+EFTA+UK
- kg_35: 0.0004
  Mass in kg, for sulphuric acid // sulphuric acid production // glo; Transoceanic ship, containers; GLO
- km_35: 18000
  Distance in km, for sulphuric acid // sulphuric acid production // glo; Transoceanic ship, containers; GLO
- kg_km_35: 7.2; = kg_35*km_35
  Transport amount in km*km, for sulphuric acid // sulphuric acid production // glo; Transoceanic ship, containers; GLO
- kg_36: 0.00346667
  Mass in kg, for biodegradable waste to landfill // landfill of biodegradable waste // eu+efta+uk; Articulated lorry transport, Euro 4, Total weight >32 t; EU+EFTA+UK
- km_36: 77
  Distance in km, for biodegradable waste to landfill // landfill of biodegradable waste // eu+efta+uk; Articulated lorry transport, Euro 4, Total weight >32 t; EU+EFTA+UK
- kg_km_36: 0.266933; = kg_36*km_36
  Transport amount in km*km, for biodegradable waste to landfill // landfill of biodegradable waste // eu+efta+uk; Articulated lorry transport, Euro 4, Total weight >32 t; EU+EFTA+UK
- kg_37: 0.0018
  Mass in kg, for industrial waste, average, not hazardous, to residual landfill // industrial waste, average, not hazardous, to residual landfill // eu+efta+uk; Articulated lorry transport, Euro 4, Total weight >32 t; EU+EFTA+UK
- km_37: 77
  Distance in km, for industrial waste, average, not hazardous, to residual landfill // industrial waste, average, not hazardous, to residual landfill // eu+efta+uk; Articulated lorry transport, Euro 4, Total weight >32 t; EU+EFTA+UK
- kg_km_37: 0.1386; = kg_37*km_37
  Transport amount in km*km, for industrial waste, average, not hazardous, to residual landfill // industrial waste, average, not hazardous, to residual landfill // eu+efta+uk; Articulated lorry transport, Euro 4, Total weight >32 t; EU+EFTA+UK
- kg_38: 0.00084
  Mass in kg, for waste (unspecified) // landfill of inert (steel) // eu+efta+uk; Articulated lorry transport, Euro 4, Total weight >32 t; EU+EFTA+UK
- km_38: 77
  Distance in km, for waste (unspecified) // landfill of inert (steel) // eu+efta+uk; Articulated lorry transport, Euro 4, Total weight >32 t; EU+EFTA+UK
- kg_km_38: 0.06468; = kg_38*km_38
  Transport amount in km*km, for waste (unspecified) // landfill of inert (steel) // eu+efta+uk; Articulated lorry transport, Euro 4, Total weight >32 t; EU+EFTA+UK
- kg_39: 0.00346667
  Mass in kg, for biowaste // enclosed composting // eu+efta+uk; Articulated lorry transport, Euro 4, Total weight >32 t; EU+EFTA+UK
- km_39: 77
  Distance in km, for biowaste // enclosed composting // eu+efta+uk; Articulated lorry transport, Euro 4, Total weight >32 t; EU+EFTA+UK
- kg_km_39: 0.266933; = kg_39*km_39
  Transport amount in km*km, for biowaste // enclosed composting // eu+efta+uk; Articulated lorry transport, Euro 4, Total weight >32 t; EU+EFTA+UK
- kg_40: 3.25662
  Mass in kg, for softwood under bark // softwood forestry // world (without eu+efta+uk, us and ca); Articulated lorry transport, Total weight >32 t, mix Euro 0-5; ROW w/o EU+EFTA
- km_40: 1001.04
  Distance in km, for softwood under bark // softwood forestry // world (without eu+efta+uk, us and ca); Articulated lorry transport, Total weight >32 t, mix Euro 0-5; ROW w/o EU+EFTA
- kg_km_40: 3260; = kg_40*km_40
  Transport amount in km*km, for softwood under bark // softwood forestry // world (without eu+efta+uk, us and ca); Articulated lorry transport, Total weight >32 t, mix Euro 0-5; ROW w/o EU+EFTA
- kg_41: 3.25662
  Mass in kg, for softwood under bark // softwood forestry // world (without eu+efta+uk, us and ca); Transoceanic ship, containers; GLO
- km_41: 17994.1
  Distance in km, for softwood under bark // softwood forestry // world (without eu+efta+uk, us and ca); Transoceanic ship, containers; GLO
- kg_km_41: 58600; = kg_41*km_41
  Transport amount in km*km, for softwood under bark // softwood forestry // world (without eu+efta+uk, us and ca); Transoceanic ship, containers; GLO

## Reference product
- bleached sulphite pulp, softwood // bleached sulphite pulp, softwood // world (without eu+efta+uk, us and ca): 1

## Inputs
- Electricity from Electricity grid mix 1kV-60kV - AU: 0.0245
- Electricity from Electricity grid mix 1kV-60kV - NZ: 0.0047
- Electricity from Electricity grid mix 1kV-60kV - RU: 0.1058
- Electricity from Electricity grid mix 1kV-60kV - RAF: 0.079
- Electricity from Electricity grid mix 1kV-60kV - RSA: 0.1796
- Electricity from Electricity grid mix 1kV-60kV - RNA: 0.5292
- Transport of chlorine dioxide // chlorine dioxide production // glo by Articulated lorry transport, Euro 4, Total weight >32 t - EU+EFTA+UK: 1.6; = kg_km_0
- Transport of chlorine dioxide // chlorine dioxide production // glo by Transoceanic ship, containers - GLO: 28.8; = kg_km_1
- Transport of diesel // diesel mix at refinery // au by Articulated lorry transport, Euro 4, Total weight >32 t - EU+EFTA+UK: 0.00355; = kg_km_2
- Transport of diesel // diesel mix at refinery // au by Transoceanic ship, containers - GLO: 0.0639; = kg_km_3
- Transport of diesel // diesel mix at refinery // cn by Articulated lorry transport, Euro 4, Total weight >32 t - EU+EFTA+UK: 0.0458; = kg_km_4
- Transport of diesel // diesel mix at refinery // cn by Transoceanic ship, containers - GLO: 0.824; = kg_km_5
- Transport of diesel // diesel mix at refinery // jp by Articulated lorry transport, Euro 4, Total weight >32 t - EU+EFTA+UK: 0.0122; = kg_km_6
- Transport of diesel // diesel mix at refinery // jp by Transoceanic ship, containers - GLO: 0.22; = kg_km_7
- Transport of diesel // diesel mix at refinery // raf by Articulated lorry transport, Euro 4, Total weight >32 t - EU+EFTA+UK: 0.00859; = kg_km_8
- Transport of diesel // diesel mix at refinery // raf by Transoceanic ship, containers - GLO: 0.155; = kg_km_9
- Transport of diesel // diesel mix at refinery // ras w/o cn by Articulated lorry transport, Euro 4, Total weight >32 t - EU+EFTA+UK: 0.0666; = kg_km_10
- Transport of diesel // diesel mix at refinery // ras w/o cn by Transoceanic ship, containers - GLO: 1.2; = kg_km_11
- Transport of diesel // diesel mix at refinery // rna by Articulated lorry transport, Euro 4, Total weight >32 t - EU+EFTA+UK: 0.0684; = kg_km_12
- Transport of diesel // diesel mix at refinery // rna by Transoceanic ship, containers - GLO: 1.23; = kg_km_13
- Transport of diesel // diesel mix at refinery // rsa by Articulated lorry transport, Euro 4, Total weight >32 t - EU+EFTA+UK: 0.016; = kg_km_14
- Transport of diesel // diesel mix at refinery // rsa by Transoceanic ship, containers - GLO: 0.288; = kg_km_15
- Transport of diesel // diesel mix at refinery // ru by Articulated lorry transport, Euro 4, Total weight >32 t - EU+EFTA+UK: 0.0188; = kg_km_16
- Transport of diesel // diesel mix at refinery // ru by Transoceanic ship, containers - GLO: 0.338; = kg_km_17
- Transport of hydrogen peroxide, 50% // hydrogen peroxide, 50% production // eu+efta+uk by Articulated lorry transport, Euro 4, Total weight >32 t - EU+EFTA+UK: 25.7; = kg_km_18
- Transport of hydrogen peroxide, 50% // hydrogen peroxide, 50% production // eu+efta+uk by Transoceanic ship, containers - GLO: 463; = kg_km_19
- Transport of lime, packed // lime production, milled, packed // row by Articulated lorry transport, Euro 4, Total weight >32 t - EU+EFTA+UK: 52.1; = kg_km_20
- Transport of lime, packed // lime production, milled, packed // row by Transoceanic ship, containers - GLO: 938; = kg_km_21
- Transport of magnesium oxide // magnesium oxide production // eu+efta+uk by Articulated lorry transport, Euro 4, Total weight >32 t - EU+EFTA+UK: 6.5; = kg_km_22
- Transport of magnesium oxide // magnesium oxide production // eu+efta+uk by Transoceanic ship, containers - GLO: 117; = kg_km_23
- Transport of oxygen // oxygen production // eu+efta+uk by Articulated lorry transport, Euro 4, Total weight >32 t - EU+EFTA+UK: 11.9; = kg_km_24
- Transport of oxygen // oxygen production // eu+efta+uk by Transoceanic ship, containers - GLO: 214; = kg_km_25
- Transport of sodium chlorate // sodium chlorate production // glo by Articulated lorry transport, Euro 4, Total weight >32 t - EU+EFTA+UK: 0.6; = kg_km_26
- Transport of sodium chlorate // sodium chlorate production // glo by Transoceanic ship, containers - GLO: 10.8; = kg_km_27
- Transport of sodium hydroxide // sodium hydroxide production // eu+efta+uk by Articulated lorry transport, Euro 4, Total weight >32 t - EU+EFTA+UK: 42.4; = kg_km_28
- Transport of sodium hydroxide // sodium hydroxide production // eu+efta+uk by Transoceanic ship, containers - GLO: 763; = kg_km_29
- Transport of sulphur // sulphur production // eu+efta+uk by Articulated lorry transport, Euro 4, Total weight >32 t - EU+EFTA+UK: 25.6; = kg_km_30
- Transport of sulphur // sulphur production // eu+efta+uk by Transoceanic ship, containers - GLO: 461; = kg_km_31
- Transport of sulphur dioxide // sulphur dioxide production // glo by Articulated lorry transport, Euro 4, Total weight >32 t - EU+EFTA+UK: 26.8; = kg_km_32
- Transport of sulphur dioxide // sulphur dioxide production // glo by Transoceanic ship, containers - GLO: 482; = kg_km_33
- Transport of sulphuric acid // sulphuric acid production // glo by Articulated lorry transport, Euro 4, Total weight >32 t - EU+EFTA+UK: 0.4; = kg_km_34
- Transport of sulphuric acid // sulphuric acid production // glo by Transoceanic ship, containers - GLO: 7.2; = kg_km_35
- Transport of biodegradable waste to landfill // landfill of biodegradable waste // eu+efta+uk by Articulated lorry transport, Euro 4, Total weight >32 t - EU+EFTA+UK: 0.266933; = kg_km_36
- Transport of industrial waste, average, not hazardous, to residual landfill // industrial waste, average, not hazardous, to residual landfill // eu+efta+uk by Articulated lorry transport, Euro 4, Total weight >32 t - EU+EFTA+UK: 0.1386; = kg_km_37
- Transport of waste (unspecified) // landfill of inert (steel) // eu+efta+uk by Articulated lorry transport, Euro 4, Total weight >32 t - EU+EFTA+UK: 0.06468; = kg_km_38
- Transport of biowaste // enclosed composting // eu+efta+uk by Articulated lorry transport, Euro 4, Total weight >32 t - EU+EFTA+UK: 0.266933; = kg_km_39
- Thermal energy (MJ) from Thermal energy from biogas - EU+EFTA+UK: 0.180493
- Thermal energy (MJ) from Thermal energy from biogas - ROW: 0.211883
- Thermal energy (MJ) from Thermal energy from hard coal - EU+EFTA+UK: 1.6652
- Thermal energy (MJ) from Thermal energy from hard coal - ROW: 1.9548
- Thermal energy (MJ) from Thermal energy from heavy fuel oil (HFO) - EU+EFTA+UK: 0.00974908
- Thermal energy (MJ) from Thermal energy from heavy fuel oil (HFO) - ROW: 0.0114446
- Thermal energy (MJ) from Thermal energy from light fuel oil (LFO) - EU+EFTA+UK: 0.138658
- Thermal energy (MJ) from Thermal energy from light fuel oil (LFO) - ROW: 0.162772
- Thermal energy (MJ) from Thermal energy from lignite - EU+EFTA+UK: 0.1448
- Thermal energy (MJ) from Thermal energy from lignite - ROW: 0.169982
- Thermal energy (MJ) from Thermal energy from LPG - EU+EFTA+UK: 0.00777098
- Thermal energy (MJ) from Thermal energy from LPG - ROW: 0.00912246
- Transport of softwood under bark // softwood forestry // world (without eu+efta+uk, us and ca) by Articulated lorry transport, Total weight >32 t, mix Euro 0-5 - ROW w/o EU+EFTA: 3260; = kg_km_40
- Transport of softwood under bark // softwood forestry // world (without eu+efta+uk, us and ca) by Transoceanic ship, containers - GLO: 58600; = kg_km_41
- Electricity from Electricity grid mix 1kV-60kV - CN: 0.542269
- Electricity from Electricity grid mix 1kV-60kV - RAS w/o CN: 0.594131
- bleached sulphite pulp, softwood // bleached sulphite pulp, softwood // world (without eu+efta+uk, us and ca), blackbox: 1
- bleached sulphite pulp, softwood // bleached sulphite pulp, softwood // world (without eu+efta+uk, us and ca), elementary: 1

## Impact indicators
- Eutrophication marine: 0.00840344
- Ecotoxicity, freshwater: 18.4083
- Land use: 416.489
- Water use: 1.39776
- Resource use, minerals and metals: 2.97954e-6
- Resource use, fossils: 23.2032
- Climate change: 1.85051
- Ozone depletion: 2.87296e-8
- Human toxicity, cancer: 7.33562e-10
- Human toxicity, non-cancer: 1.12054e-8
- EF-particulate Matter: 6.18785e-7
- Ionising radiation, human health: 0.0372747
- Photochemical ozone formation - human health: 0.0216446
- Acidification: 0.0340317
- Eutrophication, terrestrial: 0.0863412
- Eutrophication, freshwater: 7.21018e-5

## Deviations from the LCI method principle
The background data uses:
- the \xe2\x80\x9cRecycled content cut-off\xe2\x80\x9d approach to allocate end-of-life by-products and secondary materials. This allocation is explained in the description of the recycled content system model (http://www.ecoinvent.org/database/system-models-in-ecoinvent-3/cut-off-system-model/allocation-cut-off-by-classification.html).
OR
- EF compliant data

## Deviations from the LCI method approaches
Background data:
- the \xe2\x80\x9cRecycled content cut-off\xe2\x80\x9d approach to allocate end-of-life by-products and secondary materials. This allocation is explained in the description of the recycled content system model (http://www.ecoinvent.org/database/system-models-in-ecoinvent-3/cut-off-system-model/allocation-cut-off-by-classification.html). The ecoinvent database mostly relies on “Allocation – market values” apart for few exceptions particularly in the energy sector. ecoinvent energy data is replaced with EF3.0 core data as per the EF guidelines version 2.0.
OR
- EF compliant data

## Modelling constants
All modelling constants follow the requirements listed in the Tender Specifications 070201/2020/SER/ENV.B1. Completeness: There are no intentional cut-offs in the inventory no matter how small their contribution to all the EF impact categories is. Eventual cut-offs are in compliance with the Guide for EF compliant data sets (JRC 2020), i.e. only if below the 3% cut-off rule. Water use: water use is modelled at country level using separate flows for water withdrawal, water release and water evaporation. Handling multi-functional processes: the following PEF multi- functionality decision hierarchy is applied for resolving all multi- functionality problems: (1) subdivision or system expansion; (2) allocation based on a relevant underlying physical relationship (substitution may apply here); (3) allocation based on some other relationship. Direct land use change: GHG emissions from direct LUC allocated to good/service for 20 years after the LUC occurs, with IPCC default values. Carbon storage and delayed emissions: credits associated with temporary (carbon) storage or delayed emissions up to 300 years are not be considered. Emissions off-setting: are not included. Capital goods (including infrastructures) and their End of life: they are included. System boundaries: system boundaries include all processes linked to the product supply chain (e.g. maintenance). Time period: emissions and removals are modelled as if released or removed at the beginning of the assessment method. Fossil and biogenic carbon emissions and removals: removals and emissions are modelled as follows: All GHG emissions from fossil fuels (including peat and limestone) are modelled consistently with the most updated ILCD list of elementary flows. The non-fossil (biogenic) carbon flows are modelled consistently with the most updated ILCD list of elementary flows.

## Cut-off and completeness
There are no intentional cut-offs in the inventory no matter how small their contribution to all the EF impact categories is. Eventual cut-offs are in compliance with the Guide for EF compliant data sets (JRC 2020), i.e. only if below the 3% cut-off rule. The dataset dry mass and water balance has been checked to ensure the inventory is complete. Capital goods (e.g. infrastructure) and their end-of-life are included.

## Data selection and combination
These datasets include, in both their foreground and background data, links to EF3.0 compliant data.
The relevant background data on energy, transport, and End of Life are from the LCDN data node (http://lcdn.thinkstep.com/Node/).
All other background data in the supply of this product for which no EF3.0 process was available are from ecoinvent v3.7 database (www.ecoinvent.org) or other data sources.

## Data treatment and extrapolations
Several data sources have been used to model the inventory.

## Review details
Internal reviews have been asked to review the plausibility of the unit process, LCIA scores, and DQRs. Internal reviewers have also been asked to review the data for EF compliancy. The consortium is therefore responsible for aspects such as compliancy with the ILCD format, including validation in Look@LCI, and nomenclature.
Internal reviwers have been asked to judge based on the process name, that the unit process models in a complete and representative way the process in the requested location. The review encompassed the plausability of:
- exchanges with nature (elementary flows) as well as exchanges such as product and waste flows.
- meta information (general comment, technology comment, system boundaries, allocation, cut-off rules, etc.). Reviewers were asked to judge if the provided information is enough to understand the content of the process.
- LCIA scores
- DQRs including precision, technology, time and geography. As well as the overall DQR.
External reviewers have been asked to provide their expertise in the field of interest. External reviewers have been asked to review the unit process, including eventual methodological choices, the LCIA scores (provided with contribution scores as well), and DQRs. External reviewers have been provided all the information in a tool developed by the consortium for the purpose of this project.
External reviewers have been asked to judge based on the process name, that the unit process models in a complete and representative way the process in the requested location. The review encompassed:
- Plausability and completeness of exchanges with nature (elementary flows) as well as exchanges such as product and waste flows.
- Review of meta information (general comment, technology comment, system boundaries, allocation, cut-off rules, etc.). Reviewers were asked to judge if the provided information is enough to understand the content of the process.
- Review of properties (biogenic carbon and water content).
- Review of allocation keys.
- Plausability of LCIA scores calculated by the consortium.
- Plausability of DQRs including precision, technology, time and geography. As well as the overall DQR.

## Data sources
- Background Data for Representative products and organisations. EF 3.0 compliant (data stock)
- Hischier, R sulfite pulp production, bleached, RER, Allocation, cut-off by classification, ecoinvent database version 3.8.
- Bajpai, P. (2016). Chapter 3 - Pulp and paper production processes and energy overview. Pulp and Paper Industry. Pages 15-49. ISBN 9780128034118. https://doi.org/10.1016/B978-0-12-803411-8.00003-2. Elsevier.
- Suhr et al. (2015). Best Available Techniques (BAT) Reference Document for the Production of Pulp, Paper and Board. Industrial Emissions Directive 2010/75/EU (Integrated Pollution Prevention and Control). European Commission. Joint Research Centre.

## Intended applications
Implementation of regular Product Environmental Footprint (PEF) studies and Organisation Environmental Footprint (OEF) studies exclusively under the specified Product groups and sectors as defined in the Product Environmental Footprint Category Rules (PEFCR) and Organisation Environmental Footprint Sectorial Rules (OEFSR) listed in http://ec.europa.eu/environment/eussd/smgp/PEFCR_OEFSR.htm
