# cleaning, component manufacturing, elementary; brushing, trimming, waxing; production mix, at plant; service

Dataset: ILCD process, Unit process, single operation
Geography: GLO
Reference year: 2019
Valid until: 2024
Classification: Other Services / Other services
LCI method principle: Attributional
LCI method approaches: Allocation - market value
Completeness: All relevant flows quantified
Project: Provision of process-based 3.0 Environmental Footprint-compliant life cycle inventory datasets - Apparel 1 - contract number 070201/2020/840291/SER/ENV.B.1
Generated by: Life Cycle Indonesia
Owner: PRé Sustainability B.V.
Compliance: Environmental Footprint non-primary supporting data set; Environmental Footprint 3.1
Amounts: no units in this file; such an amount is in the reference unit of its flow, which a separate flow dataset defines
copyright: true
licenseType: Free of charge for some user types or use types
accessRestrictions: Free of charge for all final users implementing a regular Product Environmental Footprint (PEF) studies and Organisation Environmental Footprint (OEF) studies exclusively under the specified Product groups and sectors as defined in the Product Environmental Footprint Category Rules (PEFCR) and Organisation Environmental Footprint Sectorial Rules (OEFSR) listed in http://ec.europa.eu/environment/eussd/smgp/PEFCR_OEFSR.htm and in accordance with the terms and conditions of the EULA (available at https://ecoinvent.lca-data.com/) exclusively until 31st December 2024. Any use of this dataset or any derivative data not within the specific context of one of the PEF/OEF projects or after the end of 2024 is not permitted.

## General comment
Notice: this data set supersedes the EF3.0-compliant version (see link under "preceding data set version" below calculated with the EF3.0). The life cycle inventory is not changed from the original EF3.0 data set. The LCIA results are calculated based on the EF3.1 methods which provide updated characterisation factors in the following impact categories: Climate Change, Ecotoxicity freshwater, Photochemical Ozone Formation, Acidification, Human Toxicity non-cancer, and Human Toxicity cancer. The review report and the data quality ratings refer to the original results. The data set has been updated by the European Commission on the basis of the original EF3.0 data set delivered by the data provider.This sub-process has limited documentation only. For all detailed documentation of the full model to which this data set belongs (such as DQRs, review reports and other technical documentation), please see this process: cleaning, component manufacturing - GLO []

## Technology and included processes
This process includes cleaning (buffing, trimming and waxing) and washing of shoes at the very end of the manufacturing process to give them a more polished look. Aside from buffing, trimming, and waxing, this dataset also include sole cleaning process done by water, toothbrush and cloth. Toothbrush and cloth is not included in the model as the amount is not significant (since the amount would be divided by its lifetime).

The model represents the process itself, hence the input raw materials are not included in the model. The user will use this dataset along with the input raw materials. The input raw materials will be footwear that will be cleaned with not only wax but also water and chemicals. The water, chemicals, energy consumption, and infrastructure of the machine are included. There is no direct emission to air since the emission comes from electricity usage, while hazardous waste comes from waste lube oil and emission to water comes from washing solution. In the model, the energy sources of machines used solely from electricity. For washing, the water used is tap water and the chemicals are surfactant and acetic acid. For buffing and trimming machine, the consumption of lubricating oil using a thermobonding oven machine as a proxy. Whereas the waxing machine used is a hand held machine and the size is relatively small compare to other industrial machine, the lube oil consumption is assumed to be very little and therefore not significant in this process. the waste lube oil will be treated as incinerated hazardous waste. The waste water after washing is treated as residential wastewater and goes to waste water treatment.

## Reference product
- cleaning, component manufacturing // cleaning, component manufacturing // glo, elementary: 1

## Impact indicators
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
## Deviations from the LCI method principle
The background data use the \xe2\x80\x9cRecycled content cut-off\xe2\x80\x9d approach to allocate end-of-life by-products and secondary materials. This allocation is explained in the description of the recycled content system model (http://www.ecoinvent.org/database/system-models-in-ecoinvent-3/cut-off-system-model/allocation-cut-off-by-classification.html).

## Deviations from the LCI method approaches
Background data:
- the \xe2\x80\x9cRecycled content cut-off\xe2\x80\x9d approach to allocate end-of-life by-products and secondary materials. This allocation is explained in the description of the recycled content system model (http://www.ecoinvent.org/database/system-models-in-ecoinvent-3/cut-off-system-model/allocation-cut-off-by-classification.html). The ecoinvent database mostly relies on “Allocation – market values” apart for few exceptions particularly in the energy sector. ecoinvent energy data is replaced with EF3.0 core data as per the EF guidelines version 2.0.
OR
- EF compliant data

## Modelling constants
All modelling constants follow the requirements listed in the Tender Specifications ENV.B.1/SER/2016/0038vl. Completeness: All known environmental flows are included. All known resource uses and emissions are listed in the inventory. Water use: water use is modelled at country level using separate flows for water withdrawal, water release and water evaporation. Cut-off: All known environmental flows are included. All known resource uses and emissions are listed in the inventory. Handling multi-functional processes: the following PEF multi- functionality decision hierarchy is applied for resolving all multi- functionality problems: (1) subdivision or system expansion; (2) allocation based on a relevant underlying physical relationship (substitution may apply here); (3) allocation based on some other relationship. Direct land use change: GHG emissions from direct LUC allocated to good/service for 20 years after the LUC occurs, with IPCC default values. Carbon storage and delayed emissions: credits associated with temporary (carbon) storage or delayed emissions up to 300 years are not be considered. Emissions off-setting: are not included. Capital goods (including infrastructures) and their End of life: they are included. System boundaries: system boundaries include all processes linked to the product supply chain (e.g. maintenance). Time period: emissions and removals are modelled as if released or removed at the beginning of the assessment method. Fossil and biogenic carbon emissions and removals: removals and emissions are modelled as follows: All GHG emissions from fossil fuels (including peat and limestone) are modelled consistently with the most updated ILCD list of elementary flows. The non-fossil (biogenic) carbon flows are modelled consistently with the most updated ILCD list of elementary flows.

## Cut-off and completeness
All known environmental flows are included. All known resource uses and emissions are listed in the inventory. The dataset dry mass balance has been checked to ensure the inventory is complete. Capital goods (e.g. infrastructure) and their end-of-life are included.

## Data selection and combination
These datasets include, in both their foreground and background data, links to EF3.0 compliant data.
The relevant background data on energy, transport, and End of Life are from the LCDN data node (http://lcdn.thinkstep.com/Node/).
All other background data in the supply of this product for which no EF3.0 process was available are from ecoinvent v3.7 database (www.ecoinvent.org) or other data sources.

## Data treatment and extrapolations
Several data sources have been used to model the inventory.

## Use advice
This data set is a supporting sub-data set and must be used exclusively as sub-data set of its corresponding level-1 partly disaggregated data set (see “General comment” field for exact name and UUID).

## Data sources
- Background Data for Representative products and organisations. EF 3.0 compliant (data stock)
- UN Data (2018) Statistics Data for Lubricants Productions, http://data.un.org/Data.aspx?q=Lubricants&d=EDATA&f=cmID%3aLU, United Nations Statistics Division, Global.
- Lebon (2021) Nonwoven Oven Machine, Catalog and Company Messages, Qingdao Lebon Industry Co., Ltd., China
- Quantis Data (2015)
- Mary Marlowe Leverette (2020) How to Clean 5 Types of Shoes Fast, https://www.thespruce.com/how-to-clean-your-shoes-4164257, The Spruce, New York, Unites States
- Dr. Walter Scharf and Dr. Charles Malerich (2020) Determination of Acetic Acid Contain of Vinegar, https://weissman.baruch.cuny.edu/wp-content/uploads/sites/20/2020/09/vinegar.pdf, New York, United States
- Dong Guan Yong Hui Leather Machinery Co. Ltd (2021) Footwear shoe shoemaking polishing buffing machine, https://yonghuimachine.m.ec21.com/mobile/productList.jsp , Dong Guan Yong Hui Leather Machinery Co., Ltd, Guangdong, China https://yonghuimachine.en.alibaba.com/?fbclid=IwAR0HJgryZw7040eDq4RJIGskdafJxcY-Tgbb2uWqTir7e70RklJHI-fILNk
- MM Solution (2021) P52S4 semiautomatic electronic soles edge trimming machine https://www.solesmachine.com/product/p52s4/ MM Solution Srl. Italy
- HEIMWERT (2021) shoe shine machine, https://test-vergleiche.com/en/produkt/heimwert/schuhputzmaschine-heimwert, HEIMWERT Bauträger GmbH, Linz, Austria
- Wyrbrit (2018) How to Wax Your Shoe, https://wyrbrit.com/how-to-wax-your-shoe/, United States

## Intended applications
Implementation of regular Product Environmental Footprint (PEF) studies and Organisation Environmental Footprint (OEF) studies exclusively under the specified Product groups and sectors as defined in the Product Environmental Footprint Category Rules (PEFCR) and Organisation Environmental Footprint Sectorial Rules (OEFSR) listed in http://ec.europa.eu/environment/eussd/smgp/PEFCR_OEFSR.htm
