# pvc leather production, elementary; technology mix; at plant; PVC leather of thickness 1.6 mm (PVC foam 1mm (0.41 g/cm3), Cotton backing of 0.5 mm (1 g/cm3), and PVC veneer of 0.1 mm (1.23g/cm3))

Dataset: ILCD process, Unit process, single operation
Geography: GLO
Reference year: 2019
Valid until: 2024
Classification: Other Services / Other services
LCI method principle: Attributional
LCI method approaches: Allocation - market value
Completeness: All relevant flows quantified
Project: Provision of process-based 3.0 Environmental Footprint-compliant life cycle inventory datasets - Apparel 1 - contract number 070201/2020/840291/SER/ENV.B.1
Generated by: PRé Sustainability B.V.
Owner: PRé Sustainability B.V.
Compliance: Environmental Footprint non-primary supporting data set; Environmental Footprint 3.1
Amounts: no units in this file; such an amount is in the reference unit of its flow, which a separate flow dataset defines
copyright: true
licenseType: Free of charge for some user types or use types
accessRestrictions: Free of charge for all final users implementing a regular Product Environmental Footprint (PEF) studies and Organisation Environmental Footprint (OEF) studies exclusively under the specified Product groups and sectors as defined in the Product Environmental Footprint Category Rules (PEFCR) and Organisation Environmental Footprint Sectorial Rules (OEFSR) listed in http://ec.europa.eu/environment/eussd/smgp/PEFCR_OEFSR.htm and in accordance with the terms and conditions of the EULA (available at https://ecoinvent.lca-data.com/) exclusively until 31st December 2024. Any use of this dataset or any derivative data not within the specific context of one of the PEF/OEF projects or after the end of 2024 is not permitted.

## General comment
Notice: this data set supersedes the EF3.0-compliant version (see link under "preceding data set version" below calculated with the EF3.0). The life cycle inventory is not changed from the original EF3.0 data set. The LCIA results are calculated based on the EF3.1 methods which provide updated characterisation factors in the following impact categories: Climate Change, Ecotoxicity freshwater, Photochemical Ozone Formation, Acidification, Human Toxicity non-cancer, and Human Toxicity cancer. The review report and the data quality ratings refer to the original results. The data set has been updated by the European Commission on the basis of the original EF3.0 data set delivered by the data provider.This sub-process has limited documentation only. For all detailed documentation of the full model to which this data set belongs (such as DQRs, review reports and other technical documentation), please see this process: pvc leather production - GLO []

## Technology and included processes
Includes:
- Electrical energy (grid mix based on production of plastic coated texitiles, OEC, 2019)
- Machinery on production line (a typical 200 t line, using textile machinery as a proxy)
- Waste (landfill of plastic waste), based on estimates of off-cuts from film evidence

Does not include:
- Water use, due to lack of data
- Direct emissions to air/water from PVC leather production facility itself, due to lack of data

## Reference product
- pvc leather // pvc leather production // glo, elementary: 1

## Impact indicators
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
## Deviations from the LCI method principle
The background data uses:
- the \xe2\x80\x9cRecycled content cut-off\xe2\x80\x9d approach to allocate end-of-life by-products and secondary materials. This allocation is explained in the description of the recycled content system model (http://www.ecoinvent.org/database/system-models-in-ecoinvent-3/cut-off-system-model/allocation-cut-off-by-classification.html).
OR
- EF compliant data

## Deviations from the LCI method approaches
Background data:
- the \xe2\x80\x9cRecycled content cut-off\xe2\x80\x9d approach to allocate end-of-life by-products and secondary materials. This allocation is explained in the description of the recycled content system model (http://www.ecoinvent.org/database/system-models-in-ecoinvent-3/cut-off-system-model/allocation-cut-off-by-classification.html). The ecoinvent database mostly relies on “Allocation – market values” apart for few exceptions particularly in the energy sector. ecoinvent energy data is replaced with EF3.0 core data as per the EF guidelines version 2.0.
OR
- EF compliant data

## Modelling constants
All modelling constants follow the requirements listed in the Tender Specifications 070201/2020/SER/ENV.B1. Completeness: There are no intentional cut-offs in the inventory no matter how small their contribution to all the EF impact categories is. Eventual cut-offs are in compliance with the Guide for EF compliant data sets (JRC 2020), i.e. only if below the 3% cut-off rule. Water use: water use is modelled at country level using separate flows for water withdrawal, water release and water evaporation. Handling multi-functional processes: the following PEF multi- functionality decision hierarchy is applied for resolving all multi- functionality problems: (1) subdivision or system expansion; (2) allocation based on a relevant underlying physical relationship (substitution may apply here); (3) allocation based on some other relationship. Direct land use change: GHG emissions from direct LUC allocated to good/service for 20 years after the LUC occurs, with IPCC default values. Carbon storage and delayed emissions: credits associated with temporary (carbon) storage or delayed emissions up to 300 years are not be considered. Emissions off-setting: are not included. Capital goods (including infrastructures) and their End of life: they are included. System boundaries: system boundaries include all processes linked to the product supply chain (e.g. maintenance). Time period: emissions and removals are modelled as if released or removed at the beginning of the assessment method. Fossil and biogenic carbon emissions and removals: removals and emissions are modelled as follows: All GHG emissions from fossil fuels (including peat and limestone) are modelled consistently with the most updated ILCD list of elementary flows. The non-fossil (biogenic) carbon flows are modelled consistently with the most updated ILCD list of elementary flows.

## Cut-off and completeness
There are no intentional cut-offs in the inventory no matter how small their contribution to all the EF impact categories is. Eventual cut-offs are in compliance with the Guide for EF compliant data sets (JRC 2020), i.e. only if below the 3% cut-off rule. The dataset dry mass and water balance has been checked to ensure the inventory is complete. Capital goods (e.g. infrastructure) and their end-of-life are included.

## Data selection and combination
These datasets include, in both their foreground and background data, links to EF3.0 compliant data.
The relevant background data on energy, transport, and End of Life are from the LCDN data node (http://lcdn.thinkstep.com/Node/).
All other background data in the supply of this product for which no EF3.0 process was available are from ecoinvent v3.7 database (www.ecoinvent.org) or other data sources.

## Data treatment and extrapolations
Several data sources have been used to model the inventory.

## Use advice
This data set is a supporting sub-data set and must be used exclusively as sub-data set of its corresponding level-1 partly disaggregated data set (see “General comment” field for exact name and UUID).

## Data sources
- Background Data for Representative products and organisations. EF 3.0 compliant (data stock)
- Doma, A.S., Hassan, H.H., 2019. The Vulcanization Characteristics and Physical Properties of Carbon Black Loaded–Polymeric Composites: I. N-220 Black Loaded PVC/EPDM Composites. Am. J. Chem. 9, 103–108.
- Fine, J., Harrington, G.N., 1982. Production of synthetic leather.
- Grossman, R.F., 2008. Handbook of Vinyl Formulating. John Wiley & Sons.
- Gurera, D., Bhushan, B., 2018. Fabrication of Bioinspired Superliquiphobic Synthetic Leather with Self-Cleaning and Low Adhesion. Colloids Surf. Physicochem. Eng. Asp. 545. https://doi.org/10.1016/j.colsurfa.2018.02.052
- Henan Kruger Rango Machinery, 2021. Multi Temperature Control System Conveyor Tunnel Hot Air Curing Drying Oven on Alibaba.com [WWW Document]. URL https://www.alibaba.com/product-detail/Multi-temperature-control-system-Conveyor-Tunnel_1600157931187.html?spm=a2700.galleryofferlist.normal_offer.d_image.743c47afEPmUkG (accessed 8.6.21).
- JWELL Intelligent Machinery Co.,Ltd, 2021. PVC Homoegeneous LVT SPC WPC Floor Extrusion Line - China JWELL Intelligent Machinery Co.,Ltd [WWW Document]. ecplaza.net. URL https://www.ecplaza.net/products/pvc-homoegeneous-lvt-spc-wpc-floor_4513514 (accessed 8.6.21).
- Kroushl, P., 2004. The Flame Retarding and Smoke Suppression of Flexible PVC.
- Nguyen, T.D., Nguyen, C.T., Tran, V.T.T., Nguyen, G.V., Le, H.V., Tran, L.D., Bach, G.L., Thai, H., 2018. Enhancement of the Thermomechanical Properties of a Fly Ash- and Carbon Black-Filled Polyvinyl Chloride Composite by Using Epoxidized Soybean Oil as a Secondary Bioplasticizer. Int. J. Polym. Sci. 2018, 1–8. https://doi.org/10.1155/2018/8428736
- OEC, 2021, "Plastic Coated Textile Fabric (HS: 5903) Product Trade, Exporters and Importers | OEC - The Observatory of Economic Complexity", https://oec.world/en/profile/hs92/plastic-coated-textile-fabric (accessed 8.6.21)

## Intended applications
Implementation of regular Product Environmental Footprint (PEF) studies and Organisation Environmental Footprint (OEF) studies exclusively under the specified Product groups and sectors as defined in the Product Environmental Footprint Category Rules (PEFCR) and Organisation Environmental Footprint Sectorial Rules (OEFSR) listed in http://ec.europa.eu/environment/eussd/smgp/PEFCR_OEFSR.htm
