# viscose fibre; recycling; post-consumer; recycling process (excl input material)

Dataset: ILCD process, Partly terminated system
Geography: GLO
Reference year: 2017
Valid until: 2024
Classification: End-of-life treatment / Material recycling
LCI method principle: Attributional
LCI method approaches: Allocation - market value
Completeness: All relevant flows quantified
Project: Provision of process-based 3.0 Environmental Footprint-compliant life cycle inventory datasets - Renewable materials - contract number 070201/2020/840085/SER/ENV.B.1
Generated by: ACV Brasil
Owner: ecoinvent
Compliance: ILCD Data Network - Entry-level; Suggestions for updating the PEF method 2019; ISO 14040 Environmental Management – Life Cycle Assessment – Principles and Framework, 2006; ISO 14044:2006. Environmental Management – Life Cycle Assessment – Requirements and guidelines.; Environmental Footprint 3.1
Review: Dependent internal review by Hans Blonk, Emilia Moreno Ruiz; Independent review panel by Laura Batlle Bayer
Data quality: Overall quality: Good; Time representativeness: Very good; Geographical representativeness: Fair; Technological representativeness: Very good; Precision: Good; Methodological appropriateness and consistency: Not applicable
Amounts: no units in this file; such an amount is in the reference unit of its flow, which a separate flow dataset defines
copyright: true
licenseType: Free of charge for some user types or use types
accessRestrictions: Free of charge for all final users implementing a regular Product Environmental Footprint (PEF) studies and Organisation Environmental Footprint (OEF) studies exclusively under the specified Product groups and sectors as defined in the Product Environmental Footprint Category Rules (PEFCR) and Organisation Environmental Footprint Sectorial Rules (OEFSR) listed in http://ec.europa.eu/environment/eussd/smgp/PEFCR_OEFSR.htm and in accordance with the terms and conditions of the EULA (available at https://ecoinvent.lca-data.com/) exclusively until 31st December 2024. Any use of this dataset or any derivative data not within the specific context of one of the PEF/OEF projects or after the end of 2024 is not permitted.

## General comment
Notice: this data set supersedes the EF3.0-compliant version (see link under "preceding data set version" below calculated with the EF3.0). The life cycle inventory is not changed from the original EF3.0 data set. The LCIA results are calculated based on the EF3.1 methods which provide updated characterisation factors in the following impact categories: Climate Change, Ecotoxicity freshwater, Photochemical Ozone Formation, Acidification, Human Toxicity non-cancer, and Human Toxicity cancer. The review report and the data quality ratings refer to the original results. The data set has been updated by the European Commission on the basis of the original EF3.0 data set delivered by the data provider.This dataset represents the recycling of post-consumer viscose textiles.

## Technology and included processes
Post-consumer viscose fibre textiles are collected and transported to sorting facilities, where non-textile waste is removed and destined to landfills. The sorted textiles are transported to the mechanical recycler to be cut and recycled. The spinning process for yarn production is not included.
The activity starts when the raw materials enter the process.
Materials entering the process are included as well as energy uses and waste treatment.
References:
Spathas, T., 2017. The Environmental Performance of High Value Recycling for the Fashion Industry – LCA for Four Case Studies. Master’s thesis. Chalmers University of Technology, Sweden. Available at: https://publications.lib.chalmers.se/records/fulltext/250175/250175.pdf
Schmidt, A., Watson, D., Roos, S., Askham, C., Poulsen, P.B., 2016. Gaining benefits from discarded textiles e LCA of different treatment pathways. TemaNord 2016, 537. https://doi.org/10.6027/TN2016-537. Nordic Council of Ministers.

## Parameters
- kg_0: 0.037
  Mass in kg, for textiles to landfill // landfill of textile // eu+efta+uk; Articulated lorry transport, Euro 4, Total weight >32 t; EU+EFTA+UK
- km_0: 5367.57
  Distance in km, for textiles to landfill // landfill of textile // eu+efta+uk; Articulated lorry transport, Euro 4, Total weight >32 t; EU+EFTA+UK
- kg_km_0: 198.6; = kg_0*km_0
  Transport amount in km*km, for textiles to landfill // landfill of textile // eu+efta+uk; Articulated lorry transport, Euro 4, Total weight >32 t; EU+EFTA+UK
- kg_1: 0.037
  Mass in kg, for textiles to landfill // landfill of textile // eu+efta+uk; Articulated lorry transport, Total weight >32 t, mix Euro 0-5; ROW w/o EU+EFTA
- km_1: 5367.57
  Distance in km, for textiles to landfill // landfill of textile // eu+efta+uk; Articulated lorry transport, Total weight >32 t, mix Euro 0-5; ROW w/o EU+EFTA
- kg_km_1: 198.6; = kg_1*km_1
  Transport amount in km*km, for textiles to landfill // landfill of textile // eu+efta+uk; Articulated lorry transport, Total weight >32 t, mix Euro 0-5; ROW w/o EU+EFTA

## Reference product
- viscose fibre, recycled, post-consumer // viscose fibre // glo: 1

## Inputs
- Electricity from Electricity grid mix 1kV-60kV - AU: 0.0386
- Electricity from Electricity grid mix 1kV-60kV - EU+EFTA+UK: 0.568
- Electricity from Electricity grid mix 1kV-60kV - NZ: 0.0073
- Electricity from Electricity grid mix 1kV-60kV - RAF: 0.1241
- Electricity from Electricity grid mix 1kV-60kV - RAS w/o CN: 1.7847
- Electricity from Electricity grid mix 1kV-60kV - RNA: 0.8312
- Electricity from Electricity grid mix 1kV-60kV - RSA: 0.282
- Electricity from Electricity grid mix 1kV-60kV - RU: 0.1662
- Thermal energy (MJ) from Thermal energy from natural gas - EU+EFTA+UK: 0.0003
- Thermal energy (MJ) from Thermal energy from natural gas - ROW: 0.0006
- Transport of textiles to landfill // landfill of textile // eu+efta+uk by Articulated lorry transport, Euro 4, Total weight >32 t - EU+EFTA+UK: 198.6; = kg_km_0
- Transport of textiles to landfill // landfill of textile // eu+efta+uk by Articulated lorry transport, Total weight >32 t, mix Euro 0-5 - ROW w/o EU+EFTA: 198.6; = kg_km_1
- viscose fibre, recycled, post-consumer // viscose fibre // glo, blackbox: 1
- viscose fibre, recycled, post-consumer // viscose fibre // glo, elementary: 1

## Impact indicators
- Eutrophication marine: 0.00079344
- Ecotoxicity, freshwater: 4.75121
- Land use: 1.12761
- Water use: 0.207696
- Resource use, minerals and metals: 9.66884e-8
- Resource use, fossils: 10.2934
- Climate change: 0.759578
- Ozone depletion: 5.78048e-11
- Human toxicity, cancer: 3.12766e-10
- Human toxicity, non-cancer: 3.58884e-9
- EF-particulate Matter: 8.85555e-8
- Ionising radiation, human health: 0.0558742
- Photochemical ozone formation - human health: 0.00225373
- Acidification: 0.00550744
- Eutrophication, terrestrial: 0.00843842
- Eutrophication, freshwater: 1.06571e-6

## Deviations from the LCI method principle
The background data uses:
- the \xe2\x80\x9cRecycled content cut-off\xe2\x80\x9d approach to allocate end-of-life by-products and secondary materials. This allocation is explained in the description of the recycled content system model (http://www.ecoinvent.org/database/system-models-in-ecoinvent-3/cut-off-system-model/allocation-cut-off-by-classification.html).
OR
- EF compliant data

## Deviations from the LCI method approaches
Background data:
- the \xe2\x80\x9cRecycled content cut-off\xe2\x80\x9d approach to allocate end-of-life by-products and secondary materials. This allocation is explained in the description of the recycled content system model (http://www.ecoinvent.org/database/system-models-in-ecoinvent-3/cut-off-system-model/allocation-cut-off-by-classification.html). The ecoinvent database mostly relies on “Allocation – market values” apart for few exceptions particularly in the energy sector. ecoinvent energy data is replaced with EF3.0 core data as per the EF guidelines version 2.0.
OR
- EF compliant data

## Modelling constants
All modelling constants follow the requirements listed in the Tender Specifications 070201/2020/SER/ENV.B1. Completeness: There are no intentional cut-offs in the inventory no matter how small their contribution to all the EF impact categories is. Eventual cut-offs are in compliance with the Guide for EF compliant data sets (JRC 2020), i.e. only if below the 3% cut-off rule. Water use: water use is modelled at country level using separate flows for water withdrawal, water release and water evaporation. Handling multi-functional processes: the following PEF multi- functionality decision hierarchy is applied for resolving all multi- functionality problems: (1) subdivision or system expansion; (2) allocation based on a relevant underlying physical relationship (substitution may apply here); (3) allocation based on some other relationship. Direct land use change: GHG emissions from direct LUC allocated to good/service for 20 years after the LUC occurs, with IPCC default values. Carbon storage and delayed emissions: credits associated with temporary (carbon) storage or delayed emissions up to 300 years are not be considered. Emissions off-setting: are not included. Capital goods (including infrastructures) and their End of life: they are included. System boundaries: system boundaries include all processes linked to the product supply chain (e.g. maintenance). Time period: emissions and removals are modelled as if released or removed at the beginning of the assessment method. Fossil and biogenic carbon emissions and removals: removals and emissions are modelled as follows: All GHG emissions from fossil fuels (including peat and limestone) are modelled consistently with the most updated ILCD list of elementary flows. The non-fossil (biogenic) carbon flows are modelled consistently with the most updated ILCD list of elementary flows.

## Cut-off and completeness
There are no intentional cut-offs in the inventory no matter how small their contribution to all the EF impact categories is. Eventual cut-offs are in compliance with the Guide for EF compliant data sets (JRC 2020), i.e. only if below the 3% cut-off rule. The dataset dry mass and water balance has been checked to ensure the inventory is complete. Capital goods (e.g. infrastructure) and their end-of-life are included.

## Data selection and combination
These datasets include, in both their foreground and background data, links to EF3.0 compliant data.
The relevant background data on energy, transport, and End of Life are from the LCDN data node (http://lcdn.thinkstep.com/Node/).
All other background data in the supply of this product for which no EF3.0 process was available are from ecoinvent v3.7 database (www.ecoinvent.org) or other data sources.

## Data treatment and extrapolations
Several data sources have been used to model the inventory.

## Review details
Internal reviews have been asked to review the plausibility of the unit process, LCIA scores, and DQRs. Internal reviewers have also been asked to review the data for EF compliancy. The consortium is therefore responsible for aspects such as compliancy with the ILCD format, including validation in Look@LCI, and nomenclature.
Internal reviwers have been asked to judge based on the process name, that the unit process models in a complete and representative way the process in the requested location. The review encompassed the plausability of:
- exchanges with nature (elementary flows) as well as exchanges such as product and waste flows.
- meta information (general comment, technology comment, system boundaries, allocation, cut-off rules, etc.). Reviewers were asked to judge if the provided information is enough to understand the content of the process.
- LCIA scores
- DQRs including precision, technology, time and geography. As well as the overall DQR.
External reviewers have been asked to provide their expertise in the field of interest. External reviewers have been asked to review the unit process, including eventual methodological choices, the LCIA scores (provided with contribution scores as well), and DQRs. External reviewers have been provided all the information in a tool developed by the consortium for the purpose of this project.
External reviewers have been asked to judge based on the process name, that the unit process models in a complete and representative way the process in the requested location. The review encompassed:
- Plausability and completeness of exchanges with nature (elementary flows) as well as exchanges such as product and waste flows.
- Review of meta information (general comment, technology comment, system boundaries, allocation, cut-off rules, etc.). Reviewers were asked to judge if the provided information is enough to understand the content of the process.
- Review of properties (biogenic carbon and water content).
- Review of allocation keys.
- Plausability of LCIA scores calculated by the consortium.
- Plausability of DQRs including precision, technology, time and geography. As well as the overall DQR.

## Data sources
- Background Data for Representative products and organisations. EF 3.0 compliant (data stock)
- Spathas, T., 2017. The Environmental Performance of High Value Recycling for the Fashion Industry – LCA for Four Case Studies. Master’s thesis. Chalmers University of Technology, Sweden. Available at: https://publications.lib.chalmers.se/records/fulltext/250175/250175.pdf
- Schmidt, A., Watson, D., Roos, S., Askham, C., Poulsen, P.B., 2016. Gaining benefits from discarded textiles e LCA of different treatment pathways. TemaNord 2016, 537. https://doi.org/10.6027/TN2016-537. Nordic Council of Ministers.

## Intended applications
Implementation of regular Product Environmental Footprint (PEF) studies and Organisation Environmental Footprint (OEF) studies exclusively under the specified Product groups and sectors as defined in the Product Environmental Footprint Category Rules (PEFCR) and Organisation Environmental Footprint Sectorial Rules (OEFSR) listed in http://ec.europa.eu/environment/eussd/smgp/PEFCR_OEFSR.htm
