# hair; technology mix; production mix, at farm; 1 kg of camel hair

Dataset: ILCD process, Partly terminated system
Geography: GLO
Reference year: 2014
Valid until: 2024
Classification: Materials production / Food and renewable raw materials
LCI method principle: Attributional
LCI method approaches: Allocation - market value
Completeness: All relevant flows quantified
Project: Provision of process-based 3.0 Environmental Footprint-compliant life cycle inventory datasets - Renewable materials - contract number 070201/2020/840085/SER/ENV.B.1
Generated by: Blonk Sustainability Tools
Owner: Blonk Sustainability Tools
Compliance: ILCD Data Network - Entry-level; Suggestions for updating the PEF method 2019; ISO 14040 Environmental Management – Life Cycle Assessment – Principles and Framework, 2006; ISO 14044:2006. Environmental Management – Life Cycle Assessment – Requirements and guidelines.; Environmental Footprint 3.1
Review: Dependent internal review by Lucia Valsasina, Emilia Moreno Ruiz; Independent review panel by Philippa Notten
Data quality: Overall quality: Very good; Time representativeness: Very good; Geographical representativeness: Very good; Technological representativeness: Very good; Precision: Good; Methodological appropriateness and consistency: Not applicable
Amounts: no units in this file; such an amount is in the reference unit of its flow, which a separate flow dataset defines
copyright: true
licenseType: Free of charge for some user types or use types
accessRestrictions: Free of charge for all final users implementing a regular Product Environmental Footprint (PEF) studies and Organisation Environmental Footprint (OEF) studies exclusively under the specified Product groups and sectors as defined in the Product Environmental Footprint Category Rules (PEFCR) and Organisation Environmental Footprint Sectorial Rules (OEFSR) listed in http://ec.europa.eu/environment/eussd/smgp/PEFCR_OEFSR.htm and in accordance with the terms and conditions of the EULA (available at https://ecoinvent.lca-data.com/) exclusively until 31st December 2024. Any use of this dataset or any derivative data not within the specific context of one of the PEF/OEF projects or after the end of 2024 is not permitted.

## General comment
Notice: this data set supersedes the EF3.0-compliant version (see link under "preceding data set version" below calculated with the EF3.0). The life cycle inventory is not changed from the original EF3.0 data set. The LCIA results are calculated based on the EF3.1 methods which provide updated characterisation factors in the following impact categories: Climate Change, Ecotoxicity freshwater, Photochemical Ozone Formation, Acidification, Human Toxicity non-cancer, and Human Toxicity cancer. The review report and the data quality ratings refer to the original results. The data set has been updated by the European Commission on the basis of the original EF3.0 data set delivered by the data provider.Camel hair is a natural fiber of animal origin produced by large camelids (camels or dromedaries) present in the desert and semi-arid belt of Africa and Central Asia. Camels are raised for multiple purposes (e.g. racing, army, baggage, milk, fighting etc). The population is growing over the last decades so for this dataset it is assumed that most camels are anthropogenic (higher than the natural stock) so a full cut-off cannot be justified (in contradiction to wild caught fish). Most camels are not fed feed concentrates but are free-ranging animals. Main production countries of camel hair are China, Mongolia, Iran, Afghanistan, Russia, New Zealand, Tibet and Australia (CCMI, 2016). Because the digestive anatomy has some similarities with ruminants, camels produce biogenic methane emissions (Dittmann et al,2014) . Economic shares, for farmers in Pakistan (please note that this is not a main production country), for camel meat, milk, hides and hair is about 61%, 75%, 52% and 26%, respectively. Camel hair can be collected by hand. Gathering the fiber that is shed naturally during the 6/8 week moulting season in late spring. Their wool is taken by shearing or combing. Its properties and its rarity make it a noble and precious product. Among the large camelids, the wool is of better quality and more abundant in the Bactrian camel than in the dromedary, probably because the former must spend the winter in cold countries, which gives it a fleece with longer fibers. After shearing or manual recovery, camel wool contains only 75 to 85% fibers, the rest being made up of fat (4 to 5%) and especially sand and dust (15 to 25%). The spun fibers are intended for the manufacture of clothing, blankets, tents or carpets (cirad, 2006).The harvest of the camel hair happens in Asia but the processing can happen globally that's why a Glo electricty mix was used based on ecoinvent process Electricity, medium voltage {GLO}| market group for | APOS, U.

## Technology and included processes
This dataset represents the production of 1 kg of camel hair. The fibres are harvested by pulling or by gathering the clumps shed onto the ground. The activity starts with scouring the greasy camel hair and separating the fat, sand, and dust. The scouring process is similar to sheep wool scouring. The second step is spinning the clean camel hair followed by dyeing. Most fabrics are produced in the fibers’ natural color, known as ‘camel’. Some are dyed to a darker shade of brown. No transport of camel hair between different processing stages is taken into account as it was assumed that different processing stages take place at the same ''factory''. Transport of chemicals was taken into account. Greasy Camel Hair is assumed to be an input with no burden because the animals are free ranging so no external inputs are modelled. Only CH4 emissions are modelled following an economic allocation of 26% based on Dittmaan et al, 2016.

## Parameters
- kg_0: 9.18e-5
  Mass in kg, for sodium sulphate // sodium sulphate production // eu+efta+uk; Articulated lorry transport, Euro 4, Total weight >32 t; EU+EFTA+UK
- km_0: 1000
  Distance in km, for sodium sulphate // sodium sulphate production // eu+efta+uk; Articulated lorry transport, Euro 4, Total weight >32 t; EU+EFTA+UK
- kg_km_0: 0.0918; = kg_0*km_0
  Transport amount in km*km, for sodium sulphate // sodium sulphate production // eu+efta+uk; Articulated lorry transport, Euro 4, Total weight >32 t; EU+EFTA+UK
- kg_1: 9.18e-5
  Mass in kg, for sodium sulphate // sodium sulphate production // eu+efta+uk; Transoceanic ship, containers; GLO
- km_1: 18000
  Distance in km, for sodium sulphate // sodium sulphate production // eu+efta+uk; Transoceanic ship, containers; GLO
- kg_km_1: 1.6524; = kg_1*km_1
  Transport amount in km*km, for sodium sulphate // sodium sulphate production // eu+efta+uk; Transoceanic ship, containers; GLO
- kg_2: 0.01615
  Mass in kg, for chemical, inorganic // chemical production, inorganic // glo; Articulated lorry transport, Euro 4, Total weight >32 t; EU+EFTA+UK
- km_2: 1000
  Distance in km, for chemical, inorganic // chemical production, inorganic // glo; Articulated lorry transport, Euro 4, Total weight >32 t; EU+EFTA+UK
- kg_km_2: 16.15; = kg_2*km_2
  Transport amount in km*km, for chemical, inorganic // chemical production, inorganic // glo; Articulated lorry transport, Euro 4, Total weight >32 t; EU+EFTA+UK
- kg_3: 0.01615
  Mass in kg, for chemical, inorganic // chemical production, inorganic // glo; Transoceanic ship, containers; GLO
- km_3: 18000
  Distance in km, for chemical, inorganic // chemical production, inorganic // glo; Transoceanic ship, containers; GLO
- kg_km_3: 290.7; = kg_3*km_3
  Transport amount in km*km, for chemical, inorganic // chemical production, inorganic // glo; Transoceanic ship, containers; GLO
- kg_4: 0.01615
  Mass in kg, for chemical, organic // chemical production, organic // glo; Articulated lorry transport, Euro 4, Total weight >32 t; EU+EFTA+UK
- km_4: 1000
  Distance in km, for chemical, organic // chemical production, organic // glo; Articulated lorry transport, Euro 4, Total weight >32 t; EU+EFTA+UK
- kg_km_4: 16.15; = kg_4*km_4
  Transport amount in km*km, for chemical, organic // chemical production, organic // glo; Articulated lorry transport, Euro 4, Total weight >32 t; EU+EFTA+UK
- kg_5: 0.01615
  Mass in kg, for chemical, organic // chemical production, organic // glo; Transoceanic ship, containers; GLO
- km_5: 18000
  Distance in km, for chemical, organic // chemical production, organic // glo; Transoceanic ship, containers; GLO
- kg_km_5: 290.7; = kg_5*km_5
  Transport amount in km*km, for chemical, organic // chemical production, organic // glo; Transoceanic ship, containers; GLO
- kg_6: 1.58e-5
  Mass in kg, for sodium hydrosulphide // sodium hydrosulphide production // glo; Articulated lorry transport, Euro 4, Total weight >32 t; EU+EFTA+UK
- km_6: 1000
  Distance in km, for sodium hydrosulphide // sodium hydrosulphide production // glo; Articulated lorry transport, Euro 4, Total weight >32 t; EU+EFTA+UK
- kg_km_6: 0.0158; = kg_6*km_6
  Transport amount in km*km, for sodium hydrosulphide // sodium hydrosulphide production // glo; Articulated lorry transport, Euro 4, Total weight >32 t; EU+EFTA+UK
- kg_7: 1.58e-5
  Mass in kg, for sodium hydrosulphide // sodium hydrosulphide production // glo; Transoceanic ship, containers; GLO
- km_7: 18000
  Distance in km, for sodium hydrosulphide // sodium hydrosulphide production // glo; Transoceanic ship, containers; GLO
- kg_km_7: 0.2844; = kg_7*km_7
  Transport amount in km*km, for sodium hydrosulphide // sodium hydrosulphide production // glo; Transoceanic ship, containers; GLO
- kg_8: 1
  Mass in kg, for spinned camel hair; Articulated lorry transport, Euro 4, Total weight >32 t; EU+EFTA+UK
- km_8: 1000
  Distance in km, for spinned camel hair; Articulated lorry transport, Euro 4, Total weight >32 t; EU+EFTA+UK
- kg_km_8: 1000; = kg_8*km_8
  Transport amount in km*km, for spinned camel hair; Articulated lorry transport, Euro 4, Total weight >32 t; EU+EFTA+UK
- kg_9: 1
  Mass in kg, for spinned camel hair; Transoceanic ship, containers; GLO
- km_9: 18000
  Distance in km, for spinned camel hair; Transoceanic ship, containers; GLO
- kg_km_9: 18000; = kg_9*km_9
  Transport amount in km*km, for spinned camel hair; Transoceanic ship, containers; GLO

## Reference product
- camel hair // hair // glo: 1

## Inputs
- Transport of sodium sulphate // sodium sulphate production // eu+efta+uk by Articulated lorry transport, Euro 4, Total weight >32 t - EU+EFTA+UK: 0.0918; = kg_km_0
- Transport of sodium sulphate // sodium sulphate production // eu+efta+uk by Transoceanic ship, containers - GLO: 1.6524; = kg_km_1
- Transport of chemical, inorganic // chemical production, inorganic // glo by Articulated lorry transport, Euro 4, Total weight >32 t - EU+EFTA+UK: 16.15; = kg_km_2
- Transport of chemical, inorganic // chemical production, inorganic // glo by Transoceanic ship, containers - GLO: 290.7; = kg_km_3
- Transport of chemical, organic // chemical production, organic // glo by Articulated lorry transport, Euro 4, Total weight >32 t - EU+EFTA+UK: 16.15; = kg_km_4
- Transport of chemical, organic // chemical production, organic // glo by Transoceanic ship, containers - GLO: 290.7; = kg_km_5
- Transport of sodium hydrosulphide // sodium hydrosulphide production // glo by Articulated lorry transport, Euro 4, Total weight >32 t - EU+EFTA+UK: 0.0158; = kg_km_6
- Transport of sodium hydrosulphide // sodium hydrosulphide production // glo by Transoceanic ship, containers - GLO: 0.2844; = kg_km_7
- Transport of spinned camel hair by Articulated lorry transport, Euro 4, Total weight >32 t - EU+EFTA+UK: 1000; = kg_km_8
- Transport of spinned camel hair by Transoceanic ship, containers - GLO: 18000; = kg_km_9
- Electricity from Electricity grid mix 1kV-60kV - AU: 0.0283482
- Electricity from Electricity grid mix 1kV-60kV - NZ: 0.00515818
- Electricity from Electricity grid mix 1kV-60kV - RAF: 0.0874748
- Electricity from Electricity grid mix 1kV-60kV - RAS w/o CN: 0.634639
- Electricity from Electricity grid mix 1kV-60kV - CN: 0.633654
- Electricity from Electricity grid mix 1kV-60kV - EU+EFTA+UK: 0.41182
- Electricity from Electricity grid mix 1kV-60kV - RSA: 0.181517
- Electricity from Electricity grid mix 1kV-60kV - RNA: 0.594723
- Electricity from Electricity grid mix 1kV-60kV - RU: 0.119066
- camel hair // hair // glo, blackbox: 1
- camel hair // hair // glo, elementary: 1

## Impact indicators
- Eutrophication marine: 0.0183167
- Ecotoxicity, freshwater: 72.0768
- Land use: 4.45551
- Water use: 4.94445
- Resource use, minerals and metals: 2.73083e-6
- Resource use, fossils: 90.7935
- Climate change: 40.2057
- Ozone depletion: 1.62522e-8
- Human toxicity, cancer: 4.49683e-9
- Human toxicity, non-cancer: 1.0623e-7
- EF-particulate Matter: 1.26423e-6
- Ionising radiation, human health: 0.263122
- Photochemical ozone formation - human health: 0.0504528
- Acidification: 0.050466
- Eutrophication, terrestrial: 0.142254
- Eutrophication, freshwater: 0.000403481

## Deviations from the LCI method principle
The background data uses:
- the \xe2\x80\x9cRecycled content cut-off\xe2\x80\x9d approach to allocate end-of-life by-products and secondary materials. This allocation is explained in the description of the recycled content system model (http://www.ecoinvent.org/database/system-models-in-ecoinvent-3/cut-off-system-model/allocation-cut-off-by-classification.html).
OR
- EF compliant data

## Deviations from the LCI method approaches
Background data:
- the \xe2\x80\x9cRecycled content cut-off\xe2\x80\x9d approach to allocate end-of-life by-products and secondary materials. This allocation is explained in the description of the recycled content system model (http://www.ecoinvent.org/database/system-models-in-ecoinvent-3/cut-off-system-model/allocation-cut-off-by-classification.html). The ecoinvent database mostly relies on “Allocation – market values” apart for few exceptions particularly in the energy sector. ecoinvent energy data is replaced with EF3.0 core data as per the EF guidelines version 2.0.
OR
- EF compliant data

## Modelling constants
All modelling constants follow the requirements listed in the Tender Specifications 070201/2020/SER/ENV.B1. Completeness: There are no intentional cut-offs in the inventory no matter how small their contribution to all the EF impact categories is. Eventual cut-offs are in compliance with the Guide for EF compliant data sets (JRC 2020), i.e. only if below the 3% cut-off rule. Water use: water use is modelled at country level using separate flows for water withdrawal, water release and water evaporation. Handling multi-functional processes: the following PEF multi- functionality decision hierarchy is applied for resolving all multi- functionality problems: (1) subdivision or system expansion; (2) allocation based on a relevant underlying physical relationship (substitution may apply here); (3) allocation based on some other relationship. Direct land use change: GHG emissions from direct LUC allocated to good/service for 20 years after the LUC occurs, with IPCC default values. Carbon storage and delayed emissions: credits associated with temporary (carbon) storage or delayed emissions up to 300 years are not be considered. Emissions off-setting: are not included. Capital goods (including infrastructures) and their End of life: they are included. System boundaries: system boundaries include all processes linked to the product supply chain (e.g. maintenance). Time period: emissions and removals are modelled as if released or removed at the beginning of the assessment method. Fossil and biogenic carbon emissions and removals: removals and emissions are modelled as follows: All GHG emissions from fossil fuels (including peat and limestone) are modelled consistently with the most updated ILCD list of elementary flows. The non-fossil (biogenic) carbon flows are modelled consistently with the most updated ILCD list of elementary flows.

## Cut-off and completeness
There are no intentional cut-offs in the inventory no matter how small their contribution to all the EF impact categories is. Eventual cut-offs are in compliance with the Guide for EF compliant data sets (JRC 2020), i.e. only if below the 3% cut-off rule. The dataset dry mass and water balance has been checked to ensure the inventory is complete. Capital goods (e.g. infrastructure) and their end-of-life are included.

## Data selection and combination
These datasets include, in both their foreground and background data, links to EF3.0 compliant data.
The relevant background data on energy, transport, and End of Life are from the LCDN data node (http://lcdn.thinkstep.com/Node/).
All other background data in the supply of this product for which no EF3.0 process was available are from ecoinvent v3.7 database (www.ecoinvent.org) or other data sources.

## Data treatment and extrapolations
Several data sources have been used to model the inventory.

## Review details
Internal reviews have been asked to review the plausibility of the unit process, LCIA scores, and DQRs. Internal reviewers have also been asked to review the data for EF compliancy. The consortium is therefore responsible for aspects such as compliancy with the ILCD format, including validation in Look@LCI, and nomenclature.
Internal reviwers have been asked to judge based on the process name, that the unit process models in a complete and representative way the process in the requested location. The review encompassed the plausability of:
- exchanges with nature (elementary flows) as well as exchanges such as product and waste flows.
- meta information (general comment, technology comment, system boundaries, allocation, cut-off rules, etc.). Reviewers were asked to judge if the provided information is enough to understand the content of the process.
- LCIA scores
- DQRs including precision, technology, time and geography. As well as the overall DQR.
External reviewers have been asked to provide their expertise in the field of interest. External reviewers have been asked to review the unit process, including eventual methodological choices, the LCIA scores (provided with contribution scores as well), and DQRs. External reviewers have been provided all the information in a tool developed by the consortium for the purpose of this project.
External reviewers have been asked to judge based on the process name, that the unit process models in a complete and representative way the process in the requested location. The review encompassed:
- Plausability and completeness of exchanges with nature (elementary flows) as well as exchanges such as product and waste flows.
- Review of meta information (general comment, technology comment, system boundaries, allocation, cut-off rules, etc.). Reviewers were asked to judge if the provided information is enough to understand the content of the process.
- Review of properties (biogenic carbon and water content).
- Review of allocation keys.
- Plausability of LCIA scores calculated by the consortium.
- Plausability of DQRs including precision, technology, time and geography. As well as the overall DQR.

## Data sources
- Background Data for Representative products and organisations. EF 3.0 compliant (data stock)
- Hunter, L. (2012). Mohair, cashmere and other animal hair fibres. In Handbook of Natural Fibres (pp. 196–290). Elsevier. https://doi.org/10.1533/9780857095503.1.196
- European Commission. (2018). Product Environmental Footprint Category Rules Guidance. In PEFCR Guidance document, - Guidance for the development of Product Environmental Footprint Category Rules (PEFCRs), version 6.3, December 2017. https://ec.europa.eu/environment/eussd/smgp/pdf/PEFCR_guidance_v6.3.pdf
- Cardoso. (2013). LCA of two textile products; Wool and cotton (Issue September).
- Dittmann, M. T., Runge, U., Lang, R. A., Moser, D., Galeffi, C., Kreuzer, M., & Clauss, M. (2014). Methane Emission by Camelids. PLoS ONE, 9(4), e94363. https://doi.org/10.1371/journal.pone.0094363
- CCMI. (2016). Cashmere and Camel Hair Fact Sheet. Cashmere and Camel Hair Manufacturers Institute. https://web.archive.org/web/20161221102226/http:/www.cashmere.org/cm/facts.php
- Hussain, A., Aujla, K. M., & Hassan, S. (2013). Production and marketing of camel products in semi-desert and desert areas of Pakistan. Pakistan Journal of Agricultural Research, 26(2), 130–142.

## Intended applications
Implementation of regular Product Environmental Footprint (PEF) studies and Organisation Environmental Footprint (OEF) studies exclusively under the specified Product groups and sectors as defined in the Product Environmental Footprint Category Rules (PEFCR) and Organisation Environmental Footprint Sectorial Rules (OEFSR) listed in http://ec.europa.eu/environment/eussd/smgp/PEFCR_OEFSR.htm
