# containerboard production, fluting medium, recycled, elementary; technology mix; production mix, at plant; 1000 kg

Dataset: ILCD process, Unit process, single operation
Geography: EU+EFTA+UK
Reference year: 2018
Valid until: 2024
Classification: Other Services / Other services
LCI method principle: Attributional
LCI method approaches: Allocation - market value
Completeness: All relevant flows quantified
Project: Provision of process-based 3.0 Environmental Footprint-compliant life cycle inventory datasets - Renewable materials - contract number 070201/2020/840085/SER/ENV.B.1
Generated by: FEFCO
Owner: FEFCO
Compliance: Environmental Footprint non-primary supporting data set; Environmental Footprint 3.1
Amounts: no units in this file; such an amount is in the reference unit of its flow, which a separate flow dataset defines
copyright: true
licenseType: Free of charge for some user types or use types
accessRestrictions: Free of charge for all final users implementing a regular Product Environmental Footprint (PEF) studies and Organisation Environmental Footprint (OEF) studies exclusively under the specified Product groups and sectors as defined in the Product Environmental Footprint Category Rules (PEFCR) and Organisation Environmental Footprint Sectorial Rules (OEFSR) listed in http://ec.europa.eu/environment/eussd/smgp/PEFCR_OEFSR.htm and in accordance with the terms and conditions of the EULA (available at https://ecoinvent.lca-data.com/) exclusively until 31st December 2024. Any use of this dataset or any derivative data not within the specific context of one of the PEF/OEF projects or after the end of 2024 is not permitted.

## General comment
Notice: this data set supersedes the EF3.0-compliant version (see link under "preceding data set version" below calculated with the EF3.0). The life cycle inventory is not changed from the original EF3.0 data set. The LCIA results are calculated based on the EF3.1 methods which provide updated characterisation factors in the following impact categories: Climate Change, Ecotoxicity freshwater, Photochemical Ozone Formation, Acidification, Human Toxicity non-cancer, and Human Toxicity cancer. The review report and the data quality ratings refer to the original results. The data set has been updated by the European Commission on the basis of the original EF3.0 data set delivered by the data provider.This sub-process has limited documentation only. For all detailed documentation of the full model to which this data set belongs (such as DQRs, review reports and other technical documentation), please see this process: containerboard production, fluting medium, recycled - EU+EFTA+UK []

## Technology and included processes
The stock preparation is done in accordance with a recipe for each paper grade and grammage. The grades of recovered paper are put on the conveyor to the pulper in the ratio mentioned in the recipe. In the pulper the blend of dry, baled paper is converted into a pumpable suspension of fibres. This is achieved by submerging the bales in water and agitating the mixture so that the paper is wetted and broken up to form a suspension. The pulp is then screened and cleaned and may undergo a disperging treatment.
The stock passes through one or two head boxes onto the paper machine, Wellenstoff can be a one ply or two ply product. Usually, a size press treatment with a starch solution is applied in-line on the paper machine in order to obtain sufficient strength and stiffness properties.

Sold electricity is not reported as a sold product and the associated input and output data are not included in the inventory. The fuel consumption and emissions to air associated with the total heat production and the net electricity used on site were allocated to the paper production.

Apart from external fuel inputs, internal fuels such as biogas and sludge are generated during the process and supply process energy. Internal fuels are represented by the calculated emissions but do not have the corresponding fuel input from Technosphere, because they are supplied from within the system boundaries. The amount of internal fuels used in the process are: Biogas (0.18 GJ/t), Refuse Derived Fuel, biomass (0.01 GJ/t), Refuse Derived Fuel, fossil (0.06 GJ/t), and sludge (0.02
The following air emissions were reported in the study (FEFCO, 2018): Dust, CO2 (fossil and biogenic), CO, NOx, and SOx. The listed emissions include emissions from external and internal fuels at the production site.
For a more complete air emission profile, additional air emissions (beyond the ones listed above) were added for the combustion of the external and internal fuels using ecoinvent LCI datasets for combustion of different fuels as proxy. Proxies for the air emissions were calculated based on: Heavy fuel oil: "heat production, heavy fuel oil, at industrial furnace 1MW” Light fuel oil and diesel: "heat production, light fuel oil, at industrial furnace 1MW” Natural gas: "heat production, natural gas, at industrial furnace >100kW”, lignite: "heat production, lignite briquette, at stove 5-15kW” Biofuels, wood and bark: "heat production, wood chips from industry, at furnace 1000kW”, coal: “heat production, at hard coal industrial furnace 1-10MW, Europe without Switzerland”, refused derived fuel, biomass: heat production, wood chips from post-consumer wood, at furnace 300kW
Emissions of stemming from biogas were approximated with the combustion of natural gas, whereby CO2, CO and CH4 emissions stemming from biogas were modelled as non-fossil.

No proxy was available for the combustion of Refuse Derived Fuel, fossil and sludge. Emissions from this internal energy generation process are therefore only reflected in the key emission factors provided by the industry.

Amount of infrastructure taken from dataset “de Beaufort, A., containerboard production, fluting medium, recycled, RER, Undefined, ecoinvent database version 3.7.1.”

the following chemicals were excluded from the inventory: Alum, biocides, colorants, carbon dioxide, defoamer, ammonia, pitch despergents, polymer and retention agents, Sizing agents, Ligno sulphonate, and Lubricants.The listed chemicals are not defined as mandatory in the PEFCR for intermediate paper products and have a total mass of below 1% of the paper weight. Further packaging materials (pallet and PE) were excluded.
The production of paper based fully or partly on paper for recycling takes place in integrated processes for almost all cases. The share of recycled pulp in non-integrated mills (so recycled pulp produced dried and transported to a paper mill for making recycled paper) is around 3%. In the INTERMEDIATE PAPER PRODUCT PEFCR (2018) it is set that: "The PEF profile shall be calculated and reported using A equal to 1.". This dataset is therefore modelled as such.

## Reference product
- fluting medium, recycled // containerboard production, fluting medium, recycled // eu+efta+uk, elementary: 1

## Inputs
- ground water, Renewable material resources from water [AL]: 0.00469831
- ground water, Renewable material resources from water [AT]: 0.0605347
- ground water, Renewable material resources from water [BA]: 0.00585711
- ground water, Renewable material resources from water [BE]: 0.072863
- ground water, Renewable material resources from water [BG]: 0.0186579
- ground water, Renewable material resources from water [BY]: 0.024227
- ground water, Renewable material resources from water [CH]: 0.0721977
- ground water, Renewable material resources from water [CZ]: 0.0502491
- ground water, Renewable material resources from water [DE]: 0.546871
- ground water, Renewable material resources from water [DK]: 0.0396544
- ground water, Renewable material resources from water [EE]: 0.00541486
- ground water, Renewable material resources from water [ES]: 0.234678
- ground water, Renewable material resources from water [FI]: 0.0338244
- ground water, Renewable material resources from water [FR]: 0.385762
- ground water, Renewable material resources from water [GB]: 0.383353
- ground water, Renewable material resources from water: 0.00238115
- ground water, Renewable material resources from water [GR]: 0.0436089
- ground water, Renewable material resources from water [HR]: 0.0140217
- ground water, Renewable material resources from water [HU]: 0.0367579
- ground water, Renewable material resources from water [IE]: 0.0395954
- ground water, Renewable material resources from water [IS]: 0.00225943
- ground water, Renewable material resources from water [IT]: 0.33005
- ground water, Renewable material resources from water [LT]: 0.0115617
- ground water, Renewable material resources from water [LU]: 0.00802614
- ground water, Renewable material resources from water [LV]: 0.00681749
- ground water, Renewable material resources from water [MD]: 0.00360726
- ground water, Renewable material resources from water [ME]: 0.00145321
- ground water, Renewable material resources from water [MK]: 0.00401359
- ground water, Renewable material resources from water [MT]: 0.00222026
- ground water, Renewable material resources from water [NL]: 0.122345
- ground water, Renewable material resources from water [NO]: 0.0463111
- ground water, Renewable material resources from water [PL]: 0.140805
- ground water, Renewable material resources from water [PT]: 0.044429
- ground water, Renewable material resources from water [RO]: 0.0616817
- ground water, Renewable material resources from water [RS]: 0.0153065
- ground water, Renewable material resources from water [SE]: 0.0668264
- ground water, Renewable material resources from water [SI]: 0.00946358
- ground water, Renewable material resources from water [SK]: 0.0222124
- ground water, Renewable material resources from water [SM]: 0.000276456
- ground water, Renewable material resources from water [UA]: 0.0651271
- river water, Renewable material resources from water [AL]: 0.00406466
- river water, Renewable material resources from water [AT]: 0.0523705
- river water, Renewable material resources from water [BA]: 0.00506717
- river water, Renewable material resources from water [BE]: 0.0630361
- river water, Renewable material resources from water [BG]: 0.0161415
- river water, Renewable material resources from water [BY]: 0.0209595
- river water, Renewable material resources from water [CH]: 0.0624605
- river water, Renewable material resources from water [CZ]: 0.0434721
- river water, Renewable material resources from water [DE]: 0.473115
- river water, Renewable material resources from water [DK]: 0.0343063
- river water, Renewable material resources from water [EE]: 0.00468456
- river water, Renewable material resources from water [ES]: 0.203027
- river water, Renewable material resources from water [FI]: 0.0292625
- river water, Renewable material resources from water [FR]: 0.333735
- river water, Renewable material resources from water [GB]: 0.331651
- river water, Renewable material resources from water: 0.00206001
- river water, Renewable material resources from water [GR]: 0.0377274
- river water, Renewable material resources from water [HR]: 0.0121306
- river water, Renewable material resources from water [HU]: 0.0318004
- river water, Renewable material resources from water [IE]: 0.0342553
- river water, Renewable material resources from water [IS]: 0.00195471
- river water, Renewable material resources from water [IT]: 0.285537
- river water, Renewable material resources from water [LT]: 0.0100024
- river water, Renewable material resources from water [LU]: 0.00694366
- river water, Renewable material resources from water [LV]: 0.00589802
- river water, Renewable material resources from water [MD]: 0.00312075
- river water, Renewable material resources from water [ME]: 0.00125721
- river water, Renewable material resources from water [MK]: 0.00347228
- river water, Renewable material resources from water [MT]: 0.00192082
- river water, Renewable material resources from water [NL]: 0.105844
- river water, Renewable material resources from water [NO]: 0.0400652
- river water, Renewable material resources from water [PL]: 0.121815
- river water, Renewable material resources from water [PT]: 0.0384369
- river water, Renewable material resources from water [RO]: 0.0533628
- river water, Renewable material resources from water [RS]: 0.0132422
- river water, Renewable material resources from water [SE]: 0.0578136
- river water, Renewable material resources from water [SI]: 0.00818724
- river water, Renewable material resources from water [SK]: 0.0192167
- river water, Renewable material resources from water [SM]: 0.00023917
- river water, Renewable material resources from water [UA]: 0.0563435
- water, Renewable material resources from water [AL]: 7.57293e-5
- water, Renewable material resources from water [AT]: 0.000975724
- water, Renewable material resources from water [BA]: 9.44073e-5
- water, Renewable material resources from water [BE]: 0.00117444
- water, Renewable material resources from water [BG]: 0.000300736
- water, Renewable material resources from water [BY]: 0.0003905
- water, Renewable material resources from water [CH]: 0.00116371
- water, Renewable material resources from water [CZ]: 0.000809937
- water, Renewable material resources from water [DE]: 0.00881469
- water, Renewable material resources from water [DK]: 0.000639166
- water, Renewable material resources from water [EE]: 8.72789e-5
- water, Renewable material resources from water [ES]: 0.00378263
- water, Renewable material resources from water [FI]: 0.000545195
- water, Renewable material resources from water [FR]: 0.00621787
- water, Renewable material resources from water [GB]: 0.00617905
- water, Renewable material resources from water: 3.83804e-5
- water, Renewable material resources from water [GR]: 0.000702907
- water, Renewable material resources from water [HR]: 0.000226008
- water, Renewable material resources from water [HU]: 0.000592479
- water, Renewable material resources from water [IE]: 0.000638216
- water, Renewable material resources from water [IS]: 3.64185e-5
- water, Renewable material resources from water [IT]: 0.00531988
- water, Renewable material resources from water [LT]: 0.000186356
- water, Renewable material resources from water [LU]: 0.000129369
- water, Renewable material resources from water [LV]: 0.000109887
- water, Renewable material resources from water [MD]: 5.81433e-5
- water, Renewable material resources from water [ME]: 2.34234e-5
- water, Renewable material resources from water [MK]: 6.46927e-5
- water, Renewable material resources from water [MT]: 3.57871e-5
- water, Renewable material resources from water [NL]: 0.001972
- water, Renewable material resources from water [NO]: 0.000746462
- water, Renewable material resources from water [PL]: 0.00226955
- water, Renewable material resources from water [PT]: 0.000716126
- water, Renewable material resources from water [RO]: 0.000994212
- water, Renewable material resources from water [RS]: 0.000246717
- water, Renewable material resources from water [SE]: 0.00107714
- water, Renewable material resources from water [SI]: 0.000152538
- water, Renewable material resources from water [SK]: 0.000358029
- water, Renewable material resources from water [SM]: 4.45603e-6
- water, Renewable material resources from water [UA]: 0.00104975

## Outputs
- Water, Emissions to air, unspecified: 0.67
- carbon dioxide (fossil), Emissions to urban air close to ground: 280.17
- Water, Emissions to fresh water [AL]: 0.00877842
- Water, Emissions to fresh water [AT]: 0.113104
- Water, Emissions to fresh water [BA]: 0.0109435
- Water, Emissions to fresh water [BE]: 0.136139
- Water, Emissions to fresh water [BG]: 0.0348608
- Water, Emissions to fresh water [BY]: 0.0452662
- Water, Emissions to fresh water [CH]: 0.134896
- Water, Emissions to fresh water [CZ]: 0.0938865
- Water, Emissions to fresh water [DE]: 1.02178
- Water, Emissions to fresh water [DK]: 0.0740911
- Water, Emissions to fresh water [EE]: 0.0101172
- Water, Emissions to fresh water [ES]: 0.438477
- Water, Emissions to fresh water [FI]: 0.0631982
- Water, Emissions to fresh water [FR]: 0.720765
- Water, Emissions to fresh water [GB]: 0.716266
- Water, Emissions to fresh water: 0.004449
- Water, Emissions to fresh water [GR]: 0.0814798
- Water, Emissions to fresh water [HR]: 0.0261985
- Water, Emissions to fresh water [HU]: 0.0686792
- Water, Emissions to fresh water [IE]: 0.073981
- Water, Emissions to fresh water [IS]: 0.00422157
- Water, Emissions to fresh water [IT]: 0.616672
- Water, Emissions to fresh water [LT]: 0.021602
- Water, Emissions to fresh water [LU]: 0.0149962
- Water, Emissions to fresh water [LV]: 0.0127379
- Water, Emissions to fresh water [MD]: 0.00673987
- Water, Emissions to fresh water [ME]: 0.0027152
- Water, Emissions to fresh water [MK]: 0.00749907
- Water, Emissions to fresh water [MT]: 0.00414838
- Water, Emissions to fresh water [NL]: 0.228591
- Water, Emissions to fresh water [NO]: 0.0865287
- Water, Emissions to fresh water [PL]: 0.263083
- Water, Emissions to fresh water [PT]: 0.0830121
- Water, Emissions to fresh water [RO]: 0.115247
- Water, Emissions to fresh water [RS]: 0.0285991
- Water, Emissions to fresh water [SE]: 0.12486
- Water, Emissions to fresh water [SI]: 0.017682
- Water, Emissions to fresh water [SK]: 0.0415022
- Water, Emissions to fresh water [SM]: 0.000516535
- Water, Emissions to fresh water [UA]: 0.121685
- Phosphorus, Emissions to water, unspecified: 0.0065
- chromium (iii), Emissions to water, unspecified: 0.0001
- zinc (ii), Emissions to water, unspecified: 0.0001
- biological oxygen demand, Emissions to water, unspecified: 0.246
- chemical oxygen demand, Emissions to water, unspecified: 0.88
- total organic carbon, Emissions to water, unspecified: 0.417
- DOC, Dissolved Organic Carbon, Emissions to water, unspecified: 0.417
- Suspended solids, unspecified, Emissions to water, unspecified: 0.43
- adsorbable organic halogen compounds, Emissions to water, unspecified: 0.0006
- dinitrogen, Emissions to water, unspecified: 0.064
- ammonia, Emissions to urban air close to ground: 4.7695e-6
- acetic acid, Emissions to urban air close to ground: 0.00060221
- formaldehyde, Emissions to urban air close to ground: 0.000500817
- hydrogen sulfide, Emissions to urban air close to ground: 8.9e-6
- acetone, Emissions to urban air close to ground: 1.77383e-7
- ammonia, Emissions to urban air close to ground [AL]: 9.37713e-7
- ammonia, Emissions to urban air close to ground [AT]: 1.20818e-5
- ammonia, Emissions to urban air close to ground [BA]: 1.16899e-6
- ammonia, Emissions to urban air close to ground [BE]: 1.45424e-5
- ammonia, Emissions to urban air close to ground [BG]: 3.72384e-6
- ammonia, Emissions to urban air close to ground [BY]: 4.83534e-6
- ammonia, Emissions to urban air close to ground [CH]: 1.44096e-5
- ammonia, Emissions to urban air close to ground [CZ]: 1.0029e-5
- ammonia, Emissions to urban air close to ground [DE]: 0.000109147
- ammonia, Emissions to urban air close to ground [DK]: 7.91443e-6
- ammonia, Emissions to urban air close to ground [EE]: 1.08073e-6
- ammonia, Emissions to urban air close to ground [ES]: 4.68382e-5
- ammonia, Emissions to urban air close to ground [FI]: 6.75084e-6
- ammonia, Emissions to urban air close to ground [FR]: 7.69923e-5
- ammonia, Emissions to urban air close to ground [GB]: 7.65117e-5
- ammonia, Emissions to urban air close to ground [GR]: 8.70369e-6
- ammonia, Emissions to urban air close to ground [HR]: 2.79853e-6
- ammonia, Emissions to urban air close to ground [HU]: 7.33633e-6
- ammonia, Emissions to urban air close to ground [IE]: 7.90266e-6
- ammonia, Emissions to urban air close to ground [IT]: 6.58731e-5
- ammonia, Emissions to urban air close to ground [LT]: 2.30754e-6
- ammonia, Emissions to urban air close to ground [LU]: 1.6019e-6
- ammonia, Emissions to urban air close to ground [LV]: 1.36067e-6
- ammonia, Emissions to urban air close to ground [MD]: 7.19955e-7
- ammonia, Emissions to urban air close to ground [MK]: 8.01052e-7
- ammonia, Emissions to urban air close to ground [NL]: 2.44182e-5
- ammonia, Emissions to urban air close to ground [NO]: 9.24302e-6
- ammonia, Emissions to urban air close to ground [PL]: 2.81026e-5
- ammonia, Emissions to urban air close to ground [PT]: 8.86737e-6
- ammonia, Emissions to urban air close to ground [RO]: 1.23108e-5
- ammonia, Emissions to urban air close to ground [SE]: 1.33376e-5
- ammonia, Emissions to urban air close to ground [SI]: 1.88879e-6
- ammonia, Emissions to urban air close to ground [SK]: 4.43327e-6
- ammonia, Emissions to urban air close to ground [UA]: 1.29984e-5
- phenol, Emissions to urban air close to ground: 4.45e-5
- chlorine, Emissions to urban air close to ground: 6.3e-5
- toluene, Emissions to urban air close to ground: 0.00104318
- carbon monoxide (fossil), Emissions to urban air close to ground: 0.0719007
- Nitrogen oxides, Emissions to urban air close to ground [AL]: 0.000556379
- Nitrogen oxides, Emissions to urban air close to ground [AT]: 0.00716859
- Nitrogen oxides, Emissions to urban air close to ground [BA]: 0.000693605
- Nitrogen oxides, Emissions to urban air close to ground [BE]: 0.00862851
- Nitrogen oxides, Emissions to urban air close to ground [BG]: 0.00220949
- Nitrogen oxides, Emissions to urban air close to ground [BY]: 0.00286898
- Nitrogen oxides, Emissions to urban air close to ground [CH]: 0.00854973
- Nitrogen oxides, Emissions to urban air close to ground [CZ]: 0.00595055
- Nitrogen oxides, Emissions to urban air close to ground [DE]: 0.064761
- Nitrogen oxides, Emissions to urban air close to ground [DK]: 0.00469591
- Nitrogen oxides, Emissions to urban air close to ground [EE]: 0.000641233
- Nitrogen oxides, Emissions to urban air close to ground [ES]: 0.0277908
- Nitrogen oxides, Emissions to urban air close to ground [FI]: 0.00400552
- Nitrogen oxides, Emissions to urban air close to ground [FR]: 0.0456823
- Nitrogen oxides, Emissions to urban air close to ground [GB]: 0.0453971
- Nitrogen oxides, Emissions to urban air close to ground: 0.00282991
- Nitrogen oxides, Emissions to urban air close to ground [GR]: 0.00516421
- Nitrogen oxides, Emissions to urban air close to ground [HR]: 0.00166047
- Nitrogen oxides, Emissions to urban air close to ground [HU]: 0.00435291
- Nitrogen oxides, Emissions to urban air close to ground [IE]: 0.00468893
- Nitrogen oxides, Emissions to urban air close to ground [IT]: 0.0390849
- Nitrogen oxides, Emissions to urban air close to ground [LT]: 0.00136914
- Nitrogen oxides, Emissions to urban air close to ground [LU]: 0.000950464
- Nitrogen oxides, Emissions to urban air close to ground [LV]: 0.000807334
- Nitrogen oxides, Emissions to urban air close to ground [MD]: 0.000427175
- Nitrogen oxides, Emissions to urban air close to ground [MK]: 0.000475293
- Nitrogen oxides, Emissions to urban air close to ground [NL]: 0.0144882
- Nitrogen oxides, Emissions to urban air close to ground [NO]: 0.00548421
- Nitrogen oxides, Emissions to urban air close to ground [PL]: 0.0166743
- Nitrogen oxides, Emissions to urban air close to ground [PT]: 0.00526133
- Nitrogen oxides, Emissions to urban air close to ground [RO]: 0.00730441
- Nitrogen oxides, Emissions to urban air close to ground [SE]: 0.00791365
- Nitrogen oxides, Emissions to urban air close to ground [SI]: 0.00112069
- Nitrogen oxides, Emissions to urban air close to ground [SK]: 0.00263042
- Nitrogen oxides, Emissions to urban air close to ground [UA]: 0.00771242
- ethylene, Emissions to urban air close to ground: 0.00407708
- acetaldehyde, Emissions to urban air close to ground: 2.55374e-5
- methanol, Emissions to urban air close to ground: 6.03101e-7
- propionic acid, Emissions to urban air close to ground: 8.02e-5
- non-methane volatile organic compounds, Emissions to urban air close to ground: 0.00547033
- benzene, Emissions to urban air close to ground: 0.00260214
- particles (PM2.5), Emissions to urban air close to ground: 0.0362733
- nitrous oxide, Emissions to urban air close to ground: 0.00176338
- zinc, Emissions to urban air close to ground: 0.000113172
- particles (> PM10), Emissions to urban air close to ground: 0.004
- particles (PM2.5 - PM10), Emissions to urban air close to ground: 0.014292
- nickel, Emissions to urban air close to ground: 1.66551e-5
- selenium, Emissions to urban air close to ground: 1.12068e-5
- chromium, Emissions to urban air close to ground: 1.81839e-5
- lead, Emissions to urban air close to ground: 4.78469e-5
- cadmium, Emissions to urban air close to ground: 1.67225e-6
- copper, Emissions to urban air close to ground: 2.35897e-5
- methane (fossil), Emissions to urban air close to ground: 0.039062
- xylene (all isomers), Emissions to urban air close to ground: 0.000340603
- pentachlorophenol, Emissions to urban air close to ground: 2.835e-9
- arsenic, Emissions to urban air close to ground: 1.67263e-5
- benzo[a]pyrene, Emissions to urban air close to ground: 2.00005e-6
- carbon dioxide (biogenic), Emissions to urban air close to ground: 31.56
- cobalt, Emissions to urban air close to ground: 4.89425e-6
- ethanol, Emissions to urban air close to ground: 3.54765e-7
- fluorine, Emissions to urban air close to ground: 1.75e-5
- iron, Emissions to urban air close to ground: 0.00328447
- m-xylene, Emissions to urban air close to ground: 4.2e-5
- hydrogen chloride, Emissions to urban air close to ground: 0.0192927
- polycyclic aromatic hydrocarbons, Emissions to urban air close to ground: 4.39904e-5
- manganese, Emissions to urban air close to ground: 7.21172e-5
- pentane, Emissions to urban air close to ground: 0.00481372
- hexachlorobenzene, Emissions to urban air close to ground: 2.52e-12
- Hydrocarbons, aromatic, Emissions to urban air close to ground: 4.22799e-7
- magnesium, Emissions to urban air close to ground: 0.00257824
- potassium, Emissions to urban air close to ground: 0.00891626
- sodium, Emissions to urban air close to ground: 0.000954343
- calcium, Emissions to urban air close to ground: 0.00713311
- vanadium, Emissions to urban air close to ground: 3.07957e-5
- bromine, Emissions to urban air close to ground: 2.67992e-5
- n-butane, Emissions to urban air close to ground: 0.00280958
- Hydrocarbons, aliphatic, unsaturated, Emissions to urban air close to ground: 0.00176455
- Hydrocarbons, aliphatic, alkanes, unspecified, Emissions to urban air close to ground: 0.00100265
- carbon monoxide (biogenic), Emissions to urban air close to ground: 0.00809932
- Phosphorus, Emissions to urban air close to ground: 0.000143632
- ethyl benzene, Emissions to urban air close to ground: 1.05e-5
- chromium (vi), Emissions to urban air close to ground: 1.38097e-6
- molybdenum, Emissions to urban air close to ground: 6.16645e-6
- mercury, Emissions to urban air close to ground: 2.57621e-6
- methane (biogenic), Emissions to urban air close to ground: 0.001695
- hydrogen fluoride, Emissions to urban air close to ground: 0.000602142
- propane, Emissions to urban air close to ground: 0.00216123
- 2,3,7,8-tetrachlorodibenzo-p-dioxin, Emissions to urban air close to ground: 2.05331e-11
- ethane, Emissions to urban air close to ground: 0.00203854
- lead-210, Emissions to urban air close to ground: 0.0273278
- antimony, Emissions to urban air close to ground: 2.99276e-6
- polonium-210, Emissions to urban air close to ground: 0.0500134
- radium-226, Emissions to urban air close to ground: 0.00705234
- thallium, Emissions to urban air close to ground: 7.52278e-7
- tin, Emissions to urban air close to ground: 4.76206e-7
- titanium, Emissions to urban air close to ground: 0.000200279
- boron, Emissions to urban air close to ground: 0.00123692
- Silicon, Emissions to urban air close to ground: 0.0181796
- acetylene, Emissions to urban air close to ground: 0.000679514
- beryllium, Emissions to urban air close to ground: 8.16145e-7
- aluminium, Emissions to urban air close to ground: 0.0060777
- iodine, Emissions to urban air close to ground: 9.39642e-6
- barium, Emissions to urban air close to ground: 8.16145e-5
- propene, Emissions to urban air close to ground: 0.000679514
- radon-222, Emissions to urban air close to ground: 0.000825028
- strontium, Emissions to urban air close to ground: 0.0001127
- uranium-238, Emissions to urban air close to ground: 0.00588288
- potassium-40, Emissions to urban air close to ground: 0.00781818
- radium-228, Emissions to urban air close to ground: 0.0312522
- scandium, Emissions to urban air close to ground: 6.47223e-7
- thorium-232, Emissions to urban air close to ground: 0.002051
- Uranium, Emissions to urban air close to ground: 1.63609e-6
- Thorium, Emissions to urban air close to ground: 1.16082e-6
- radon-220, Emissions to urban air close to ground: 0.000825028
- thorium-228, Emissions to urban air close to ground: 0.00323825
- sulfur oxides, Emissions to urban air close to ground [AL]: 0.000106639
- sulfur oxides, Emissions to urban air close to ground [AT]: 0.00137398
- sulfur oxides, Emissions to urban air close to ground [BA]: 0.000132941
- sulfur oxides, Emissions to urban air close to ground [BE]: 0.0016538
- sulfur oxides, Emissions to urban air close to ground [BG]: 0.000423485
- sulfur oxides, Emissions to urban air close to ground [BY]: 0.000549888
- sulfur oxides, Emissions to urban air close to ground [CH]: 0.0016387
- sulfur oxides, Emissions to urban air close to ground [CZ]: 0.00114052
- sulfur oxides, Emissions to urban air close to ground [DE]: 0.0124125
- sulfur oxides, Emissions to urban air close to ground [DK]: 0.00090005
- sulfur oxides, Emissions to urban air close to ground [EE]: 0.000122903
- sulfur oxides, Emissions to urban air close to ground [ES]: 0.00532656
- sulfur oxides, Emissions to urban air close to ground [FI]: 0.000767724
- sulfur oxides, Emissions to urban air close to ground [FR]: 0.00875577
- sulfur oxides, Emissions to urban air close to ground [GB]: 0.00870111
- sulfur oxides, Emissions to urban air close to ground: 0.0005424
- sulfur oxides, Emissions to urban air close to ground [GR]: 0.000989807
- sulfur oxides, Emissions to urban air close to ground [HR]: 0.000318256
- sulfur oxides, Emissions to urban air close to ground [HU]: 0.000834308
- sulfur oxides, Emissions to urban air close to ground [IE]: 0.000898712
- sulfur oxides, Emissions to urban air close to ground [IT]: 0.00749127
- sulfur oxides, Emissions to urban air close to ground [LT]: 0.000262419
- sulfur oxides, Emissions to urban air close to ground [LU]: 0.000182172
- sulfur oxides, Emissions to urban air close to ground [LV]: 0.000154739
- sulfur oxides, Emissions to urban air close to ground [MD]: 8.18752e-5
- sulfur oxides, Emissions to urban air close to ground [MK]: 9.10979e-5
- sulfur oxides, Emissions to urban air close to ground [NL]: 0.0027769
- sulfur oxides, Emissions to urban air close to ground [NO]: 0.00105114
- sulfur oxides, Emissions to urban air close to ground [PL]: 0.0031959
- sulfur oxides, Emissions to urban air close to ground [PT]: 0.00100842
- sulfur oxides, Emissions to urban air close to ground [RO]: 0.00140001
- sulfur oxides, Emissions to urban air close to ground [SE]: 0.00151678
- sulfur oxides, Emissions to urban air close to ground [SI]: 0.000214798
- sulfur oxides, Emissions to urban air close to ground [SK]: 0.000504164
- sulfur oxides, Emissions to urban air close to ground [UA]: 0.00147821

## Impact indicators
- Eutrophication marine: 0.140096
- Ecotoxicity, freshwater: 19.9488
- Land use: 0
- Water use: 0.617814
- Resource use, minerals and metals: 0
- Resource use, fossils: 0
- Climate change: 281.862
- Ozone depletion: 0
- Human toxicity, cancer: 2.93621e-8
- Human toxicity, non-cancer: 4.79654e-7
- EF-particulate Matter: 9.78757e-6
- Ionising radiation, human health: 0.00809644
- Photochemical ozone formation - human health: 0.391746
- Acidification: 0.251337
- Eutrophication, terrestrial: 0.688765
- Eutrophication, freshwater: 0.0065

## Deviations from the LCI method principle
The background data uses:
- the \xe2\x80\x9cRecycled content cut-off\xe2\x80\x9d approach to allocate end-of-life by-products and secondary materials. This allocation is explained in the description of the recycled content system model (http://www.ecoinvent.org/database/system-models-in-ecoinvent-3/cut-off-system-model/allocation-cut-off-by-classification.html).
OR
- EF compliant data

## Deviations from the LCI method approaches
Background data:
- the \xe2\x80\x9cRecycled content cut-off\xe2\x80\x9d approach to allocate end-of-life by-products and secondary materials. This allocation is explained in the description of the recycled content system model (http://www.ecoinvent.org/database/system-models-in-ecoinvent-3/cut-off-system-model/allocation-cut-off-by-classification.html). The ecoinvent database mostly relies on “Allocation – market values” apart for few exceptions particularly in the energy sector. ecoinvent energy data is replaced with EF3.0 core data as per the EF guidelines version 2.0.
OR
- EF compliant data

## Modelling constants
All modelling constants follow the requirements listed in the Tender Specifications 070201/2020/SER/ENV.B1. Completeness: There are no intentional cut-offs in the inventory no matter how small their contribution to all the EF impact categories is. Eventual cut-offs are in compliance with the Guide for EF compliant data sets (JRC 2020), i.e. only if below the 3% cut-off rule. Water use: water use is modelled at country level using separate flows for water withdrawal, water release and water evaporation. Handling multi-functional processes: the following PEF multi- functionality decision hierarchy is applied for resolving all multi- functionality problems: (1) subdivision or system expansion; (2) allocation based on a relevant underlying physical relationship (substitution may apply here); (3) allocation based on some other relationship. Direct land use change: GHG emissions from direct LUC allocated to good/service for 20 years after the LUC occurs, with IPCC default values. Carbon storage and delayed emissions: credits associated with temporary (carbon) storage or delayed emissions up to 300 years are not be considered. Emissions off-setting: are not included. Capital goods (including infrastructures) and their End of life: they are included. System boundaries: system boundaries include all processes linked to the product supply chain (e.g. maintenance). Time period: emissions and removals are modelled as if released or removed at the beginning of the assessment method. Fossil and biogenic carbon emissions and removals: removals and emissions are modelled as follows: All GHG emissions from fossil fuels (including peat and limestone) are modelled consistently with the most updated ILCD list of elementary flows. The non-fossil (biogenic) carbon flows are modelled consistently with the most updated ILCD list of elementary flows.

## Cut-off and completeness
There are no intentional cut-offs in the inventory no matter how small their contribution to all the EF impact categories is. Eventual cut-offs are in compliance with the Guide for EF compliant data sets (JRC 2020), i.e. only if below the 3% cut-off rule. The dataset dry mass and water balance has been checked to ensure the inventory is complete. Capital goods (e.g. infrastructure) and their end-of-life are included.

## Data selection and combination
These datasets include, in both their foreground and background data, links to EF3.0 compliant data.
The relevant background data on energy, transport, and End of Life are from the LCDN data node (http://lcdn.thinkstep.com/Node/).
All other background data in the supply of this product for which no EF3.0 process was available are from ecoinvent v3.7 database (www.ecoinvent.org) or other data sources.

## Data treatment and extrapolations
Several data sources have been used to model the inventory.

## Use advice
This data set is a supporting sub-data set and must be used exclusively as sub-data set of its corresponding level-1 partly disaggregated data set (see “General comment” field for exact name and UUID).

## Data sources
- Background Data for Representative products and organisations. EF 3.0 compliant (data stock)
- The European Federation of Corrugated Board Manufacturers (FEFCO), (2018). European Database for Corrugated Board Life Cycle Studies 2018", available at https://www.fefco.org/lca

## Intended applications
Implementation of regular Product Environmental Footprint (PEF) studies and Organisation Environmental Footprint (OEF) studies exclusively under the specified Product groups and sectors as defined in the Product Environmental Footprint Category Rules (PEFCR) and Organisation Environmental Footprint Sectorial Rules (OEFSR) listed in http://ec.europa.eu/environment/eussd/smgp/PEFCR_OEFSR.htm
