# eucalyptus forestry, elementary; technology mix; production mix, at plantation; 1 kg of DM (basic wood density 580 kg/m³)

Dataset: ILCD process, Unit process, single operation
Geography: WORLD (WITHOUT EU+EFTA+UK)
Reference year: 2019
Valid until: 2024
Classification: Other Services / Other services
LCI method principle: Attributional
LCI method approaches: Allocation - market value
Completeness: All relevant flows quantified
Project: Provision of process-based 3.0 Environmental Footprint-compliant life cycle inventory datasets - Renewable materials - contract number 070201/2020/840085/SER/ENV.B.1
Generated by: ACV Brasil
Owner: ecoinvent
Compliance: Environmental Footprint non-primary supporting data set; Environmental Footprint 3.1
Amounts: no units in this file; such an amount is in the reference unit of its flow, which a separate flow dataset defines
copyright: true
licenseType: Free of charge for some user types or use types
accessRestrictions: Free of charge for all final users implementing a regular Product Environmental Footprint (PEF) studies and Organisation Environmental Footprint (OEF) studies exclusively under the specified Product groups and sectors as defined in the Product Environmental Footprint Category Rules (PEFCR) and Organisation Environmental Footprint Sectorial Rules (OEFSR) listed in http://ec.europa.eu/environment/eussd/smgp/PEFCR_OEFSR.htm and in accordance with the terms and conditions of the EULA (available at https://ecoinvent.lca-data.com/) exclusively until 31st December 2024. Any use of this dataset or any derivative data not within the specific context of one of the PEF/OEF projects or after the end of 2024 is not permitted.

## General comment
Notice: this data set supersedes the EF3.0-compliant version (see link under "preceding data set version" below calculated with the EF3.0). The life cycle inventory is not changed from the original EF3.0 data set. The LCIA results are calculated based on the EF3.1 methods which provide updated characterisation factors in the following impact categories: Climate Change, Ecotoxicity freshwater, Photochemical Ozone Formation, Acidification, Human Toxicity non-cancer, and Human Toxicity cancer. The review report and the data quality ratings refer to the original results. The data set has been updated by the European Commission on the basis of the original EF3.0 data set delivered by the data provider.This sub-process has limited documentation only. For all detailed documentation of the full model to which this data set belongs (such as DQRs, review reports and other technical documentation), please see this process: eucalyptus forestry - WORLD (WITHOUT EU+EFTA+UK) []

## Technology and included processes
The production of Eucalyptus starts with the cultivation of seedlings in greenhouses, which are transplanted to the plantation area. Machines are used for site preparation. Eucalyptus cultivation is enhanced by means of herbicides, pesticides and fertilizers, especially in the first years of growth. After a growing period of seven years, machines are used for thinning and clear cut of the trees.
This activity includes the seedling production, the inputs of fertilizers, herbicides and pesticides as well as the fuel burned in the machinery.
Emissions to air, water and soil resulting from fertilizer use are modelled according to Nemecek et al. (2015). The active ingredients of pesticides and herbicides are considered as soil emissions. The input of boron (3.81E-06 kg) was excluded since its contribution was less than 3 % in terms of mass and single score.
Climate change impacts related to land use change (LUC) over the past 20 years are modelled according to Novaes et al. (2007).
References:
Nemecek T., Bengoa X., Lansche J., Mouron P., Riedener E., Rossi V. & Humbert S. Methodological Guidelines for the Life Cycle Inventory of Agricultural Products. [Version 3.0, July 2015.] World Food LCA Database (WFLDB). Quantis and Agroscope, Lausanne and Zurich,
Switzerland.

Novaes, R. M. L., Pazianotto, R. A. A., Brandão, M., Alves, B. J. R., May, A., Folegatti-Matsuura, M. I. S. 2017. Estimating 20-year land use change and derived CO2 emissions associated to crops, pasture and forestry in Brazil and each of its 27 states. Global Change Biology, v. 23, n. 9, p. 3716-3728.

## Reference product
- eucalyptus forestry // eucalyptus forestry // world (without eu+efta+uk), elementary: 1

## Inputs
- from arable, Land transformation: 0.00287582
- from permanent crops, Land transformation: 0.0023672
- freshwater, Renewable material resources from water: 1.49547e-5
- from grassland, Land transformation: 0.00018617
- from forest, natural, Land transformation: 0.000106383
- from unspecified, natural, Land transformation: 0.00704926
- carbon dioxide (biogenic), Renewable material resources from air: 1.79667
- from pasture/meadow, Land transformation: 0.0111178
- forest, intensive, Land occupation: 0.463264
- to forest, intensive, Land transformation: 0.0661806
- Energy, gross calorific value, in biomass, primary forest, Renewable energy resources from biosphere: 20.456
- Wood, soft, standing, Renewable material resources from biosphere: 0.00172414
- from unspecified, used, Land transformation: 0.000531915
- from agriculture, mosaic, Land transformation: 0.0062766
- Carbon dioxide (land use change), Renewable material resources from air: 0.0021
- from forest, intensive, Land transformation: 0.0355897
- from rivers, Land transformation: 5.31915e-5

## Outputs
- carbon dioxide (fossil), Emissions to air, unspecified: 0.00220068
- nitrous oxide, Emissions to air, unspecified: 7.67289e-6
- ammonia, Emissions to air, unspecified: 9.78258e-5
- Phosphorus, Emissions to water, unspecified: 6.73786e-6
- nitrate, Emissions to water, unspecified: 0.000116788
- isoxaflutole, Emissions to agricultural soil: 7.68265e-7
- flumioxazin, Emissions to agricultural soil: 9.44064e-7
- Nitrogen oxides, Emissions to air, unspecified: 1.9388e-5
- glyphosate, Emissions to agricultural soil: 1.87215e-5
- carfentrazone-ethyl, Emissions to agricultural soil: 3.85845e-7
- Herbicides, unspecified, Emissions to agricultural soil: 0.000329305
- Naphthalenesulfonic acids, Emissions to agricultural soil: 6.74658e-10
- diethylamine, Emissions to agricultural soil: 6.74658e-10

## Impact indicators
- Eutrophication marine: 4.29359e-5
- Ecotoxicity, freshwater: 23.2954
- Land use: 11.269
- Water use: 0.000642306
- Resource use, minerals and metals: 0
- Resource use, fossils: 0
- Climate change: 0.00219538
- Ozone depletion: 0
- Human toxicity, cancer: 0
- Human toxicity, non-cancer: 4.47164e-9
- EF-particulate Matter: 2.08536e-9
- Ionising radiation, human health: 0
- Photochemical ozone formation - human health: 1.9388e-5
- Acidification: 0.000309781
- Eutrophication, terrestrial: 0.00140031
- Eutrophication, freshwater: 6.73786e-6

## Deviations from the LCI method principle
The background data uses:
- the \xe2\x80\x9cRecycled content cut-off\xe2\x80\x9d approach to allocate end-of-life by-products and secondary materials. This allocation is explained in the description of the recycled content system model (http://www.ecoinvent.org/database/system-models-in-ecoinvent-3/cut-off-system-model/allocation-cut-off-by-classification.html).
OR
- EF compliant data

## Deviations from the LCI method approaches
Background data:
- the \xe2\x80\x9cRecycled content cut-off\xe2\x80\x9d approach to allocate end-of-life by-products and secondary materials. This allocation is explained in the description of the recycled content system model (http://www.ecoinvent.org/database/system-models-in-ecoinvent-3/cut-off-system-model/allocation-cut-off-by-classification.html). The ecoinvent database mostly relies on “Allocation – market values” apart for few exceptions particularly in the energy sector. ecoinvent energy data is replaced with EF3.0 core data as per the EF guidelines version 2.0.
OR
- EF compliant data

## Modelling constants
All modelling constants follow the requirements listed in the Tender Specifications 070201/2020/SER/ENV.B1. Completeness: There are no intentional cut-offs in the inventory no matter how small their contribution to all the EF impact categories is. Eventual cut-offs are in compliance with the Guide for EF compliant data sets (JRC 2020), i.e. only if below the 3% cut-off rule. Water use: water use is modelled at country level using separate flows for water withdrawal, water release and water evaporation. Handling multi-functional processes: the following PEF multi- functionality decision hierarchy is applied for resolving all multi- functionality problems: (1) subdivision or system expansion; (2) allocation based on a relevant underlying physical relationship (substitution may apply here); (3) allocation based on some other relationship. Direct land use change: GHG emissions from direct LUC allocated to good/service for 20 years after the LUC occurs, with IPCC default values. Carbon storage and delayed emissions: credits associated with temporary (carbon) storage or delayed emissions up to 300 years are not be considered. Emissions off-setting: are not included. Capital goods (including infrastructures) and their End of life: they are included. System boundaries: system boundaries include all processes linked to the product supply chain (e.g. maintenance). Time period: emissions and removals are modelled as if released or removed at the beginning of the assessment method. Fossil and biogenic carbon emissions and removals: removals and emissions are modelled as follows: All GHG emissions from fossil fuels (including peat and limestone) are modelled consistently with the most updated ILCD list of elementary flows. The non-fossil (biogenic) carbon flows are modelled consistently with the most updated ILCD list of elementary flows.

## Cut-off and completeness
There are no intentional cut-offs in the inventory no matter how small their contribution to all the EF impact categories is. Eventual cut-offs are in compliance with the Guide for EF compliant data sets (JRC 2020), i.e. only if below the 3% cut-off rule. The dataset dry mass and water balance has been checked to ensure the inventory is complete. Capital goods (e.g. infrastructure) and their end-of-life are included.

## Data selection and combination
These datasets include, in both their foreground and background data, links to EF3.0 compliant data.
The relevant background data on energy, transport, and End of Life are from the LCDN data node (http://lcdn.thinkstep.com/Node/).
All other background data in the supply of this product for which no EF3.0 process was available are from ecoinvent v3.7 database (www.ecoinvent.org) or other data sources.

## Data treatment and extrapolations
Several data sources have been used to model the inventory.

## Use advice
This data set is a supporting sub-data set and must be used exclusively as sub-data set of its corresponding level-1 partly disaggregated data set (see “General comment” field for exact name and UUID).

## Data sources
- Background Data for Representative products and organisations. EF 3.0 compliant (data stock)
- Nemecek T., Bengoa X., Lansche J., Mouron P., Riedener E., Rossi V. & Humbert S. Methodological Guidelines for the Life Cycle Inventory of Agricultural Products. [Version 3.0, July 2015.] World Food LCA Database (WFLDB). Quantis and Agroscope, Lausanne and Zurich, Switzerland.
- Quirino et al. (2005). Fatos e números do Brasil florestal. Brazilian Forestry Society - SBS.
- Novaes, R. M. L., Pazianotto, R. A. A., Brandão, M., Alves, B. J. R., May, A., Folegatti-Matsuura, M. I. S. 2017. Estimating 20-year land use change and derived CO2 emissions associated to crops, pasture and forestry in Brazil and each of its 27 states. Global Change Biology, v. 23, n. 9, p. 3716-3728.
- Novais & Smyth (1999) Fósforo em solo e planta em condições tropicais. Viçosa: Universidade Federal de Viçosa, p. 399.
- Nemecek, T.; Schnetzer, J (2011). Methods of assessment of direct field emissions for LCIs of agricultural production systems, Data v3.0 (2011): http://www.ecoinvent.org/fileadmin/talkpages/pages/01-01-crop-production/01_crop_production_-_direct_field_emissions___natural_resources_v1.1.pdf.

## Intended applications
Implementation of regular Product Environmental Footprint (PEF) studies and Organisation Environmental Footprint (OEF) studies exclusively under the specified Product groups and sectors as defined in the Product Environmental Footprint Category Rules (PEFCR) and Organisation Environmental Footprint Sectorial Rules (OEFSR) listed in http://ec.europa.eu/environment/eussd/smgp/PEFCR_OEFSR.htm
