# scouring, synthetic fibers; technology mix; production mix, at plant; service (raw materials excluded)

Dataset: ILCD process, Partly terminated system
Geography: GLO
Reference year: 2021
Valid until: 2024
Classification: Systems / Textiles, furnitures and other interiors
LCI method principle: Attributional
LCI method approaches: Allocation - market value
Completeness: All relevant flows quantified
Project: Provision of process-based 3.0 Environmental Footprint-compliant life cycle inventory datasets - Apparel 1 - contract number 070201/2020/840291/SER/ENV.B.1
Generated by: Life Cycle Indonesia
Owner: PRé Sustainability B.V.
Compliance: ILCD Data Network - Entry-level; Suggestions for updating the PEF method 2019; ISO 14040 Environmental Management – Life Cycle Assessment – Principles and Framework, 2006; ISO 14044:2006. Environmental Management – Life Cycle Assessment – Requirements and guidelines.; Environmental Footprint 3.1
Review: Dependent internal review by Avraam Symeonidis, Emilia Moreno Ruiz; Independent review panel by Fábio Valebona
Data quality: Overall quality: Good; Time representativeness: Very good; Geographical representativeness: Fair; Technological representativeness: Good; Precision: Good; Methodological appropriateness and consistency: Not applicable
Amounts: no units in this file; such an amount is in the reference unit of its flow, which a separate flow dataset defines
copyright: true
licenseType: Free of charge for some user types or use types
accessRestrictions: Free of charge for all final users implementing a regular Product Environmental Footprint (PEF) studies and Organisation Environmental Footprint (OEF) studies exclusively under the specified Product groups and sectors as defined in the Product Environmental Footprint Category Rules (PEFCR) and Organisation Environmental Footprint Sectorial Rules (OEFSR) listed in http://ec.europa.eu/environment/eussd/smgp/PEFCR_OEFSR.htm and in accordance with the terms and conditions of the EULA (available at https://ecoinvent.lca-data.com/) exclusively until 31st December 2024. Any use of this dataset or any derivative data not within the specific context of one of the PEF/OEF projects or after the end of 2024 is not permitted.

## General comment
Notice: this data set supersedes the EF3.0-compliant version (see link under "preceding data set version" below calculated with the EF3.0). The life cycle inventory is not changed from the original EF3.0 data set. The LCIA results are calculated based on the EF3.1 methods which provide updated characterisation factors in the following impact categories: Climate Change, Ecotoxicity freshwater, Photochemical Ozone Formation, Acidification, Human Toxicity non-cancer, and Human Toxicity cancer. The review report and the data quality ratings refer to the original results. The data set has been updated by the European Commission on the basis of the original EF3.0 data set delivered by the data provider.Scouring is one of the textiles pre-treatment processes to prepare the material for dyeing, printing, or finishing. The scouring procedures for synthetic ﬁbres are relatively simple since the ﬁbres contain fewer impurities, most of which have at least some degree of water solubility, the most important being sizes and lubricants. The major sizes used are polyvinyl alcohol, carboxymethylcellulose and polyacrylic acid, all of which are completely or partially water-soluble. On synthetic fibers, the scouring can be done for acetate fibers, nylon, polyamide, polyester, and acrylic fibers.

Clark, M. 2011. Handbook of Textile and Industrial Dyeing Vol. 1. Cambidge: Woodhead Publishing Limited, pp118,119

## Technology and included processes
Polyamide and polyester fibres are generally adequately scoured using an alkyl polyoxyethylene sulphate and sodium carbonate. For polyamides or nylons, non-ionic synthetic detergents along with an alkali (sodium carbonate or trisodium phosphate) are suitable. Anionic detergents such as fatty alcohol sulphonates behave like acid dyes and are adsorbed by the fibre. (Clark, 2011)

It is not always necessary to scour polyester fibre materials before dyeing. Loose stock, slubbing and some types of yarns are supplied in clean state and usually bear low quantities of processing aids which are compatible with disperse dyes. Such products can be simply washed with water or may even be allowed to remain in the dyebath. However, some products are heavily soiled, waxed or sized. Some may contain cationic processing aids. These must be removed before dyeing. For most normal purposes, the scouring bath should have anionic synthetic detergent or soap (alone or admixture with non-ionic surfactant) and soda ash. (Clark, 2011)

The activity starts when the raw materials enter the process. Materials entering the process are included as well as energy uses, water and chemicals. There is no direct emission to soil, but there is direct emission to water from this process such as BOD. Chemical agents that are used in the process are emitted through the wastewater. Meanwhile some of the water is emitted to air and the rest will become the wastewater. In the model, the 3 different varieties of synthetic fabrics (polyamide, nylon, and polyester) are pre-treated using the average value of 4 types of machines (kier boiler, jet, winch, and jigger). The consumption of lubricating oil using an oven bonding machines as a proxy.

Clark, M. 2011. Handbook of Textile and Industrial Dyeing Vol. 1. Cambidge: Woodhead Publishing Limited, pp118-121

## Parameters
- kg_0: 0.00146183
  Mass in kg, for fatty alcohol sulfate; Transoceanic ship, containers; GLO
- km_0: 6376.24
  Distance in km, for fatty alcohol sulfate; Transoceanic ship, containers; GLO
- kg_km_0: 9.321; = kg_0*km_0
  Transport amount in km*km, for fatty alcohol sulfate; Transoceanic ship, containers; GLO
- kg_1: 0.00146183
  Mass in kg, for fatty alcohol sulfate; Freight train, diesel traction; EU+EFTA+UK
- km_1: 1637.9
  Distance in km, for fatty alcohol sulfate; Freight train, diesel traction; EU+EFTA+UK
- kg_km_1: 2.39434; = kg_1*km_1
  Transport amount in km*km, for fatty alcohol sulfate; Freight train, diesel traction; EU+EFTA+UK
- kg_2: 0.00146183
  Mass in kg, for fatty alcohol sulfate; Freight train, electricity traction; EU+EFTA+UK
- km_2: 557.146
  Distance in km, for fatty alcohol sulfate; Freight train, electricity traction; EU+EFTA+UK
- kg_km_2: 0.814455; = kg_2*km_2
  Transport amount in km*km, for fatty alcohol sulfate; Freight train, electricity traction; EU+EFTA+UK
- kg_3: 0.00146183
  Mass in kg, for fatty alcohol sulfate; Freight train, average; EU+EFTA+UK
- km_3: 13.1406
  Distance in km, for fatty alcohol sulfate; Freight train, average; EU+EFTA+UK
- kg_km_3: 0.0192093; = kg_3*km_3
  Transport amount in km*km, for fatty alcohol sulfate; Freight train, average; EU+EFTA+UK
- kg_4: 0.00146183
  Mass in kg, for fatty alcohol sulfate; Articulated lorry transport, Total weight <7.5 t, mix Euro 0-5; EU+EFTA+UK
- km_4: 261.432
  Distance in km, for fatty alcohol sulfate; Articulated lorry transport, Total weight <7.5 t, mix Euro 0-5; EU+EFTA+UK
- kg_km_4: 0.382171; = kg_4*km_4
  Transport amount in km*km, for fatty alcohol sulfate; Articulated lorry transport, Total weight <7.5 t, mix Euro 0-5; EU+EFTA+UK
- kg_5: 0.00146183
  Mass in kg, for fatty alcohol sulfate; Articulated lorry transport, Euro 4, Total weight >32 t; EU+EFTA+UK
- km_5: 2449.67
  Distance in km, for fatty alcohol sulfate; Articulated lorry transport, Euro 4, Total weight >32 t; EU+EFTA+UK
- kg_km_5: 3.58101; = kg_5*km_5
  Transport amount in km*km, for fatty alcohol sulfate; Articulated lorry transport, Euro 4, Total weight >32 t; EU+EFTA+UK
- kg_6: 0.00146183
  Mass in kg, for fatty alcohol sulfate; Articulated lorry transport, Total weight >32 t, mix Euro 0-5; ROW w/o EU+EFTA
- km_6: 6465.16
  Distance in km, for fatty alcohol sulfate; Articulated lorry transport, Total weight >32 t, mix Euro 0-5; ROW w/o EU+EFTA
- kg_km_6: 9.45099; = kg_6*km_6
  Transport amount in km*km, for fatty alcohol sulfate; Articulated lorry transport, Total weight >32 t, mix Euro 0-5; ROW w/o EU+EFTA
- kg_7: 0.0133333
  Mass in kg, for trisodium phosphate // trisodium phosphate production // glo; Articulated lorry transport, Euro 4, Total weight >32 t; EU+EFTA+UK
- km_7: 997.5
  Distance in km, for trisodium phosphate // trisodium phosphate production // glo; Articulated lorry transport, Euro 4, Total weight >32 t; EU+EFTA+UK
- kg_km_7: 13.3; = kg_7*km_7
  Transport amount in km*km, for trisodium phosphate // trisodium phosphate production // glo; Articulated lorry transport, Euro 4, Total weight >32 t; EU+EFTA+UK
- kg_8: 1.69881e-6
  Mass in kg, for lubricating oil // lubricants at refinery // eu+efta+uk; Articulated lorry transport, Euro 4, Total weight >32 t; EU+EFTA+UK
- km_8: 1000.7
  Distance in km, for lubricating oil // lubricants at refinery // eu+efta+uk; Articulated lorry transport, Euro 4, Total weight >32 t; EU+EFTA+UK
- kg_km_8: 0.0017; = kg_8*km_8
  Transport amount in km*km, for lubricating oil // lubricants at refinery // eu+efta+uk; Articulated lorry transport, Euro 4, Total weight >32 t; EU+EFTA+UK
- kg_9: 3.10218e-7
  Mass in kg, for lubricating oil // lubricants at refinery // rsa; Articulated lorry transport, Euro 4, Total weight >32 t; EU+EFTA+UK
- km_9: 1000
  Distance in km, for lubricating oil // lubricants at refinery // rsa; Articulated lorry transport, Euro 4, Total weight >32 t; EU+EFTA+UK
- kg_km_9: 0.000310218; = kg_9*km_9
  Transport amount in km*km, for lubricating oil // lubricants at refinery // rsa; Articulated lorry transport, Euro 4, Total weight >32 t; EU+EFTA+UK
- kg_10: 1.27269e-7
  Mass in kg, for lubricating oil // lubricants at refinery // raf; Articulated lorry transport, Euro 4, Total weight >32 t; EU+EFTA+UK
- km_10: 1000
  Distance in km, for lubricating oil // lubricants at refinery // raf; Articulated lorry transport, Euro 4, Total weight >32 t; EU+EFTA+UK
- kg_km_10: 0.000127269; = kg_10*km_10
  Transport amount in km*km, for lubricating oil // lubricants at refinery // raf; Articulated lorry transport, Euro 4, Total weight >32 t; EU+EFTA+UK
- kg_11: 3.33513e-6
  Mass in kg, for lubricating oil // lubricants at refinery // ras w/o cn; Articulated lorry transport, Euro 4, Total weight >32 t; EU+EFTA+UK
- km_11: 1000
  Distance in km, for lubricating oil // lubricants at refinery // ras w/o cn; Articulated lorry transport, Euro 4, Total weight >32 t; EU+EFTA+UK
- kg_km_11: 0.00333513; = kg_11*km_11
  Transport amount in km*km, for lubricating oil // lubricants at refinery // ras w/o cn; Articulated lorry transport, Euro 4, Total weight >32 t; EU+EFTA+UK
- kg_12: 2.75787e-6
  Mass in kg, for lubricating oil // lubricants at refinery // ru; Articulated lorry transport, Euro 4, Total weight >32 t; EU+EFTA+UK
- km_12: 1000
  Distance in km, for lubricating oil // lubricants at refinery // ru; Articulated lorry transport, Euro 4, Total weight >32 t; EU+EFTA+UK
- kg_km_12: 0.00275787; = kg_12*km_12
  Transport amount in km*km, for lubricating oil // lubricants at refinery // ru; Articulated lorry transport, Euro 4, Total weight >32 t; EU+EFTA+UK
- kg_13: 2.60333e-6
  Mass in kg, for lubricating oil // lubricants at refinery // rna; Articulated lorry transport, Euro 4, Total weight >32 t; EU+EFTA+UK
- km_13: 1000
  Distance in km, for lubricating oil // lubricants at refinery // rna; Articulated lorry transport, Euro 4, Total weight >32 t; EU+EFTA+UK
- kg_km_13: 0.00260333; = kg_13*km_13
  Transport amount in km*km, for lubricating oil // lubricants at refinery // rna; Articulated lorry transport, Euro 4, Total weight >32 t; EU+EFTA+UK
- kg_14: 5.2953e-7
  Mass in kg, for lubricating oil // lubricants at refinery // cn; Articulated lorry transport, Euro 4, Total weight >32 t; EU+EFTA+UK
- km_14: 1000
  Distance in km, for lubricating oil // lubricants at refinery // cn; Articulated lorry transport, Euro 4, Total weight >32 t; EU+EFTA+UK
- kg_km_14: 0.00052953; = kg_14*km_14
  Transport amount in km*km, for lubricating oil // lubricants at refinery // cn; Articulated lorry transport, Euro 4, Total weight >32 t; EU+EFTA+UK
- kg_15: 0.0133333
  Mass in kg, for trisodium phosphate // trisodium phosphate production // glo; Transoceanic ship, containers; GLO
- km_15: 17925
  Distance in km, for trisodium phosphate // trisodium phosphate production // glo; Transoceanic ship, containers; GLO
- kg_km_15: 239; = kg_15*km_15
  Transport amount in km*km, for trisodium phosphate // trisodium phosphate production // glo; Transoceanic ship, containers; GLO
- kg_16: 3.10218e-7
  Mass in kg, for lubricating oil // lubricants at refinery // rsa; Transoceanic ship, containers; GLO
- km_16: 18000
  Distance in km, for lubricating oil // lubricants at refinery // rsa; Transoceanic ship, containers; GLO
- kg_km_16: 0.00558392; = kg_16*km_16
  Transport amount in km*km, for lubricating oil // lubricants at refinery // rsa; Transoceanic ship, containers; GLO
- kg_17: 1.27269e-7
  Mass in kg, for lubricating oil // lubricants at refinery // raf; Transoceanic ship, containers; GLO
- km_17: 18000
  Distance in km, for lubricating oil // lubricants at refinery // raf; Transoceanic ship, containers; GLO
- kg_km_17: 0.00229084; = kg_17*km_17
  Transport amount in km*km, for lubricating oil // lubricants at refinery // raf; Transoceanic ship, containers; GLO
- kg_18: 3.33513e-6
  Mass in kg, for lubricating oil // lubricants at refinery // ras w/o cn; Transoceanic ship, containers; GLO
- km_18: 18000
  Distance in km, for lubricating oil // lubricants at refinery // ras w/o cn; Transoceanic ship, containers; GLO
- kg_km_18: 0.0600323; = kg_18*km_18
  Transport amount in km*km, for lubricating oil // lubricants at refinery // ras w/o cn; Transoceanic ship, containers; GLO
- kg_19: 1.69881e-6
  Mass in kg, for lubricating oil // lubricants at refinery // eu+efta+uk; Transoceanic ship, containers; GLO
- km_19: 18012.6
  Distance in km, for lubricating oil // lubricants at refinery // eu+efta+uk; Transoceanic ship, containers; GLO
- kg_km_19: 0.0306; = kg_19*km_19
  Transport amount in km*km, for lubricating oil // lubricants at refinery // eu+efta+uk; Transoceanic ship, containers; GLO
- kg_20: 2.75787e-6
  Mass in kg, for lubricating oil // lubricants at refinery // ru; Transoceanic ship, containers; GLO
- km_20: 18000
  Distance in km, for lubricating oil // lubricants at refinery // ru; Transoceanic ship, containers; GLO
- kg_km_20: 0.0496417; = kg_20*km_20
  Transport amount in km*km, for lubricating oil // lubricants at refinery // ru; Transoceanic ship, containers; GLO
- kg_21: 2.60333e-6
  Mass in kg, for lubricating oil // lubricants at refinery // rna; Transoceanic ship, containers; GLO
- km_21: 18000
  Distance in km, for lubricating oil // lubricants at refinery // rna; Transoceanic ship, containers; GLO
- kg_km_21: 0.04686; = kg_21*km_21
  Transport amount in km*km, for lubricating oil // lubricants at refinery // rna; Transoceanic ship, containers; GLO
- kg_22: 5.2953e-7
  Mass in kg, for lubricating oil // lubricants at refinery // cn; Transoceanic ship, containers; GLO
- km_22: 18000
  Distance in km, for lubricating oil // lubricants at refinery // cn; Transoceanic ship, containers; GLO
- kg_km_22: 0.00953153; = kg_22*km_22
  Transport amount in km*km, for lubricating oil // lubricants at refinery // cn; Transoceanic ship, containers; GLO

## Reference product
- scouring, synthetic fibers // scouring, synthetic fibers // glo: 1

## Inputs
- Electricity from Electricity grid mix 1kV-60kV - AU: 0.003
- Electricity from Electricity grid mix 1kV-60kV - EU+EFTA+UK: 0.0441
- Electricity from Electricity grid mix 1kV-60kV - NZ: 0.0006
- Electricity from Electricity grid mix 1kV-60kV - RAF: 0.0096
- Electricity from Electricity grid mix 1kV-60kV - RAS w/o CN: 0.1385
- Electricity from Electricity grid mix 1kV-60kV - RNA: 0.0645
- Electricity from Electricity grid mix 1kV-60kV - RSA: 0.0219
- Electricity from Electricity grid mix 1kV-60kV - RU: 0.0129
- Transport of fatty alcohol sulfate by Transoceanic ship, containers - GLO: 9.321; = kg_km_0
- Transport of fatty alcohol sulfate by Freight train, diesel traction - EU+EFTA+UK: 2.39434; = kg_km_1
- Transport of fatty alcohol sulfate by Freight train, electricity traction - EU+EFTA+UK: 0.814455; = kg_km_2
- Transport of fatty alcohol sulfate by Freight train, average - EU+EFTA+UK: 0.0192093; = kg_km_3
- Transport of fatty alcohol sulfate by Articulated lorry transport, Total weight <7.5 t, mix Euro 0-5 - EU+EFTA+UK: 0.382171; = kg_km_4
- Transport of fatty alcohol sulfate by Articulated lorry transport, Euro 4, Total weight >32 t - EU+EFTA+UK: 3.58101; = kg_km_5
- Transport of fatty alcohol sulfate by Articulated lorry transport, Total weight >32 t, mix Euro 0-5 - ROW w/o EU+EFTA: 9.45099; = kg_km_6
- Transport of trisodium phosphate // trisodium phosphate production // glo by Articulated lorry transport, Euro 4, Total weight >32 t - EU+EFTA+UK: 13.3; = kg_km_7
- Transport of lubricating oil // lubricants at refinery // eu+efta+uk by Articulated lorry transport, Euro 4, Total weight >32 t - EU+EFTA+UK: 0.0017; = kg_km_8
- Transport of lubricating oil // lubricants at refinery // rsa by Articulated lorry transport, Euro 4, Total weight >32 t - EU+EFTA+UK: 0.000310218; = kg_km_9
- Transport of lubricating oil // lubricants at refinery // raf by Articulated lorry transport, Euro 4, Total weight >32 t - EU+EFTA+UK: 0.000127269; = kg_km_10
- Transport of lubricating oil // lubricants at refinery // ras w/o cn by Articulated lorry transport, Euro 4, Total weight >32 t - EU+EFTA+UK: 0.00333513; = kg_km_11
- Transport of lubricating oil // lubricants at refinery // ru by Articulated lorry transport, Euro 4, Total weight >32 t - EU+EFTA+UK: 0.00275787; = kg_km_12
- Transport of lubricating oil // lubricants at refinery // rna by Articulated lorry transport, Euro 4, Total weight >32 t - EU+EFTA+UK: 0.00260333; = kg_km_13
- Transport of lubricating oil // lubricants at refinery // cn by Articulated lorry transport, Euro 4, Total weight >32 t - EU+EFTA+UK: 0.00052953; = kg_km_14
- Transport of trisodium phosphate // trisodium phosphate production // glo by Transoceanic ship, containers - GLO: 239; = kg_km_15
- Transport of lubricating oil // lubricants at refinery // rsa by Transoceanic ship, containers - GLO: 0.00558392; = kg_km_16
- Transport of lubricating oil // lubricants at refinery // raf by Transoceanic ship, containers - GLO: 0.00229084; = kg_km_17
- Transport of lubricating oil // lubricants at refinery // ras w/o cn by Transoceanic ship, containers - GLO: 0.0600323; = kg_km_18
- Transport of lubricating oil // lubricants at refinery // eu+efta+uk by Transoceanic ship, containers - GLO: 0.0306; = kg_km_19
- Transport of lubricating oil // lubricants at refinery // ru by Transoceanic ship, containers - GLO: 0.0496417; = kg_km_20
- Transport of lubricating oil // lubricants at refinery // rna by Transoceanic ship, containers - GLO: 0.04686; = kg_km_21
- Transport of lubricating oil // lubricants at refinery // cn by Transoceanic ship, containers - GLO: 0.00953153; = kg_km_22
- scouring, synthetic fibers // scouring, synthetic fibers // glo, blackbox: 1
- scouring, synthetic fibers // scouring, synthetic fibers // glo, elementary: 1

## Impact indicators
- Eutrophication marine: 0.000547563
- Ecotoxicity, freshwater: 3.73254
- Land use: 7.39623
- Water use: 0.585109
- Resource use, minerals and metals: 2.23343e-6
- Resource use, fossils: 2.39651
- Climate change: 0.226591
- Ozone depletion: 1.13854e-8
- Human toxicity, cancer: 3.1763e-10
- Human toxicity, non-cancer: 3.80502e-9
- EF-particulate Matter: 2.95156e-8
- Ionising radiation, human health: 0.00865988
- Photochemical ozone formation - human health: 0.000822713
- Acidification: 0.00145552
- Eutrophication, terrestrial: 0.00301668
- Eutrophication, freshwater: 0.000168948

## Deviations from the LCI method principle
The background data uses:
- the \xe2\x80\x9cRecycled content cut-off\xe2\x80\x9d approach to allocate end-of-life by-products and secondary materials. This allocation is explained in the description of the recycled content system model (http://www.ecoinvent.org/database/system-models-in-ecoinvent-3/cut-off-system-model/allocation-cut-off-by-classification.html).
OR
- EF compliant data

## Deviations from the LCI method approaches
Background data:
- the \xe2\x80\x9cRecycled content cut-off\xe2\x80\x9d approach to allocate end-of-life by-products and secondary materials. This allocation is explained in the description of the recycled content system model (http://www.ecoinvent.org/database/system-models-in-ecoinvent-3/cut-off-system-model/allocation-cut-off-by-classification.html). The ecoinvent database mostly relies on “Allocation – market values” apart for few exceptions particularly in the energy sector. ecoinvent energy data is replaced with EF3.0 core data as per the EF guidelines version 2.0.
OR
- EF compliant data

## Modelling constants
All modelling constants follow the requirements listed in the Tender Specifications 070201/2020/SER/ENV.B1. Completeness: There are no intentional cut-offs in the inventory no matter how small their contribution to all the EF impact categories is. Eventual cut-offs are in compliance with the Guide for EF compliant data sets (JRC 2020), i.e. only if below the 3% cut-off rule. Water use: water use is modelled at country level using separate flows for water withdrawal, water release and water evaporation. Handling multi-functional processes: the following PEF multi- functionality decision hierarchy is applied for resolving all multi- functionality problems: (1) subdivision or system expansion; (2) allocation based on a relevant underlying physical relationship (substitution may apply here); (3) allocation based on some other relationship. Direct land use change: GHG emissions from direct LUC allocated to good/service for 20 years after the LUC occurs, with IPCC default values. Carbon storage and delayed emissions: credits associated with temporary (carbon) storage or delayed emissions up to 300 years are not be considered. Emissions off-setting: are not included. Capital goods (including infrastructures) and their End of life: they are included. System boundaries: system boundaries include all processes linked to the product supply chain (e.g. maintenance). Time period: emissions and removals are modelled as if released or removed at the beginning of the assessment method. Fossil and biogenic carbon emissions and removals: removals and emissions are modelled as follows: All GHG emissions from fossil fuels (including peat and limestone) are modelled consistently with the most updated ILCD list of elementary flows. The non-fossil (biogenic) carbon flows are modelled consistently with the most updated ILCD list of elementary flows.

## Cut-off and completeness
There are no intentional cut-offs in the inventory no matter how small their contribution to all the EF impact categories is. Eventual cut-offs are in compliance with the Guide for EF compliant data sets (JRC 2020), i.e. only if below the 3% cut-off rule. The dataset dry mass and water balance has been checked to ensure the inventory is complete. Capital goods (e.g. infrastructure) and their end-of-life are included.

## Data selection and combination
These datasets include, in both their foreground and background data, links to EF3.0 compliant data.
The relevant background data on energy, transport, and End of Life are from the LCDN data node (http://lcdn.thinkstep.com/Node/).
All other background data in the supply of this product for which no EF3.0 process was available are from ecoinvent v3.7 database (www.ecoinvent.org) or other data sources.

## Data treatment and extrapolations
Several data sources have been used to model the inventory.

## Review details
Internal reviews have been asked to review the plausibility of the unit process, LCIA scores, and DQRs. Internal reviewers have also been asked to review the data for EF compliancy. The consortium is therefore responsible for aspects such as compliancy with the ILCD format, including validation in Look@LCI, and nomenclature.
Internal reviwers have been asked to judge based on the process name, that the unit process models in a complete and representative way the process in the requested location. The review encompassed the plausability of:
- exchanges with nature (elementary flows) as well as exchanges such as product and waste flows.
- meta information (general comment, technology comment, system boundaries, allocation, cut-off rules, etc.). Reviewers were asked to judge if the provided information is enough to understand the content of the process.
- LCIA scores
- DQRs including precision, technology, time and geography. As well as the overall DQR.
External reviewers have been asked to provide their expertise in the field of interest. External reviewers have been asked to review the unit process, including eventual methodological choices, the LCIA scores (provided with contribution scores as well), and DQRs. External reviewers have been provided all the information in a tool developed by the consortium for the purpose of this project.
External reviewers have been asked to judge based on the process name, that the unit process models in a complete and representative way the process in the requested location. The review encompassed:
- Plausability and completeness of exchanges with nature (elementary flows) as well as exchanges such as product and waste flows.
- Review of meta information (general comment, technology comment, system boundaries, allocation, cut-off rules, etc.). Reviewers were asked to judge if the provided information is enough to understand the content of the process.
- Review of properties (biogenic carbon and water content).
- Review of allocation keys.
- Plausability of LCIA scores calculated by the consortium.
- Plausability of DQRs including precision, technology, time and geography. As well as the overall DQR.

## Data sources
- Background Data for Representative products and organisations. EF 3.0 compliant (data stock)
- Mathews Kolanjikombil, (2019). Handbook of Textile Processors Series Pretreatment of Textile Substrates. WOODHEAD PUBLISHING INDIA PVT LTD, New Delhi, India
- M. Clark (2011). Handbook of textile and industrial dyeing Volume 1: Principles, processes and types of dyes. Woodhead Publishing Limited, Cambridge, UK
- Lebon (2021) Nonwoven Oven Machine, Catalog and Company Messages, Qingdao Lebon Industry Co., Ltd., China
- UN Data (2018) Statistics Data for Lubricants Productions, http://data.un.org/Data.aspx?q=Lubricants&d=EDATA&f=cmID%3aLU, United Nations Statistics Division, Global.
- Heshan (2021) High Temperature High Pressure Dyeing Machines, http://www.hsperfect.com/cgi/search-en.cgi?f=company_en_1_+product_en_1_&t=product_en_1_&id=92839, Heshan Perfect Dyeing Equipment Factory Co.,Ltd., China
- Buentex (2021) Jet Dyeing Machine, https://buentex.com/en/product/high-temperature-jet-dyeing-machine.html, Buentex Machinery Trading Co.,Ltd, China
- Buentex (2021) Low Liquor Ratio Dyeing Machine, https://buentex.com/en/product/low-liquor-ratio-dyeing-machine.html, Buetex Machinery Trading Co.,Ltd, China
- Zen (2021) Jigger Machine, https://www.zenindustrialengineers.com/automatic-dyeing-jigger.html, Zen Industrial Engineers, Gujarat, India
- Md. Shahiduzzaman Shuvo (2014). Waste Water From Textile Industry (Characteristics & Source). Daffodil International University, Dhaka, Bangladesh

## Intended applications
Implementation of regular Product Environmental Footprint (PEF) studies and Organisation Environmental Footprint (OEF) studies exclusively under the specified Product groups and sectors as defined in the Product Environmental Footprint Category Rules (PEFCR) and Organisation Environmental Footprint Sectorial Rules (OEFSR) listed in http://ec.europa.eu/environment/eussd/smgp/PEFCR_OEFSR.htm
