# scouring, natural fibers; scouring; production mix, at plant; service

Dataset: ILCD process, Partly terminated system
Geography: GLO
Reference year: 2021
Valid until: 2024
Classification: Systems / Textiles, furnitures and other interiors
LCI method principle: Attributional
LCI method approaches: Allocation - market value
Completeness: All relevant flows quantified
Project: Provision of process-based 3.0 Environmental Footprint-compliant life cycle inventory datasets - Apparel 1 - contract number 070201/2020/840291/SER/ENV.B.1
Generated by: Life Cycle Indonesia
Owner: PRé Sustainability B.V.
Compliance: ILCD Data Network - Entry-level; Suggestions for updating the PEF method 2019; ISO 14040 Environmental Management – Life Cycle Assessment – Principles and Framework, 2006; ISO 14044:2006. Environmental Management – Life Cycle Assessment – Requirements and guidelines.; Environmental Footprint 3.1
Review: Dependent internal review by Avraam Symeonidis, Emilia Moreno Ruiz; Independent review panel by Fábio Valebona
Data quality: Overall quality: Good; Time representativeness: Very good; Geographical representativeness: Fair; Technological representativeness: Very good; Precision: Good; Methodological appropriateness and consistency: Not applicable
Amounts: no units in this file; such an amount is in the reference unit of its flow, which a separate flow dataset defines
copyright: true
licenseType: Free of charge for some user types or use types
accessRestrictions: Free of charge for all final users implementing a regular Product Environmental Footprint (PEF) studies and Organisation Environmental Footprint (OEF) studies exclusively under the specified Product groups and sectors as defined in the Product Environmental Footprint Category Rules (PEFCR) and Organisation Environmental Footprint Sectorial Rules (OEFSR) listed in http://ec.europa.eu/environment/eussd/smgp/PEFCR_OEFSR.htm and in accordance with the terms and conditions of the EULA (available at https://ecoinvent.lca-data.com/) exclusively until 31st December 2024. Any use of this dataset or any derivative data not within the specific context of one of the PEF/OEF projects or after the end of 2024 is not permitted.

## General comment
Notice: this data set supersedes the EF3.0-compliant version (see link under "preceding data set version" below calculated with the EF3.0). The life cycle inventory is not changed from the original EF3.0 data set. The LCIA results are calculated based on the EF3.1 methods which provide updated characterisation factors in the following impact categories: Climate Change, Ecotoxicity freshwater, Photochemical Ozone Formation, Acidification, Human Toxicity non-cancer, and Human Toxicity cancer. The review report and the data quality ratings refer to the original results. The data set has been updated by the European Commission on the basis of the original EF3.0 data set delivered by the data provider.Scouring is one of the textiles pre-treatment processes to prepare the material for dyeing, printing, or finishing. The scouring procedures for natural ﬁbres covers the enzymatic bleaching of cotton. During the textile bleaching stage of textile manufacturing, natural pigments and textile add-ons are removed. Natural fabrics such as cotton are normally bleached with hydrogen peroxide before dyeing, a conventional bleaching method that requires high amounts of alkaline chemicals and huge quantities of water for rinsing. Using enzymes for bleaching, however, can decrease polymerisation and reduce fibre damage. Catalase enzymes break down hydrogen peroxide bleaching liquor into water molecules and less reactive gaseous oxygen. Compared with the traditional bleaching method, the enzymatic process results in reduced water and energy consumption.

Source: Quantis, WALDB Dataset

## Technology and included processes
The natural fibres are generally scoured using organic chemical, ethoxylated alcohol, and fatty alcohol.

The activity starts when the raw materials enter the process. This dataset is a service process which does not include the textile input. The materials such as chemicals entering the process are included as well as energy uses (electricity and heat), infrastructure of the machine, and water. There is no direct emission to soil, but there is direct emission to water from this process i.e. COD. Chemical agents that are used in the process are emitted through the wastewater.

Source: Quantis, WALDB Dataset

## Parameters
- kg_0: 0.005
  Mass in kg, for fatty alcohols // fatty alcohols production // glo; Articulated lorry transport, Euro 4, Total weight >32 t; EU+EFTA+UK
- km_0: 1000
  Distance in km, for fatty alcohols // fatty alcohols production // glo; Articulated lorry transport, Euro 4, Total weight >32 t; EU+EFTA+UK
- kg_km_0: 5; = kg_0*km_0
  Transport amount in km*km, for fatty alcohols // fatty alcohols production // glo; Articulated lorry transport, Euro 4, Total weight >32 t; EU+EFTA+UK
- kg_1: 0.005
  Mass in kg, for ethoxylated alcohol (ae7), petrochemical // ethoxylated alcohol (ae7) production, petrochemical // eu+efta+uk; Articulated lorry transport, Euro 4, Total weight >32 t; EU+EFTA+UK
- km_1: 1000
  Distance in km, for ethoxylated alcohol (ae7), petrochemical // ethoxylated alcohol (ae7) production, petrochemical // eu+efta+uk; Articulated lorry transport, Euro 4, Total weight >32 t; EU+EFTA+UK
- kg_km_1: 5; = kg_1*km_1
  Transport amount in km*km, for ethoxylated alcohol (ae7), petrochemical // ethoxylated alcohol (ae7) production, petrochemical // eu+efta+uk; Articulated lorry transport, Euro 4, Total weight >32 t; EU+EFTA+UK
- kg_2: 0.0165
  Mass in kg, for enzymes // enzymes production // eu+efta+uk; Articulated lorry transport, Euro 4, Total weight >32 t; EU+EFTA+UK
- km_2: 130.303
  Distance in km, for enzymes // enzymes production // eu+efta+uk; Articulated lorry transport, Euro 4, Total weight >32 t; EU+EFTA+UK
- kg_km_2: 2.15; = kg_2*km_2
  Transport amount in km*km, for enzymes // enzymes production // eu+efta+uk; Articulated lorry transport, Euro 4, Total weight >32 t; EU+EFTA+UK
- kg_3: 0.005
  Mass in kg, for fatty alcohols // fatty alcohols production // glo; Transoceanic ship, containers; GLO
- km_3: 18000
  Distance in km, for fatty alcohols // fatty alcohols production // glo; Transoceanic ship, containers; GLO
- kg_km_3: 90; = kg_3*km_3
  Transport amount in km*km, for fatty alcohols // fatty alcohols production // glo; Transoceanic ship, containers; GLO
- kg_4: 0.005
  Mass in kg, for ethoxylated alcohol (ae7), petrochemical // ethoxylated alcohol (ae7) production, petrochemical // eu+efta+uk; Transoceanic ship, containers; GLO
- km_4: 18000
  Distance in km, for ethoxylated alcohol (ae7), petrochemical // ethoxylated alcohol (ae7) production, petrochemical // eu+efta+uk; Transoceanic ship, containers; GLO
- kg_km_4: 90; = kg_4*km_4
  Transport amount in km*km, for ethoxylated alcohol (ae7), petrochemical // ethoxylated alcohol (ae7) production, petrochemical // eu+efta+uk; Transoceanic ship, containers; GLO
- kg_5: 0.0165
  Mass in kg, for enzymes // enzymes production // eu+efta+uk; Transoceanic ship, containers; GLO
- km_5: 18000
  Distance in km, for enzymes // enzymes production // eu+efta+uk; Transoceanic ship, containers; GLO
- kg_km_5: 297; = kg_5*km_5
  Transport amount in km*km, for enzymes // enzymes production // eu+efta+uk; Transoceanic ship, containers; GLO

## Reference product
- scouring, natural fibers // scouring, natural fibers // glo: 1

## Inputs
- Electricity from Electricity grid mix 1kV-60kV - AU: 0.0037
- Electricity from Electricity grid mix 1kV-60kV - EU+EFTA+UK: 0.0539
- Electricity from Electricity grid mix 1kV-60kV - NZ: 0.0007
- Electricity from Electricity grid mix 1kV-60kV - RAF: 0.0118
- Electricity from Electricity grid mix 1kV-60kV - RNA: 0.0789
- Electricity from Electricity grid mix 1kV-60kV - RSA: 0.0268
- Electricity from Electricity grid mix 1kV-60kV - RU: 0.0158
- Thermal energy (MJ) from Thermal energy from biogas - EU+EFTA+UK: 0.0760032
- Thermal energy (MJ) from Thermal energy from biogas - ROW: 0.153897
- Thermal energy (MJ) from Thermal energy from hard coal - EU+EFTA+UK: 0.020198
- Thermal energy (MJ) from Thermal energy from hard coal - ROW: 0.815802
- Thermal energy (MJ) from Thermal energy from natural gas - EU+EFTA+UK: 0.285548
- Thermal energy (MJ) from Thermal energy from natural gas - ROW: 0.738552
- Transport of fatty alcohols // fatty alcohols production // glo by Articulated lorry transport, Euro 4, Total weight >32 t - EU+EFTA+UK: 5; = kg_km_0
- Transport of ethoxylated alcohol (ae7), petrochemical // ethoxylated alcohol (ae7) production, petrochemical // eu+efta+uk by Articulated lorry transport, Euro 4, Total weight >32 t - EU+EFTA+UK: 5; = kg_km_1
- Transport of enzymes // enzymes production // eu+efta+uk by Articulated lorry transport, Euro 4, Total weight >32 t - EU+EFTA+UK: 2.15; = kg_km_2
- Transport of fatty alcohols // fatty alcohols production // glo by Transoceanic ship, containers - GLO: 90; = kg_km_3
- Transport of ethoxylated alcohol (ae7), petrochemical // ethoxylated alcohol (ae7) production, petrochemical // eu+efta+uk by Transoceanic ship, containers - GLO: 90; = kg_km_4
- Transport of enzymes // enzymes production // eu+efta+uk by Transoceanic ship, containers - GLO: 297; = kg_km_5
- Electricity from Electricity grid mix 1kV-60kV - CN: 0.0808823
- Electricity from Electricity grid mix 1kV-60kV - RAS w/o CN: 0.0886177
- scouring, natural fibers // scouring, natural fibers // glo, blackbox: 1
- scouring, natural fibers // scouring, natural fibers // glo, elementary: 1

## Impact indicators
- Eutrophication marine: 0.000434252
- Ecotoxicity, freshwater: 2.69015
- Land use: 1.66065
- Water use: 0.599781
- Resource use, minerals and metals: 2.0402e-7
- Resource use, fossils: 5.40138
- Climate change: 0.473263
- Ozone depletion: 3.20494e-10
- Human toxicity, cancer: 3.36088e-10
- Human toxicity, non-cancer: 3.48877e-9
- EF-particulate Matter: 7.05427e-8
- Ionising radiation, human health: 0.0262007
- Photochemical ozone formation - human health: 0.00111746
- Acidification: 0.00209512
- Eutrophication, terrestrial: 0.00341799
- Eutrophication, freshwater: 5.96305e-5

## Deviations from the LCI method principle
The background data uses:
- the \xe2\x80\x9cRecycled content cut-off\xe2\x80\x9d approach to allocate end-of-life by-products and secondary materials. This allocation is explained in the description of the recycled content system model (http://www.ecoinvent.org/database/system-models-in-ecoinvent-3/cut-off-system-model/allocation-cut-off-by-classification.html).
OR
- EF compliant data

## Deviations from the LCI method approaches
Background data:
- the \xe2\x80\x9cRecycled content cut-off\xe2\x80\x9d approach to allocate end-of-life by-products and secondary materials. This allocation is explained in the description of the recycled content system model (http://www.ecoinvent.org/database/system-models-in-ecoinvent-3/cut-off-system-model/allocation-cut-off-by-classification.html). The ecoinvent database mostly relies on “Allocation – market values” apart for few exceptions particularly in the energy sector. ecoinvent energy data is replaced with EF3.0 core data as per the EF guidelines version 2.0.
OR
- EF compliant data

## Modelling constants
All modelling constants follow the requirements listed in the Tender Specifications 070201/2020/SER/ENV.B1. Completeness: There are no intentional cut-offs in the inventory no matter how small their contribution to all the EF impact categories is. Eventual cut-offs are in compliance with the Guide for EF compliant data sets (JRC 2020), i.e. only if below the 3% cut-off rule. Water use: water use is modelled at country level using separate flows for water withdrawal, water release and water evaporation. Handling multi-functional processes: the following PEF multi- functionality decision hierarchy is applied for resolving all multi- functionality problems: (1) subdivision or system expansion; (2) allocation based on a relevant underlying physical relationship (substitution may apply here); (3) allocation based on some other relationship. Direct land use change: GHG emissions from direct LUC allocated to good/service for 20 years after the LUC occurs, with IPCC default values. Carbon storage and delayed emissions: credits associated with temporary (carbon) storage or delayed emissions up to 300 years are not be considered. Emissions off-setting: are not included. Capital goods (including infrastructures) and their End of life: they are included. System boundaries: system boundaries include all processes linked to the product supply chain (e.g. maintenance). Time period: emissions and removals are modelled as if released or removed at the beginning of the assessment method. Fossil and biogenic carbon emissions and removals: removals and emissions are modelled as follows: All GHG emissions from fossil fuels (including peat and limestone) are modelled consistently with the most updated ILCD list of elementary flows. The non-fossil (biogenic) carbon flows are modelled consistently with the most updated ILCD list of elementary flows.

## Cut-off and completeness
There are no intentional cut-offs in the inventory no matter how small their contribution to all the EF impact categories is. Eventual cut-offs are in compliance with the Guide for EF compliant data sets (JRC 2020), i.e. only if below the 3% cut-off rule. The dataset dry mass and water balance has been checked to ensure the inventory is complete. Capital goods (e.g. infrastructure) and their end-of-life are included.

## Data selection and combination
These datasets include, in both their foreground and background data, links to EF3.0 compliant data.
The relevant background data on energy, transport, and End of Life are from the LCDN data node (http://lcdn.thinkstep.com/Node/).
All other background data in the supply of this product for which no EF3.0 process was available are from ecoinvent v3.7 database (www.ecoinvent.org) or other data sources.

## Data treatment and extrapolations
Several data sources have been used to model the inventory.

## Review details
Internal reviews have been asked to review the plausibility of the unit process, LCIA scores, and DQRs. Internal reviewers have also been asked to review the data for EF compliancy. The consortium is therefore responsible for aspects such as compliancy with the ILCD format, including validation in Look@LCI, and nomenclature.
Internal reviwers have been asked to judge based on the process name, that the unit process models in a complete and representative way the process in the requested location. The review encompassed the plausability of:
- exchanges with nature (elementary flows) as well as exchanges such as product and waste flows.
- meta information (general comment, technology comment, system boundaries, allocation, cut-off rules, etc.). Reviewers were asked to judge if the provided information is enough to understand the content of the process.
- LCIA scores
- DQRs including precision, technology, time and geography. As well as the overall DQR.
External reviewers have been asked to provide their expertise in the field of interest. External reviewers have been asked to review the unit process, including eventual methodological choices, the LCIA scores (provided with contribution scores as well), and DQRs. External reviewers have been provided all the information in a tool developed by the consortium for the purpose of this project.
External reviewers have been asked to judge based on the process name, that the unit process models in a complete and representative way the process in the requested location. The review encompassed:
- Plausability and completeness of exchanges with nature (elementary flows) as well as exchanges such as product and waste flows.
- Review of meta information (general comment, technology comment, system boundaries, allocation, cut-off rules, etc.). Reviewers were asked to judge if the provided information is enough to understand the content of the process.
- Review of properties (biogenic carbon and water content).
- Review of allocation keys.
- Plausability of LCIA scores calculated by the consortium.
- Plausability of DQRs including precision, technology, time and geography. As well as the overall DQR.

## Data sources
- Background Data for Representative products and organisations. EF 3.0 compliant (data stock)
- Quantis Data (2018)
- Gero Rueter (2020), Climate-friendly heating: How to stay warm without fossil fuels, Deutsche Welle

## Intended applications
Implementation of regular Product Environmental Footprint (PEF) studies and Organisation Environmental Footprint (OEF) studies exclusively under the specified Product groups and sectors as defined in the Product Environmental Footprint Category Rules (PEFCR) and Organisation Environmental Footprint Sectorial Rules (OEFSR) listed in http://ec.europa.eu/environment/eussd/smgp/PEFCR_OEFSR.htm
