# down; Down, goose; production mix, at plant; renewable

Dataset: ILCD process, Partly terminated system
Geography: GLO
Reference year: 2008
Valid until: 2024
Classification: Systems / Textiles, furnitures and other interiors
LCI method principle: Attributional
LCI method approaches: Allocation - market value
Completeness: All relevant flows quantified
Project: Provision of process-based 3.0 Environmental Footprint-compliant life cycle inventory datasets - Renewable materials - contract number 070201/2020/840085/SER/ENV.B.1
Generated by: CADIS
Owner: Blonk Sustainability Tools
Compliance: ILCD Data Network - Entry-level; Suggestions for updating the PEF method 2019; ISO 14040 Environmental Management – Life Cycle Assessment – Principles and Framework, 2006; ISO 14044:2006. Environmental Management – Life Cycle Assessment – Requirements and guidelines.; Environmental Footprint 3.1
Review: Dependent internal review by Hans Blonk, Emilia Moreno Ruiz; Independent review panel by Laura Batlle Bayer
Data quality: Overall quality: Good; Time representativeness: Very good; Geographical representativeness: Good; Technological representativeness: Good; Precision: Very good; Methodological appropriateness and consistency: Not applicable
Amounts: no units in this file; such an amount is in the reference unit of its flow, which a separate flow dataset defines
copyright: true
licenseType: Free of charge for some user types or use types
accessRestrictions: Free of charge for all final users implementing a regular Product Environmental Footprint (PEF) studies and Organisation Environmental Footprint (OEF) studies exclusively under the specified Product groups and sectors as defined in the Product Environmental Footprint Category Rules (PEFCR) and Organisation Environmental Footprint Sectorial Rules (OEFSR) listed in http://ec.europa.eu/environment/eussd/smgp/PEFCR_OEFSR.htm and in accordance with the terms and conditions of the EULA (available at https://ecoinvent.lca-data.com/) exclusively until 31st December 2024. Any use of this dataset or any derivative data not within the specific context of one of the PEF/OEF projects or after the end of 2024 is not permitted.

## General comment
Notice: this data set supersedes the EF3.0-compliant version (see link under "preceding data set version" below calculated with the EF3.0). The life cycle inventory is not changed from the original EF3.0 data set. The LCIA results are calculated based on the EF3.1 methods which provide updated characterisation factors in the following impact categories: Climate Change, Ecotoxicity freshwater, Photochemical Ozone Formation, Acidification, Human Toxicity non-cancer, and Human Toxicity cancer. The review report and the data quality ratings refer to the original results. The data set has been updated by the European Commission on the basis of the original EF3.0 data set delivered by the data provider.Recycled down is a mixture of duck and goose down, recovered from cushions, bedding and other used items, (Societat Orgánica, 2008).

## Technology and included processes
The process starts at collecting and transporting; followed by washing and drying. The recovered input is waste from former uses, so there is no environmental burden form the material, only form the processes. Recycled down should meet high quality standards, therefore not all down collected ends up as recycled down: for every kg. of recycled down, two kgs of input are needed (Societat Orgánica, 2008). The material that doesn´t qualify for recycled down can be used for organic fertilizer or animal food, so there is no waste form the process.

## Parameters
- kg_0: 2
  Mass in kg, for down from waste; Articulated lorry transport, Total weight <7.5 t, mix Euro 0-5; ROW w/o EU+EFTA
- km_0: 120
  Distance in km, for down from waste; Articulated lorry transport, Total weight <7.5 t, mix Euro 0-5; ROW w/o EU+EFTA
- kg_km_0: 240; = kg_0*km_0
  Transport amount in km*km, for down from waste; Articulated lorry transport, Total weight <7.5 t, mix Euro 0-5; ROW w/o EU+EFTA
- kg_1: 2
  Mass in kg, for down from waste; Articulated lorry transport, Total weight 14-20 t, mix Euro 0-5; ROW w/o EU+EFTA
- km_1: 130
  Distance in km, for down from waste; Articulated lorry transport, Total weight 14-20 t, mix Euro 0-5; ROW w/o EU+EFTA
- kg_km_1: 260; = kg_1*km_1
  Transport amount in km*km, for down from waste; Articulated lorry transport, Total weight 14-20 t, mix Euro 0-5; ROW w/o EU+EFTA
- kg_2: 0.2
  Mass in kg, for alkylbenzene sulfonate // alkylbenzene sulfonate production // eu+efta+uk; Articulated lorry transport, Euro 4, Total weight >32 t; EU+EFTA+UK
- km_2: 1000
  Distance in km, for alkylbenzene sulfonate // alkylbenzene sulfonate production // eu+efta+uk; Articulated lorry transport, Euro 4, Total weight >32 t; EU+EFTA+UK
- kg_km_2: 200; = kg_2*km_2
  Transport amount in km*km, for alkylbenzene sulfonate // alkylbenzene sulfonate production // eu+efta+uk; Articulated lorry transport, Euro 4, Total weight >32 t; EU+EFTA+UK
- kg_3: 0.2
  Mass in kg, for alkylbenzene sulfonate // alkylbenzene sulfonate production // eu+efta+uk; Transoceanic ship, containers; GLO
- km_3: 18000
  Distance in km, for alkylbenzene sulfonate // alkylbenzene sulfonate production // eu+efta+uk; Transoceanic ship, containers; GLO
- kg_km_3: 3600; = kg_3*km_3
  Transport amount in km*km, for alkylbenzene sulfonate // alkylbenzene sulfonate production // eu+efta+uk; Transoceanic ship, containers; GLO

## Reference product
- down, goose, recycled // down // glo: 1

## Inputs
- Transport of down from waste by Articulated lorry transport, Total weight <7.5 t, mix Euro 0-5 - ROW w/o EU+EFTA: 240; = kg_km_0
- Transport of down from waste by Articulated lorry transport, Total weight 14-20 t, mix Euro 0-5 - ROW w/o EU+EFTA: 260; = kg_km_1
- Transport of alkylbenzene sulfonate // alkylbenzene sulfonate production // eu+efta+uk by Articulated lorry transport, Euro 4, Total weight >32 t - EU+EFTA+UK: 200; = kg_km_2
- Transport of alkylbenzene sulfonate // alkylbenzene sulfonate production // eu+efta+uk by Transoceanic ship, containers - GLO: 3600; = kg_km_3
- Electricity from Electricity grid mix 1kV-60kV - AU: 0.0024
- Electricity from Electricity grid mix 1kV-60kV - NZ: 0.0004
- Electricity from Electricity grid mix 1kV-60kV - RU: 0.0102
- Electricity from Electricity grid mix 1kV-60kV - RAF: 0.0076
- Electricity from Electricity grid mix 1kV-60kV - RAS w/o CN: 0.1086
- Electricity from Electricity grid mix 1kV-60kV - EU+EFTA+UK: 0.0346
- Electricity from Electricity grid mix 1kV-60kV - RSA: 0.0172
- Electricity from Electricity grid mix 1kV-60kV - RNA: 0.0506
- down, goose, recycled // down // glo, blackbox: 1
- down, goose, recycled // down // glo, elementary: 1

## Impact indicators
- Eutrophication marine: 0.00145022
- Ecotoxicity, freshwater: 5.69741
- Land use: 0.870587
- Water use: 0.265243
- Resource use, minerals and metals: 1.89671e-6
- Resource use, fossils: 14.5622
- Climate change: 1.14379
- Ozone depletion: 2.10926e-8
- Human toxicity, cancer: 1.36878e-9
- Human toxicity, non-cancer: 1.81916e-8
- EF-particulate Matter: 6.44772e-8
- Ionising radiation, human health: 0.00401667
- Photochemical ozone formation - human health: 0.00369491
- Acidification: 0.004429
- Eutrophication, terrestrial: 0.0125348
- Eutrophication, freshwater: 7.68241e-5

## Deviations from the LCI method principle
The background data use the \xe2\x80\x9cRecycled content cut-off\xe2\x80\x9d approach to allocate end-of-life by-products and secondary materials. This allocation is explained in the description of the recycled content system model (http://www.ecoinvent.org/database/system-models-in-ecoinvent-3/cut-off-system-model/allocation-cut-off-by-classification.html).

## Deviations from the LCI method approaches
Background data:
- the \xe2\x80\x9cRecycled content cut-off\xe2\x80\x9d approach to allocate end-of-life by-products and secondary materials. This allocation is explained in the description of the recycled content system model (http://www.ecoinvent.org/database/system-models-in-ecoinvent-3/cut-off-system-model/allocation-cut-off-by-classification.html). The ecoinvent database mostly relies on “Allocation – market values” apart for few exceptions particularly in the energy sector. ecoinvent energy data is replaced with EF3.0 core data as per the EF guidelines version 2.0.
OR
- EF compliant data

## Modelling constants
All modelling constants follow the requirements listed in the Tender Specifications ENV.B.1/SER/2016/0038vl. Completeness: All known environmental flows are included. All known resource uses and emissions are listed in the inventory. Water use: water use is modelled at country level using separate flows for water withdrawal, water release and water evaporation. Cut-off: All known environmental flows are included. All known resource uses and emissions are listed in the inventory. Handling multi-functional processes: the following PEF multi- functionality decision hierarchy is applied for resolving all multi- functionality problems: (1) subdivision or system expansion; (2) allocation based on a relevant underlying physical relationship (substitution may apply here); (3) allocation based on some other relationship. Direct land use change: GHG emissions from direct LUC allocated to good/service for 20 years after the LUC occurs, with IPCC default values. Carbon storage and delayed emissions: credits associated with temporary (carbon) storage or delayed emissions up to 300 years are not be considered. Emissions off-setting: are not included. Capital goods (including infrastructures) and their End of life: they are included. System boundaries: system boundaries include all processes linked to the product supply chain (e.g. maintenance). Time period: emissions and removals are modelled as if released or removed at the beginning of the assessment method. Fossil and biogenic carbon emissions and removals: removals and emissions are modelled as follows: All GHG emissions from fossil fuels (including peat and limestone) are modelled consistently with the most updated ILCD list of elementary flows. The non-fossil (biogenic) carbon flows are modelled consistently with the most updated ILCD list of elementary flows.

## Cut-off and completeness
All known environmental flows are included. All known resource uses and emissions are listed in the inventory. The dataset dry mass balance has been checked to ensure the inventory is complete. Capital goods (e.g. infrastructure) and their end-of-life are included.

## Data selection and combination
These datasets include, in both their foreground and background data, links to EF3.0 compliant data.
The relevant background data on energy, transport, and End of Life are from the LCDN data node (http://lcdn.thinkstep.com/Node/).
All other background data in the supply of this product for which no EF3.0 process was available are from ecoinvent v3.7 database (www.ecoinvent.org) or other data sources.

## Data treatment and extrapolations
Several data sources have been used to model the inventory.

## Review details
Internal reviews have been asked to review the plausibility of the unit process, LCIA scores, and DQRs. Internal reviewers have also been asked to review the data for EF compliancy. The consortium is therefore responsible for aspects such as compliancy with the ILCD format, including validation in Look@LCI, and nomenclature.
Internal reviwers have been asked to judge based on the process name, that the unit process models in a complete and representative way the process in the requested location. The review encompassed the plausability of:
- exchanges with nature (elementary flows) as well as exchanges such as product and waste flows.
- meta information (general comment, technology comment, system boundaries, allocation, cut-off rules, etc.). Reviewers were asked to judge if the provided information is enough to understand the content of the process.
- LCIA scores
- DQRs including precision, technology, time and geography. As well as the overall DQR.
External reviewers have been asked to provide their expertise in the field of interest. External reviewers have been asked to review the unit process, including eventual methodological choices, the LCIA scores (provided with contribution scores as well), and DQRs. External reviewers have been provided all the information in a tool developed by the consortium for the purpose of this project.
External reviewers have been asked to judge based on the process name, that the unit process models in a complete and representative way the process in the requested location. The review encompassed:
- Plausability and completeness of exchanges with nature (elementary flows) as well as exchanges such as product and waste flows.
- Review of meta information (general comment, technology comment, system boundaries, allocation, cut-off rules, etc.). Reviewers were asked to judge if the provided information is enough to understand the content of the process.
- Review of properties (biogenic carbon and water content).
- Review of allocation keys.
- Plausability of LCIA scores calculated by the consortium.
- Plausability of DQRs including precision, technology, time and geography. As well as the overall DQR.

## Data sources
- Background Data for Representative products and organisations. EF 3.0 compliant (data stock)
- Galeano A., Gómez G., Ortiz S., Rodríguez, A. (1998). Obtención y manejo del plumón y plumas finas en patos Pekin. Acta Agronómica.
- Buckland R., Guy G. (2002) Goose Production. FAO ANIMAL PRODUCTION AND HEALTH PAPER - 154
- Societat Orgánica, 2008. Recuperación de materiales textiles SA, Anàlisi ambiental dels aïllaments de llana d’ovella i de multifibres fabricats per RMT.
- feather drying machine. https://spanish.alibaba.com/product-detail/100kg-feather-drying-machine-60797624807.html?spm=a2700.8699010.29.31.53128faeKgKi2o
- Re:down https://www.re-down.com/down-recycling-our-processes
- Patagonia. https://www.patagonia.com/our-footprint/recycled-down.html
- Aubudon. https://www.audubon.org/news/everything-you-need-know-about-buying-ethically-sourced-down-products

## Intended applications
Implementation of regular Product Environmental Footprint (PEF) studies and Organisation Environmental Footprint (OEF) studies exclusively under the specified Product groups and sectors as defined in the Product Environmental Footprint Category Rules (PEFCR) and Organisation Environmental Footprint Sectorial Rules (OEFSR) listed in http://ec.europa.eu/environment/eussd/smgp/PEFCR_OEFSR.htm
