# treatment, water repellent, pfc, elementary; water repellent treatment; production mix, at plant; service

Dataset: ILCD process, Unit process, single operation
Geography: GLO
Reference year: 2021
Valid until: 2024
Classification: Other Services / Other services
LCI method principle: Attributional
LCI method approaches: Allocation - market value
Completeness: All relevant flows quantified
Project: Provision of process-based 3.0 Environmental Footprint-compliant life cycle inventory datasets - Apparel 1 - contract number 070201/2020/840291/SER/ENV.B.1
Generated by: Life Cycle Indonesia
Owner: PRé Sustainability B.V.
Compliance: Environmental Footprint non-primary supporting data set; Environmental Footprint 3.1
Amounts: no units in this file; such an amount is in the reference unit of its flow, which a separate flow dataset defines
copyright: true
licenseType: Free of charge for some user types or use types
accessRestrictions: Free of charge for all final users implementing a regular Product Environmental Footprint (PEF) studies and Organisation Environmental Footprint (OEF) studies exclusively under the specified Product groups and sectors as defined in the Product Environmental Footprint Category Rules (PEFCR) and Organisation Environmental Footprint Sectorial Rules (OEFSR) listed in http://ec.europa.eu/environment/eussd/smgp/PEFCR_OEFSR.htm and in accordance with the terms and conditions of the EULA (available at https://ecoinvent.lca-data.com/) exclusively until 31st December 2024. Any use of this dataset or any derivative data not within the specific context of one of the PEF/OEF projects or after the end of 2024 is not permitted.

## General comment
Notice: this data set supersedes the EF3.0-compliant version (see link under "preceding data set version" below calculated with the EF3.0). The life cycle inventory is not changed from the original EF3.0 data set. The LCIA results are calculated based on the EF3.1 methods which provide updated characterisation factors in the following impact categories: Climate Change, Ecotoxicity freshwater, Photochemical Ozone Formation, Acidification, Human Toxicity non-cancer, and Human Toxicity cancer. The review report and the data quality ratings refer to the original results. The data set has been updated by the European Commission on the basis of the original EF3.0 data set delivered by the data provider.This sub-process has limited documentation only. For all detailed documentation of the full model to which this data set belongs (such as DQRs, review reports and other technical documentation), please see this process: treatment, water repellent, pfc - GLO []

## Technology and included processes
The usual techniques for applying a coating on solvent or water basis are the so-called "knife-over-roller", the "dip" and the "reverse roller" screen coaters. A solution, suspension or dispersion of a polymer substance in water is usually applied to the cloth and any excess coating is then scraped off. For such procedures to be effective, the coating formulation must be in a highly viscous, pasty form. A further procedure sometimes employed for finishing of the textile is the use of immersion or bath techniques known as foularding. The textile is fully immersed in an aqueous solution containing the functional composition that is to be applied. Subsequent repeated cycles of drying, fixation and condensation are required to complete the operation
With respect to imparting water repellency and water proofing to textile products UK Patent No. GB2,221,928 discloses a method of applying a ketene dimer to a fabric using the methods of exhaustion (immersion), padding or spraying. Exhaustion or immersion techniques are inflexible as they necessarily impart a property on the whole of the textile whereas in many practical applications it may be more appropriate only to treat a portion thereof. The application by padding involves wetting the fabric in a liquid medium having a relatively high concentration, for example, by dipping, followed by squeezing the fabric through a pad mangle, the nip pressure of which is set to permit the retention of the desired proportion of the liquid medium.
Concomitantly, after the water-repellent finish has been applied, the finished substrate may be subjected to post-treatment which includes at least the step of drying the substrate. Further post-treatment steps will be apparent to a person of ordinary skill in the art and would, by way of example only, include curing by the use of UV radiation or heat treatment, fixing, washing, stretching and brushing.
Fluorocarbons are known to introduce durable water and oil repellency (DWOR) and, as such, they are applied in water- and stain-repellent fabrics for apparel. The combination of water and oil repellency is a typical behavior of fluorocarbon products. In the past, finishes based on C8 fluorocarbons (eight carbon atoms in the structure) were mainly used. However, concerns arose associated with these C8 fluorocarbons, more specifically with respect to PFOA (perfluorooctanoic acid or pentadecafluorooctanoic acid) and PFOS (perfluorooctane sulphonate or heptadecafluoro-1-octanesulfonic acid). The tendency is to replace the C8 fluorocarbon chemistry by C6 or C4 fluorocarbon products or even fluorine-free water repellents. Currently, new commercial DWOR finishes are coming onto the market based on short chain fluorocarbons (C6 or C4 fluorocarbon chemistry), hybrid systems, or they are fluorine free.

This process is about water repellent treatment using PFC. The process includes the use of balloon padder and dryer. The process includes chemicals, energy, water, lube oil consumption and infrastructure. There is no direct emission to air since the emission comes from electricity usage, while hazardous waste comes from waste lube oil. In the model, the energy sources of machines used is from electricity and steam. The chemical is assumed to be carried in wastewater. The consumption of lubricating oil using a thermobonding oven as a proxy. The GSM of the fabric is assumed to be 135 GSM cotton fabric

Craamer, Johannes A., James E. Fox, and Jagvi Ramesh Patel. 2006. “Method for Providing a Water-Repellent Finish on a Textile Article.” September 28, 2006. https://patents.google.com/patent/WO2006100279A1/en.
De Smet, D., Weydts, D., & Vanneste, M. (2015). Environmentally friendly fabric finishes. Sustainable Apparel, 3–33. https://sci-hub.do/https://doi.org/10.1016/B978-1-78242-339-3.00001-7

## Reference product
- treatment, water repellent, pfc // treatment, water repellent, pfc // glo, elementary: 1

## Outputs
- Water, Emissions to air, unspecified: 0.0048

## Impact indicators
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
## Deviations from the LCI method principle
The background data uses:
- the \xe2\x80\x9cRecycled content cut-off\xe2\x80\x9d approach to allocate end-of-life by-products and secondary materials. This allocation is explained in the description of the recycled content system model (http://www.ecoinvent.org/database/system-models-in-ecoinvent-3/cut-off-system-model/allocation-cut-off-by-classification.html).
OR
- EF compliant data

## Deviations from the LCI method approaches
Background data:
- the \xe2\x80\x9cRecycled content cut-off\xe2\x80\x9d approach to allocate end-of-life by-products and secondary materials. This allocation is explained in the description of the recycled content system model (http://www.ecoinvent.org/database/system-models-in-ecoinvent-3/cut-off-system-model/allocation-cut-off-by-classification.html). The ecoinvent database mostly relies on “Allocation – market values” apart for few exceptions particularly in the energy sector. ecoinvent energy data is replaced with EF3.0 core data as per the EF guidelines version 2.0.
OR
- EF compliant data

## Modelling constants
All modelling constants follow the requirements listed in the Tender Specifications 070201/2020/SER/ENV.B1. Completeness: There are no intentional cut-offs in the inventory no matter how small their contribution to all the EF impact categories is. Eventual cut-offs are in compliance with the Guide for EF compliant data sets (JRC 2020), i.e. only if below the 3% cut-off rule. Water use: water use is modelled at country level using separate flows for water withdrawal, water release and water evaporation. Handling multi-functional processes: the following PEF multi- functionality decision hierarchy is applied for resolving all multi- functionality problems: (1) subdivision or system expansion; (2) allocation based on a relevant underlying physical relationship (substitution may apply here); (3) allocation based on some other relationship. Direct land use change: GHG emissions from direct LUC allocated to good/service for 20 years after the LUC occurs, with IPCC default values. Carbon storage and delayed emissions: credits associated with temporary (carbon) storage or delayed emissions up to 300 years are not be considered. Emissions off-setting: are not included. Capital goods (including infrastructures) and their End of life: they are included. System boundaries: system boundaries include all processes linked to the product supply chain (e.g. maintenance). Time period: emissions and removals are modelled as if released or removed at the beginning of the assessment method. Fossil and biogenic carbon emissions and removals: removals and emissions are modelled as follows: All GHG emissions from fossil fuels (including peat and limestone) are modelled consistently with the most updated ILCD list of elementary flows. The non-fossil (biogenic) carbon flows are modelled consistently with the most updated ILCD list of elementary flows.

## Cut-off and completeness
There are no intentional cut-offs in the inventory no matter how small their contribution to all the EF impact categories is. Eventual cut-offs are in compliance with the Guide for EF compliant data sets (JRC 2020), i.e. only if below the 3% cut-off rule. The dataset dry mass and water balance has been checked to ensure the inventory is complete. Capital goods (e.g. infrastructure) and their end-of-life are included.

## Data selection and combination
These datasets include, in both their foreground and background data, links to EF3.0 compliant data.
The relevant background data on energy, transport, and End of Life are from the LCDN data node (http://lcdn.thinkstep.com/Node/).
All other background data in the supply of this product for which no EF3.0 process was available are from ecoinvent v3.7 database (www.ecoinvent.org) or other data sources.

## Data treatment and extrapolations
Several data sources have been used to model the inventory.

## Use advice
This data set is a supporting sub-data set and must be used exclusively as sub-data set of its corresponding level-1 partly disaggregated data set (see “General comment” field for exact name and UUID).

## Data sources
- Background Data for Representative products and organisations. EF 3.0 compliant (data stock)
- UN Data (2018) Statistics Data for Lubricants Productions, http://data.un.org/Data.aspx?q=Lubricants&d=EDATA&f=cmID%3aLU, United Nations Statistics Division, Global
- Lebon (2021) Nonwoven Oven Machine, Catalog and Company Messages, Qingdao Lebon Industry Co., Ltd., China
- Chowdhury, Kawser Parveen (2018) Effect of Special Finishes on the Functional Properties of Cotton Fabrics, Journal of Textile Science and Technology, 4, 49-66, https://file.scirp.org/pdf/JTST_2018050815303131.pdf, Bangladesh
- Deguan (2018) Balloon Padder with Detwister and Squeezer for tubular fabric only, http://www.textilemachinery.com.cn/index.php?m=content&c=index&a=show&catid=59&id=82, Dezhou Deguan TextileMachinery Co.,Ltd., Shandong, China
- Finestart (2017) Open Width Compactor(Dryer, Stenter and Compactor 3in1), http://www.finestart.com.cn/index.php?m=content&c=index&a=show&catid=55&id=62, Shandong Finestart Imp.& Exp. Co.,Ltd., Shandong, China
- Asim Kumar Roy Choudhury (2017) Principles of Textile Finishing
- Expert interview (2021)
- Madhu, Amit (2012), Low wet pick-up techniques in textile finishing https://www.researchgate.net/publication/291935918_Low_wet_pick-up_techniques_in_textile_finishing

## Intended applications
Implementation of regular Product Environmental Footprint (PEF) studies and Organisation Environmental Footprint (OEF) studies exclusively under the specified Product groups and sectors as defined in the Product Environmental Footprint Category Rules (PEFCR) and Organisation Environmental Footprint Sectorial Rules (OEFSR) listed in http://ec.europa.eu/environment/eussd/smgp/PEFCR_OEFSR.htm
