# kraft paper; technology mix; production mix, at plant; kg

Dataset: ILCD process, Partly terminated system
Geography: EU+EFTA+UK
Reference year: 2018
Valid until: 2024
Classification: Materials production / Paper and cardboards
LCI method principle: Attributional
LCI method approaches: Allocation - market value
Completeness: All relevant flows quantified
Project: Provision of process-based 3.0 Environmental Footprint-compliant life cycle inventory datasets - Renewable materials - contract number 070201/2020/840085/SER/ENV.B.1
Generated by: RISE
Owner: CEPI-Eurokraft/Eurosac
Compliance: ILCD Data Network - Entry-level; Suggestions for updating the PEF method 2019; ISO 14040 Environmental Management – Life Cycle Assessment – Principles and Framework, 2006; ISO 14044:2006. Environmental Management – Life Cycle Assessment – Requirements and guidelines.; Environmental Footprint 3.1
Review: Dependent internal review by Emilia Moreno Ruiz, Katarzyna Cenian; Independent review panel by Laura Batlle Bayer
Data quality: Overall quality: Very good; Time representativeness: Good; Geographical representativeness: Very good; Technological representativeness: Very good; Precision: Very good; Methodological appropriateness and consistency: Not applicable
Amounts: no units in this file; such an amount is in the reference unit of its flow, which a separate flow dataset defines
copyright: true
licenseType: Free of charge for some user types or use types
accessRestrictions: Free of charge for all final users implementing a regular Product Environmental Footprint (PEF) studies and Organisation Environmental Footprint (OEF) studies exclusively under the specified Product groups and sectors as defined in the Product Environmental Footprint Category Rules (PEFCR) and Organisation Environmental Footprint Sectorial Rules (OEFSR) listed in http://ec.europa.eu/environment/eussd/smgp/PEFCR_OEFSR.htm and in accordance with the terms and conditions of the EULA (available at https://ecoinvent.lca-data.com/) exclusively until 31st December 2024. Any use of this dataset or any derivative data not within the specific context of one of the PEF/OEF projects or after the end of 2024 is not permitted.

## General comment
Notice: this data set supersedes the EF3.0-compliant version (see link under "preceding data set version" below calculated with the EF3.0). The life cycle inventory is not changed from the original EF3.0 data set. The LCIA results are calculated based on the EF3.1 methods which provide updated characterisation factors in the following impact categories: Climate Change, Ecotoxicity freshwater, Photochemical Ozone Formation, Acidification, Human Toxicity non-cancer, and Human Toxicity cancer. The review report and the data quality ratings refer to the original results. The data set has been updated by the European Commission on the basis of the original EF3.0 data set delivered by the data provider.The activity describes the production of 1 Kg of kraft paper and represents a mix of white (bleached) and brown (unbleached) kraft paper at an average mill. Kraft paper can be used for a number of flexible packaging applications such as paper sacks, wrapping papers and paper bags. Within kraft paper, Sack kraft paper is a porous kraft paper with high elasticity and high tear resistance, designed for packaging products with high demands for strength and durability. Although the data was collected specifically for sack kraft paper production, discussions with the technical experts at the mills reveal that the data are applicable for other flexible kraft packaging papers.
Data for the production of sack kraft paper were collected from mills together producing approximately 80% (1,592,115 tonnes) of the total annual production of sack kraft paper manufactured in Europe (the EU-27 countries plus Norway and Switzerland), based on estimations by CEPI Eurokraft. The figure represents the percentage of the total volume of sack kraft paper production by CEPI Eurokraft members which is produced by the mills participating in the survey. Not all Sack Kraft Paper producers in Europe are members of CEPI Eurokraft. Data were provided by paper mills in Austria, Bulgaria, Czech Republic, Finland, Norway, Poland, Spain and Sweden.

The majority of the mills in the study are integrated mills, but some "semi-integrated mills" were included, Semi-integrated mills are either an integrated mill that has been split into two companies (pulp production and paper production) where the pulp producer has not participated in the study. Or a production site where one type of paper is made from virgin pulp and the other type of paper is made from market pulp.

The dataset has been allocated based on the following products: Bark with allocation factor of 0.0001, Kraft paper // Kraft paper // EU+EFTA+UK with allocation factor of 0.8635, tall oil, crude with allocation factor of 0.0501, Turpentine with allocation factor of 0.0862.

## Technology and included processes
Kraft paper is produced from chemical pulp produced in the kraft process. The activity includes transport of raw materials, pulp handling, material inputs, onsite energy production and process waste treatment.
The energy sources at an integrated pulp and paper mills consists of external and internal fuels plus electricity from the grid and internally produced electricity. External fuels can be fossil or biobased. The internal fuels mainly consist of the black liquor and bark from the wood input for pulp production. The amount of internal fuels used in the process are: Black liquor (16.87 GJ/t), Bark (1.73 GJ/t), Wood fuels (e.g. fuel chip) (0.07 GJ/t), Tall oil (0.2 GJ/t), Methanol (0.04 GJ/t), Strong gases (0.06 GJ/t), Biological fibre slush (0.03 GJ/t).

The following air emissions were reported in the study: CO2 (fossil and biogenic), CH4 (fossil and biogenic), N2O (fossil+ biogenic), CO (fossil+ biogenic), SO2, H2S, TRS, Total S, NOx, NH3, NMVOC, particles (all sizes), Pb and Hg. The listed air emissions are the most important emissions for the kraft paper production and cover all emissions at the mill, both from the cooking and recovering processes and combustion of fuels at different points at the plant.
For a more complete air emission profile for kraft paper production, however, additional air emissions (beyond the ones listed above) were added for the combustion of internal and external fuels using ecoinvent LCI datasets for combustion of different fuels as proxy. Proxies for the air emissions were calculated based on: Heavy fuel oil: "heat production, heavy fuel oil, at industrial furnace 1MW” Light fuel oil and diesel: "heat production, light fuel oil, at industrial furnace 1MW” Natural gas, strong gases and methanol: "heat production, natural gas, at industrial furnace >100kW” Brown coal lignite: "heat production, lignite briquette, at stove 5-15kW” Biofuels, wood and bark: "heat production, wood chips from industry, at furnace 1000kW”
No proxy was available for the combustion of black liquor, Biological fibre slush, and tall oil. Emissions from these internal energy generation processes are therefore only reflected in the key emission factors provided by the industry.
Amount of infrastructure taken from dataset “Johansson M, kraft paper production, RER, Undefined, ecoinvent database version 3.7.1.”

The following chemicals were excluded from the inventory: Aluminium sulphate, Sodium sulphate, rosin size, carbon dioxide, Magnesium sulfate, Sodium chloride, Sodium carbonate. The listed chemicals are not defined as mandatory in the PEFCR for intermediate paper products and have a total mass of below 1% of the paper weight.

## Parameters
- kg_0: 6.5311e-5
  Mass in kg, for akd sizer // akd sizer production // glo; Freight train, average; EU+EFTA+UK
- km_0: 239.319
  Distance in km, for akd sizer // akd sizer production // glo; Freight train, average; EU+EFTA+UK
- kg_km_0: 0.0156302; = kg_0*km_0
  Transport amount in km*km, for akd sizer // akd sizer production // glo; Freight train, average; EU+EFTA+UK
- kg_1: 6.5311e-5
  Mass in kg, for akd sizer // akd sizer production // glo; Barge; EU+EFTA+UK
- km_1: 269.73
  Distance in km, for akd sizer // akd sizer production // glo; Barge; EU+EFTA+UK
- kg_km_1: 0.0176164; = kg_1*km_1
  Transport amount in km*km, for akd sizer // akd sizer production // glo; Barge; EU+EFTA+UK
- kg_2: 6.5311e-5
  Mass in kg, for akd sizer // akd sizer production // glo; Articulated lorry transport, Euro 4, Total weight >32 t; EU+EFTA+UK
- km_2: 129.973
  Distance in km, for akd sizer // akd sizer production // glo; Articulated lorry transport, Euro 4, Total weight >32 t; EU+EFTA+UK
- kg_km_2: 0.00848866; = kg_2*km_2
  Transport amount in km*km, for akd sizer // akd sizer production // glo; Articulated lorry transport, Euro 4, Total weight >32 t; EU+EFTA+UK
- kg_3: 0.0070396
  Mass in kg, for bleached kraft pulp, hardwood // bleached kraft pulp, hardwood // eu+efta+uk; Articulated lorry transport, Euro 4, Total weight >32 t; EU+EFTA+UK
- km_3: 18.3101
  Distance in km, for bleached kraft pulp, hardwood // bleached kraft pulp, hardwood // eu+efta+uk; Articulated lorry transport, Euro 4, Total weight >32 t; EU+EFTA+UK
- kg_km_3: 0.128896; = kg_3*km_3
  Transport amount in km*km, for bleached kraft pulp, hardwood // bleached kraft pulp, hardwood // eu+efta+uk; Articulated lorry transport, Euro 4, Total weight >32 t; EU+EFTA+UK
- kg_4: 0.0070396
  Mass in kg, for bleached kraft pulp, hardwood // bleached kraft pulp, hardwood // eu+efta+uk; Freight train, average; EU+EFTA+UK
- km_4: 234.864
  Distance in km, for bleached kraft pulp, hardwood // bleached kraft pulp, hardwood // eu+efta+uk; Freight train, average; EU+EFTA+UK
- kg_km_4: 1.65335; = kg_4*km_4
  Transport amount in km*km, for bleached kraft pulp, hardwood // bleached kraft pulp, hardwood // eu+efta+uk; Freight train, average; EU+EFTA+UK
- kg_5: 0.0070396
  Mass in kg, for bleached kraft pulp, hardwood // bleached kraft pulp, hardwood // eu+efta+uk; Barge; EU+EFTA+UK
- km_5: 349.074
  Distance in km, for bleached kraft pulp, hardwood // bleached kraft pulp, hardwood // eu+efta+uk; Barge; EU+EFTA+UK
- kg_km_5: 2.45734; = kg_5*km_5
  Transport amount in km*km, for bleached kraft pulp, hardwood // bleached kraft pulp, hardwood // eu+efta+uk; Barge; EU+EFTA+UK
- kg_6: 0.0392206
  Mass in kg, for bleached kraft pulp, softwood // bleached kraft pulp, softwood // eu+efta+uk; Articulated lorry transport, Euro 4, Total weight >32 t; EU+EFTA+UK
- km_6: 18.3101
  Distance in km, for bleached kraft pulp, softwood // bleached kraft pulp, softwood // eu+efta+uk; Articulated lorry transport, Euro 4, Total weight >32 t; EU+EFTA+UK
- kg_km_6: 0.718135; = kg_6*km_6
  Transport amount in km*km, for bleached kraft pulp, softwood // bleached kraft pulp, softwood // eu+efta+uk; Articulated lorry transport, Euro 4, Total weight >32 t; EU+EFTA+UK
- kg_7: 0.0392206
  Mass in kg, for bleached kraft pulp, softwood // bleached kraft pulp, softwood // eu+efta+uk; Freight train, average; EU+EFTA+UK
- km_7: 234.864
  Distance in km, for bleached kraft pulp, softwood // bleached kraft pulp, softwood // eu+efta+uk; Freight train, average; EU+EFTA+UK
- kg_km_7: 9.21152; = kg_7*km_7
  Transport amount in km*km, for bleached kraft pulp, softwood // bleached kraft pulp, softwood // eu+efta+uk; Freight train, average; EU+EFTA+UK
- kg_8: 0.0392206
  Mass in kg, for bleached kraft pulp, softwood // bleached kraft pulp, softwood // eu+efta+uk; Barge; EU+EFTA+UK
- km_8: 349.074
  Distance in km, for bleached kraft pulp, softwood // bleached kraft pulp, softwood // eu+efta+uk; Barge; EU+EFTA+UK
- kg_km_8: 13.6909; = kg_8*km_8
  Transport amount in km*km, for bleached kraft pulp, softwood // bleached kraft pulp, softwood // eu+efta+uk; Barge; EU+EFTA+UK
- kg_9: 0.0502665
  Mass in kg, for wood chips, hardwood // wood chips, hardwood // eu+efta+uk; Freight train, average; EU+EFTA+UK
- km_9: 240.511
  Distance in km, for wood chips, hardwood // wood chips, hardwood // eu+efta+uk; Freight train, average; EU+EFTA+UK
- kg_km_9: 12.0897; = kg_9*km_9
  Transport amount in km*km, for wood chips, hardwood // wood chips, hardwood // eu+efta+uk; Freight train, average; EU+EFTA+UK
- kg_10: 0.0502665
  Mass in kg, for wood chips, hardwood // wood chips, hardwood // eu+efta+uk; Barge; EU+EFTA+UK
- km_10: 269.716
  Distance in km, for wood chips, hardwood // wood chips, hardwood // eu+efta+uk; Barge; EU+EFTA+UK
- kg_km_10: 13.5577; = kg_10*km_10
  Transport amount in km*km, for wood chips, hardwood // wood chips, hardwood // eu+efta+uk; Barge; EU+EFTA+UK
- kg_11: 0.0502665
  Mass in kg, for wood chips, hardwood // wood chips, hardwood // eu+efta+uk; Articulated lorry transport, Euro 4, Total weight >32 t; EU+EFTA+UK
- km_11: 130.048
  Distance in km, for wood chips, hardwood // wood chips, hardwood // eu+efta+uk; Articulated lorry transport, Euro 4, Total weight >32 t; EU+EFTA+UK
- kg_km_11: 6.53705; = kg_11*km_11
  Transport amount in km*km, for wood chips, hardwood // wood chips, hardwood // eu+efta+uk; Articulated lorry transport, Euro 4, Total weight >32 t; EU+EFTA+UK
- kg_12: 0.0502665
  Mass in kg, for wood chips, softwood // wood chips, softwood // eu+efta+uk; Freight train, average; EU+EFTA+UK
- km_12: 240.511
  Distance in km, for wood chips, softwood // wood chips, softwood // eu+efta+uk; Freight train, average; EU+EFTA+UK
- kg_km_12: 12.0897; = kg_12*km_12
  Transport amount in km*km, for wood chips, softwood // wood chips, softwood // eu+efta+uk; Freight train, average; EU+EFTA+UK
- kg_13: 0.0502665
  Mass in kg, for wood chips, softwood // wood chips, softwood // eu+efta+uk; Barge; EU+EFTA+UK
- km_13: 269.716
  Distance in km, for wood chips, softwood // wood chips, softwood // eu+efta+uk; Barge; EU+EFTA+UK
- kg_km_13: 13.5577; = kg_13*km_13
  Transport amount in km*km, for wood chips, softwood // wood chips, softwood // eu+efta+uk; Barge; EU+EFTA+UK
- kg_14: 0.0502665
  Mass in kg, for wood chips, softwood // wood chips, softwood // eu+efta+uk; Articulated lorry transport, Euro 4, Total weight >32 t; EU+EFTA+UK
- km_14: 130.048
  Distance in km, for wood chips, softwood // wood chips, softwood // eu+efta+uk; Articulated lorry transport, Euro 4, Total weight >32 t; EU+EFTA+UK
- kg_km_14: 6.53705; = kg_14*km_14
  Transport amount in km*km, for wood chips, softwood // wood chips, softwood // eu+efta+uk; Articulated lorry transport, Euro 4, Total weight >32 t; EU+EFTA+UK
- kg_15: 0.000517094
  Mass in kg, for chlorine dioxide // chlorine dioxide production // glo; Freight train, average; EU+EFTA+UK
- km_15: 240.48
  Distance in km, for chlorine dioxide // chlorine dioxide production // glo; Freight train, average; EU+EFTA+UK
- kg_km_15: 0.124351; = kg_15*km_15
  Transport amount in km*km, for chlorine dioxide // chlorine dioxide production // glo; Freight train, average; EU+EFTA+UK
- kg_16: 0.000517094
  Mass in kg, for chlorine dioxide // chlorine dioxide production // glo; Barge; EU+EFTA+UK
- km_16: 270.54
  Distance in km, for chlorine dioxide // chlorine dioxide production // glo; Barge; EU+EFTA+UK
- kg_km_16: 0.139895; = kg_16*km_16
  Transport amount in km*km, for chlorine dioxide // chlorine dioxide production // glo; Barge; EU+EFTA+UK
- kg_17: 0.000517094
  Mass in kg, for chlorine dioxide // chlorine dioxide production // glo; Articulated lorry transport, Euro 4, Total weight >32 t; EU+EFTA+UK
- km_17: 130.093
  Distance in km, for chlorine dioxide // chlorine dioxide production // glo; Articulated lorry transport, Euro 4, Total weight >32 t; EU+EFTA+UK
- kg_km_17: 0.0672703; = kg_17*km_17
  Transport amount in km*km, for chlorine dioxide // chlorine dioxide production // glo; Articulated lorry transport, Euro 4, Total weight >32 t; EU+EFTA+UK
- kg_18: 0.000415063
  Mass in kg, for diesel // diesel mix at refinery // eu+efta+uk; Freight train, average; EU+EFTA+UK
- km_18: 239.26
  Distance in km, for diesel // diesel mix at refinery // eu+efta+uk; Freight train, average; EU+EFTA+UK
- kg_km_18: 0.0993079; = kg_18*km_18
  Transport amount in km*km, for diesel // diesel mix at refinery // eu+efta+uk; Freight train, average; EU+EFTA+UK
- kg_19: 0.000415063
  Mass in kg, for diesel // diesel mix at refinery // eu+efta+uk; Barge; EU+EFTA+UK
- km_19: 270.468
  Distance in km, for diesel // diesel mix at refinery // eu+efta+uk; Barge; EU+EFTA+UK
- kg_km_19: 0.112261; = kg_19*km_19
  Transport amount in km*km, for diesel // diesel mix at refinery // eu+efta+uk; Barge; EU+EFTA+UK
- kg_20: 0.000415063
  Mass in kg, for diesel // diesel mix at refinery // eu+efta+uk; Articulated lorry transport, Euro 4, Total weight >32 t; EU+EFTA+UK
- km_20: 130.033
  Distance in km, for diesel // diesel mix at refinery // eu+efta+uk; Articulated lorry transport, Euro 4, Total weight >32 t; EU+EFTA+UK
- kg_km_20: 0.0539717; = kg_20*km_20
  Transport amount in km*km, for diesel // diesel mix at refinery // eu+efta+uk; Articulated lorry transport, Euro 4, Total weight >32 t; EU+EFTA+UK
- kg_21: 0.00918296
  Mass in kg, for heavy fuel oil (1.0 wt.% s) // heavy fuel oil at refinery // eu+efta+uk; Freight train, average; EU+EFTA+UK
- km_21: 238.856
  Distance in km, for heavy fuel oil (1.0 wt.% s) // heavy fuel oil at refinery // eu+efta+uk; Freight train, average; EU+EFTA+UK
- kg_km_21: 2.19341; = kg_21*km_21
  Transport amount in km*km, for heavy fuel oil (1.0 wt.% s) // heavy fuel oil at refinery // eu+efta+uk; Freight train, average; EU+EFTA+UK
- kg_22: 0.00918296
  Mass in kg, for heavy fuel oil (1.0 wt.% s) // heavy fuel oil at refinery // eu+efta+uk; Barge; EU+EFTA+UK
- km_22: 268.949
  Distance in km, for heavy fuel oil (1.0 wt.% s) // heavy fuel oil at refinery // eu+efta+uk; Barge; EU+EFTA+UK
- kg_km_22: 2.46974; = kg_22*km_22
  Transport amount in km*km, for heavy fuel oil (1.0 wt.% s) // heavy fuel oil at refinery // eu+efta+uk; Barge; EU+EFTA+UK
- kg_23: 0.00918296
  Mass in kg, for heavy fuel oil (1.0 wt.% s) // heavy fuel oil at refinery // eu+efta+uk; Articulated lorry transport, Euro 4, Total weight >32 t; EU+EFTA+UK
- km_23: 129.772
  Distance in km, for heavy fuel oil (1.0 wt.% s) // heavy fuel oil at refinery // eu+efta+uk; Articulated lorry transport, Euro 4, Total weight >32 t; EU+EFTA+UK
- kg_km_23: 1.19169; = kg_23*km_23
  Transport amount in km*km, for heavy fuel oil (1.0 wt.% s) // heavy fuel oil at refinery // eu+efta+uk; Articulated lorry transport, Euro 4, Total weight >32 t; EU+EFTA+UK
- kg_24: 0.00186982
  Mass in kg, for hydrogen peroxide, 100% // hydrogen peroxide, 100% production // eu+efta+uk; Freight train, average; EU+EFTA+UK
- km_24: 240.616
  Distance in km, for hydrogen peroxide, 100% // hydrogen peroxide, 100% production // eu+efta+uk; Freight train, average; EU+EFTA+UK
- kg_km_24: 0.449908; = kg_24*km_24
  Transport amount in km*km, for hydrogen peroxide, 100% // hydrogen peroxide, 100% production // eu+efta+uk; Freight train, average; EU+EFTA+UK
- kg_25: 0.00186982
  Mass in kg, for hydrogen peroxide, 100% // hydrogen peroxide, 100% production // eu+efta+uk; Barge; EU+EFTA+UK
- km_25: 270.635
  Distance in km, for hydrogen peroxide, 100% // hydrogen peroxide, 100% production // eu+efta+uk; Barge; EU+EFTA+UK
- kg_km_25: 0.506038; = kg_25*km_25
  Transport amount in km*km, for hydrogen peroxide, 100% // hydrogen peroxide, 100% production // eu+efta+uk; Barge; EU+EFTA+UK
- kg_26: 0.00186982
  Mass in kg, for hydrogen peroxide, 100% // hydrogen peroxide, 100% production // eu+efta+uk; Articulated lorry transport, Euro 4, Total weight >32 t; EU+EFTA+UK
- km_26: 130.238
  Distance in km, for hydrogen peroxide, 100% // hydrogen peroxide, 100% production // eu+efta+uk; Articulated lorry transport, Euro 4, Total weight >32 t; EU+EFTA+UK
- kg_km_26: 0.24352; = kg_26*km_26
  Transport amount in km*km, for hydrogen peroxide, 100% // hydrogen peroxide, 100% production // eu+efta+uk; Articulated lorry transport, Euro 4, Total weight >32 t; EU+EFTA+UK
- kg_27: 0.000608691
  Mass in kg, for light fuel oil // light fuel oil at refinery // eu+efta+uk; Freight train, average; EU+EFTA+UK
- km_27: 239.759
  Distance in km, for light fuel oil // light fuel oil at refinery // eu+efta+uk; Freight train, average; EU+EFTA+UK
- kg_km_27: 0.145939; = kg_27*km_27
  Transport amount in km*km, for light fuel oil // light fuel oil at refinery // eu+efta+uk; Freight train, average; EU+EFTA+UK
- kg_28: 0.000608691
  Mass in kg, for light fuel oil // light fuel oil at refinery // eu+efta+uk; Barge; EU+EFTA+UK
- km_28: 269.552
  Distance in km, for light fuel oil // light fuel oil at refinery // eu+efta+uk; Barge; EU+EFTA+UK
- kg_km_28: 0.164074; = kg_28*km_28
  Transport amount in km*km, for light fuel oil // light fuel oil at refinery // eu+efta+uk; Barge; EU+EFTA+UK
- kg_29: 0.000608691
  Mass in kg, for light fuel oil // light fuel oil at refinery // eu+efta+uk; Articulated lorry transport, Euro 4, Total weight >32 t; EU+EFTA+UK
- km_29: 130.094
  Distance in km, for light fuel oil // light fuel oil at refinery // eu+efta+uk; Articulated lorry transport, Euro 4, Total weight >32 t; EU+EFTA+UK
- kg_km_29: 0.0791872; = kg_29*km_29
  Transport amount in km*km, for light fuel oil // light fuel oil at refinery // eu+efta+uk; Articulated lorry transport, Euro 4, Total weight >32 t; EU+EFTA+UK
- kg_30: 0.0789738
  Mass in kg, for lignite eu+efta // lignite mix // eu+efta+uk; Freight train, average; EU+EFTA+UK
- km_30: 240.561
  Distance in km, for lignite eu+efta // lignite mix // eu+efta+uk; Freight train, average; EU+EFTA+UK
- kg_km_30: 18.998; = kg_30*km_30
  Transport amount in km*km, for lignite eu+efta // lignite mix // eu+efta+uk; Freight train, average; EU+EFTA+UK
- kg_31: 0.0789738
  Mass in kg, for lignite eu+efta // lignite mix // eu+efta+uk; Barge; EU+EFTA+UK
- km_31: 270.085
  Distance in km, for lignite eu+efta // lignite mix // eu+efta+uk; Barge; EU+EFTA+UK
- kg_km_31: 21.3296; = kg_31*km_31
  Transport amount in km*km, for lignite eu+efta // lignite mix // eu+efta+uk; Barge; EU+EFTA+UK
- kg_32: 0.0789738
  Mass in kg, for lignite eu+efta // lignite mix // eu+efta+uk; Articulated lorry transport, Euro 4, Total weight >32 t; EU+EFTA+UK
- km_32: 130.122
  Distance in km, for lignite eu+efta // lignite mix // eu+efta+uk; Articulated lorry transport, Euro 4, Total weight >32 t; EU+EFTA+UK
- kg_km_32: 10.2762; = kg_32*km_32
  Transport amount in km*km, for lignite eu+efta // lignite mix // eu+efta+uk; Articulated lorry transport, Euro 4, Total weight >32 t; EU+EFTA+UK
- kg_33: 0.00131733
  Mass in kg, for maize starch, from wet milling (starch drying), at plant // glo; Freight train, average; EU+EFTA+UK
- km_33: 240.579
  Distance in km, for maize starch, from wet milling (starch drying), at plant // glo; Freight train, average; EU+EFTA+UK
- kg_km_33: 0.316922; = kg_33*km_33
  Transport amount in km*km, for maize starch, from wet milling (starch drying), at plant // glo; Freight train, average; EU+EFTA+UK
- kg_34: 0.00131733
  Mass in kg, for maize starch, from wet milling (starch drying), at plant // glo; Barge; EU+EFTA+UK
- km_34: 270.733
  Distance in km, for maize starch, from wet milling (starch drying), at plant // glo; Barge; EU+EFTA+UK
- kg_km_34: 0.356645; = kg_34*km_34
  Transport amount in km*km, for maize starch, from wet milling (starch drying), at plant // glo; Barge; EU+EFTA+UK
- kg_35: 0.00131733
  Mass in kg, for maize starch, from wet milling (starch drying), at plant // glo; Articulated lorry transport, Euro 4, Total weight >32 t; EU+EFTA+UK
- km_35: 130.45
  Distance in km, for maize starch, from wet milling (starch drying), at plant // glo; Articulated lorry transport, Euro 4, Total weight >32 t; EU+EFTA+UK
- kg_km_35: 0.171846; = kg_35*km_35
  Transport amount in km*km, for maize starch, from wet milling (starch drying), at plant // glo; Articulated lorry transport, Euro 4, Total weight >32 t; EU+EFTA+UK
- kg_36: 6.5311e-5
  Mass in kg, for melamine formaldehyde resin // melamine formaldehyde resin production // eu+efta+uk; Freight train, average; EU+EFTA+UK
- km_36: 239.319
  Distance in km, for melamine formaldehyde resin // melamine formaldehyde resin production // eu+efta+uk; Freight train, average; EU+EFTA+UK
- kg_km_36: 0.0156302; = kg_36*km_36
  Transport amount in km*km, for melamine formaldehyde resin // melamine formaldehyde resin production // eu+efta+uk; Freight train, average; EU+EFTA+UK
- kg_37: 6.5311e-5
  Mass in kg, for melamine formaldehyde resin // melamine formaldehyde resin production // eu+efta+uk; Barge; EU+EFTA+UK
- km_37: 269.73
  Distance in km, for melamine formaldehyde resin // melamine formaldehyde resin production // eu+efta+uk; Barge; EU+EFTA+UK
- kg_km_37: 0.0176164; = kg_37*km_37
  Transport amount in km*km, for melamine formaldehyde resin // melamine formaldehyde resin production // eu+efta+uk; Barge; EU+EFTA+UK
- kg_38: 6.5311e-5
  Mass in kg, for melamine formaldehyde resin // melamine formaldehyde resin production // eu+efta+uk; Articulated lorry transport, Euro 4, Total weight >32 t; EU+EFTA+UK
- km_38: 129.973
  Distance in km, for melamine formaldehyde resin // melamine formaldehyde resin production // eu+efta+uk; Articulated lorry transport, Euro 4, Total weight >32 t; EU+EFTA+UK
- kg_km_38: 0.00848866; = kg_38*km_38
  Transport amount in km*km, for melamine formaldehyde resin // melamine formaldehyde resin production // eu+efta+uk; Articulated lorry transport, Euro 4, Total weight >32 t; EU+EFTA+UK
- kg_39: 0.00610843
  Mass in kg, for oxygen // oxygen production // eu+efta+uk; Freight train, average; EU+EFTA+UK
- km_39: 240.328
  Distance in km, for oxygen // oxygen production // eu+efta+uk; Freight train, average; EU+EFTA+UK
- kg_km_39: 1.46803; = kg_39*km_39
  Transport amount in km*km, for oxygen // oxygen production // eu+efta+uk; Freight train, average; EU+EFTA+UK
- kg_40: 0.00610843
  Mass in kg, for oxygen // oxygen production // eu+efta+uk; Barge; EU+EFTA+UK
- km_40: 270.016
  Distance in km, for oxygen // oxygen production // eu+efta+uk; Barge; EU+EFTA+UK
- kg_km_40: 1.64937; = kg_40*km_40
  Transport amount in km*km, for oxygen // oxygen production // eu+efta+uk; Barge; EU+EFTA+UK
- kg_41: 0.00610843
  Mass in kg, for oxygen // oxygen production // eu+efta+uk; Articulated lorry transport, Euro 4, Total weight >32 t; EU+EFTA+UK
- km_41: 129.919
  Distance in km, for oxygen // oxygen production // eu+efta+uk; Articulated lorry transport, Euro 4, Total weight >32 t; EU+EFTA+UK
- kg_km_41: 0.793599; = kg_41*km_41
  Transport amount in km*km, for oxygen // oxygen production // eu+efta+uk; Articulated lorry transport, Euro 4, Total weight >32 t; EU+EFTA+UK
- kg_42: 0.00898302
  Mass in kg, for potato starch dried, from wet milling, at plant // rer; Freight train, average; EU+EFTA+UK
- km_42: 240.328
  Distance in km, for potato starch dried, from wet milling, at plant // rer; Freight train, average; EU+EFTA+UK
- kg_km_42: 2.15887; = kg_42*km_42
  Transport amount in km*km, for potato starch dried, from wet milling, at plant // rer; Freight train, average; EU+EFTA+UK
- kg_43: 0.00898302
  Mass in kg, for potato starch dried, from wet milling, at plant // rer; Barge; EU+EFTA+UK
- km_43: 270.128
  Distance in km, for potato starch dried, from wet milling, at plant // rer; Barge; EU+EFTA+UK
- kg_km_43: 2.42657; = kg_43*km_43
  Transport amount in km*km, for potato starch dried, from wet milling, at plant // rer; Barge; EU+EFTA+UK
- kg_44: 0.00898302
  Mass in kg, for potato starch dried, from wet milling, at plant // rer; Articulated lorry transport, Euro 4, Total weight >32 t; EU+EFTA+UK
- km_44: 129.777
  Distance in km, for potato starch dried, from wet milling, at plant // rer; Articulated lorry transport, Euro 4, Total weight >32 t; EU+EFTA+UK
- kg_km_44: 1.16579; = kg_44*km_44
  Transport amount in km*km, for potato starch dried, from wet milling, at plant // rer; Articulated lorry transport, Euro 4, Total weight >32 t; EU+EFTA+UK
- kg_45: 0.0104999
  Mass in kg, for sodium hydroxide // sodium hydroxide production // eu+efta+uk; Freight train, average; EU+EFTA+UK
- km_45: 240.973
  Distance in km, for sodium hydroxide // sodium hydroxide production // eu+efta+uk; Freight train, average; EU+EFTA+UK
- kg_km_45: 2.53019; = kg_45*km_45
  Transport amount in km*km, for sodium hydroxide // sodium hydroxide production // eu+efta+uk; Freight train, average; EU+EFTA+UK
- kg_46: 0.0104999
  Mass in kg, for sodium hydroxide // sodium hydroxide production // eu+efta+uk; Barge; EU+EFTA+UK
- km_46: 270.58
  Distance in km, for sodium hydroxide // sodium hydroxide production // eu+efta+uk; Barge; EU+EFTA+UK
- kg_km_46: 2.84107; = kg_46*km_46
  Transport amount in km*km, for sodium hydroxide // sodium hydroxide production // eu+efta+uk; Barge; EU+EFTA+UK
- kg_47: 0.0104999
  Mass in kg, for sodium hydroxide // sodium hydroxide production // eu+efta+uk; Articulated lorry transport, Euro 4, Total weight >32 t; EU+EFTA+UK
- km_47: 130.767
  Distance in km, for sodium hydroxide // sodium hydroxide production // eu+efta+uk; Articulated lorry transport, Euro 4, Total weight >32 t; EU+EFTA+UK
- kg_km_47: 1.37304; = kg_47*km_47
  Transport amount in km*km, for sodium hydroxide // sodium hydroxide production // eu+efta+uk; Articulated lorry transport, Euro 4, Total weight >32 t; EU+EFTA+UK
- kg_48: 2.76089
  Mass in kg, for softwood under bark // softwood forestry // eu+efta+uk; Freight train, average; EU+EFTA+UK
- km_48: 90.2078
  Distance in km, for softwood under bark // softwood forestry // eu+efta+uk; Freight train, average; EU+EFTA+UK
- kg_km_48: 249.054; = kg_48*km_48
  Transport amount in km*km, for softwood under bark // softwood forestry // eu+efta+uk; Freight train, average; EU+EFTA+UK
- kg_49: 2.76089
  Mass in kg, for softwood under bark // softwood forestry // eu+efta+uk; Barge; EU+EFTA+UK
- km_49: 83.7327
  Distance in km, for softwood under bark // softwood forestry // eu+efta+uk; Barge; EU+EFTA+UK
- kg_km_49: 231.177; = kg_49*km_49
  Transport amount in km*km, for softwood under bark // softwood forestry // eu+efta+uk; Barge; EU+EFTA+UK
- kg_50: 2.76089
  Mass in kg, for softwood under bark // softwood forestry // eu+efta+uk; Articulated lorry transport, Euro 4, Total weight >32 t; EU+EFTA+UK
- km_50: 77.7793
  Distance in km, for softwood under bark // softwood forestry // eu+efta+uk; Articulated lorry transport, Euro 4, Total weight >32 t; EU+EFTA+UK
- kg_km_50: 214.74; = kg_50*km_50
  Transport amount in km*km, for softwood under bark // softwood forestry // eu+efta+uk; Articulated lorry transport, Euro 4, Total weight >32 t; EU+EFTA+UK
- kg_51: 0.00794967
  Mass in kg, for sulphuric acid // sulphuric acid production // eu+efta+uk; Freight train, average; EU+EFTA+UK
- km_51: 240.065
  Distance in km, for sulphuric acid // sulphuric acid production // eu+efta+uk; Freight train, average; EU+EFTA+UK
- kg_km_51: 1.90844; = kg_51*km_51
  Transport amount in km*km, for sulphuric acid // sulphuric acid production // eu+efta+uk; Freight train, average; EU+EFTA+UK
- kg_52: 0.00794967
  Mass in kg, for sulphuric acid // sulphuric acid production // eu+efta+uk; Barge; EU+EFTA+UK
- km_52: 270.481
  Distance in km, for sulphuric acid // sulphuric acid production // eu+efta+uk; Barge; EU+EFTA+UK
- kg_km_52: 2.15023; = kg_52*km_52
  Transport amount in km*km, for sulphuric acid // sulphuric acid production // eu+efta+uk; Barge; EU+EFTA+UK
- kg_53: 0.00794967
  Mass in kg, for sulphuric acid // sulphuric acid production // eu+efta+uk; Articulated lorry transport, Euro 4, Total weight >32 t; EU+EFTA+UK
- km_53: 130.352
  Distance in km, for sulphuric acid // sulphuric acid production // eu+efta+uk; Articulated lorry transport, Euro 4, Total weight >32 t; EU+EFTA+UK
- kg_km_53: 1.03626; = kg_53*km_53
  Transport amount in km*km, for sulphuric acid // sulphuric acid production // eu+efta+uk; Articulated lorry transport, Euro 4, Total weight >32 t; EU+EFTA+UK
- kg_54: 6.52444e-6
  Mass in kg, for unbleached kraft pulp, hardwood // unbleached kraft pulp, hardwood // eu+efta+uk; Articulated lorry transport, Euro 4, Total weight >32 t; EU+EFTA+UK
- km_54: 15.705
  Distance in km, for unbleached kraft pulp, hardwood // unbleached kraft pulp, hardwood // eu+efta+uk; Articulated lorry transport, Euro 4, Total weight >32 t; EU+EFTA+UK
- kg_km_54: 0.000102466; = kg_54*km_54
  Transport amount in km*km, for unbleached kraft pulp, hardwood // unbleached kraft pulp, hardwood // eu+efta+uk; Articulated lorry transport, Euro 4, Total weight >32 t; EU+EFTA+UK
- kg_55: 3.63504e-5
  Mass in kg, for unbleached kraft pulp, softwood // unbleached kraft pulp, softwood // eu+efta+uk; Articulated lorry transport, Euro 4, Total weight >32 t; EU+EFTA+UK
- km_55: 15.705
  Distance in km, for unbleached kraft pulp, softwood // unbleached kraft pulp, softwood // eu+efta+uk; Articulated lorry transport, Euro 4, Total weight >32 t; EU+EFTA+UK
- kg_km_55: 0.000570882; = kg_55*km_55
  Transport amount in km*km, for unbleached kraft pulp, softwood // unbleached kraft pulp, softwood // eu+efta+uk; Articulated lorry transport, Euro 4, Total weight >32 t; EU+EFTA+UK
- kg_56: 6.5311e-5
  Mass in kg, for urea-formaldehyde resin // urea-formaldehyde resin production // eu+efta+uk; Freight train, average; EU+EFTA+UK
- km_56: 239.319
  Distance in km, for urea-formaldehyde resin // urea-formaldehyde resin production // eu+efta+uk; Freight train, average; EU+EFTA+UK
- kg_km_56: 0.0156302; = kg_56*km_56
  Transport amount in km*km, for urea-formaldehyde resin // urea-formaldehyde resin production // eu+efta+uk; Freight train, average; EU+EFTA+UK
- kg_57: 6.5311e-5
  Mass in kg, for urea-formaldehyde resin // urea-formaldehyde resin production // eu+efta+uk; Barge; EU+EFTA+UK
- km_57: 269.73
  Distance in km, for urea-formaldehyde resin // urea-formaldehyde resin production // eu+efta+uk; Barge; EU+EFTA+UK
- kg_km_57: 0.0176164; = kg_57*km_57
  Transport amount in km*km, for urea-formaldehyde resin // urea-formaldehyde resin production // eu+efta+uk; Barge; EU+EFTA+UK
- kg_58: 6.5311e-5
  Mass in kg, for urea-formaldehyde resin // urea-formaldehyde resin production // eu+efta+uk; Articulated lorry transport, Euro 4, Total weight >32 t; EU+EFTA+UK
- km_58: 129.973
  Distance in km, for urea-formaldehyde resin // urea-formaldehyde resin production // eu+efta+uk; Articulated lorry transport, Euro 4, Total weight >32 t; EU+EFTA+UK
- kg_km_58: 0.00848866; = kg_58*km_58
  Transport amount in km*km, for urea-formaldehyde resin // urea-formaldehyde resin production // eu+efta+uk; Articulated lorry transport, Euro 4, Total weight >32 t; EU+EFTA+UK
- kg_59: 0.0152967
  Mass in kg, for biodegradable waste to landfill // landfill of biodegradable waste // eu+efta+uk; Articulated lorry transport, Euro 4, Total weight >32 t; EU+EFTA+UK
- km_59: 77
  Distance in km, for biodegradable waste to landfill // landfill of biodegradable waste // eu+efta+uk; Articulated lorry transport, Euro 4, Total weight >32 t; EU+EFTA+UK
- kg_km_59: 1.17785; = kg_59*km_59
  Transport amount in km*km, for biodegradable waste to landfill // landfill of biodegradable waste // eu+efta+uk; Articulated lorry transport, Euro 4, Total weight >32 t; EU+EFTA+UK
- kg_60: 0.0152967
  Mass in kg, for biowaste // enclosed composting // eu+efta+uk; Articulated lorry transport, Euro 4, Total weight >32 t; EU+EFTA+UK
- km_60: 77
  Distance in km, for biowaste // enclosed composting // eu+efta+uk; Articulated lorry transport, Euro 4, Total weight >32 t; EU+EFTA+UK
- kg_km_60: 1.17785; = kg_60*km_60
  Transport amount in km*km, for biowaste // enclosed composting // eu+efta+uk; Articulated lorry transport, Euro 4, Total weight >32 t; EU+EFTA+UK
- kg_61: 0.00592607
  Mass in kg, for industrial waste, average, not hazardous, to residual landfill // industrial waste, average, not hazardous, to residual landfill // eu+efta+uk; Articulated lorry transport, Euro 4, Total weight >32 t; EU+EFTA+UK
- km_61: 77
  Distance in km, for industrial waste, average, not hazardous, to residual landfill // industrial waste, average, not hazardous, to residual landfill // eu+efta+uk; Articulated lorry transport, Euro 4, Total weight >32 t; EU+EFTA+UK
- kg_km_61: 0.456307; = kg_61*km_61
  Transport amount in km*km, for industrial waste, average, not hazardous, to residual landfill // industrial waste, average, not hazardous, to residual landfill // eu+efta+uk; Articulated lorry transport, Euro 4, Total weight >32 t; EU+EFTA+UK

## Reference product
- kraft paper // kraft paper // eu+efta+uk: 1

## Inputs
- Transport of akd sizer // akd sizer production // glo by Freight train, average - EU+EFTA+UK: 0.0156302; = kg_km_0
- Transport of akd sizer // akd sizer production // glo by Barge - EU+EFTA+UK: 0.0176164; = kg_km_1
- Transport of akd sizer // akd sizer production // glo by Articulated lorry transport, Euro 4, Total weight >32 t - EU+EFTA+UK: 0.00848866; = kg_km_2
- Transport of bleached kraft pulp, hardwood // bleached kraft pulp, hardwood // eu+efta+uk by Articulated lorry transport, Euro 4, Total weight >32 t - EU+EFTA+UK: 0.128896; = kg_km_3
- Transport of bleached kraft pulp, hardwood // bleached kraft pulp, hardwood // eu+efta+uk by Freight train, average - EU+EFTA+UK: 1.65335; = kg_km_4
- Transport of bleached kraft pulp, hardwood // bleached kraft pulp, hardwood // eu+efta+uk by Barge - EU+EFTA+UK: 2.45734; = kg_km_5
- Transport of bleached kraft pulp, softwood // bleached kraft pulp, softwood // eu+efta+uk by Articulated lorry transport, Euro 4, Total weight >32 t - EU+EFTA+UK: 0.718135; = kg_km_6
- Transport of bleached kraft pulp, softwood // bleached kraft pulp, softwood // eu+efta+uk by Freight train, average - EU+EFTA+UK: 9.21152; = kg_km_7
- Transport of bleached kraft pulp, softwood // bleached kraft pulp, softwood // eu+efta+uk by Barge - EU+EFTA+UK: 13.6909; = kg_km_8
- Transport of wood chips, hardwood // wood chips, hardwood // eu+efta+uk by Freight train, average - EU+EFTA+UK: 12.0897; = kg_km_9
- Transport of wood chips, hardwood // wood chips, hardwood // eu+efta+uk by Barge - EU+EFTA+UK: 13.5577; = kg_km_10
- Transport of wood chips, hardwood // wood chips, hardwood // eu+efta+uk by Articulated lorry transport, Euro 4, Total weight >32 t - EU+EFTA+UK: 6.53705; = kg_km_11
- Transport of wood chips, softwood // wood chips, softwood // eu+efta+uk by Freight train, average - EU+EFTA+UK: 12.0897; = kg_km_12
- Transport of wood chips, softwood // wood chips, softwood // eu+efta+uk by Barge - EU+EFTA+UK: 13.5577; = kg_km_13
- Transport of wood chips, softwood // wood chips, softwood // eu+efta+uk by Articulated lorry transport, Euro 4, Total weight >32 t - EU+EFTA+UK: 6.53705; = kg_km_14
- Transport of chlorine dioxide // chlorine dioxide production // glo by Freight train, average - EU+EFTA+UK: 0.124351; = kg_km_15
- Transport of chlorine dioxide // chlorine dioxide production // glo by Barge - EU+EFTA+UK: 0.139895; = kg_km_16
- Transport of chlorine dioxide // chlorine dioxide production // glo by Articulated lorry transport, Euro 4, Total weight >32 t - EU+EFTA+UK: 0.0672703; = kg_km_17
- Transport of diesel // diesel mix at refinery // eu+efta+uk by Freight train, average - EU+EFTA+UK: 0.0993079; = kg_km_18
- Transport of diesel // diesel mix at refinery // eu+efta+uk by Barge - EU+EFTA+UK: 0.112261; = kg_km_19
- Transport of diesel // diesel mix at refinery // eu+efta+uk by Articulated lorry transport, Euro 4, Total weight >32 t - EU+EFTA+UK: 0.0539717; = kg_km_20
- Transport of heavy fuel oil (1.0 wt.% s) // heavy fuel oil at refinery // eu+efta+uk by Freight train, average - EU+EFTA+UK: 2.19341; = kg_km_21
- Transport of heavy fuel oil (1.0 wt.% s) // heavy fuel oil at refinery // eu+efta+uk by Barge - EU+EFTA+UK: 2.46974; = kg_km_22
- Transport of heavy fuel oil (1.0 wt.% s) // heavy fuel oil at refinery // eu+efta+uk by Articulated lorry transport, Euro 4, Total weight >32 t - EU+EFTA+UK: 1.19169; = kg_km_23
- Transport of hydrogen peroxide, 100% // hydrogen peroxide, 100% production // eu+efta+uk by Freight train, average - EU+EFTA+UK: 0.449908; = kg_km_24
- Transport of hydrogen peroxide, 100% // hydrogen peroxide, 100% production // eu+efta+uk by Barge - EU+EFTA+UK: 0.506038; = kg_km_25
- Transport of hydrogen peroxide, 100% // hydrogen peroxide, 100% production // eu+efta+uk by Articulated lorry transport, Euro 4, Total weight >32 t - EU+EFTA+UK: 0.24352; = kg_km_26
- Transport of light fuel oil // light fuel oil at refinery // eu+efta+uk by Freight train, average - EU+EFTA+UK: 0.145939; = kg_km_27
- Transport of light fuel oil // light fuel oil at refinery // eu+efta+uk by Barge - EU+EFTA+UK: 0.164074; = kg_km_28
- Transport of light fuel oil // light fuel oil at refinery // eu+efta+uk by Articulated lorry transport, Euro 4, Total weight >32 t - EU+EFTA+UK: 0.0791872; = kg_km_29
- Transport of lignite eu+efta // lignite mix // eu+efta+uk by Freight train, average - EU+EFTA+UK: 18.998; = kg_km_30
- Transport of lignite eu+efta // lignite mix // eu+efta+uk by Barge - EU+EFTA+UK: 21.3296; = kg_km_31
- Transport of lignite eu+efta // lignite mix // eu+efta+uk by Articulated lorry transport, Euro 4, Total weight >32 t - EU+EFTA+UK: 10.2762; = kg_km_32
- Transport of maize starch, from wet milling (starch drying), at plant // glo by Freight train, average - EU+EFTA+UK: 0.316922; = kg_km_33
- Transport of maize starch, from wet milling (starch drying), at plant // glo by Barge - EU+EFTA+UK: 0.356645; = kg_km_34
- Transport of maize starch, from wet milling (starch drying), at plant // glo by Articulated lorry transport, Euro 4, Total weight >32 t - EU+EFTA+UK: 0.171846; = kg_km_35
- Transport of melamine formaldehyde resin // melamine formaldehyde resin production // eu+efta+uk by Freight train, average - EU+EFTA+UK: 0.0156302; = kg_km_36
- Transport of melamine formaldehyde resin // melamine formaldehyde resin production // eu+efta+uk by Barge - EU+EFTA+UK: 0.0176164; = kg_km_37
- Transport of melamine formaldehyde resin // melamine formaldehyde resin production // eu+efta+uk by Articulated lorry transport, Euro 4, Total weight >32 t - EU+EFTA+UK: 0.00848866; = kg_km_38
- Transport of oxygen // oxygen production // eu+efta+uk by Freight train, average - EU+EFTA+UK: 1.46803; = kg_km_39
- Transport of oxygen // oxygen production // eu+efta+uk by Barge - EU+EFTA+UK: 1.64937; = kg_km_40
- Transport of oxygen // oxygen production // eu+efta+uk by Articulated lorry transport, Euro 4, Total weight >32 t - EU+EFTA+UK: 0.793599; = kg_km_41
- Transport of potato starch dried, from wet milling, at plant // rer by Freight train, average - EU+EFTA+UK: 2.15887; = kg_km_42
- Transport of potato starch dried, from wet milling, at plant // rer by Barge - EU+EFTA+UK: 2.42657; = kg_km_43
- Transport of potato starch dried, from wet milling, at plant // rer by Articulated lorry transport, Euro 4, Total weight >32 t - EU+EFTA+UK: 1.16579; = kg_km_44
- Transport of sodium hydroxide // sodium hydroxide production // eu+efta+uk by Freight train, average - EU+EFTA+UK: 2.53019; = kg_km_45
- Transport of sodium hydroxide // sodium hydroxide production // eu+efta+uk by Barge - EU+EFTA+UK: 2.84107; = kg_km_46
- Transport of sodium hydroxide // sodium hydroxide production // eu+efta+uk by Articulated lorry transport, Euro 4, Total weight >32 t - EU+EFTA+UK: 1.37304; = kg_km_47
- Transport of softwood under bark // softwood forestry // eu+efta+uk by Freight train, average - EU+EFTA+UK: 249.054; = kg_km_48
- Transport of softwood under bark // softwood forestry // eu+efta+uk by Barge - EU+EFTA+UK: 231.177; = kg_km_49
- Transport of softwood under bark // softwood forestry // eu+efta+uk by Articulated lorry transport, Euro 4, Total weight >32 t - EU+EFTA+UK: 214.74; = kg_km_50
- Transport of sulphuric acid // sulphuric acid production // eu+efta+uk by Freight train, average - EU+EFTA+UK: 1.90844; = kg_km_51
- Transport of sulphuric acid // sulphuric acid production // eu+efta+uk by Barge - EU+EFTA+UK: 2.15023; = kg_km_52
- Transport of sulphuric acid // sulphuric acid production // eu+efta+uk by Articulated lorry transport, Euro 4, Total weight >32 t - EU+EFTA+UK: 1.03626; = kg_km_53
- Transport of unbleached kraft pulp, hardwood // unbleached kraft pulp, hardwood // eu+efta+uk by Articulated lorry transport, Euro 4, Total weight >32 t - EU+EFTA+UK: 0.000102466; = kg_km_54
- Transport of unbleached kraft pulp, softwood // unbleached kraft pulp, softwood // eu+efta+uk by Articulated lorry transport, Euro 4, Total weight >32 t - EU+EFTA+UK: 0.000570882; = kg_km_55
- Transport of urea-formaldehyde resin // urea-formaldehyde resin production // eu+efta+uk by Freight train, average - EU+EFTA+UK: 0.0156302; = kg_km_56
- Transport of urea-formaldehyde resin // urea-formaldehyde resin production // eu+efta+uk by Barge - EU+EFTA+UK: 0.0176164; = kg_km_57
- Transport of urea-formaldehyde resin // urea-formaldehyde resin production // eu+efta+uk by Articulated lorry transport, Euro 4, Total weight >32 t - EU+EFTA+UK: 0.00848866; = kg_km_58
- Electricity from Electricity grid mix 1kV-60kV - EU+EFTA+UK: 1.80566
- Thermal energy (MJ) from Thermal energy from natural gas - EU+EFTA+UK: 0.250094
- Transport of biodegradable waste to landfill // landfill of biodegradable waste // eu+efta+uk by Articulated lorry transport, Euro 4, Total weight >32 t - EU+EFTA+UK: 1.17785; = kg_km_59
- Transport of biowaste // enclosed composting // eu+efta+uk by Articulated lorry transport, Euro 4, Total weight >32 t - EU+EFTA+UK: 1.17785; = kg_km_60
- Transport of industrial waste, average, not hazardous, to residual landfill // industrial waste, average, not hazardous, to residual landfill // eu+efta+uk by Articulated lorry transport, Euro 4, Total weight >32 t - EU+EFTA+UK: 0.456307; = kg_km_61
- kraft paper // kraft paper // eu+efta+uk, blackbox: 1
- kraft paper // kraft paper // eu+efta+uk, elementary: 1

## Impact indicators
- Eutrophication marine: 0.00104106
- Ecotoxicity, freshwater: 8.54928
- Land use: 606.081
- Water use: 0.338675
- Resource use, minerals and metals: 1.88184e-6
- Resource use, fossils: 7.06789
- Climate change: 0.552562
- Ozone depletion: 8.43091e-9
- Human toxicity, cancer: 3.97234e-10
- Human toxicity, non-cancer: 4.19163e-9
- EF-particulate Matter: 3.01563e-8
- Ionising radiation, human health: 0.0803954
- Photochemical ozone formation - human health: 0.00379409
- Acidification: 0.00286571
- Eutrophication, terrestrial: 0.00803142
- Eutrophication, freshwater: 3.84417e-5

## Deviations from the LCI method principle
The background data uses:
- the \xe2\x80\x9cRecycled content cut-off\xe2\x80\x9d approach to allocate end-of-life by-products and secondary materials. This allocation is explained in the description of the recycled content system model (http://www.ecoinvent.org/database/system-models-in-ecoinvent-3/cut-off-system-model/allocation-cut-off-by-classification.html).
OR
- EF compliant data

## Deviations from the LCI method approaches
Background data:
- the \xe2\x80\x9cRecycled content cut-off\xe2\x80\x9d approach to allocate end-of-life by-products and secondary materials. This allocation is explained in the description of the recycled content system model (http://www.ecoinvent.org/database/system-models-in-ecoinvent-3/cut-off-system-model/allocation-cut-off-by-classification.html). The ecoinvent database mostly relies on “Allocation – market values” apart for few exceptions particularly in the energy sector. ecoinvent energy data is replaced with EF3.0 core data as per the EF guidelines version 2.0.
OR
- EF compliant data

## Modelling constants
All modelling constants follow the requirements listed in the Tender Specifications 070201/2020/SER/ENV.B1. Completeness: There are no intentional cut-offs in the inventory no matter how small their contribution to all the EF impact categories is. Eventual cut-offs are in compliance with the Guide for EF compliant data sets (JRC 2020), i.e. only if below the 3% cut-off rule. Water use: water use is modelled at country level using separate flows for water withdrawal, water release and water evaporation. Handling multi-functional processes: the following PEF multi- functionality decision hierarchy is applied for resolving all multi- functionality problems: (1) subdivision or system expansion; (2) allocation based on a relevant underlying physical relationship (substitution may apply here); (3) allocation based on some other relationship. Direct land use change: GHG emissions from direct LUC allocated to good/service for 20 years after the LUC occurs, with IPCC default values. Carbon storage and delayed emissions: credits associated with temporary (carbon) storage or delayed emissions up to 300 years are not be considered. Emissions off-setting: are not included. Capital goods (including infrastructures) and their End of life: they are included. System boundaries: system boundaries include all processes linked to the product supply chain (e.g. maintenance). Time period: emissions and removals are modelled as if released or removed at the beginning of the assessment method. Fossil and biogenic carbon emissions and removals: removals and emissions are modelled as follows: All GHG emissions from fossil fuels (including peat and limestone) are modelled consistently with the most updated ILCD list of elementary flows. The non-fossil (biogenic) carbon flows are modelled consistently with the most updated ILCD list of elementary flows.

## Cut-off and completeness
There are no intentional cut-offs in the inventory no matter how small their contribution to all the EF impact categories is. Eventual cut-offs are in compliance with the Guide for EF compliant data sets (JRC 2020), i.e. only if below the 3% cut-off rule. The dataset dry mass and water balance has been checked to ensure the inventory is complete. Capital goods (e.g. infrastructure) and their end-of-life are included.

## Data selection and combination
These datasets include, in both their foreground and background data, links to EF3.0 compliant data.
The relevant background data on energy, transport, and End of Life are from the LCDN data node (http://lcdn.thinkstep.com/Node/).
All other background data in the supply of this product for which no EF3.0 process was available are from ecoinvent v3.7 database (www.ecoinvent.org) or other data sources.

## Data treatment and extrapolations
Several data sources have been used to model the inventory.

## Review details
Internal reviews have been asked to review the plausibility of the unit process, LCIA scores, and DQRs. Internal reviewers have also been asked to review the data for EF compliancy. The consortium is therefore responsible for aspects such as compliancy with the ILCD format, including validation in Look@LCI, and nomenclature.
Internal reviwers have been asked to judge based on the process name, that the unit process models in a complete and representative way the process in the requested location. The review encompassed the plausability of:
- exchanges with nature (elementary flows) as well as exchanges such as product and waste flows.
- meta information (general comment, technology comment, system boundaries, allocation, cut-off rules, etc.). Reviewers were asked to judge if the provided information is enough to understand the content of the process.
- LCIA scores
- DQRs including precision, technology, time and geography. As well as the overall DQR.
External reviewers have been asked to provide their expertise in the field of interest. External reviewers have been asked to review the unit process, including eventual methodological choices, the LCIA scores (provided with contribution scores as well), and DQRs. External reviewers have been provided all the information in a tool developed by the consortium for the purpose of this project.
External reviewers have been asked to judge based on the process name, that the unit process models in a complete and representative way the process in the requested location. The review encompassed:
- Plausability and completeness of exchanges with nature (elementary flows) as well as exchanges such as product and waste flows.
- Review of meta information (general comment, technology comment, system boundaries, allocation, cut-off rules, etc.). Reviewers were asked to judge if the provided information is enough to understand the content of the process.
- Review of properties (biogenic carbon and water content).
- Review of allocation keys.
- Plausability of LCIA scores calculated by the consortium.
- Plausability of DQRs including precision, technology, time and geography. As well as the overall DQR.

## Data sources
- Background Data for Representative products and organisations. EF 3.0 compliant (data stock)
- RISE Research Institutes of Sweden on behalf of CEPI-Eurokraft/Eurosac, (2020). LCA of Average European Sack Kraft Paper", available on request.

## Intended applications
Implementation of regular Product Environmental Footprint (PEF) studies and Organisation Environmental Footprint (OEF) studies exclusively under the specified Product groups and sectors as defined in the Product Environmental Footprint Category Rules (PEFCR) and Organisation Environmental Footprint Sectorial Rules (OEFSR) listed in http://ec.europa.eu/environment/eussd/smgp/PEFCR_OEFSR.htm
