# chemi-thermomechanical pulp, elementary; technology mix;; production mix; at plant; dry mass 0.9 kg; carbon content, non fossil 0.494

Dataset: ILCD process, Unit process, single operation
Geography: WORLD (WITHOUT EU+EFTA+UK)
Reference year: 2019
Valid until: 2024
Classification: Other Services / Other services
LCI method principle: Attributional
LCI method approaches: Allocation - market value
Completeness: All relevant flows quantified
Project: Provision of process-based 3.0 Environmental Footprint-compliant life cycle inventory datasets - Renewable materials - contract number 070201/2020/840085/SER/ENV.B.1
Generated by: ecoinvent
Owner: ecoinvent
Compliance: Environmental Footprint non-primary supporting data set; Environmental Footprint 3.1
Amounts: no units in this file; such an amount is in the reference unit of its flow, which a separate flow dataset defines
copyright: true
licenseType: Free of charge for some user types or use types
accessRestrictions: Free of charge for all final users implementing a regular Product Environmental Footprint (PEF) studies and Organisation Environmental Footprint (OEF) studies exclusively under the specified Product groups and sectors as defined in the Product Environmental Footprint Category Rules (PEFCR) and Organisation Environmental Footprint Sectorial Rules (OEFSR) listed in http://ec.europa.eu/environment/eussd/smgp/PEFCR_OEFSR.htm and in accordance with the terms and conditions of the EULA (available at https://ecoinvent.lca-data.com/) exclusively until 31st December 2024. Any use of this dataset or any derivative data not within the specific context of one of the PEF/OEF projects or after the end of 2024 is not permitted.

## General comment
Notice: this data set supersedes the EF3.0-compliant version (see link under "preceding data set version" below calculated with the EF3.0). The life cycle inventory is not changed from the original EF3.0 data set. The LCIA results are calculated based on the EF3.1 methods which provide updated characterisation factors in the following impact categories: Climate Change, Ecotoxicity freshwater, Photochemical Ozone Formation, Acidification, Human Toxicity non-cancer, and Human Toxicity cancer. The review report and the data quality ratings refer to the original results. The data set has been updated by the European Commission on the basis of the original EF3.0 data set delivered by the data provider.This sub-process has limited documentation only. For all detailed documentation of the full model to which this data set belongs (such as DQRs, review reports and other technical documentation), please see this process: chemi-thermomechanical pulp - WORLD (WITHOUT EU+EFTA+UK) []

## Technology and included processes
In the CTMP wood chips are impregnated with chemicals before they are mechanically defibrated in the refiner under high pressure (~about 3 bar) or at atmospheric pressure, mainly in two stages. Bleaching has not been included because chemi-mechanical pulps cannot be brightened effectively by oxidative and reductive bleaching. During mechanical defibration, lignin is plasticised and remains in the pulp.

## Reference product
- chemi-thermomechanical pulp // chemi-thermomechanical pulp // world (without eu+efta+uk), elementary: 1

## Inputs
- water, Renewable material resources from water: 0.02

## Outputs
- Water, Emissions to air, unspecified: 0.003
- Water, Emissions to water, unspecified: 0.017
- Phosphorus, Emissions to water, unspecified: 1e-5
- biological oxygen demand, Emissions to water, unspecified: 0.00249
- chemical oxygen demand, Emissions to water, unspecified: 0.0164
- total organic carbon, Emissions to water, unspecified: 0.00607407
- DOC, Dissolved Organic Carbon, Emissions to water, unspecified: 0.00607407
- Nitrogen oxides, Emissions to air, unspecified: 0.0002
- sulfur dioxide, Emissions to air, unspecified: 1e-5
- nitrogen, total (excluding N2), Emissions to water, unspecified: 0.0004
- Suspended solids, unspecified, Emissions to water, unspecified: 0.00096

## Impact indicators
- Eutrophication marine: 0.0004778
- Ecotoxicity, freshwater: 2.0314e-5
- Water use: 0.128765
- Human toxicity, non-cancer: 1.1098e-14
- EF-particulate Matter: 4e-10
- Photochemical ozone formation - human health: 0.000200811
- Acidification: 0.0001611
- Eutrophication, terrestrial: 0.000852
- Eutrophication, freshwater: 1e-5
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
## Deviations from the LCI method principle
The background data uses:
- the \xe2\x80\x9cRecycled content cut-off\xe2\x80\x9d approach to allocate end-of-life by-products and secondary materials. This allocation is explained in the description of the recycled content system model (http://www.ecoinvent.org/database/system-models-in-ecoinvent-3/cut-off-system-model/allocation-cut-off-by-classification.html).
OR
- EF compliant data

## Deviations from the LCI method approaches
Background data:
- the \xe2\x80\x9cRecycled content cut-off\xe2\x80\x9d approach to allocate end-of-life by-products and secondary materials. This allocation is explained in the description of the recycled content system model (http://www.ecoinvent.org/database/system-models-in-ecoinvent-3/cut-off-system-model/allocation-cut-off-by-classification.html). The ecoinvent database mostly relies on “Allocation – market values” apart for few exceptions particularly in the energy sector. ecoinvent energy data is replaced with EF3.0 core data as per the EF guidelines version 2.0.
OR
- EF compliant data

## Modelling constants
All modelling constants follow the requirements listed in the Tender Specifications 070201/2020/SER/ENV.B1. Completeness: There are no intentional cut-offs in the inventory no matter how small their contribution to all the EF impact categories is. Eventual cut-offs are in compliance with the Guide for EF compliant data sets (JRC 2020), i.e. only if below the 3% cut-off rule. Water use: water use is modelled at country level using separate flows for water withdrawal, water release and water evaporation. Handling multi-functional processes: the following PEF multi- functionality decision hierarchy is applied for resolving all multi- functionality problems: (1) subdivision or system expansion; (2) allocation based on a relevant underlying physical relationship (substitution may apply here); (3) allocation based on some other relationship. Direct land use change: GHG emissions from direct LUC allocated to good/service for 20 years after the LUC occurs, with IPCC default values. Carbon storage and delayed emissions: credits associated with temporary (carbon) storage or delayed emissions up to 300 years are not be considered. Emissions off-setting: are not included. Capital goods (including infrastructures) and their End of life: they are included. System boundaries: system boundaries include all processes linked to the product supply chain (e.g. maintenance). Time period: emissions and removals are modelled as if released or removed at the beginning of the assessment method. Fossil and biogenic carbon emissions and removals: removals and emissions are modelled as follows: All GHG emissions from fossil fuels (including peat and limestone) are modelled consistently with the most updated ILCD list of elementary flows. The non-fossil (biogenic) carbon flows are modelled consistently with the most updated ILCD list of elementary flows.

## Cut-off and completeness
There are no intentional cut-offs in the inventory no matter how small their contribution to all the EF impact categories is. Eventual cut-offs are in compliance with the Guide for EF compliant data sets (JRC 2020), i.e. only if below the 3% cut-off rule. The dataset dry mass and water balance has been checked to ensure the inventory is complete. Capital goods (e.g. infrastructure) and their end-of-life are included.

## Data selection and combination
These datasets include, in both their foreground and background data, links to EF3.0 compliant data.
The relevant background data on energy, transport, and End of Life are from the LCDN data node (http://lcdn.thinkstep.com/Node/).
All other background data in the supply of this product for which no EF3.0 process was available are from ecoinvent v3.7 database (www.ecoinvent.org) or other data sources.

## Data treatment and extrapolations
Several data sources have been used to model the inventory.

## Use advice
This data set is a supporting sub-data set and must be used exclusively as sub-data set of its corresponding level-1 partly disaggregated data set (see “General comment” field for exact name and UUID).

## Data sources
- Background Data for Representative products and organisations. EF 3.0 compliant (data stock)
- Naturvardsverket, 2001. Naturvardsverket (2001) Skogsindustrins utsläpp - avfallsmängder och energiförbrukning 2000. Report 5154. Naturvardsverket (Swedish EPA), Stockholm.
- Södra (2002) Meeting Södra. Environmental Report 2001. Södra, Växjö (Sweden) as pdf-File under: www.sodra.com.
- European Commission, 2000. European Commission (2000) Integrated Pollution Prevention and Control (IPPC) - Reference Document on Best Available Techniques in the Pulp and Pa-per Industry. Institute for Prospective Technological Studies, Sevilla.
- Patt R., Kordsachia O., Süttinger R., Ohtani Y., Hoesch J. F., Ehrler P., Eich-inger R., Holik H., Hamm U., Rohmann M. E., Mummenhoff P., Petermann E., Miller R. F., Frank D., Wilken R., Baumgarten H. L. and Rentrop G.-H. (1993) Paper and Pulp. In: Ullmann's Encyclopedia of Industrial Chemistry, Vol. A.18. VCH Publisher Inc.
- ecoinvent database v3.7.1, chemi-thermomechanical pulp production, GLO
- Rullifank, K. F., Roefinal, M. E., Kostanti, M., Sartika, L., & Evelyn. (2020). Pulp and paper industry: An overview on pulping technologies, factors, and challenges. IOP Conference Series: Materials Science and Engineering, 845(1), 012005. https://doi.org/10.1088/1757-899x/845/1/012005
- Sandberg, Christer, Ferritsius, Olof and Ferritsius, Rita. "Energy efficiency in mechanical pulping – definitions and considerations" Nordic Pulp & Paper Research Journal, vol. 36, no. 3, 2021, pp. 425-434. https://doi.org/10.1515/npprj-2021-0013
- Netramai, S., Kijchavengkul, T., & Kittipinyovath, P. (2016). Pulp and Paper Production. Reference Module in Food Science. https://doi.org/10.1016/b978-0-08-100596-5.03201-7
- Bajpai, P. (2016). Energy conservation measures for mechanical pulping. Pulp and Paper Industry, 125–144. https://doi.org/10.1016/b978-0-12-803411-8.00008-1
- Suhr M, Klein G, Kourti I, Rodrigo Gonzalo M, Giner Santonja G, Roudier S, Delgado Sancho L. Best Available Techniques (BAT) Reference Document for the Production of Pulp, Paper and Board. Industrial Emissions Directive 2010/75/EU (Integrated Pollution Prevention and Control). EUR 27235. Luxembourg (Luxembourg): Publications Office of the European Union; 2015. JRC95678
- European Organization of the Sawmill Industry – EOS (2019). Annual Report of the European Sawmill Industry. Available at: https://www.eos-oes.eu/downloads/EOS-annual-report-2018-2019.pdf

## Intended applications
Implementation of regular Product Environmental Footprint (PEF) studies and Organisation Environmental Footprint (OEF) studies exclusively under the specified Product groups and sectors as defined in the Product Environmental Footprint Category Rules (PEFCR) and Organisation Environmental Footprint Sectorial Rules (OEFSR) listed in http://ec.europa.eu/environment/eussd/smgp/PEFCR_OEFSR.htm
