# pouring, bulk, for foam; technology mix; production mix, at plant; 1 pair

Dataset: ILCD process, Partly terminated system
Geography: GLO
Reference year: 2012
Valid until: 2024
Classification: Systems / Textiles, furnitures and other interiors
LCI method principle: Attributional
LCI method approaches: Allocation - market value
Completeness: All relevant flows quantified
Project: Provision of process-based 3.0 Environmental Footprint-compliant life cycle inventory datasets - Apparel 1 - contract number 070201/2020/840291/SER/ENV.B.1
Generated by: Life Cycle Indonesia
Owner: PRé Sustainability B.V.
Compliance: ILCD Data Network - Entry-level; Suggestions for updating the PEF method 2019; ISO 14040 Environmental Management – Life Cycle Assessment – Principles and Framework, 2006; ISO 14044:2006. Environmental Management – Life Cycle Assessment – Requirements and guidelines.; Environmental Footprint 3.1
Review: Dependent internal review by Avraam Symeonidis, Emilia Moreno Ruiz; Independent review panel by Madhuri Nigam
Data quality: Overall quality: Very good; Time representativeness: Very good; Geographical representativeness: Good; Technological representativeness: Very good; Precision: Good; Methodological appropriateness and consistency: Not applicable
Amounts: no units in this file; such an amount is in the reference unit of its flow, which a separate flow dataset defines
copyright: true
licenseType: Free of charge for some user types or use types
accessRestrictions: Free of charge for all final users implementing a regular Product Environmental Footprint (PEF) studies and Organisation Environmental Footprint (OEF) studies exclusively under the specified Product groups and sectors as defined in the Product Environmental Footprint Category Rules (PEFCR) and Organisation Environmental Footprint Sectorial Rules (OEFSR) listed in http://ec.europa.eu/environment/eussd/smgp/PEFCR_OEFSR.htm and in accordance with the terms and conditions of the EULA (available at https://ecoinvent.lca-data.com/) exclusively until 31st December 2024. Any use of this dataset or any derivative data not within the specific context of one of the PEF/OEF projects or after the end of 2024 is not permitted.

## General comment
Notice: this data set supersedes the EF3.0-compliant version (see link under "preceding data set version" below calculated with the EF3.0). The life cycle inventory is not changed from the original EF3.0 data set. The LCIA results are calculated based on the EF3.1 methods which provide updated characterisation factors in the following impact categories: Climate Change, Ecotoxicity freshwater, Photochemical Ozone Formation, Acidification, Human Toxicity non-cancer, and Human Toxicity cancer. The review report and the data quality ratings refer to the original results. The data set has been updated by the European Commission on the basis of the original EF3.0 data set delivered by the data provider.Pouring , bulk, for foam technology uses the method of pouring the liquid mixture into an open mould. The basic principle involved in this technology is the mixing of two liquid chemicals, Polyol and Isocyanate, using a mixing head and pouring the liquid mixture at low pressure into an Open Type Aluminum Mould. The reaction between Polyol and Isocyanate form a Polyurethane (PU).

Pinza Shoes: Shoes and More. 2012. Direct Injection Process (DIP) and Pouring Method for PU Soling onto Footwear. https://pinzashoes.wordpress.com/2012/08/06/direct-injection-process-dip-and-pouring-method-for-pu-soling-onto-footwear/.

## Technology and included processes
There are two options of pouring technology, i.e one, where the mixing head is stationary, and the mould-holders move (Conveyor Type Fabricated Mould Holders or Rotary Machine); these machines normally have 32, 40, 60, 90 or 100 stations, as per production required, and are costly options. In the other type, called BANANA, the mixer is moved manually while the mould-holders/ moulds remain stationary; in such a case you could have 6, 12, 18, 24 and up to 32 stations/moulds and is a more economic option. (Pinza Shoes, 2012)

A two-part liquid yielding a high strength, rigid, closed-cell foam for cavity filling and buoyancy applications. The foam may be used to fill cavities from 50mm to 300mm wide. The liquid is simple to use. Immediately after mixing, it is poured into the cavity to be filled, then left to foam and cure. Deep cavities should be filled with layers of foam about 25mm deep, as the exotherm (internal heat) generated during the curing process increases with greater volumes. (CFSNET, 2021)

In this model, the process includes the use of a Polyurethane (PU) pouring sole machine safety shoe making machine (rotary machine type). It has 60 stations, 3 tanks and has function of heating, pouring and curing the PU soles. This dataset is a service process that does not include the raw material input. The energy consumption from electricity and infrastructure of the machine are included. The infrastructure of the mould from aluminium is included as well. There is no direct emission to air since the emission comes from electricity usage, while hazardous waste comes from waste lube oil. The consumption of lubricating oil using a thermobonding oven machine as a proxy.

Pinza Shoes: Shoes and More. 2012. Direct Injection Process (DIP) and Pouring Method for PU Soling onto Footwear. https://pinzashoes.wordpress.com/2012/08/06/direct-injection-process-dip-and-pouring-method-for-pu-soling-onto-footwear/.
CFSNET (2021) Methods Liquid Foam. https://www.cfsnet.co.uk/acatalog/methods_liquidfoam.html , CFSNET Ltd., Redruth, United Kingdom.

## Parameters
- kg_0: 5.21314e-7
  Mass in kg, for aluminium, cast alloy; Transoceanic ship, containers; GLO
- km_0: 1389.82
  Distance in km, for aluminium, cast alloy; Transoceanic ship, containers; GLO
- kg_km_0: 0.00072453; = kg_0*km_0
  Transport amount in km*km, for aluminium, cast alloy; Transoceanic ship, containers; GLO
- kg_1: 5.21314e-7
  Mass in kg, for aluminium, cast alloy; Freight train, diesel traction; EU+EFTA+UK
- km_1: 978.386
  Distance in km, for aluminium, cast alloy; Freight train, diesel traction; EU+EFTA+UK
- kg_km_1: 0.000510046; = kg_1*km_1
  Transport amount in km*km, for aluminium, cast alloy; Freight train, diesel traction; EU+EFTA+UK
- kg_2: 5.21314e-7
  Mass in kg, for aluminium, cast alloy; Freight train, electricity traction; EU+EFTA+UK
- km_2: 332.807
  Distance in km, for aluminium, cast alloy; Freight train, electricity traction; EU+EFTA+UK
- kg_km_2: 0.000173497; = kg_2*km_2
  Transport amount in km*km, for aluminium, cast alloy; Freight train, electricity traction; EU+EFTA+UK
- kg_3: 5.21314e-7
  Mass in kg, for aluminium, cast alloy; Freight train, average; EU+EFTA+UK
- km_3: 7.84941
  Distance in km, for aluminium, cast alloy; Freight train, average; EU+EFTA+UK
- kg_km_3: 4.09201e-6; = kg_3*km_3
  Transport amount in km*km, for aluminium, cast alloy; Freight train, average; EU+EFTA+UK
- kg_4: 5.21314e-7
  Mass in kg, for aluminium, cast alloy; Barge; EU+EFTA+UK
- km_4: 45.6505
  Distance in km, for aluminium, cast alloy; Barge; EU+EFTA+UK
- kg_km_4: 2.37983e-5; = kg_4*km_4
  Transport amount in km*km, for aluminium, cast alloy; Barge; EU+EFTA+UK
- kg_5: 5.21314e-7
  Mass in kg, for aluminium, cast alloy; Barge; ROW w/o EU+EFTA
- km_5: 93.2162
  Distance in km, for aluminium, cast alloy; Barge; ROW w/o EU+EFTA
- kg_km_5: 4.85949e-5; = kg_5*km_5
  Transport amount in km*km, for aluminium, cast alloy; Barge; ROW w/o EU+EFTA
- kg_6: 5.21314e-7
  Mass in kg, for aluminium, cast alloy; Articulated lorry transport, Euro 4, Total weight >32 t; EU+EFTA+UK
- km_6: 379.905
  Distance in km, for aluminium, cast alloy; Articulated lorry transport, Euro 4, Total weight >32 t; EU+EFTA+UK
- kg_km_6: 0.00019805; = kg_6*km_6
  Transport amount in km*km, for aluminium, cast alloy; Articulated lorry transport, Euro 4, Total weight >32 t; EU+EFTA+UK
- kg_7: 5.21314e-7
  Mass in kg, for aluminium, cast alloy; Articulated lorry transport, Total weight >32 t, mix Euro 0-5; ROW w/o EU+EFTA
- km_7: 1002.64
  Distance in km, for aluminium, cast alloy; Articulated lorry transport, Total weight >32 t, mix Euro 0-5; ROW w/o EU+EFTA
- kg_km_7: 0.000522691; = kg_7*km_7
  Transport amount in km*km, for aluminium, cast alloy; Articulated lorry transport, Total weight >32 t, mix Euro 0-5; ROW w/o EU+EFTA
- kg_8: 2.42356e-6
  Mass in kg, for lubricating oil // lubricants at refinery // eu+efta+uk; Articulated lorry transport, Euro 4, Total weight >32 t; EU+EFTA+UK
- km_8: 129.974
  Distance in km, for lubricating oil // lubricants at refinery // eu+efta+uk; Articulated lorry transport, Euro 4, Total weight >32 t; EU+EFTA+UK
- kg_km_8: 0.000315; = kg_8*km_8
  Transport amount in km*km, for lubricating oil // lubricants at refinery // eu+efta+uk; Articulated lorry transport, Euro 4, Total weight >32 t; EU+EFTA+UK
- kg_9: 4.42563e-7
  Mass in kg, for lubricating oil // lubricants at refinery // rsa; Articulated lorry transport, Euro 4, Total weight >32 t; EU+EFTA+UK
- km_9: 1000
  Distance in km, for lubricating oil // lubricants at refinery // rsa; Articulated lorry transport, Euro 4, Total weight >32 t; EU+EFTA+UK
- kg_km_9: 0.000442563; = kg_9*km_9
  Transport amount in km*km, for lubricating oil // lubricants at refinery // rsa; Articulated lorry transport, Euro 4, Total weight >32 t; EU+EFTA+UK
- kg_10: 1.81564e-7
  Mass in kg, for lubricating oil // lubricants at refinery // raf; Articulated lorry transport, Euro 4, Total weight >32 t; EU+EFTA+UK
- km_10: 1000
  Distance in km, for lubricating oil // lubricants at refinery // raf; Articulated lorry transport, Euro 4, Total weight >32 t; EU+EFTA+UK
- kg_km_10: 0.000181564; = kg_10*km_10
  Transport amount in km*km, for lubricating oil // lubricants at refinery // raf; Articulated lorry transport, Euro 4, Total weight >32 t; EU+EFTA+UK
- kg_11: 4.75796e-6
  Mass in kg, for lubricating oil // lubricants at refinery // ras w/o cn; Articulated lorry transport, Euro 4, Total weight >32 t; EU+EFTA+UK
- km_11: 1000
  Distance in km, for lubricating oil // lubricants at refinery // ras w/o cn; Articulated lorry transport, Euro 4, Total weight >32 t; EU+EFTA+UK
- kg_km_11: 0.00475796; = kg_11*km_11
  Transport amount in km*km, for lubricating oil // lubricants at refinery // ras w/o cn; Articulated lorry transport, Euro 4, Total weight >32 t; EU+EFTA+UK
- kg_12: 3.93444e-6
  Mass in kg, for lubricating oil // lubricants at refinery // ru; Articulated lorry transport, Euro 4, Total weight >32 t; EU+EFTA+UK
- km_12: 1000
  Distance in km, for lubricating oil // lubricants at refinery // ru; Articulated lorry transport, Euro 4, Total weight >32 t; EU+EFTA+UK
- kg_km_12: 0.00393444; = kg_12*km_12
  Transport amount in km*km, for lubricating oil // lubricants at refinery // ru; Articulated lorry transport, Euro 4, Total weight >32 t; EU+EFTA+UK
- kg_13: 3.71397e-6
  Mass in kg, for lubricating oil // lubricants at refinery // rna; Articulated lorry transport, Euro 4, Total weight >32 t; EU+EFTA+UK
- km_13: 1000
  Distance in km, for lubricating oil // lubricants at refinery // rna; Articulated lorry transport, Euro 4, Total weight >32 t; EU+EFTA+UK
- kg_km_13: 0.00371397; = kg_13*km_13
  Transport amount in km*km, for lubricating oil // lubricants at refinery // rna; Articulated lorry transport, Euro 4, Total weight >32 t; EU+EFTA+UK
- kg_14: 7.55438e-7
  Mass in kg, for lubricating oil // lubricants at refinery // cn; Articulated lorry transport, Euro 4, Total weight >32 t; EU+EFTA+UK
- km_14: 1000
  Distance in km, for lubricating oil // lubricants at refinery // cn; Articulated lorry transport, Euro 4, Total weight >32 t; EU+EFTA+UK
- kg_km_14: 0.000755438; = kg_14*km_14
  Transport amount in km*km, for lubricating oil // lubricants at refinery // cn; Articulated lorry transport, Euro 4, Total weight >32 t; EU+EFTA+UK
- kg_15: 4.42563e-7
  Mass in kg, for lubricating oil // lubricants at refinery // rsa; Transoceanic ship, containers; GLO
- km_15: 18000
  Distance in km, for lubricating oil // lubricants at refinery // rsa; Transoceanic ship, containers; GLO
- kg_km_15: 0.00796614; = kg_15*km_15
  Transport amount in km*km, for lubricating oil // lubricants at refinery // rsa; Transoceanic ship, containers; GLO
- kg_16: 1.81564e-7
  Mass in kg, for lubricating oil // lubricants at refinery // raf; Transoceanic ship, containers; GLO
- km_16: 18000
  Distance in km, for lubricating oil // lubricants at refinery // raf; Transoceanic ship, containers; GLO
- kg_km_16: 0.00326816; = kg_16*km_16
  Transport amount in km*km, for lubricating oil // lubricants at refinery // raf; Transoceanic ship, containers; GLO
- kg_17: 4.75796e-6
  Mass in kg, for lubricating oil // lubricants at refinery // ras w/o cn; Transoceanic ship, containers; GLO
- km_17: 18000
  Distance in km, for lubricating oil // lubricants at refinery // ras w/o cn; Transoceanic ship, containers; GLO
- kg_km_17: 0.0856433; = kg_17*km_17
  Transport amount in km*km, for lubricating oil // lubricants at refinery // ras w/o cn; Transoceanic ship, containers; GLO
- kg_18: 3.93444e-6
  Mass in kg, for lubricating oil // lubricants at refinery // ru; Transoceanic ship, containers; GLO
- km_18: 18000
  Distance in km, for lubricating oil // lubricants at refinery // ru; Transoceanic ship, containers; GLO
- kg_km_18: 0.0708199; = kg_18*km_18
  Transport amount in km*km, for lubricating oil // lubricants at refinery // ru; Transoceanic ship, containers; GLO
- kg_19: 3.71397e-6
  Mass in kg, for lubricating oil // lubricants at refinery // rna; Transoceanic ship, containers; GLO
- km_19: 18000
  Distance in km, for lubricating oil // lubricants at refinery // rna; Transoceanic ship, containers; GLO
- kg_km_19: 0.0668514; = kg_19*km_19
  Transport amount in km*km, for lubricating oil // lubricants at refinery // rna; Transoceanic ship, containers; GLO
- kg_20: 7.55438e-7
  Mass in kg, for lubricating oil // lubricants at refinery // cn; Transoceanic ship, containers; GLO
- km_20: 18000
  Distance in km, for lubricating oil // lubricants at refinery // cn; Transoceanic ship, containers; GLO
- kg_km_20: 0.0135979; = kg_20*km_20
  Transport amount in km*km, for lubricating oil // lubricants at refinery // cn; Transoceanic ship, containers; GLO
- kg_21: 2.42356e-6
  Mass in kg, for lubricating oil // lubricants at refinery // eu+efta+uk; Transoceanic ship, containers; GLO
- km_21: 17990.1
  Distance in km, for lubricating oil // lubricants at refinery // eu+efta+uk; Transoceanic ship, containers; GLO
- kg_km_21: 0.0436; = kg_21*km_21
  Transport amount in km*km, for lubricating oil // lubricants at refinery // eu+efta+uk; Transoceanic ship, containers; GLO

## Reference product
- pouring, bulk, for foam // pouring, bulk, for foam // glo: 1

## Inputs
- Transport of aluminium, cast alloy by Transoceanic ship, containers - GLO: 0.00072453; = kg_km_0
- Transport of aluminium, cast alloy by Freight train, diesel traction - EU+EFTA+UK: 0.000510046; = kg_km_1
- Transport of aluminium, cast alloy by Freight train, electricity traction - EU+EFTA+UK: 0.000173497; = kg_km_2
- Transport of aluminium, cast alloy by Freight train, average - EU+EFTA+UK: 4.09201e-6; = kg_km_3
- Transport of aluminium, cast alloy by Barge - EU+EFTA+UK: 2.37983e-5; = kg_km_4
- Transport of aluminium, cast alloy by Barge - ROW w/o EU+EFTA: 4.85949e-5; = kg_km_5
- Transport of aluminium, cast alloy by Articulated lorry transport, Euro 4, Total weight >32 t - EU+EFTA+UK: 0.00019805; = kg_km_6
- Transport of aluminium, cast alloy by Articulated lorry transport, Total weight >32 t, mix Euro 0-5 - ROW w/o EU+EFTA: 0.000522691; = kg_km_7
- Electricity from Electricity grid mix 1kV-60kV - AU: 0.0049
- Electricity from Electricity grid mix 1kV-60kV - EU+EFTA+UK: 0.0729
- Electricity from Electricity grid mix 1kV-60kV - NZ: 0.0009
- Electricity from Electricity grid mix 1kV-60kV - RAF: 0.0159
- Electricity from Electricity grid mix 1kV-60kV - RNA: 0.1067
- Electricity from Electricity grid mix 1kV-60kV - RSA: 0.0362
- Electricity from Electricity grid mix 1kV-60kV - RU: 0.0213
- Transport of lubricating oil // lubricants at refinery // eu+efta+uk by Articulated lorry transport, Euro 4, Total weight >32 t - EU+EFTA+UK: 0.000315; = kg_km_8
- Transport of lubricating oil // lubricants at refinery // rsa by Articulated lorry transport, Euro 4, Total weight >32 t - EU+EFTA+UK: 0.000442563; = kg_km_9
- Transport of lubricating oil // lubricants at refinery // raf by Articulated lorry transport, Euro 4, Total weight >32 t - EU+EFTA+UK: 0.000181564; = kg_km_10
- Transport of lubricating oil // lubricants at refinery // ras w/o cn by Articulated lorry transport, Euro 4, Total weight >32 t - EU+EFTA+UK: 0.00475796; = kg_km_11
- Transport of lubricating oil // lubricants at refinery // ru by Articulated lorry transport, Euro 4, Total weight >32 t - EU+EFTA+UK: 0.00393444; = kg_km_12
- Transport of lubricating oil // lubricants at refinery // rna by Articulated lorry transport, Euro 4, Total weight >32 t - EU+EFTA+UK: 0.00371397; = kg_km_13
- Transport of lubricating oil // lubricants at refinery // cn by Articulated lorry transport, Euro 4, Total weight >32 t - EU+EFTA+UK: 0.000755438; = kg_km_14
- Transport of lubricating oil // lubricants at refinery // rsa by Transoceanic ship, containers - GLO: 0.00796614; = kg_km_15
- Transport of lubricating oil // lubricants at refinery // raf by Transoceanic ship, containers - GLO: 0.00326816; = kg_km_16
- Transport of lubricating oil // lubricants at refinery // ras w/o cn by Transoceanic ship, containers - GLO: 0.0856433; = kg_km_17
- Transport of lubricating oil // lubricants at refinery // ru by Transoceanic ship, containers - GLO: 0.0708199; = kg_km_18
- Transport of lubricating oil // lubricants at refinery // rna by Transoceanic ship, containers - GLO: 0.0668514; = kg_km_19
- Transport of lubricating oil // lubricants at refinery // cn by Transoceanic ship, containers - GLO: 0.0135979; = kg_km_20
- Transport of lubricating oil // lubricants at refinery // eu+efta+uk by Transoceanic ship, containers - GLO: 0.0436; = kg_km_21
- Electricity from Electricity grid mix 1kV-60kV - CN: 0.109322
- Electricity from Electricity grid mix 1kV-60kV - RAS w/o CN: 0.119778
- pouring, bulk, for foam // pouring, bulk, for foam // glo, blackbox: 1
- pouring, bulk, for foam // pouring, bulk, for foam // glo, elementary: 1

## Impact indicators
- Eutrophication marine: 7.93949e-5
- Ecotoxicity, freshwater: 0.404618
- Land use: 0.119867
- Water use: 0.0303731
- Resource use, minerals and metals: 2.26881e-8
- Resource use, fossils: 1.22114
- Climate change: 0.0926536
- Ozone depletion: 8.41831e-12
- Human toxicity, cancer: 4.55441e-11
- Human toxicity, non-cancer: 5.29735e-10
- EF-particulate Matter: 2.21398e-8
- Ionising radiation, human health: 0.00671721
- Photochemical ozone formation - human health: 0.000243424
- Acidification: 0.000588359
- Eutrophication, terrestrial: 0.000864785
- Eutrophication, freshwater: 9.46835e-8

## Deviations from the LCI method principle
The background data uses:
- the \xe2\x80\x9cRecycled content cut-off\xe2\x80\x9d approach to allocate end-of-life by-products and secondary materials. This allocation is explained in the description of the recycled content system model (http://www.ecoinvent.org/database/system-models-in-ecoinvent-3/cut-off-system-model/allocation-cut-off-by-classification.html).
OR
- EF compliant data

## Deviations from the LCI method approaches
Background data:
- the \xe2\x80\x9cRecycled content cut-off\xe2\x80\x9d approach to allocate end-of-life by-products and secondary materials. This allocation is explained in the description of the recycled content system model (http://www.ecoinvent.org/database/system-models-in-ecoinvent-3/cut-off-system-model/allocation-cut-off-by-classification.html). The ecoinvent database mostly relies on “Allocation – market values” apart for few exceptions particularly in the energy sector. ecoinvent energy data is replaced with EF3.0 core data as per the EF guidelines version 2.0.
OR
- EF compliant data

## Modelling constants
All modelling constants follow the requirements listed in the Tender Specifications 070201/2020/SER/ENV.B1. Completeness: There are no intentional cut-offs in the inventory no matter how small their contribution to all the EF impact categories is. Eventual cut-offs are in compliance with the Guide for EF compliant data sets (JRC 2020), i.e. only if below the 3% cut-off rule. Water use: water use is modelled at country level using separate flows for water withdrawal, water release and water evaporation. Handling multi-functional processes: the following PEF multi- functionality decision hierarchy is applied for resolving all multi- functionality problems: (1) subdivision or system expansion; (2) allocation based on a relevant underlying physical relationship (substitution may apply here); (3) allocation based on some other relationship. Direct land use change: GHG emissions from direct LUC allocated to good/service for 20 years after the LUC occurs, with IPCC default values. Carbon storage and delayed emissions: credits associated with temporary (carbon) storage or delayed emissions up to 300 years are not be considered. Emissions off-setting: are not included. Capital goods (including infrastructures) and their End of life: they are included. System boundaries: system boundaries include all processes linked to the product supply chain (e.g. maintenance). Time period: emissions and removals are modelled as if released or removed at the beginning of the assessment method. Fossil and biogenic carbon emissions and removals: removals and emissions are modelled as follows: All GHG emissions from fossil fuels (including peat and limestone) are modelled consistently with the most updated ILCD list of elementary flows. The non-fossil (biogenic) carbon flows are modelled consistently with the most updated ILCD list of elementary flows.

## Cut-off and completeness
There are no intentional cut-offs in the inventory no matter how small their contribution to all the EF impact categories is. Eventual cut-offs are in compliance with the Guide for EF compliant data sets (JRC 2020), i.e. only if below the 3% cut-off rule. The dataset dry mass and water balance has been checked to ensure the inventory is complete. Capital goods (e.g. infrastructure) and their end-of-life are included.

## Data selection and combination
These datasets include, in both their foreground and background data, links to EF3.0 compliant data.
The relevant background data on energy, transport, and End of Life are from the LCDN data node (http://lcdn.thinkstep.com/Node/).
All other background data in the supply of this product for which no EF3.0 process was available are from ecoinvent v3.7 database (www.ecoinvent.org) or other data sources.

## Data treatment and extrapolations
Several data sources have been used to model the inventory.

## Review details
Internal reviews have been asked to review the plausibility of the unit process, LCIA scores, and DQRs. Internal reviewers have also been asked to review the data for EF compliancy. The consortium is therefore responsible for aspects such as compliancy with the ILCD format, including validation in Look@LCI, and nomenclature.
Internal reviwers have been asked to judge based on the process name, that the unit process models in a complete and representative way the process in the requested location. The review encompassed the plausability of:
- exchanges with nature (elementary flows) as well as exchanges such as product and waste flows.
- meta information (general comment, technology comment, system boundaries, allocation, cut-off rules, etc.). Reviewers were asked to judge if the provided information is enough to understand the content of the process.
- LCIA scores
- DQRs including precision, technology, time and geography. As well as the overall DQR.
External reviewers have been asked to provide their expertise in the field of interest. External reviewers have been asked to review the unit process, including eventual methodological choices, the LCIA scores (provided with contribution scores as well), and DQRs. External reviewers have been provided all the information in a tool developed by the consortium for the purpose of this project.
External reviewers have been asked to judge based on the process name, that the unit process models in a complete and representative way the process in the requested location. The review encompassed:
- Plausability and completeness of exchanges with nature (elementary flows) as well as exchanges such as product and waste flows.
- Review of meta information (general comment, technology comment, system boundaries, allocation, cut-off rules, etc.). Reviewers were asked to judge if the provided information is enough to understand the content of the process.
- Review of properties (biogenic carbon and water content).
- Review of allocation keys.
- Plausability of LCIA scores calculated by the consortium.
- Plausability of DQRs including precision, technology, time and geography. As well as the overall DQR.

## Data sources
- Background Data for Representative products and organisations. EF 3.0 compliant (data stock)
- UN Data (2018) Statistics Data for Lubricants Productions, http://data.un.org/Data.aspx?q=Lubricants&d=EDATA&f=cmID%3aLU, United Nations Statistics Division, Global.
- Lebon (2021) Nonwoven Oven Machine, Catalog and Company Messages, Qingdao Lebon Industry Co., Ltd., China
- Quanzhou Kingkung (2021) Chinese type PU pouring sole machine safety shoe making machine,http://www.kingkungtech.com/, Quanzhou Kingkung Imp.and Exp.Trade Co,. Ltd, China https://www.globalsources.com/Shoemaking-machine/60-Stations-PU-Pouring-Machine-1177616300p.htm#1177616300
- Ian Smith (2021). Footwear Circular Economy, Textile Consult.

## Intended applications
Implementation of regular Product Environmental Footprint (PEF) studies and Organisation Environmental Footprint (OEF) studies exclusively under the specified Product groups and sectors as defined in the Product Environmental Footprint Category Rules (PEFCR) and Organisation Environmental Footprint Sectorial Rules (OEFSR) listed in http://ec.europa.eu/environment/eussd/smgp/PEFCR_OEFSR.htm
