# assembly, insole, elementary; insole assembly process; production mix, at plant; service

Dataset: ILCD process, Unit process, single operation
Geography: GLO
Reference year: 2021
Valid until: 2024
Classification: Other Services / Other services
LCI method principle: Attributional
LCI method approaches: Allocation - market value
Completeness: All relevant flows quantified
Project: Provision of process-based 3.0 Environmental Footprint-compliant life cycle inventory datasets - Apparel 2 - contract number 070201/2020/840292/SER/ENV.B.1
Generated by: Life Cycle Indonesia
Owner: PRé Sustainability B.V.
Compliance: Environmental Footprint non-primary supporting data set; Environmental Footprint 3.1
Amounts: no units in this file; such an amount is in the reference unit of its flow, which a separate flow dataset defines
copyright: true
licenseType: Free of charge for some user types or use types
accessRestrictions: Free of charge for all final users implementing a regular Product Environmental Footprint (PEF) studies and Organisation Environmental Footprint (OEF) studies exclusively under the specified Product groups and sectors as defined in the Product Environmental Footprint Category Rules (PEFCR) and Organisation Environmental Footprint Sectorial Rules (OEFSR) listed in http://ec.europa.eu/environment/eussd/smgp/PEFCR_OEFSR.htm and in accordance with the terms and conditions of the EULA (available at https://ecoinvent.lca-data.com/) exclusively until 31st December 2024. Any use of this dataset or any derivative data not within the specific context of one of the PEF/OEF projects or after the end of 2024 is not permitted.

## General comment
Notice: this data set supersedes the EF3.0-compliant version (see link under "preceding data set version" below calculated with the EF3.0). The life cycle inventory is not changed from the original EF3.0 data set. The LCIA results are calculated based on the EF3.1 methods which provide updated characterisation factors in the following impact categories: Climate Change, Ecotoxicity freshwater, Photochemical Ozone Formation, Acidification, Human Toxicity non-cancer, and Human Toxicity cancer. The review report and the data quality ratings refer to the original results. The data set has been updated by the European Commission on the basis of the original EF3.0 data set delivered by the data provider.This sub-process has limited documentation only. For all detailed documentation of the full model to which this data set belongs (such as DQRs, review reports and other technical documentation), please see this process: assembly, insole - GLO []

## Technology and included processes
In this model, the hot-melt adhesive film is used instead of glue and applied with an Insole transferring machine. Hot-melt adhesives are solid thermoplastic resins that liquefy when heated. When applied to a surface they cool, harden and reach their bond strength within seconds. The insoles are then pressed with a sole pneumatic press machine. The type of adhesive used in this model is thermoplastic polyurethane since it is one of the most common adhesive films used for the shoe insole.

The activity starts when the raw materials enter the process which is the insole. The energy consumption, thermoplastic polyurethane adhesive, and infrastructure of the machine are included. There is no direct emission to the air since the emission comes from electricity usage, while hazardous waste comes from the waste lube oil. In the model, the energy sources of machines are used solely from electricity. The consumption of lubricating oil using a stitch bonding machine as a proxy. The excess adhesive waste is not included in this process as it is not significant.

## Reference product
- assembly, insole // assembly, insole // glo, elementary: 1

## Impact indicators
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
## Deviations from the LCI method principle
The background data uses:
- the \xe2\x80\x9cRecycled content cut-off\xe2\x80\x9d approach to allocate end-of-life by-products and secondary materials. This allocation is explained in the description of the recycled content system model (http://www.ecoinvent.org/database/system-models-in-ecoinvent-3/cut-off-system-model/allocation-cut-off-by-classification.html).
OR
- EF compliant data

## Deviations from the LCI method approaches
Background data:
- the \xe2\x80\x9cRecycled content cut-off\xe2\x80\x9d approach to allocate end-of-life by-products and secondary materials. This allocation is explained in the description of the recycled content system model (http://www.ecoinvent.org/database/system-models-in-ecoinvent-3/cut-off-system-model/allocation-cut-off-by-classification.html). The ecoinvent database mostly relies on “Allocation – market values” apart for few exceptions particularly in the energy sector. ecoinvent energy data is replaced with EF3.0 core data as per the EF guidelines version 2.0.
OR
- EF compliant data

## Modelling constants
All modelling constants follow the requirements listed in the Tender Specifications 070201/2020/SER/ENV.B1. Completeness: There are no intentional cut-offs in the inventory no matter how small their contribution to all the EF impact categories is. Eventual cut-offs are in compliance with the Guide for EF compliant data sets (JRC 2020), i.e. only if below the 3% cut-off rule. Water use: water use is modelled at country level using separate flows for water withdrawal, water release and water evaporation. Handling multi-functional processes: the following PEF multi- functionality decision hierarchy is applied for resolving all multi- functionality problems: (1) subdivision or system expansion; (2) allocation based on a relevant underlying physical relationship (substitution may apply here); (3) allocation based on some other relationship. Direct land use change: GHG emissions from direct LUC allocated to good/service for 20 years after the LUC occurs, with IPCC default values. Carbon storage and delayed emissions: credits associated with temporary (carbon) storage or delayed emissions up to 300 years are not be considered. Emissions off-setting: are not included. Capital goods (including infrastructures) and their End of life: they are included. System boundaries: system boundaries include all processes linked to the product supply chain (e.g. maintenance). Time period: emissions and removals are modelled as if released or removed at the beginning of the assessment method. Fossil and biogenic carbon emissions and removals: removals and emissions are modelled as follows: All GHG emissions from fossil fuels (including peat and limestone) are modelled consistently with the most updated ILCD list of elementary flows. The non-fossil (biogenic) carbon flows are modelled consistently with the most updated ILCD list of elementary flows.

## Cut-off and completeness
There are no intentional cut-offs in the inventory no matter how small their contribution to all the EF impact categories is. Eventual cut-offs are in compliance with the Guide for EF compliant data sets (JRC 2020), i.e. only if below the 3% cut-off rule. The dataset dry mass and water balance has been checked to ensure the inventory is complete. Capital goods (e.g. infrastructure) and their end-of-life are included.

## Data selection and combination
These datasets include, in both their foreground and background data, links to EF3.0 compliant data.
The relevant background data on energy, transport, and End of Life are from the LCDN data node (http://lcdn.thinkstep.com/Node/).
All other background data in the supply of this product for which no EF3.0 process was available are from ecoinvent v3.7 database (www.ecoinvent.org) or other data sources.

## Data treatment and extrapolations
Several data sources have been used to model the inventory.

## Use advice
This data set is a supporting sub-data set and must be used exclusively as sub-data set of its corresponding level-1 partly disaggregated data set (see “General comment” field for exact name and UUID).

## Data sources
- Background Data for Representative products and organisations. EF 3.0 compliant (data stock)
- UN Data (2018) Statistics Data for Lubricants Productions, http://data.un.org/Data.aspx?q=Lubricants&d=EDATA&f=cmID%3aLU, United Nations Statistics Division, Global
- Cotex (2021) Stitch Bonding Machine, Catalog and Company Email, Suzhou Cotex International Co., Ltd., China.
- Marie Gottfridsson, Yuqing Zhang (2015). Environmental impacts of shoe consumption: Combining product flow analysis with an LCA model for Sweden. Chalmers University of Technology, Gothenburg, Sweden. https://publications.lib.chalmers.se/records/fulltext/218968/218968.pdf
- Nango German System (2021) Insole Transfer Machine LS-801JM https://nanogermansystem.com/en/shoemaking-gluing-equipment/insole-transfer-machine-ls-801jm Nano German System Company, Ukraine
- Nango German System (2021) Pneumatic sole attaching press DC3 https://nanogermansystem.com/en/sole-attaching-press/sole-gluing-press-dc3 Nango German System Company, Ukraine
- Tunsing (2021) Thermoplastic TPU Hot-Melt Adhesive Film, Hot-Melt Sheet for Leather Lamination https://www.hotmelt-adhesivefilm.com/quality-11198150-thermoplastic-tpu-hot-melt-adhesive-film-hot-melt-sheet-for-leather-lamination Shenzhen Tunsing Plastic Products Co., Ltd, China
- Texyear Industrial Adhesives Private Limited (2021) Hot Melt Adhesives for shoe making https://www.hotmelt-adhesive.net/leather-hot-melt-adhesives.html Texyear Industrial Adhesives Pvt Ltd., India
- Jessica Deberardinis, Conner Neilsen, Daniel Lidstone, Mohamed B Trabia (2020) A comparison of two techniques for center of pressure measurements, Journal of Rehabilitation and Assistive Technologies Engineering https://www.researchgate.net/publication/342725829_A_comparison_of_two_techniques_for_center_of_pressure_measurementss

## Intended applications
Implementation of regular Product Environmental Footprint (PEF) studies and Organisation Environmental Footprint (OEF) studies exclusively under the specified Product groups and sectors as defined in the Product Environmental Footprint Category Rules (PEFCR) and Organisation Environmental Footprint Sectorial Rules (OEFSR) listed in http://ec.europa.eu/environment/eussd/smgp/PEFCR_OEFSR.htm
