# printing, burnout; printing service; production, at plant; service of printing, Burnout on 1m2 of fabric

Dataset: ILCD process, Partly terminated system
Geography: GLO
Reference year: 2021
Valid until: 2024
Classification: Systems / Textiles, furnitures and other interiors
LCI method principle: Attributional
LCI method approaches: Allocation - market value
Completeness: All relevant flows quantified
Project: Provision of process-based 3.0 Environmental Footprint-compliant life cycle inventory datasets - Apparel 2 - contract number 070201/2020/840292/SER/ENV.B.1
Generated by: Metsims Sustainability Consulting
Owner: PRé Sustainability B.V.
Compliance: ILCD Data Network - Entry-level; Suggestions for updating the PEF method 2019; ISO 14040 Environmental Management – Life Cycle Assessment – Principles and Framework, 2006; ISO 14044:2006. Environmental Management – Life Cycle Assessment – Requirements and guidelines.; Environmental Footprint 3.1
Review: Dependent internal review by Avraam Symeonidis, Emilia Moreno Ruiz; Independent review panel by Fábio Valebona
Data quality: Overall quality: Good; Time representativeness: Very good; Geographical representativeness: Good; Technological representativeness: Good; Precision: Good; Methodological appropriateness and consistency: Not applicable
Amounts: no units in this file; such an amount is in the reference unit of its flow, which a separate flow dataset defines
copyright: true
licenseType: Free of charge for some user types or use types
accessRestrictions: Free of charge for all final users implementing a regular Product Environmental Footprint (PEF) studies and Organisation Environmental Footprint (OEF) studies exclusively under the specified Product groups and sectors as defined in the Product Environmental Footprint Category Rules (PEFCR) and Organisation Environmental Footprint Sectorial Rules (OEFSR) listed in http://ec.europa.eu/environment/eussd/smgp/PEFCR_OEFSR.htm and in accordance with the terms and conditions of the EULA (available at https://ecoinvent.lca-data.com/) exclusively until 31st December 2024. Any use of this dataset or any derivative data not within the specific context of one of the PEF/OEF projects or after the end of 2024 is not permitted.

## General comment
Notice: this data set supersedes the EF3.0-compliant version (see link under "preceding data set version" below calculated with the EF3.0). The life cycle inventory is not changed from the original EF3.0 data set. The LCIA results are calculated based on the EF3.1 methods which provide updated characterisation factors in the following impact categories: Climate Change, Ecotoxicity freshwater, Photochemical Ozone Formation, Acidification, Human Toxicity non-cancer, and Human Toxicity cancer. The review report and the data quality ratings refer to the original results. The data set has been updated by the European Commission on the basis of the original EF3.0 data set delivered by the data provider.This dataset covers burnout printed fabric. At this technique colorant is removed from coloured fabric in a specific pattern. Burnout printing process is similar to screen printing. Only the difference; instead of apply colorant, colorant is removed from the fabric in a specific pattern. Regarding to burnout printing; printing chemicals, required energy and water consumption are included to dataset.

Printing chemicals is belong burnout printing which is applied to 60% polyester 40% cotton fabric. For printing process, except chemicals electricity, thermal energy and water are used. Due to lack of data, on behalf of pre and post printing processes of burnout printing, rotary screen printing pre and post processes were used.
For the printing process following production steps were included: Fabric roll opening, gassing, bleaching, pre washing, sample printing, screen preparation, printing, fixing, after washing, sanforizing and quality control.

Dyeing of fabric is not included to data.

## Technology and included processes
Burnout printing process is similar to screen printing. Only the difference; instead of apply colorant, colorant is removed from the fabric in a specific pattern. Regarding to burnout printing; printing chemicals, required energy and water consumption are included to dataset.

A user employing this service within their models should use it along with an 1.0125 kg of material to produce an 1 kg of yarn. 0.0125 kg of waste shall also be added. A user is responsible for defining the nature of the recycling and/or disposal of this waste. Additionally, a user is responsible for accounting transportation expenditures for all extra input and output materials that need to be modelled alongside this service.*

*Ref: Altun, S. (2012). Prediction of textile waste profile and recycling opportunities in Turk. Fibres & Textiles in Eastern Europe.

## Parameters
- kg_0: 0.901
  Mass in kg, for aluminium sulphate powder // aluminium sulphate powder production // eu+efta+uk; Articulated lorry transport, Euro 4, Total weight >32 t; EU+EFTA+UK
- km_0: 1000
  Distance in km, for aluminium sulphate powder // aluminium sulphate powder production // eu+efta+uk; Articulated lorry transport, Euro 4, Total weight >32 t; EU+EFTA+UK
- kg_km_0: 901; = kg_0*km_0
  Transport amount in km*km, for aluminium sulphate powder // aluminium sulphate powder production // eu+efta+uk; Articulated lorry transport, Euro 4, Total weight >32 t; EU+EFTA+UK
- kg_1: 0.53
  Mass in kg, for ethanol // ethanol production // glo; Articulated lorry transport, Euro 4, Total weight >32 t; EU+EFTA+UK
- km_1: 1000
  Distance in km, for ethanol // ethanol production // glo; Articulated lorry transport, Euro 4, Total weight >32 t; EU+EFTA+UK
- kg_km_1: 530; = kg_1*km_1
  Transport amount in km*km, for ethanol // ethanol production // glo; Articulated lorry transport, Euro 4, Total weight >32 t; EU+EFTA+UK
- kg_2: 0.424
  Mass in kg, for surfactant // surfactant production // glo; Articulated lorry transport, Euro 4, Total weight >32 t; EU+EFTA+UK
- km_2: 1000
  Distance in km, for surfactant // surfactant production // glo; Articulated lorry transport, Euro 4, Total weight >32 t; EU+EFTA+UK
- kg_km_2: 424; = kg_2*km_2
  Transport amount in km*km, for surfactant // surfactant production // glo; Articulated lorry transport, Euro 4, Total weight >32 t; EU+EFTA+UK
- kg_3: 1.06
  Mass in kg, for urea, per kg n, production mix, at plant // urea, per kg n // glo; Articulated lorry transport, Euro 4, Total weight >32 t; EU+EFTA+UK
- km_3: 480.189
  Distance in km, for urea, per kg n, production mix, at plant // urea, per kg n // glo; Articulated lorry transport, Euro 4, Total weight >32 t; EU+EFTA+UK
- kg_km_3: 509; = kg_3*km_3
  Transport amount in km*km, for urea, per kg n, production mix, at plant // urea, per kg n // glo; Articulated lorry transport, Euro 4, Total weight >32 t; EU+EFTA+UK
- kg_4: 0.901
  Mass in kg, for aluminium sulphate powder // aluminium sulphate powder production // eu+efta+uk; Transoceanic ship, containers; GLO
- km_4: 17980
  Distance in km, for aluminium sulphate powder // aluminium sulphate powder production // eu+efta+uk; Transoceanic ship, containers; GLO
- kg_km_4: 16200; = kg_4*km_4
  Transport amount in km*km, for aluminium sulphate powder // aluminium sulphate powder production // eu+efta+uk; Transoceanic ship, containers; GLO
- kg_5: 0.53
  Mass in kg, for ethanol // ethanol production // glo; Transoceanic ship, containers; GLO
- km_5: 18000
  Distance in km, for ethanol // ethanol production // glo; Transoceanic ship, containers; GLO
- kg_km_5: 9540; = kg_5*km_5
  Transport amount in km*km, for ethanol // ethanol production // glo; Transoceanic ship, containers; GLO
- kg_6: 0.424
  Mass in kg, for surfactant // surfactant production // glo; Transoceanic ship, containers; GLO
- km_6: 17995.3
  Distance in km, for surfactant // surfactant production // glo; Transoceanic ship, containers; GLO
- kg_km_6: 7630; = kg_6*km_6
  Transport amount in km*km, for surfactant // surfactant production // glo; Transoceanic ship, containers; GLO
- kg_7: 1.06
  Mass in kg, for urea, per kg n, production mix, at plant // urea, per kg n // glo; Transoceanic ship, containers; GLO
- km_7: 8641.51
  Distance in km, for urea, per kg n, production mix, at plant // urea, per kg n // glo; Transoceanic ship, containers; GLO
- kg_km_7: 9160; = kg_7*km_7
  Transport amount in km*km, for urea, per kg n, production mix, at plant // urea, per kg n // glo; Transoceanic ship, containers; GLO

## Reference product
- printing, burnout // printing, burnout // glo: 1

## Inputs
- Electricity from Electricity grid mix 1kV-60kV - AU: 0.00618055
- Electricity from Electricity grid mix 1kV-60kV - EU+EFTA+UK: 0.0910503
- Electricity from Electricity grid mix 1kV-60kV - NZ: 0.0011776
- Electricity from Electricity grid mix 1kV-60kV - RAF: 0.0198966
- Electricity from Electricity grid mix 1kV-60kV - RNA: 0.133247
- Electricity from Electricity grid mix 1kV-60kV - RSA: 0.0452131
- Electricity from Electricity grid mix 1kV-60kV - RU: 0.026644
- Thermal energy (MJ) from Thermal energy from hard coal - ROW: 2.38697
- Thermal energy (MJ) from Thermal energy from heavy fuel oil (HFO) - ROW: 0.0530438
- Thermal energy (MJ) from Thermal energy from light fuel oil (LFO) - ROW: 0.742613
- Thermal energy (MJ) from Thermal energy from natural gas - ROW: 2.12175
- Transport of aluminium sulphate powder // aluminium sulphate powder production // eu+efta+uk by Articulated lorry transport, Euro 4, Total weight >32 t - EU+EFTA+UK: 901; = kg_km_0
- Transport of ethanol // ethanol production // glo by Articulated lorry transport, Euro 4, Total weight >32 t - EU+EFTA+UK: 530; = kg_km_1
- Transport of surfactant // surfactant production // glo by Articulated lorry transport, Euro 4, Total weight >32 t - EU+EFTA+UK: 424; = kg_km_2
- Transport of urea, per kg n, production mix, at plant // urea, per kg n // glo by Articulated lorry transport, Euro 4, Total weight >32 t - EU+EFTA+UK: 509; = kg_km_3
- Transport of aluminium sulphate powder // aluminium sulphate powder production // eu+efta+uk by Transoceanic ship, containers - GLO: 16200; = kg_km_4
- Transport of ethanol // ethanol production // glo by Transoceanic ship, containers - GLO: 9540; = kg_km_5
- Transport of surfactant // surfactant production // glo by Transoceanic ship, containers - GLO: 7630; = kg_km_6
- Transport of urea, per kg n, production mix, at plant // urea, per kg n // glo by Transoceanic ship, containers - GLO: 9160; = kg_km_7
- Electricity from Electricity grid mix 1kV-60kV - CN: 0.136529
- Electricity from Electricity grid mix 1kV-60kV - RAS w/o CN: 0.149586
- printing, burnout // printing, burnout // glo, blackbox: 1
- printing, burnout // printing, burnout // glo, elementary: 1

## Impact indicators
- Eutrophication marine: 0.0281675
- Ecotoxicity, freshwater: 401.028
- Land use: 176.882
- Water use: 10.5696
- Resource use, minerals and metals: 5.08778e-5
- Resource use, fossils: 135.308
- Climate change: 7.508
- Ozone depletion: 7.71948e-8
- Human toxicity, cancer: 7.56178e-9
- Human toxicity, non-cancer: 1.03402e-7
- EF-particulate Matter: 1.06344e-6
- Ionising radiation, human health: 0.255515
- Photochemical ozone formation - human health: 0.0358567
- Acidification: 0.0638023
- Eutrophication, terrestrial: 0.188439
- Eutrophication, freshwater: 0.000643776

## Deviations from the LCI method principle
The background data uses:
- the \xe2\x80\x9cRecycled content cut-off\xe2\x80\x9d approach to allocate end-of-life by-products and secondary materials. This allocation is explained in the description of the recycled content system model (http://www.ecoinvent.org/database/system-models-in-ecoinvent-3/cut-off-system-model/allocation-cut-off-by-classification.html).
OR
- EF compliant data

## Deviations from the LCI method approaches
Background data:
- the \xe2\x80\x9cRecycled content cut-off\xe2\x80\x9d approach to allocate end-of-life by-products and secondary materials. This allocation is explained in the description of the recycled content system model (http://www.ecoinvent.org/database/system-models-in-ecoinvent-3/cut-off-system-model/allocation-cut-off-by-classification.html). The ecoinvent database mostly relies on “Allocation – market values” apart for few exceptions particularly in the energy sector. ecoinvent energy data is replaced with EF3.0 core data as per the EF guidelines version 2.0.
OR
- EF compliant data

## Modelling constants
All modelling constants follow the requirements listed in the Tender Specifications 070201/2020/SER/ENV.B1. Completeness: There are no intentional cut-offs in the inventory no matter how small their contribution to all the EF impact categories is. Eventual cut-offs are in compliance with the Guide for EF compliant data sets (JRC 2020), i.e. only if below the 3% cut-off rule. Water use: water use is modelled at country level using separate flows for water withdrawal, water release and water evaporation. Handling multi-functional processes: the following PEF multi- functionality decision hierarchy is applied for resolving all multi- functionality problems: (1) subdivision or system expansion; (2) allocation based on a relevant underlying physical relationship (substitution may apply here); (3) allocation based on some other relationship. Direct land use change: GHG emissions from direct LUC allocated to good/service for 20 years after the LUC occurs, with IPCC default values. Carbon storage and delayed emissions: credits associated with temporary (carbon) storage or delayed emissions up to 300 years are not be considered. Emissions off-setting: are not included. Capital goods (including infrastructures) and their End of life: they are included. System boundaries: system boundaries include all processes linked to the product supply chain (e.g. maintenance). Time period: emissions and removals are modelled as if released or removed at the beginning of the assessment method. Fossil and biogenic carbon emissions and removals: removals and emissions are modelled as follows: All GHG emissions from fossil fuels (including peat and limestone) are modelled consistently with the most updated ILCD list of elementary flows. The non-fossil (biogenic) carbon flows are modelled consistently with the most updated ILCD list of elementary flows.

## Cut-off and completeness
There are no intentional cut-offs in the inventory no matter how small their contribution to all the EF impact categories is. Eventual cut-offs are in compliance with the Guide for EF compliant data sets (JRC 2020), i.e. only if below the 3% cut-off rule. The dataset dry mass and water balance has been checked to ensure the inventory is complete. Capital goods (e.g. infrastructure) and their end-of-life are included.

## Data selection and combination
These datasets include, in both their foreground and background data, links to EF3.0 compliant data.
The relevant background data on energy, transport, and End of Life are from the LCDN data node (http://lcdn.thinkstep.com/Node/).
All other background data in the supply of this product for which no EF3.0 process was available are from ecoinvent v3.7 database (www.ecoinvent.org) or other data sources.

## Data treatment and extrapolations
Several data sources have been used to model the inventory.

## Review details
Internal reviews have been asked to review the plausibility of the unit process, LCIA scores, and DQRs. Internal reviewers have also been asked to review the data for EF compliancy. The consortium is therefore responsible for aspects such as compliancy with the ILCD format, including validation in Look@LCI, and nomenclature.
Internal reviwers have been asked to judge based on the process name, that the unit process models in a complete and representative way the process in the requested location. The review encompassed the plausability of:
- exchanges with nature (elementary flows) as well as exchanges such as product and waste flows.
- meta information (general comment, technology comment, system boundaries, allocation, cut-off rules, etc.). Reviewers were asked to judge if the provided information is enough to understand the content of the process.
- LCIA scores
- DQRs including precision, technology, time and geography. As well as the overall DQR.
External reviewers have been asked to provide their expertise in the field of interest. External reviewers have been asked to review the unit process, including eventual methodological choices, the LCIA scores (provided with contribution scores as well), and DQRs. External reviewers have been provided all the information in a tool developed by the consortium for the purpose of this project.
External reviewers have been asked to judge based on the process name, that the unit process models in a complete and representative way the process in the requested location. The review encompassed:
- Plausability and completeness of exchanges with nature (elementary flows) as well as exchanges such as product and waste flows.
- Review of meta information (general comment, technology comment, system boundaries, allocation, cut-off rules, etc.). Reviewers were asked to judge if the provided information is enough to understand the content of the process.
- Review of properties (biogenic carbon and water content).
- Review of allocation keys.
- Plausability of LCIA scores calculated by the consortium.
- Plausability of DQRs including precision, technology, time and geography. As well as the overall DQR.

## Data sources
- Background Data for Representative products and organisations. EF 3.0 compliant (data stock)
- Textile Fabric Printing, https://www3.epa.gov/ttnchie1/ap42/ch04/final/c4s11.pdf, Access Date: 16.04.2021
- Rüzgar, A. (2019). The Comparison of Environmental Impacts Between Rotary Screen And Digital Reactive Printing By Life Cycle Assessment (Master's thesis, Bursa Uludağ University).
- Burn Out Printing – Everything You Need to Know about the Unique Technique, http://blog.bellacanvas.com/burn-out-printing/, Access Date: 16.04.2021
- Burn-out printing, https://www.slideshare.net/88azmir/a-burnout-printing, Access Date: 16.04.2021

## Intended applications
Implementation of regular Product Environmental Footprint (PEF) studies and Organisation Environmental Footprint (OEF) studies exclusively under the specified Product groups and sectors as defined in the Product Environmental Footprint Category Rules (PEFCR) and Organisation Environmental Footprint Sectorial Rules (OEFSR) listed in http://ec.europa.eu/environment/eussd/smgp/PEFCR_OEFSR.htm
