# treatment, anti uv; anti UV treatment; production mix, at plant; service

Dataset: ILCD process, Partly terminated system
Geography: GLO
Reference year: 2021
Valid until: 2024
Classification: Systems / Textiles, furnitures and other interiors
LCI method principle: Attributional
LCI method approaches: Allocation - market value
Completeness: All relevant flows quantified
Project: Provision of process-based 3.0 Environmental Footprint-compliant life cycle inventory datasets - Apparel 1 - contract number 070201/2020/840291/SER/ENV.B.1
Generated by: Life Cycle Indonesia
Owner: PRé Sustainability B.V.
Compliance: ILCD Data Network - Entry-level; Suggestions for updating the PEF method 2019; ISO 14040 Environmental Management – Life Cycle Assessment – Principles and Framework, 2006; ISO 14044:2006. Environmental Management – Life Cycle Assessment – Requirements and guidelines.; Environmental Footprint 3.1
Review: Dependent internal review by Avraam Symeonidis, Emilia Moreno Ruiz; Independent review panel by Fábio Valebona
Data quality: Overall quality: Good; Time representativeness: Very good; Geographical representativeness: Good; Technological representativeness: Good; Precision: Good; Methodological appropriateness and consistency: Not applicable
Amounts: no units in this file; such an amount is in the reference unit of its flow, which a separate flow dataset defines
copyright: true
licenseType: Free of charge for some user types or use types
accessRestrictions: Free of charge for all final users implementing a regular Product Environmental Footprint (PEF) studies and Organisation Environmental Footprint (OEF) studies exclusively under the specified Product groups and sectors as defined in the Product Environmental Footprint Category Rules (PEFCR) and Organisation Environmental Footprint Sectorial Rules (OEFSR) listed in http://ec.europa.eu/environment/eussd/smgp/PEFCR_OEFSR.htm and in accordance with the terms and conditions of the EULA (available at https://ecoinvent.lca-data.com/) exclusively until 31st December 2024. Any use of this dataset or any derivative data not within the specific context of one of the PEF/OEF projects or after the end of 2024 is not permitted.

## General comment
Notice: this data set supersedes the EF3.0-compliant version (see link under "preceding data set version" below calculated with the EF3.0). The life cycle inventory is not changed from the original EF3.0 data set. The LCIA results are calculated based on the EF3.1 methods which provide updated characterisation factors in the following impact categories: Climate Change, Ecotoxicity freshwater, Photochemical Ozone Formation, Acidification, Human Toxicity non-cancer, and Human Toxicity cancer. The review report and the data quality ratings refer to the original results. The data set has been updated by the European Commission on the basis of the original EF3.0 data set delivered by the data provider.The anti-UV properties of the fabric can be obtained through the process of functionalizing the fabric so that it can absorb UV radiation effectively. material The active material used is a material that has UV absorption ability optimum. Zinc oxide compound (ZnO) is one of the one of the most inorganic absorbers used to protect against UV radiation. ZnO compounds have advantages cause
has a characteristic UV absorption spectrum width, compared to other compounds that have absorption peaks only at wavelength certain. Appropriate refinement method on the surface of the fabric can be done with apply in several ways including: spinning, coating and padding

Through the surface modifcation by integrating nanotechnology, the water absorption capacity as well as some other functional properties of textiles could be incorporated or enhanced. Inorganic nano-sized titanium dioxide (TiO2) has recently attracted signifcant attention for surface functionalization of different type of textile materials because of its non-toxicity, long-term lifetime, superior chemical and thermal stability, and excellent photoactivity under UV irradiation

Doni Sugiyana (2019) Penyempurnaan fungsional anti ultraviolet pada kain poliester menggunakan seng oksida dengan metode impregnasi, http://ejournal.kemenperin.go.id/jiat/article/download/5714/4506, Bandung, Indonesia

Fakin, Darinka (2015) The Role of TiO2 Nanoparticles on the UV Protection Ability
and Hydrophilicity of Polyamide Fabrics http://przyrbwn.icm.edu.pl/APP/PDF/127/a127z4p020.pdf, 2000 Maribor, Slovenia

## Technology and included processes
The process starts by making a bath or water with liquor ratio of 1:20 in a sealed stainless steel treatment pot. the inital bath composed of o.5% of amphoteric levelling agent (kelorian A2N-Benzema) and 1ml/l of pH-Regulator (Meropan EF-Bezema). After 20 minutes of bath circulation at 40 ◦C, 3, 6 or 9% owf (of weight-of-fabric) of individual TiO2 paste was added, raising the bath's temperature up to 98 ◦C with a heating rate of 2 ◦C/min, thereon, maintained for 60 minutes and then reduced to 60 ◦C. Treated samples were rinsed in a warm and then cold water, and dried at room temperature.

This process includes industrial washing machine with sealed pot to prevent heat loss, therefore the power needed to reach certain higher temperature will be counted by using mean heat transfer rate equation and assumed uses no eletricity if the desired temperature is lower than current temperature. Amphoteric levelling agent is identified as chemical, organic // market for chemical, organic // GLO. pH-regulator and acetic acid for pH adjustment will be excluded from this measurement. Besides electricity consumption, infrastructure, water consumptions and chemicals consumption are included. The water used in this process is de-ionised water. The de-ionised water produced on site is included as well in this dataset. There is no direct emission to air since the emission comes from electricity usage, while the emission comes from wastewater and waste lube oil. The amount of wastewater is total of water input and chemical used that is carried along with the wastewater. The consumption of lubricating oil using a thermobonding oven as a proxy.

Fakin, Darinka (2015) The Role of TiO2 Nanoparticles on the UV Protection Ability
and Hydrophilicity of Polyamide Fabrics http://przyrbwn.icm.edu.pl/APP/PDF/127/a127z4p020.pdf, 2000 Maribor, Slovenia

______________________________________________________________________________

"The process starts by soaking fabric for 10 min in dispersion of ZnO particles (5% W/W) and stirred. the fabric then squeezed on a padding mangle to remove the excess dispersion and dried in an oven at 130 degree celcius for 15 min.

This process includes padding machine and drying machine proxy to pad - dry process. the water usage of this process are proxy to Treatment, anti UV (TiO2). the water used is 20 kg for initial soak.

Kathirvelu Subramanian (2009), UV protection finishing of textiles using ZnO nanoparticles https://www.researchgate.net/publication/279585204_UV_protection_finishing_of_textiles_using_ZnO_nanoparticles, India"

_____________________________________________________________________________

The amount of materials, energies, and etc in this case will be 50% from the Treatment, Anti UV (TiO2) and 50% from Treatment, anti UV (ZnO)

## Parameters
- kg_0: 0.03
  Mass in kg, for titanium dioxide; Freight train, diesel traction; EU+EFTA+UK
- km_0: 294.676
  Distance in km, for titanium dioxide; Freight train, diesel traction; EU+EFTA+UK
- kg_km_0: 8.84028; = kg_0*km_0
  Transport amount in km*km, for titanium dioxide; Freight train, diesel traction; EU+EFTA+UK
- kg_1: 0.03
  Mass in kg, for titanium dioxide; Freight train, electricity traction; EU+EFTA+UK
- km_1: 88.9868
  Distance in km, for titanium dioxide; Freight train, electricity traction; EU+EFTA+UK
- kg_km_1: 2.6696; = kg_1*km_1
  Transport amount in km*km, for titanium dioxide; Freight train, electricity traction; EU+EFTA+UK
- kg_2: 0.03
  Mass in kg, for titanium dioxide; Freight train, average; EU+EFTA+UK
- km_2: 2.43709
  Distance in km, for titanium dioxide; Freight train, average; EU+EFTA+UK
- kg_km_2: 0.0731127; = kg_2*km_2
  Transport amount in km*km, for titanium dioxide; Freight train, average; EU+EFTA+UK
- kg_3: 0.03
  Mass in kg, for titanium dioxide; Articulated lorry transport, Total weight >32 t, mix Euro 0-5; ROW w/o EU+EFTA
- km_3: 173.9
  Distance in km, for titanium dioxide; Articulated lorry transport, Total weight >32 t, mix Euro 0-5; ROW w/o EU+EFTA
- kg_km_3: 5.217; = kg_3*km_3
  Transport amount in km*km, for titanium dioxide; Articulated lorry transport, Total weight >32 t, mix Euro 0-5; ROW w/o EU+EFTA
- kg_4: 0.03
  Mass in kg, for titanium dioxide; Transoceanic ship, bulk; GLO
- km_4: 1699
  Distance in km, for titanium dioxide; Transoceanic ship, bulk; GLO
- kg_km_4: 50.97; = kg_4*km_4
  Transport amount in km*km, for titanium dioxide; Transoceanic ship, bulk; GLO
- kg_5: 0.03
  Mass in kg, for titanium dioxide; Barge; ROW w/o EU+EFTA
- km_5: 327.2
  Distance in km, for titanium dioxide; Barge; ROW w/o EU+EFTA
- kg_km_5: 9.816; = kg_5*km_5
  Transport amount in km*km, for titanium dioxide; Barge; ROW w/o EU+EFTA
- kg_6: 0.025
  Mass in kg, for zinc oxide // zinc oxide production // glo; Articulated lorry transport, Euro 4, Total weight >32 t; EU+EFTA+UK
- km_6: 100
  Distance in km, for zinc oxide // zinc oxide production // glo; Articulated lorry transport, Euro 4, Total weight >32 t; EU+EFTA+UK
- kg_km_6: 2.5; = kg_6*km_6
  Transport amount in km*km, for zinc oxide // zinc oxide production // glo; Articulated lorry transport, Euro 4, Total weight >32 t; EU+EFTA+UK
- kg_7: 7.49647e-7
  Mass in kg, for lubricating oil // lubricants at refinery // rsa; Articulated lorry transport, Euro 4, Total weight >32 t; EU+EFTA+UK
- km_7: 1000
  Distance in km, for lubricating oil // lubricants at refinery // rsa; Articulated lorry transport, Euro 4, Total weight >32 t; EU+EFTA+UK
- kg_km_7: 0.000749647; = kg_7*km_7
  Transport amount in km*km, for lubricating oil // lubricants at refinery // rsa; Articulated lorry transport, Euro 4, Total weight >32 t; EU+EFTA+UK
- kg_8: 3.07547e-7
  Mass in kg, for lubricating oil // lubricants at refinery // raf; Articulated lorry transport, Euro 4, Total weight >32 t; EU+EFTA+UK
- km_8: 1000
  Distance in km, for lubricating oil // lubricants at refinery // raf; Articulated lorry transport, Euro 4, Total weight >32 t; EU+EFTA+UK
- kg_km_8: 0.000307547; = kg_8*km_8
  Transport amount in km*km, for lubricating oil // lubricants at refinery // raf; Articulated lorry transport, Euro 4, Total weight >32 t; EU+EFTA+UK
- kg_9: 8.05939e-6
  Mass in kg, for lubricating oil // lubricants at refinery // ras w/o cn; Articulated lorry transport, Euro 4, Total weight >32 t; EU+EFTA+UK
- km_9: 1000
  Distance in km, for lubricating oil // lubricants at refinery // ras w/o cn; Articulated lorry transport, Euro 4, Total weight >32 t; EU+EFTA+UK
- kg_km_9: 0.00805939; = kg_9*km_9
  Transport amount in km*km, for lubricating oil // lubricants at refinery // ras w/o cn; Articulated lorry transport, Euro 4, Total weight >32 t; EU+EFTA+UK
- kg_10: 6.66444e-6
  Mass in kg, for lubricating oil // lubricants at refinery // ru; Articulated lorry transport, Euro 4, Total weight >32 t; EU+EFTA+UK
- km_10: 1000
  Distance in km, for lubricating oil // lubricants at refinery // ru; Articulated lorry transport, Euro 4, Total weight >32 t; EU+EFTA+UK
- kg_km_10: 0.00666444; = kg_10*km_10
  Transport amount in km*km, for lubricating oil // lubricants at refinery // ru; Articulated lorry transport, Euro 4, Total weight >32 t; EU+EFTA+UK
- kg_11: 4.10521e-6
  Mass in kg, for lubricating oil // lubricants at refinery // eu+efta+uk; Articulated lorry transport, Euro 4, Total weight >32 t; EU+EFTA+UK
- km_11: 1000
  Distance in km, for lubricating oil // lubricants at refinery // eu+efta+uk; Articulated lorry transport, Euro 4, Total weight >32 t; EU+EFTA+UK
- kg_km_11: 0.00410521; = kg_11*km_11
  Transport amount in km*km, for lubricating oil // lubricants at refinery // eu+efta+uk; Articulated lorry transport, Euro 4, Total weight >32 t; EU+EFTA+UK
- kg_12: 6.29099e-6
  Mass in kg, for lubricating oil // lubricants at refinery // rna; Articulated lorry transport, Euro 4, Total weight >32 t; EU+EFTA+UK
- km_12: 1000
  Distance in km, for lubricating oil // lubricants at refinery // rna; Articulated lorry transport, Euro 4, Total weight >32 t; EU+EFTA+UK
- kg_km_12: 0.00629099; = kg_12*km_12
  Transport amount in km*km, for lubricating oil // lubricants at refinery // rna; Articulated lorry transport, Euro 4, Total weight >32 t; EU+EFTA+UK
- kg_13: 1.27962e-6
  Mass in kg, for lubricating oil // lubricants at refinery // cn; Articulated lorry transport, Euro 4, Total weight >32 t; EU+EFTA+UK
- km_13: 1000
  Distance in km, for lubricating oil // lubricants at refinery // cn; Articulated lorry transport, Euro 4, Total weight >32 t; EU+EFTA+UK
- kg_km_13: 0.00127962; = kg_13*km_13
  Transport amount in km*km, for lubricating oil // lubricants at refinery // cn; Articulated lorry transport, Euro 4, Total weight >32 t; EU+EFTA+UK
- kg_14: 0.025
  Mass in kg, for zinc oxide // zinc oxide production // glo; Transoceanic ship, containers; GLO
- km_14: 1800
  Distance in km, for zinc oxide // zinc oxide production // glo; Transoceanic ship, containers; GLO
- kg_km_14: 45; = kg_14*km_14
  Transport amount in km*km, for zinc oxide // zinc oxide production // glo; Transoceanic ship, containers; GLO
- kg_15: 7.49647e-7
  Mass in kg, for lubricating oil // lubricants at refinery // rsa; Transoceanic ship, containers; GLO
- km_15: 18000
  Distance in km, for lubricating oil // lubricants at refinery // rsa; Transoceanic ship, containers; GLO
- kg_km_15: 0.0134936; = kg_15*km_15
  Transport amount in km*km, for lubricating oil // lubricants at refinery // rsa; Transoceanic ship, containers; GLO
- kg_16: 3.07547e-7
  Mass in kg, for lubricating oil // lubricants at refinery // raf; Transoceanic ship, containers; GLO
- km_16: 18000
  Distance in km, for lubricating oil // lubricants at refinery // raf; Transoceanic ship, containers; GLO
- kg_km_16: 0.00553585; = kg_16*km_16
  Transport amount in km*km, for lubricating oil // lubricants at refinery // raf; Transoceanic ship, containers; GLO
- kg_17: 8.05939e-6
  Mass in kg, for lubricating oil // lubricants at refinery // ras w/o cn; Transoceanic ship, containers; GLO
- km_17: 18000
  Distance in km, for lubricating oil // lubricants at refinery // ras w/o cn; Transoceanic ship, containers; GLO
- kg_km_17: 0.145069; = kg_17*km_17
  Transport amount in km*km, for lubricating oil // lubricants at refinery // ras w/o cn; Transoceanic ship, containers; GLO
- kg_18: 6.66444e-6
  Mass in kg, for lubricating oil // lubricants at refinery // ru; Transoceanic ship, containers; GLO
- km_18: 18000
  Distance in km, for lubricating oil // lubricants at refinery // ru; Transoceanic ship, containers; GLO
- kg_km_18: 0.11996; = kg_18*km_18
  Transport amount in km*km, for lubricating oil // lubricants at refinery // ru; Transoceanic ship, containers; GLO
- kg_19: 4.10521e-6
  Mass in kg, for lubricating oil // lubricants at refinery // eu+efta+uk; Transoceanic ship, containers; GLO
- km_19: 18000
  Distance in km, for lubricating oil // lubricants at refinery // eu+efta+uk; Transoceanic ship, containers; GLO
- kg_km_19: 0.0738937; = kg_19*km_19
  Transport amount in km*km, for lubricating oil // lubricants at refinery // eu+efta+uk; Transoceanic ship, containers; GLO
- kg_20: 6.29099e-6
  Mass in kg, for lubricating oil // lubricants at refinery // rna; Transoceanic ship, containers; GLO
- km_20: 18000
  Distance in km, for lubricating oil // lubricants at refinery // rna; Transoceanic ship, containers; GLO
- kg_km_20: 0.113238; = kg_20*km_20
  Transport amount in km*km, for lubricating oil // lubricants at refinery // rna; Transoceanic ship, containers; GLO
- kg_21: 1.27962e-6
  Mass in kg, for lubricating oil // lubricants at refinery // cn; Transoceanic ship, containers; GLO
- km_21: 18000
  Distance in km, for lubricating oil // lubricants at refinery // cn; Transoceanic ship, containers; GLO
- kg_km_21: 0.0230331; = kg_21*km_21
  Transport amount in km*km, for lubricating oil // lubricants at refinery // cn; Transoceanic ship, containers; GLO

## Reference product
- treatment, anti uv // treatment, anti uv // glo: 1

## Inputs
- Electricity from Electricity grid mix 1kV-60kV - AU: 6.64283e-5
- Electricity from Electricity grid mix 1kV-60kV - EU+EFTA+UK: 0.000978801
- Electricity from Electricity grid mix 1kV-60kV - NZ: 1.27095e-5
- Electricity from Electricity grid mix 1kV-60kV - RAF: 0.000213858
- Electricity from Electricity grid mix 1kV-60kV - RNA: 0.00143228
- Electricity from Electricity grid mix 1kV-60kV - RSA: 0.000486011
- Electricity from Electricity grid mix 1kV-60kV - RU: 0.000286387
- Transport of titanium dioxide by Freight train, diesel traction - EU+EFTA+UK: 8.84028; = kg_km_0
- Transport of titanium dioxide by Freight train, electricity traction - EU+EFTA+UK: 2.6696; = kg_km_1
- Transport of titanium dioxide by Freight train, average - EU+EFTA+UK: 0.0731127; = kg_km_2
- Transport of titanium dioxide by Articulated lorry transport, Total weight >32 t, mix Euro 0-5 - ROW w/o EU+EFTA: 5.217; = kg_km_3
- Transport of titanium dioxide by Transoceanic ship, bulk - GLO: 50.97; = kg_km_4
- Transport of titanium dioxide by Barge - ROW w/o EU+EFTA: 9.816; = kg_km_5
- Transport of zinc oxide // zinc oxide production // glo by Articulated lorry transport, Euro 4, Total weight >32 t - EU+EFTA+UK: 2.5; = kg_km_6
- Transport of lubricating oil // lubricants at refinery // rsa by Articulated lorry transport, Euro 4, Total weight >32 t - EU+EFTA+UK: 0.000749647; = kg_km_7
- Transport of lubricating oil // lubricants at refinery // raf by Articulated lorry transport, Euro 4, Total weight >32 t - EU+EFTA+UK: 0.000307547; = kg_km_8
- Transport of lubricating oil // lubricants at refinery // ras w/o cn by Articulated lorry transport, Euro 4, Total weight >32 t - EU+EFTA+UK: 0.00805939; = kg_km_9
- Transport of lubricating oil // lubricants at refinery // ru by Articulated lorry transport, Euro 4, Total weight >32 t - EU+EFTA+UK: 0.00666444; = kg_km_10
- Transport of lubricating oil // lubricants at refinery // eu+efta+uk by Articulated lorry transport, Euro 4, Total weight >32 t - EU+EFTA+UK: 0.00410521; = kg_km_11
- Transport of lubricating oil // lubricants at refinery // rna by Articulated lorry transport, Euro 4, Total weight >32 t - EU+EFTA+UK: 0.00629099; = kg_km_12
- Transport of lubricating oil // lubricants at refinery // cn by Articulated lorry transport, Euro 4, Total weight >32 t - EU+EFTA+UK: 0.00127962; = kg_km_13
- Transport of zinc oxide // zinc oxide production // glo by Transoceanic ship, containers - GLO: 45; = kg_km_14
- Transport of lubricating oil // lubricants at refinery // rsa by Transoceanic ship, containers - GLO: 0.0134936; = kg_km_15
- Transport of lubricating oil // lubricants at refinery // raf by Transoceanic ship, containers - GLO: 0.00553585; = kg_km_16
- Transport of lubricating oil // lubricants at refinery // ras w/o cn by Transoceanic ship, containers - GLO: 0.145069; = kg_km_17
- Transport of lubricating oil // lubricants at refinery // ru by Transoceanic ship, containers - GLO: 0.11996; = kg_km_18
- Transport of lubricating oil // lubricants at refinery // eu+efta+uk by Transoceanic ship, containers - GLO: 0.0738937; = kg_km_19
- Transport of lubricating oil // lubricants at refinery // rna by Transoceanic ship, containers - GLO: 0.113238; = kg_km_20
- Transport of lubricating oil // lubricants at refinery // cn by Transoceanic ship, containers - GLO: 0.0230331; = kg_km_21
- Electricity from Electricity grid mix 1kV-60kV - CN: 0.00146759
- Electricity from Electricity grid mix 1kV-60kV - RAS w/o CN: 0.00160794
- treatment, anti uv // treatment, anti uv // glo, blackbox: 1
- treatment, anti uv // treatment, anti uv // glo, elementary: 1

## Impact indicators
- Eutrophication marine: 0.000495946
- Ecotoxicity, freshwater: 5.46141
- Land use: -0.0847048
- Water use: 0.746913
- Resource use, minerals and metals: 2.92761e-6
- Resource use, fossils: 4.33956
- Climate change: 0.405372
- Ozone depletion: 1.74103e-8
- Human toxicity, cancer: 5.78402e-10
- Human toxicity, non-cancer: 5.61104e-9
- EF-particulate Matter: 5.95655e-8
- Ionising radiation, human health: 0.00943679
- Photochemical ozone formation - human health: 0.00145375
- Acidification: 0.00202073
- Eutrophication, terrestrial: 0.00359331
- Eutrophication, freshwater: 4.45326e-5

## Deviations from the LCI method principle
The background data uses:
- the \xe2\x80\x9cRecycled content cut-off\xe2\x80\x9d approach to allocate end-of-life by-products and secondary materials. This allocation is explained in the description of the recycled content system model (http://www.ecoinvent.org/database/system-models-in-ecoinvent-3/cut-off-system-model/allocation-cut-off-by-classification.html).
OR
- EF compliant data

## Deviations from the LCI method approaches
Background data:
- the \xe2\x80\x9cRecycled content cut-off\xe2\x80\x9d approach to allocate end-of-life by-products and secondary materials. This allocation is explained in the description of the recycled content system model (http://www.ecoinvent.org/database/system-models-in-ecoinvent-3/cut-off-system-model/allocation-cut-off-by-classification.html). The ecoinvent database mostly relies on “Allocation – market values” apart for few exceptions particularly in the energy sector. ecoinvent energy data is replaced with EF3.0 core data as per the EF guidelines version 2.0.
OR
- EF compliant data

## Modelling constants
All modelling constants follow the requirements listed in the Tender Specifications 070201/2020/SER/ENV.B1. Completeness: There are no intentional cut-offs in the inventory no matter how small their contribution to all the EF impact categories is. Eventual cut-offs are in compliance with the Guide for EF compliant data sets (JRC 2020), i.e. only if below the 3% cut-off rule. Water use: water use is modelled at country level using separate flows for water withdrawal, water release and water evaporation. Handling multi-functional processes: the following PEF multi- functionality decision hierarchy is applied for resolving all multi- functionality problems: (1) subdivision or system expansion; (2) allocation based on a relevant underlying physical relationship (substitution may apply here); (3) allocation based on some other relationship. Direct land use change: GHG emissions from direct LUC allocated to good/service for 20 years after the LUC occurs, with IPCC default values. Carbon storage and delayed emissions: credits associated with temporary (carbon) storage or delayed emissions up to 300 years are not be considered. Emissions off-setting: are not included. Capital goods (including infrastructures) and their End of life: they are included. System boundaries: system boundaries include all processes linked to the product supply chain (e.g. maintenance). Time period: emissions and removals are modelled as if released or removed at the beginning of the assessment method. Fossil and biogenic carbon emissions and removals: removals and emissions are modelled as follows: All GHG emissions from fossil fuels (including peat and limestone) are modelled consistently with the most updated ILCD list of elementary flows. The non-fossil (biogenic) carbon flows are modelled consistently with the most updated ILCD list of elementary flows.

## Cut-off and completeness
There are no intentional cut-offs in the inventory no matter how small their contribution to all the EF impact categories is. Eventual cut-offs are in compliance with the Guide for EF compliant data sets (JRC 2020), i.e. only if below the 3% cut-off rule. The dataset dry mass and water balance has been checked to ensure the inventory is complete. Capital goods (e.g. infrastructure) and their end-of-life are included.

## Data selection and combination
These datasets include, in both their foreground and background data, links to EF3.0 compliant data.
The relevant background data on energy, transport, and End of Life are from the LCDN data node (http://lcdn.thinkstep.com/Node/).
All other background data in the supply of this product for which no EF3.0 process was available are from ecoinvent v3.7 database (www.ecoinvent.org) or other data sources.

## Data treatment and extrapolations
Several data sources have been used to model the inventory.

## Review details
Internal reviews have been asked to review the plausibility of the unit process, LCIA scores, and DQRs. Internal reviewers have also been asked to review the data for EF compliancy. The consortium is therefore responsible for aspects such as compliancy with the ILCD format, including validation in Look@LCI, and nomenclature.
Internal reviwers have been asked to judge based on the process name, that the unit process models in a complete and representative way the process in the requested location. The review encompassed the plausability of:
- exchanges with nature (elementary flows) as well as exchanges such as product and waste flows.
- meta information (general comment, technology comment, system boundaries, allocation, cut-off rules, etc.). Reviewers were asked to judge if the provided information is enough to understand the content of the process.
- LCIA scores
- DQRs including precision, technology, time and geography. As well as the overall DQR.
External reviewers have been asked to provide their expertise in the field of interest. External reviewers have been asked to review the unit process, including eventual methodological choices, the LCIA scores (provided with contribution scores as well), and DQRs. External reviewers have been provided all the information in a tool developed by the consortium for the purpose of this project.
External reviewers have been asked to judge based on the process name, that the unit process models in a complete and representative way the process in the requested location. The review encompassed:
- Plausability and completeness of exchanges with nature (elementary flows) as well as exchanges such as product and waste flows.
- Review of meta information (general comment, technology comment, system boundaries, allocation, cut-off rules, etc.). Reviewers were asked to judge if the provided information is enough to understand the content of the process.
- Review of properties (biogenic carbon and water content).
- Review of allocation keys.
- Plausability of LCIA scores calculated by the consortium.
- Plausability of DQRs including precision, technology, time and geography. As well as the overall DQR.

## Data sources
- Background Data for Representative products and organisations. EF 3.0 compliant (data stock)
- UN Data (2018) Statistics Data for Lubricants Productions, http://data.un.org/Data.aspx?q=Lubricants&d=EDATA&f=cmID%3aLU, United Nations Statistics Division, Global
- Kathirvelu Subramanian (2009), UV protection finishing of textiles using ZnO nanoparticles https://www.researchgate.net/publication/279585204_UV_protection_finishing_of_textiles_using_ZnO_nanoparticles, India
- Deguan (2018) Balloon Padder with Detwister and Squeezer for tubular fabric only, http://www.textilemachinery.com.cn/index.php?m=content&c=index&a=show&catid=59&id=82, Dezhou Deguan TextileMachinery Co.,Ltd., Shandong, China
- Finestart (2017) Drying Machine (Textile Dryer Machine,Relax dryer), http://www.finestart.com.cn/index.php?m=content&c=index&a=show&catid=56&id=63, Shandong Finestart Imp.& Exp. Co.,Ltd., Shandong, China
- Fakin, Darinka (2015) The Role of TiO2 Nanoparticles on the UV Protection Ability and Hydrophilicity of Polyamide Fabrics http://przyrbwn.icm.edu.pl/APP/PDF/127/a127z4p020.pdf, 2000 Maribor, Slovenia
- Tupesa (2021) SL Washer Extractors, https://www.tupesa.com/index.php?route=product/product&path=72_61&product_id=62, Tupesa Maquinaria Textil, Girona, Spain.

## Intended applications
Implementation of regular Product Environmental Footprint (PEF) studies and Organisation Environmental Footprint (OEF) studies exclusively under the specified Product groups and sectors as defined in the Product Environmental Footprint Category Rules (PEFCR) and Organisation Environmental Footprint Sectorial Rules (OEFSR) listed in http://ec.europa.eu/environment/eussd/smgp/PEFCR_OEFSR.htm
