# spinning, cotton, for woven, ring-spun (370 dtex-333 denier-16/1 ne-27 nm); spinning process; production mix; service of spinning 1kg of yarn (raw material excluded)

Dataset: ILCD process, Partly terminated system
Geography: GLO
Reference year: 2020
Valid until: 2024
Classification: Materials production / Other materials
LCI method principle: Attributional
LCI method approaches: Allocation - market value
Completeness: All relevant flows quantified
Project: Provision of process-based 3.0 Environmental Footprint-compliant life cycle inventory datasets - Apparel 2 - contract number 070201/2020/840292/SER/ENV.B.1
Generated by: ecoinvent
Owner: PRé Sustainability B.V.
Compliance: ILCD Data Network - Entry-level; Suggestions for updating the PEF method 2019; ISO 14040 Environmental Management – Life Cycle Assessment – Principles and Framework, 2006; ISO 14044:2006. Environmental Management – Life Cycle Assessment – Requirements and guidelines.; Environmental Footprint 3.1
Review: Dependent internal review by Lucia Valsasina, Emilia Moreno Ruiz; Independent review panel by Fábio Valebona
Data quality: Overall quality: Very good; Time representativeness: Very good; Geographical representativeness: Good; Technological representativeness: Very good; Precision: Good; Methodological appropriateness and consistency: Not applicable
Amounts: no units in this file; such an amount is in the reference unit of its flow, which a separate flow dataset defines
copyright: true
licenseType: Free of charge for some user types or use types
accessRestrictions: Free of charge for all final users implementing a regular Product Environmental Footprint (PEF) studies and Organisation Environmental Footprint (OEF) studies exclusively under the specified Product groups and sectors as defined in the Product Environmental Footprint Category Rules (PEFCR) and Organisation Environmental Footprint Sectorial Rules (OEFSR) listed in http://ec.europa.eu/environment/eussd/smgp/PEFCR_OEFSR.htm and in accordance with the terms and conditions of the EULA (available at https://ecoinvent.lca-data.com/) exclusively until 31st December 2024. Any use of this dataset or any derivative data not within the specific context of one of the PEF/OEF projects or after the end of 2024 is not permitted.

## General comment
Notice: this data set supersedes the EF3.0-compliant version (see link under "preceding data set version" below calculated with the EF3.0). The life cycle inventory is not changed from the original EF3.0 data set. The LCIA results are calculated based on the EF3.1 methods which provide updated characterisation factors in the following impact categories: Climate Change, Ecotoxicity freshwater, Photochemical Ozone Formation, Acidification, Human Toxicity non-cancer, and Human Toxicity cancer. The review report and the data quality ratings refer to the original results. The data set has been updated by the European Commission on the basis of the original EF3.0 data set delivered by the data provider.This dataset represents the process of spinning of 1 kg of Cotton yarn, for woven, ring-spun (370 DTEX-333 denier-16/1 Ne-27 Nm) from the raw fibre. Ring Spinning is the most widely used form of spinning machine due to significant advantages in comparison with the new spinning processes. The ring spinning machine is used in the textile industry to simultaneously twist staple fibres into yarn and then wind it onto bobbins for storage. The yarn loop rotating rapidly about a fixed axis generates a surface referred to as 'balloon. Ring frame settings are chosen to reduce yarn hairiness and the risk of glazing or melting the fibre. A user employing this service within their models should use it along with an 1.175 kg of material to produce an 1 kg of yarn. 0.175 kg of waste shall also be added. A user is responsible for defining the nature of the recycling and/or disposal of this waste. Additionally, a user is responsible for accounting transportation expenditures for all extra input and output materials that need to be modelled alongside this service. The inventory is based on industry data and the dataset represents the Turkish average of the Ring spun yarn manufacturing technology.

## Technology and included processes
Yarn production activity includes Opening, Cleaning, Blending, Carding, Drafting, combing, roving, spinning and winding. For this activity, the ring spinning process has been taken as a proxy. A median between combed/carded yarn is used for energy inputs, based on literature available for ring spinning. The ring spinning system is the oldest spinning system that remains dominant because of the high quality yarns it produces. This system allows various types and lengths of fibres (natural, man-made) to spin on a wide count range from 6 tex to 118 tex. The ring spinning system can be considered as conventional (traditional) system whereas open-end, wrap, air-jet and self-twist spinning systems are unconventional (nontraditional) systems. The process includes the machinery used for spinning. Additionally, electricity consumed in compressors, illumination and air conditioning is also included.
Due to lack of available data, there are no direct emission from production modelled.
Source: Koç & Kaplan (2007)

## Parameters
- kg_0: 0.01
  Mass in kg, for wax // wax production // eu+efta+uk; Articulated lorry transport, Euro 4, Total weight >32 t; EU+EFTA+UK
- km_0: 1000
  Distance in km, for wax // wax production // eu+efta+uk; Articulated lorry transport, Euro 4, Total weight >32 t; EU+EFTA+UK
- kg_km_0: 10; = kg_0*km_0
  Transport amount in km*km, for wax // wax production // eu+efta+uk; Articulated lorry transport, Euro 4, Total weight >32 t; EU+EFTA+UK
- kg_1: 0.01
  Mass in kg, for wax // wax production // eu+efta+uk; Transoceanic ship, containers; GLO
- km_1: 18000
  Distance in km, for wax // wax production // eu+efta+uk; Transoceanic ship, containers; GLO
- kg_km_1: 180; = kg_1*km_1
  Transport amount in km*km, for wax // wax production // eu+efta+uk; Transoceanic ship, containers; GLO
- kg_2: 2.33023e-6
  Mass in kg, for lubricating oil // lubricants at refinery // cn; Articulated lorry transport, Total weight >32 t, mix Euro 0-5; ROW w/o EU+EFTA
- km_2: 999.9
  Distance in km, for lubricating oil // lubricants at refinery // cn; Articulated lorry transport, Total weight >32 t, mix Euro 0-5; ROW w/o EU+EFTA
- kg_km_2: 0.00233; = kg_2*km_2
  Transport amount in km*km, for lubricating oil // lubricants at refinery // cn; Articulated lorry transport, Total weight >32 t, mix Euro 0-5; ROW w/o EU+EFTA
- kg_3: 2.33023e-6
  Mass in kg, for lubricating oil // lubricants at refinery // cn; Transoceanic ship, containers; GLO
- km_3: 17981
  Distance in km, for lubricating oil // lubricants at refinery // cn; Transoceanic ship, containers; GLO
- kg_km_3: 0.0419; = kg_3*km_3
  Transport amount in km*km, for lubricating oil // lubricants at refinery // cn; Transoceanic ship, containers; GLO
- kg_4: 5.60056e-7
  Mass in kg, for lubricating oil // lubricants at refinery // raf; Articulated lorry transport, Total weight >32 t, mix Euro 0-5; ROW w/o EU+EFTA
- km_4: 999.9
  Distance in km, for lubricating oil // lubricants at refinery // raf; Articulated lorry transport, Total weight >32 t, mix Euro 0-5; ROW w/o EU+EFTA
- kg_km_4: 0.00056; = kg_4*km_4
  Transport amount in km*km, for lubricating oil // lubricants at refinery // raf; Articulated lorry transport, Total weight >32 t, mix Euro 0-5; ROW w/o EU+EFTA
- kg_5: 5.60056e-7
  Mass in kg, for lubricating oil // lubricants at refinery // raf; Transoceanic ship, containers; GLO
- km_5: 18033.9
  Distance in km, for lubricating oil // lubricants at refinery // raf; Transoceanic ship, containers; GLO
- kg_km_5: 0.0101; = kg_5*km_5
  Transport amount in km*km, for lubricating oil // lubricants at refinery // raf; Transoceanic ship, containers; GLO
- kg_6: 1.46765e-5
  Mass in kg, for lubricating oil // lubricants at refinery // ras w/o cn; Articulated lorry transport, Total weight >32 t, mix Euro 0-5; ROW w/o EU+EFTA
- km_6: 1001.6
  Distance in km, for lubricating oil // lubricants at refinery // ras w/o cn; Articulated lorry transport, Total weight >32 t, mix Euro 0-5; ROW w/o EU+EFTA
- kg_km_6: 0.0147; = kg_6*km_6
  Transport amount in km*km, for lubricating oil // lubricants at refinery // ras w/o cn; Articulated lorry transport, Total weight >32 t, mix Euro 0-5; ROW w/o EU+EFTA
- kg_7: 1.46765e-5
  Mass in kg, for lubricating oil // lubricants at refinery // ras w/o cn; Transoceanic ship, containers; GLO
- km_7: 18056.1
  Distance in km, for lubricating oil // lubricants at refinery // ras w/o cn; Transoceanic ship, containers; GLO
- kg_km_7: 0.265; = kg_7*km_7
  Transport amount in km*km, for lubricating oil // lubricants at refinery // ras w/o cn; Transoceanic ship, containers; GLO
- kg_8: 1.14561e-5
  Mass in kg, for lubricating oil // lubricants at refinery // rna; Articulated lorry transport, Total weight >32 t, mix Euro 0-5; ROW w/o EU+EFTA
- km_8: 1003.83
  Distance in km, for lubricating oil // lubricants at refinery // rna; Articulated lorry transport, Total weight >32 t, mix Euro 0-5; ROW w/o EU+EFTA
- kg_km_8: 0.0115; = kg_8*km_8
  Transport amount in km*km, for lubricating oil // lubricants at refinery // rna; Articulated lorry transport, Total weight >32 t, mix Euro 0-5; ROW w/o EU+EFTA
- kg_9: 1.14561e-5
  Mass in kg, for lubricating oil // lubricants at refinery // rna; Transoceanic ship, containers; GLO
- km_9: 18068.9
  Distance in km, for lubricating oil // lubricants at refinery // rna; Transoceanic ship, containers; GLO
- kg_km_9: 0.207; = kg_9*km_9
  Transport amount in km*km, for lubricating oil // lubricants at refinery // rna; Transoceanic ship, containers; GLO
- kg_10: 1.36514e-6
  Mass in kg, for lubricating oil // lubricants at refinery // rsa; Articulated lorry transport, Total weight >32 t, mix Euro 0-5; ROW w/o EU+EFTA
- km_10: 1003.56
  Distance in km, for lubricating oil // lubricants at refinery // rsa; Articulated lorry transport, Total weight >32 t, mix Euro 0-5; ROW w/o EU+EFTA
- kg_km_10: 0.00137; = kg_10*km_10
  Transport amount in km*km, for lubricating oil // lubricants at refinery // rsa; Articulated lorry transport, Total weight >32 t, mix Euro 0-5; ROW w/o EU+EFTA
- kg_11: 1.36514e-6
  Mass in kg, for lubricating oil // lubricants at refinery // rsa; Transoceanic ship, containers; GLO
- km_11: 18093.4
  Distance in km, for lubricating oil // lubricants at refinery // rsa; Transoceanic ship, containers; GLO
- kg_km_11: 0.0247; = kg_11*km_11
  Transport amount in km*km, for lubricating oil // lubricants at refinery // rsa; Transoceanic ship, containers; GLO
- kg_12: 1.21362e-5
  Mass in kg, for lubricating oil // lubricants at refinery // ru; Articulated lorry transport, Total weight >32 t, mix Euro 0-5; ROW w/o EU+EFTA
- km_12: 997.016
  Distance in km, for lubricating oil // lubricants at refinery // ru; Articulated lorry transport, Total weight >32 t, mix Euro 0-5; ROW w/o EU+EFTA
- kg_km_12: 0.0121; = kg_12*km_12
  Transport amount in km*km, for lubricating oil // lubricants at refinery // ru; Articulated lorry transport, Total weight >32 t, mix Euro 0-5; ROW w/o EU+EFTA
- kg_13: 1.21362e-5
  Mass in kg, for lubricating oil // lubricants at refinery // ru; Transoceanic ship, containers; GLO
- km_13: 17962.8
  Distance in km, for lubricating oil // lubricants at refinery // ru; Transoceanic ship, containers; GLO
- kg_km_13: 0.218; = kg_13*km_13
  Transport amount in km*km, for lubricating oil // lubricants at refinery // ru; Transoceanic ship, containers; GLO
- kg_14: 7.47575e-6
  Mass in kg, for lubricating oil // lubricating oil production // eu+efta+uk; Articulated lorry transport, Total weight >32 t, mix Euro 0-5; ROW w/o EU+EFTA
- km_14: 1000.57
  Distance in km, for lubricating oil // lubricating oil production // eu+efta+uk; Articulated lorry transport, Total weight >32 t, mix Euro 0-5; ROW w/o EU+EFTA
- kg_km_14: 0.00748; = kg_14*km_14
  Transport amount in km*km, for lubricating oil // lubricating oil production // eu+efta+uk; Articulated lorry transport, Total weight >32 t, mix Euro 0-5; ROW w/o EU+EFTA
- kg_15: 7.47575e-6
  Mass in kg, for lubricating oil // lubricating oil production // eu+efta+uk; Transoceanic ship, containers; GLO
- km_15: 18058.4
  Distance in km, for lubricating oil // lubricating oil production // eu+efta+uk; Transoceanic ship, containers; GLO
- kg_km_15: 0.135; = kg_15*km_15
  Transport amount in km*km, for lubricating oil // lubricating oil production // eu+efta+uk; Transoceanic ship, containers; GLO

## Reference product
- cotton yarn, for woven, ring-spun (370 dtex-333 denier-16/1 ne-27 nm) // spinning, cotton, for woven, ring-spun (370 dtex-333 denier-16/1 ne-27 nm) // glo: 1

## Inputs
- Electricity from Electricity grid mix 1kV-60kV - AU: 0.0587309
- Electricity from Electricity grid mix 1kV-60kV - EU+EFTA+UK: 0.865209
- Electricity from Electricity grid mix 1kV-60kV - NZ: 0.0111901
- Electricity from Electricity grid mix 1kV-60kV - RAF: 0.189068
- Electricity from Electricity grid mix 1kV-60kV - RNA: 1.26619
- Electricity from Electricity grid mix 1kV-60kV - RSA: 0.429639
- Electricity from Electricity grid mix 1kV-60kV - RU: 0.253186
- Thermal energy (MJ) from Thermal energy from hard coal - EU+EFTA+UK: 0.0445976
- Thermal energy (MJ) from Thermal energy from hard coal - ROW: 0.450931
- Thermal energy (MJ) from Thermal energy from heavy fuel oil (HFO) - EU+EFTA+UK: 0.000991057
- Thermal energy (MJ) from Thermal energy from heavy fuel oil (HFO) - ROW: 0.0100207
- Thermal energy (MJ) from Thermal energy from light fuel oil (LFO) - EU+EFTA+UK: 0.0138748
- Thermal energy (MJ) from Thermal energy from light fuel oil (LFO) - ROW: 0.14029
- Thermal energy (MJ) from Thermal energy from natural gas - EU+EFTA+UK: 0.0396423
- Thermal energy (MJ) from Thermal energy from natural gas - ROW: 0.400827
- Transport of wax // wax production // eu+efta+uk by Articulated lorry transport, Euro 4, Total weight >32 t - EU+EFTA+UK: 10; = kg_km_0
- Transport of wax // wax production // eu+efta+uk by Transoceanic ship, containers - GLO: 180; = kg_km_1
- Transport of lubricating oil // lubricants at refinery // cn by Articulated lorry transport, Total weight >32 t, mix Euro 0-5 - ROW w/o EU+EFTA: 0.00233; = kg_km_2
- Transport of lubricating oil // lubricants at refinery // cn by Transoceanic ship, containers - GLO: 0.0419; = kg_km_3
- Transport of lubricating oil // lubricants at refinery // raf by Articulated lorry transport, Total weight >32 t, mix Euro 0-5 - ROW w/o EU+EFTA: 0.00056; = kg_km_4
- Transport of lubricating oil // lubricants at refinery // raf by Transoceanic ship, containers - GLO: 0.0101; = kg_km_5
- Transport of lubricating oil // lubricants at refinery // ras w/o cn by Articulated lorry transport, Total weight >32 t, mix Euro 0-5 - ROW w/o EU+EFTA: 0.0147; = kg_km_6
- Transport of lubricating oil // lubricants at refinery // ras w/o cn by Transoceanic ship, containers - GLO: 0.265; = kg_km_7
- Transport of lubricating oil // lubricants at refinery // rna by Articulated lorry transport, Total weight >32 t, mix Euro 0-5 - ROW w/o EU+EFTA: 0.0115; = kg_km_8
- Transport of lubricating oil // lubricants at refinery // rna by Transoceanic ship, containers - GLO: 0.207; = kg_km_9
- Transport of lubricating oil // lubricants at refinery // rsa by Articulated lorry transport, Total weight >32 t, mix Euro 0-5 - ROW w/o EU+EFTA: 0.00137; = kg_km_10
- Transport of lubricating oil // lubricants at refinery // rsa by Transoceanic ship, containers - GLO: 0.0247; = kg_km_11
- Transport of lubricating oil // lubricants at refinery // ru by Articulated lorry transport, Total weight >32 t, mix Euro 0-5 - ROW w/o EU+EFTA: 0.0121; = kg_km_12
- Transport of lubricating oil // lubricants at refinery // ru by Transoceanic ship, containers - GLO: 0.218; = kg_km_13
- Transport of lubricating oil // lubricating oil production // eu+efta+uk by Articulated lorry transport, Total weight >32 t, mix Euro 0-5 - ROW w/o EU+EFTA: 0.00748; = kg_km_14
- Transport of lubricating oil // lubricating oil production // eu+efta+uk by Transoceanic ship, containers - GLO: 0.135; = kg_km_15
- Electricity from Electricity grid mix 1kV-60kV - CN: 1.29737
- Electricity from Electricity grid mix 1kV-60kV - RAS w/o CN: 1.42145
- cotton yarn, for woven, ring-spun (370 dtex-333 denier-16/1 ne-27 nm) // spinning, cotton, for woven, ring-spun (370 dtex-333 denier-16/1 ne-27 nm) // glo, blackbox: 1
- cotton yarn, for woven, ring-spun (370 dtex-333 denier-16/1 ne-27 nm) // spinning, cotton, for woven, ring-spun (370 dtex-333 denier-16/1 ne-27 nm) // glo, elementary: 1

## Impact indicators
- Eutrophication marine: 0.00108115
- Ecotoxicity, freshwater: 5.31908
- Land use: 1.71836
- Water use: 0.368465
- Resource use, minerals and metals: 6.87328e-7
- Resource use, fossils: 16.4422
- Climate change: 1.22995
- Ozone depletion: 2.22574e-10
- Human toxicity, cancer: 7.24096e-10
- Human toxicity, non-cancer: 7.13841e-9
- EF-particulate Matter: 2.92588e-7
- Ionising radiation, human health: 0.0797712
- Photochemical ozone formation - human health: 0.00329738
- Acidification: 0.00763727
- Eutrophication, terrestrial: 0.0119495
- Eutrophication, freshwater: 3.08687e-6

## Deviations from the LCI method principle
The background data uses:
- the \xe2\x80\x9cRecycled content cut-off\xe2\x80\x9d approach to allocate end-of-life by-products and secondary materials. This allocation is explained in the description of the recycled content system model (http://www.ecoinvent.org/database/system-models-in-ecoinvent-3/cut-off-system-model/allocation-cut-off-by-classification.html).
OR
- EF compliant data

## Deviations from the LCI method approaches
Background data:
- the \xe2\x80\x9cRecycled content cut-off\xe2\x80\x9d approach to allocate end-of-life by-products and secondary materials. This allocation is explained in the description of the recycled content system model (http://www.ecoinvent.org/database/system-models-in-ecoinvent-3/cut-off-system-model/allocation-cut-off-by-classification.html). The ecoinvent database mostly relies on “Allocation – market values” apart for few exceptions particularly in the energy sector. ecoinvent energy data is replaced with EF3.0 core data as per the EF guidelines version 2.0.
OR
- EF compliant data

## Modelling constants
All modelling constants follow the requirements listed in the Tender Specifications 070201/2020/SER/ENV.B1. Completeness: There are no intentional cut-offs in the inventory no matter how small their contribution to all the EF impact categories is. Eventual cut-offs are in compliance with the Guide for EF compliant data sets (JRC 2020), i.e. only if below the 3% cut-off rule. Water use: water use is modelled at country level using separate flows for water withdrawal, water release and water evaporation. Handling multi-functional processes: the following PEF multi- functionality decision hierarchy is applied for resolving all multi- functionality problems: (1) subdivision or system expansion; (2) allocation based on a relevant underlying physical relationship (substitution may apply here); (3) allocation based on some other relationship. Direct land use change: GHG emissions from direct LUC allocated to good/service for 20 years after the LUC occurs, with IPCC default values. Carbon storage and delayed emissions: credits associated with temporary (carbon) storage or delayed emissions up to 300 years are not be considered. Emissions off-setting: are not included. Capital goods (including infrastructures) and their End of life: they are included. System boundaries: system boundaries include all processes linked to the product supply chain (e.g. maintenance). Time period: emissions and removals are modelled as if released or removed at the beginning of the assessment method. Fossil and biogenic carbon emissions and removals: removals and emissions are modelled as follows: All GHG emissions from fossil fuels (including peat and limestone) are modelled consistently with the most updated ILCD list of elementary flows. The non-fossil (biogenic) carbon flows are modelled consistently with the most updated ILCD list of elementary flows.

## Cut-off and completeness
There are no intentional cut-offs in the inventory no matter how small their contribution to all the EF impact categories is. Eventual cut-offs are in compliance with the Guide for EF compliant data sets (JRC 2020), i.e. only if below the 3% cut-off rule. The dataset dry mass and water balance has been checked to ensure the inventory is complete. Capital goods (e.g. infrastructure) and their end-of-life are included.

## Data selection and combination
These datasets include, in both their foreground and background data, links to EF3.0 compliant data.
The relevant background data on energy, transport, and End of Life are from the LCDN data node (http://lcdn.thinkstep.com/Node/).
All other background data in the supply of this product for which no EF3.0 process was available are from ecoinvent v3.7 database (www.ecoinvent.org) or other data sources.

## Data treatment and extrapolations
Several data sources have been used to model the inventory.

## Review details
Internal reviews have been asked to review the plausibility of the unit process, LCIA scores, and DQRs. Internal reviewers have also been asked to review the data for EF compliancy. The consortium is therefore responsible for aspects such as compliancy with the ILCD format, including validation in Look@LCI, and nomenclature.
Internal reviwers have been asked to judge based on the process name, that the unit process models in a complete and representative way the process in the requested location. The review encompassed the plausability of:
- exchanges with nature (elementary flows) as well as exchanges such as product and waste flows.
- meta information (general comment, technology comment, system boundaries, allocation, cut-off rules, etc.). Reviewers were asked to judge if the provided information is enough to understand the content of the process.
- LCIA scores
- DQRs including precision, technology, time and geography. As well as the overall DQR.
External reviewers have been asked to provide their expertise in the field of interest. External reviewers have been asked to review the unit process, including eventual methodological choices, the LCIA scores (provided with contribution scores as well), and DQRs. External reviewers have been provided all the information in a tool developed by the consortium for the purpose of this project.
External reviewers have been asked to judge based on the process name, that the unit process models in a complete and representative way the process in the requested location. The review encompassed:
- Plausability and completeness of exchanges with nature (elementary flows) as well as exchanges such as product and waste flows.
- Review of meta information (general comment, technology comment, system boundaries, allocation, cut-off rules, etc.). Reviewers were asked to judge if the provided information is enough to understand the content of the process.
- Review of properties (biogenic carbon and water content).
- Review of allocation keys.
- Plausability of LCIA scores calculated by the consortium.
- Plausability of DQRs including precision, technology, time and geography. As well as the overall DQR.

## Data sources
- Background Data for Representative products and organisations. EF 3.0 compliant (data stock)
- Koç E., Kaplan E., (2007). An Investigation on Energy Consumption in Yarn Production with Special Reference to Ring Spinning. Çukurova University,Textile Engineering Department, Adana, Turkey.
- Faist Emmenegger, M., Bajaj S., Datta A., Nigam M., Mosharraf Hossain M., Noor Hossain, M., (2018). Life Cycle Inventories of Textile Products - India and Bangladesh.
- Zamani, B., Svanström, M., Peters, G., & Rydberg, T. (2015). A carbon footprint of textile recycling: A case study in Sweden. Journal of industrial ecology, 19(4), 676-687.
- Zampori, L. and Pant, R., Suggestions for updating theProduct Environmental Footprint (PEF) method, EUR 29682 EN, Publications Office of the European Union, Luxembourg, 2019, ISBN 978-92-76-00654-1, doi:10.2760/424613, JRC115959.

## Intended applications
Implementation of regular Product Environmental Footprint (PEF) studies and Organisation Environmental Footprint (OEF) studies exclusively under the specified Product groups and sectors as defined in the Product Environmental Footprint Category Rules (PEFCR) and Organisation Environmental Footprint Sectorial Rules (OEFSR) listed in http://ec.europa.eu/environment/eussd/smgp/PEFCR_OEFSR.htm
