# leather, veal/calf, wet-white metal free tanned, elementary; technology mix; production mix, at tannery; m2

Dataset: ILCD process, Unit process, single operation
Geography: GLO
Reference year: 2020
Valid until: 2024
Classification: Other Services / Other services
LCI method principle: Attributional
LCI method approaches: Allocation - market value
Completeness: All relevant flows quantified
Project: Provision of process-based 3.0 Environmental Footprint-compliant life cycle inventory datasets - Apparel 1 - contract number 070201/2020/840291/SER/ENV.B.1
Generated by: PRé Sustainability B.V.
Owner: PRé Sustainability B.V.
Compliance: Environmental Footprint non-primary supporting data set; Environmental Footprint 3.1
Amounts: no units in this file; such an amount is in the reference unit of its flow, which a separate flow dataset defines
copyright: true
licenseType: Free of charge for some user types or use types
accessRestrictions: Free of charge for all final users implementing a regular Product Environmental Footprint (PEF) studies and Organisation Environmental Footprint (OEF) studies exclusively under the specified Product groups and sectors as defined in the Product Environmental Footprint Category Rules (PEFCR) and Organisation Environmental Footprint Sectorial Rules (OEFSR) listed in http://ec.europa.eu/environment/eussd/smgp/PEFCR_OEFSR.htm and in accordance with the terms and conditions of the EULA (available at https://ecoinvent.lca-data.com/) exclusively until 31st December 2024. Any use of this dataset or any derivative data not within the specific context of one of the PEF/OEF projects or after the end of 2024 is not permitted.

## General comment
Notice: this data set supersedes the EF3.0-compliant version (see link under "preceding data set version" below calculated with the EF3.0). The life cycle inventory is not changed from the original EF3.0 data set. The LCIA results are calculated based on the EF3.1 methods which provide updated characterisation factors in the following impact categories: Climate Change, Ecotoxicity freshwater, Photochemical Ozone Formation, Acidification, Human Toxicity non-cancer, and Human Toxicity cancer. The review report and the data quality ratings refer to the original results. The data set has been updated by the European Commission on the basis of the original EF3.0 data set delivered by the data provider.This sub-process has limited documentation only. For all detailed documentation of the full model to which this data set belongs (such as DQRs, review reports and other technical documentation), please see this process: leather, veal/calf, wet-white metal free tanned - GLO []

## Technology and included processes
Wet-white metal-free tanning – a variety of tanning techniques that avoid the use of chromium or heavy metals in the tanning process. Metal-free tanning agent production is modelled as a separate intermediate process, and has inputs of each of the tanning agents listed in Annex 7 Leather PEFCR, 2019. The modelled substances within the aggregated model tanning agent (to represent impacts averaged over all possible wet-white metal-free tanning techniques) are: acetaldehyde, Alkylbenzene sulfonate, chemical, organic (as a proxy for chemicals with no corresponding model), formaldehyde, maleic anhydride, phenolic resin, Polycarboxylate, and styrene.
Stages in Leather tanning for non-chrome tanned leather (starting with pelt) (BASF, 2003, p. 104)
1. De-liming/Bating
2. Pickling/Pre-tanning
3. Samming/shaving
4. Tanning
5. Basifying

System boundaries: The dataset describes the tanning and finishing of veal leather. The inventory includes the following flows:
- Electricity and heat use
- Chemicals: tanning agent, wetting agents, liming agents, fatliquors and other agents used in the processing of leather
- Water
- Emissions to water
- Transport of chemicals, and raw materials

It does not include:
- Packaging materials
- Certain chemicals in the intermediate pre-tanning and coating processes have been replaced with proxies where there is no exact match (see comments on exchanges)

## Reference product
- leather, veal/calf, wet-white metal free tanned // leather, veal/calf, wet-white metal free tanned // glo, elementary: 1

## Outputs
- ammonia, Emissions to air, unspecified [AL]: 6.33194e-5
- ammonia, Emissions to air, unspecified [AT]: 0.00081583
- ammonia, Emissions to air, unspecified [BA]: 7.89366e-5
- ammonia, Emissions to air, unspecified [BE]: 0.000981978
- ammonia, Emissions to air, unspecified [BG]: 0.000251454
- ammonia, Emissions to air, unspecified [BY]: 0.000326508
- ammonia, Emissions to air, unspecified [CH]: 0.000973013
- ammonia, Emissions to air, unspecified [CZ]: 0.00067721
- ammonia, Emissions to air, unspecified [DE]: 0.00737021
- ammonia, Emissions to air, unspecified [DK]: 0.000534424
- ammonia, Emissions to air, unspecified [EE]: 7.29763e-5
- ammonia, Emissions to air, unspecified [ES]: 0.00316276
- ammonia, Emissions to air, unspecified [FI]: 0.000455853
- ammonia, Emissions to air, unspecified [FR]: 0.00519893
- ammonia, Emissions to air, unspecified [GB]: 0.00516648
- ammonia, Emissions to air, unspecified: 0.158043
- ammonia, Emissions to air, unspecified [GR]: 0.000587719
- ammonia, Emissions to air, unspecified [HR]: 0.000188971
- ammonia, Emissions to air, unspecified [HU]: 0.000495388
- ammonia, Emissions to air, unspecified [IE]: 0.00053363
- ammonia, Emissions to air, unspecified [IT]: 0.0044481
- ammonia, Emissions to air, unspecified [LT]: 0.000155817
- ammonia, Emissions to air, unspecified [LU]: 0.000108169
- ammonia, Emissions to air, unspecified [LV]: 9.18796e-5
- ammonia, Emissions to air, unspecified [MD]: 4.86152e-5
- ammonia, Emissions to air, unspecified [MK]: 5.40913e-5
- ammonia, Emissions to air, unspecified [NL]: 0.00164885
- ammonia, Emissions to air, unspecified [NO]: 0.000624138
- ammonia, Emissions to air, unspecified [PL]: 0.00189764
- ammonia, Emissions to air, unspecified [PT]: 0.000598772
- ammonia, Emissions to air, unspecified [RO]: 0.000831288
- ammonia, Emissions to air, unspecified [RU]: 0.00688242
- ammonia, Emissions to air, unspecified [SE]: 0.000900623
- ammonia, Emissions to air, unspecified [SI]: 0.000127541
- ammonia, Emissions to air, unspecified [SK]: 0.000299358
- ammonia, Emissions to air, unspecified [UA]: 0.000877721
- biological oxygen demand, Emissions to water, unspecified: 1.36
- chemical oxygen demand, Emissions to water, unspecified: 0.765
- Nitrogen oxides, Emissions to air, unspecified: 0.11494
- sulfur oxides, Emissions to air, unspecified: 0.0287351
- nitrogen, total (excluding N2), Emissions to water, unspecified: 0.0672
- Suspended solids, unspecified, Emissions to water, unspecified: 0.264
- sulfate, Emissions to water, unspecified: 0.589
- volatile organic compound, Emissions to air, unspecified: 0.0467213
- formaldehyde, Emissions to water, unspecified: 0.031
- sulfide, Emissions to water, unspecified: 0.009
- Chlorides, unspecified, Emissions to water, unspecified: 1.83
- Nitrogen oxides, Emissions to air, unspecified [AL]: 4.60504e-5
- Nitrogen oxides, Emissions to air, unspecified [AT]: 0.000593331
- Nitrogen oxides, Emissions to air, unspecified [BA]: 5.74084e-5
- Nitrogen oxides, Emissions to air, unspecified [BE]: 0.000714166
- Nitrogen oxides, Emissions to air, unspecified [BG]: 0.000182875
- Nitrogen oxides, Emissions to air, unspecified [BY]: 0.00023746
- Nitrogen oxides, Emissions to air, unspecified [CH]: 0.000707646
- Nitrogen oxides, Emissions to air, unspecified [CZ]: 0.000492516
- Nitrogen oxides, Emissions to air, unspecified [DE]: 0.00536015
- Nitrogen oxides, Emissions to air, unspecified [DK]: 0.000388672
- Nitrogen oxides, Emissions to air, unspecified [EE]: 5.30737e-5
- Nitrogen oxides, Emissions to air, unspecified [ES]: 0.00230019
- Nitrogen oxides, Emissions to air, unspecified [FI]: 0.000331529
- Nitrogen oxides, Emissions to air, unspecified [FR]: 0.00378104
- Nitrogen oxides, Emissions to air, unspecified [GB]: 0.00375744
- Nitrogen oxides, Emissions to air, unspecified [GR]: 0.000427432
- Nitrogen oxides, Emissions to air, unspecified [HR]: 0.000137434
- Nitrogen oxides, Emissions to air, unspecified [HU]: 0.000360282
- Nitrogen oxides, Emissions to air, unspecified [IE]: 0.000388094
- Nitrogen oxides, Emissions to air, unspecified [IT]: 0.00323498
- Nitrogen oxides, Emissions to air, unspecified [LT]: 0.000113322
- Nitrogen oxides, Emissions to air, unspecified [LU]: 7.86681e-5
- Nitrogen oxides, Emissions to air, unspecified [LV]: 6.68216e-5
- Nitrogen oxides, Emissions to air, unspecified [MD]: 3.53565e-5
- Nitrogen oxides, Emissions to air, unspecified [MK]: 3.93391e-5
- Nitrogen oxides, Emissions to air, unspecified [NL]: 0.00119916
- Nitrogen oxides, Emissions to air, unspecified [NO]: 0.000453918
- Nitrogen oxides, Emissions to air, unspecified [PL]: 0.0013801
- Nitrogen oxides, Emissions to air, unspecified [PT]: 0.000435471
- Nitrogen oxides, Emissions to air, unspecified [RO]: 0.000604573
- Nitrogen oxides, Emissions to air, unspecified [RU]: 0.00500539
- Nitrogen oxides, Emissions to air, unspecified [SE]: 0.000654999
- Nitrogen oxides, Emissions to air, unspecified [SI]: 9.27572e-5
- Nitrogen oxides, Emissions to air, unspecified [SK]: 0.000217715
- Nitrogen oxides, Emissions to air, unspecified [UA]: 0.000638343
- Dissolved solids, Emissions to water, unspecified: 4.269
- sulfur oxides, Emissions to air, unspecified [AL]: 1.15126e-5
- sulfur oxides, Emissions to air, unspecified [AT]: 0.000148333
- sulfur oxides, Emissions to air, unspecified [BA]: 1.43521e-5
- sulfur oxides, Emissions to air, unspecified [BE]: 0.000178541
- sulfur oxides, Emissions to air, unspecified [BG]: 4.57188e-5
- sulfur oxides, Emissions to air, unspecified [BY]: 5.93651e-5
- sulfur oxides, Emissions to air, unspecified [CH]: 0.000176911
- sulfur oxides, Emissions to air, unspecified [CZ]: 0.000123129
- sulfur oxides, Emissions to air, unspecified [DE]: 0.00134004
- sulfur oxides, Emissions to air, unspecified [DK]: 9.7168e-5
- sulfur oxides, Emissions to air, unspecified [EE]: 1.32684e-5
- sulfur oxides, Emissions to air, unspecified [ES]: 0.000575048
- sulfur oxides, Emissions to air, unspecified [FI]: 8.28823e-5
- sulfur oxides, Emissions to air, unspecified [FR]: 0.00094526
- sulfur oxides, Emissions to air, unspecified [GB]: 0.000939359
- sulfur oxides, Emissions to air, unspecified [GR]: 0.000106858
- sulfur oxides, Emissions to air, unspecified [HR]: 3.43584e-5
- sulfur oxides, Emissions to air, unspecified [HU]: 9.00706e-5
- sulfur oxides, Emissions to air, unspecified [IE]: 9.70236e-5
- sulfur oxides, Emissions to air, unspecified [IT]: 0.000808746
- sulfur oxides, Emissions to air, unspecified [LT]: 2.83304e-5
- sulfur oxides, Emissions to air, unspecified [LU]: 1.9667e-5
- sulfur oxides, Emissions to air, unspecified [LV]: 1.67054e-5
- sulfur oxides, Emissions to air, unspecified [MD]: 8.83913e-6
- sulfur oxides, Emissions to air, unspecified [MK]: 9.83479e-6
- sulfur oxides, Emissions to air, unspecified [NL]: 0.00029979
- sulfur oxides, Emissions to air, unspecified [NO]: 0.00011348
- sulfur oxides, Emissions to air, unspecified [PL]: 0.000345025
- sulfur oxides, Emissions to air, unspecified [PT]: 0.000108868
- sulfur oxides, Emissions to air, unspecified [RO]: 0.000151143
- sulfur oxides, Emissions to air, unspecified [RU]: 0.00125135
- sulfur oxides, Emissions to air, unspecified [SE]: 0.00016375
- sulfur oxides, Emissions to air, unspecified [SI]: 2.31893e-5
- sulfur oxides, Emissions to air, unspecified [SK]: 5.44288e-5
- sulfur oxides, Emissions to air, unspecified [UA]: 0.000159586

## Impact indicators
- Eutrophication marine: 0.144271
- Ecotoxicity, freshwater: 711.13
- Human toxicity, cancer: 1.82795e-9
- Human toxicity, non-cancer: 1.0131e-8
- EF-particulate Matter: 4.85528e-6
- Photochemical ozone formation - human health: 0.163519
- Acidification: 0.704546
- Eutrophication, terrestrial: 3.02065
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
## Deviations from the LCI method principle
The background data uses:
- the \xe2\x80\x9cRecycled content cut-off\xe2\x80\x9d approach to allocate end-of-life by-products and secondary materials. This allocation is explained in the description of the recycled content system model (http://www.ecoinvent.org/database/system-models-in-ecoinvent-3/cut-off-system-model/allocation-cut-off-by-classification.html).
OR
- EF compliant data

## Deviations from the LCI method approaches
Background data:
- the \xe2\x80\x9cRecycled content cut-off\xe2\x80\x9d approach to allocate end-of-life by-products and secondary materials. This allocation is explained in the description of the recycled content system model (http://www.ecoinvent.org/database/system-models-in-ecoinvent-3/cut-off-system-model/allocation-cut-off-by-classification.html). The ecoinvent database mostly relies on “Allocation – market values” apart for few exceptions particularly in the energy sector. ecoinvent energy data is replaced with EF3.0 core data as per the EF guidelines version 2.0.
OR
- EF compliant data

## Modelling constants
All modelling constants follow the requirements listed in the Tender Specifications 070201/2020/SER/ENV.B1. Completeness: There are no intentional cut-offs in the inventory no matter how small their contribution to all the EF impact categories is. Eventual cut-offs are in compliance with the Guide for EF compliant data sets (JRC 2020), i.e. only if below the 3% cut-off rule. Water use: water use is modelled at country level using separate flows for water withdrawal, water release and water evaporation. Handling multi-functional processes: the following PEF multi- functionality decision hierarchy is applied for resolving all multi- functionality problems: (1) subdivision or system expansion; (2) allocation based on a relevant underlying physical relationship (substitution may apply here); (3) allocation based on some other relationship. Direct land use change: GHG emissions from direct LUC allocated to good/service for 20 years after the LUC occurs, with IPCC default values. Carbon storage and delayed emissions: credits associated with temporary (carbon) storage or delayed emissions up to 300 years are not be considered. Emissions off-setting: are not included. Capital goods (including infrastructures) and their End of life: they are included. System boundaries: system boundaries include all processes linked to the product supply chain (e.g. maintenance). Time period: emissions and removals are modelled as if released or removed at the beginning of the assessment method. Fossil and biogenic carbon emissions and removals: removals and emissions are modelled as follows: All GHG emissions from fossil fuels (including peat and limestone) are modelled consistently with the most updated ILCD list of elementary flows. The non-fossil (biogenic) carbon flows are modelled consistently with the most updated ILCD list of elementary flows.

## Cut-off and completeness
There are no intentional cut-offs in the inventory no matter how small their contribution to all the EF impact categories is. Eventual cut-offs are in compliance with the Guide for EF compliant data sets (JRC 2020), i.e. only if below the 3% cut-off rule. The dataset dry mass and water balance has been checked to ensure the inventory is complete. Capital goods (e.g. infrastructure) and their end-of-life are included.

## Data selection and combination
These datasets include, in both their foreground and background data, links to EF3.0 compliant data.
The relevant background data on energy, transport, and End of Life are from the LCDN data node (http://lcdn.thinkstep.com/Node/).
All other background data in the supply of this product for which no EF3.0 process was available are from ecoinvent v3.7 database (www.ecoinvent.org) or other data sources.

## Data treatment and extrapolations
Several data sources have been used to model the inventory.

## Use advice
This data set is a supporting sub-data set and must be used exclusively as sub-data set of its corresponding level-1 partly disaggregated data set (see “General comment” field for exact name and UUID).

## Data sources
- Background Data for Representative products and organisations. EF 3.0 compliant (data stock)
- De Rosa-Giglio, Fontanella, Gonzalez-Quijano, Ioannidis, Nucci, and Brugnoli. ‘PRODUCT ENVIRONMENTAL FOOTPRINT CATEGORY RULES Leather’, 25 April 2018.
- BASF. ‘BASF Pocket Book for the Leather Technologist’, no. 4 (2003). https://www.academia.edu/32384925/Book_for_Leather_BASF_pdf.
- Pant, R, L Zampori, European Commission, and Joint Research Centre. Suggestions for Updating the Organisation Environmental Footprint (OEF) Method., 2019. http://publications.europa.eu/publication/manifestation_identifier/PUB_KJNA29682ENN.
- Andrea Fontanella, Benedetta Nucci, Primiano De Rosa-Giglio, and Ioannis Ioannidis. ‘Leather PEF Screening Report in the Context of the EU Product Environmental Footprint Category Rules (PEFCR) Pilots’, 11 November 2015.
- UNIDO. ‘Future Trends in the World Leather and Leather Products Industry and Trade’, 2010. https://leatherpanel.org/sites/default/files/publications-attachments/future_trends_in_the_world_leather_and_leather_products_industry_and_trade.pdf.
- UNIDO Leatherpanel, J. Buljan, and I. Kral. ‘INTRODUCTION TO TREATMENT OF TANNERY EFFLUENTS’, 2011. https://leatherpanel.org/sites/default/files/publications-attachments/introduction_to_treatment_of_tannery_effluents.pdf.
- COTANCE and industriAll-Europe. ‘European Leather Industry - SOCIAL & ENVIRONMENTAL REPORT 2020’, 2020. https://www.euroleather.com/doc/SER/European%20Leather%20Industry%20-%20Social%20and%20Environmental%20Report%202020%20-%20EN%20web.pdf.
- Khwaja, A R, Rashmi Singh, and S N Tandon. ‘MONITORING OF GANGA WATER AND SEDIMENTS VIS-À-VIS TANNERY POLLUTION AT KANPUR (INDIA): A CASE STUDY’, n.d., 17.
- IFC, World Bank Group. ‘Environmental, Health, and Safety Guidelines for Tanning and Leather Finishing’. International Finance Corporation, 30 April 2007. https://www.ifc.org/wps/wcm/connect/e497d468-6fbe-462e-86a9-e3ff55ea0236/Final%2B-%2BTanning%2Band%2BLeather%2BFinishing.pdf?MOD=AJPERES&CVID=jqezJDY&id=1323152378134.
- Banuraman, Saritha. ‘Treatability Study of Tannery Effluent by Enhanced Primary Treatment’, 2013. https://citeseerx.ist.psu.edu/viewdoc/download?doi=10.1.1.417.417&rep=rep1&type=pdf.
- FOOD AND AGRICULTURE ORGANIZATION OF THE UNITED NATIONS. ‘Guidelines for Slaughtering, Meat Cutting and Further Processing’. FAO ANIMAL PRODUCTION AND HEALTH PAPER, 1991. http://www.fao.org/3/T0279E/T0279E05.htm.
- Miljögiraff. ‘EPD Dani Leather for Furniture, Footwear and Leather Goods (S-P-00344)’, 4 April 2012. https://portal.environdec.com/api/api/v1/EPDLibrary/Files/54434c97-7440-4562-41bf-08d8dc8471b1/Data.
- Hou, X, X Xie, and X Huo. ‘Chemical Composition and Nutritive Value of Leather Meals in Broilers’, 2001, 1.
- OEC. ‘The Observatory of Economic Complexity’. Accessed 3 May 2021. https://oec.world/ Note: Trade data from 2016-19

## Intended applications
Implementation of regular Product Environmental Footprint (PEF) studies and Organisation Environmental Footprint (OEF) studies exclusively under the specified Product groups and sectors as defined in the Product Environmental Footprint Category Rules (PEFCR) and Organisation Environmental Footprint Sectorial Rules (OEFSR) listed in http://ec.europa.eu/environment/eussd/smgp/PEFCR_OEFSR.htm
