# spinning, bast fiber, elementary; spinning process; production mix; service of spinning 1kg of yarn (raw material excluded)

Dataset: ILCD process, Unit process, single operation
Geography: GLO
Reference year: 2021
Valid until: 2024
Classification: Other Services / Other services
LCI method principle: Attributional
LCI method approaches: Allocation - market value
Completeness: All relevant flows quantified
Project: Provision of process-based 3.0 Environmental Footprint-compliant life cycle inventory datasets - Apparel 1 - contract number 070201/2020/840291/SER/ENV.B.1
Generated by: Metsims Sustainability Consulting
Owner: PRé Sustainability B.V.
Compliance: Environmental Footprint non-primary supporting data set; Environmental Footprint 3.1
Amounts: no units in this file; such an amount is in the reference unit of its flow, which a separate flow dataset defines
copyright: true
licenseType: Free of charge for some user types or use types
accessRestrictions: Free of charge for all final users implementing a regular Product Environmental Footprint (PEF) studies and Organisation Environmental Footprint (OEF) studies exclusively under the specified Product groups and sectors as defined in the Product Environmental Footprint Category Rules (PEFCR) and Organisation Environmental Footprint Sectorial Rules (OEFSR) listed in http://ec.europa.eu/environment/eussd/smgp/PEFCR_OEFSR.htm and in accordance with the terms and conditions of the EULA (available at https://ecoinvent.lca-data.com/) exclusively until 31st December 2024. Any use of this dataset or any derivative data not within the specific context of one of the PEF/OEF projects or after the end of 2024 is not permitted.

## General comment
Notice: this data set supersedes the EF3.0-compliant version (see link under "preceding data set version" below calculated with the EF3.0). The life cycle inventory is not changed from the original EF3.0 data set. The LCIA results are calculated based on the EF3.1 methods which provide updated characterisation factors in the following impact categories: Climate Change, Ecotoxicity freshwater, Photochemical Ozone Formation, Acidification, Human Toxicity non-cancer, and Human Toxicity cancer. The review report and the data quality ratings refer to the original results. The data set has been updated by the European Commission on the basis of the original EF3.0 data set delivered by the data provider.This sub-process has limited documentation only. For all detailed documentation of the full model to which this data set belongs (such as DQRs, review reports and other technical documentation), please see this process: spinning, bast fiber - GLO []

## Technology and included processes
While Open End and Ring yarn production; electricity, heat energy are consumed and raw material wastes occurs. Electricity and heat energy consumption were calculated according to yarn count for whole Open End and Ring production process. The consumptions of energy according to yarn counts were moddeled according to Ring Spinning wich is similar technology for yarn spinning. This data covers all the fiber production, yarn production and yarn fixing steps. Technology mix of this data: Ring Spinning 67%, Open End (Rotor Spinning) 33%.

Due to lack of data waste rate of bast fibers can be estimated as average of natural fiber spinning waste rate (19.35%). A user employing this service within their models should use it along with an 1.1935 kg of material to produce an 1 kg of yarn. 0.1935 kg of waste shall also be added. A user is responsible for defining the nature of the recycling and/or disposal of this waste. Additionally, a user is responsible for accounting transportation expenditures for all extra input and output materials that need to be modelled alongside this service.*

*Ref: Altun, S. (2012). Prediction of textile waste profile and recycling opportunities in Turk. Fibres & Textiles in Eastern Europe.

## Reference product
- bast yarn // spinning, bast fiber // glo, elementary: 1

## Impact indicators
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
## Deviations from the LCI method principle
The background data uses:
- the \xe2\x80\x9cRecycled content cut-off\xe2\x80\x9d approach to allocate end-of-life by-products and secondary materials. This allocation is explained in the description of the recycled content system model (http://www.ecoinvent.org/database/system-models-in-ecoinvent-3/cut-off-system-model/allocation-cut-off-by-classification.html).
OR
- EF compliant data

## Deviations from the LCI method approaches
Background data:
- the \xe2\x80\x9cRecycled content cut-off\xe2\x80\x9d approach to allocate end-of-life by-products and secondary materials. This allocation is explained in the description of the recycled content system model (http://www.ecoinvent.org/database/system-models-in-ecoinvent-3/cut-off-system-model/allocation-cut-off-by-classification.html). The ecoinvent database mostly relies on “Allocation – market values” apart for few exceptions particularly in the energy sector. ecoinvent energy data is replaced with EF3.0 core data as per the EF guidelines version 2.0.
OR
- EF compliant data

## Modelling constants
All modelling constants follow the requirements listed in the Tender Specifications 070201/2020/SER/ENV.B1. Completeness: There are no intentional cut-offs in the inventory no matter how small their contribution to all the EF impact categories is. Eventual cut-offs are in compliance with the Guide for EF compliant data sets (JRC 2020), i.e. only if below the 3% cut-off rule. Water use: water use is modelled at country level using separate flows for water withdrawal, water release and water evaporation. Handling multi-functional processes: the following PEF multi- functionality decision hierarchy is applied for resolving all multi- functionality problems: (1) subdivision or system expansion; (2) allocation based on a relevant underlying physical relationship (substitution may apply here); (3) allocation based on some other relationship. Direct land use change: GHG emissions from direct LUC allocated to good/service for 20 years after the LUC occurs, with IPCC default values. Carbon storage and delayed emissions: credits associated with temporary (carbon) storage or delayed emissions up to 300 years are not be considered. Emissions off-setting: are not included. Capital goods (including infrastructures) and their End of life: they are included. System boundaries: system boundaries include all processes linked to the product supply chain (e.g. maintenance). Time period: emissions and removals are modelled as if released or removed at the beginning of the assessment method. Fossil and biogenic carbon emissions and removals: removals and emissions are modelled as follows: All GHG emissions from fossil fuels (including peat and limestone) are modelled consistently with the most updated ILCD list of elementary flows. The non-fossil (biogenic) carbon flows are modelled consistently with the most updated ILCD list of elementary flows.

## Cut-off and completeness
There are no intentional cut-offs in the inventory no matter how small their contribution to all the EF impact categories is. Eventual cut-offs are in compliance with the Guide for EF compliant data sets (JRC 2020), i.e. only if below the 3% cut-off rule. The dataset dry mass and water balance has been checked to ensure the inventory is complete. Capital goods (e.g. infrastructure) and their end-of-life are included.

## Data selection and combination
These datasets include, in both their foreground and background data, links to EF3.0 compliant data.
The relevant background data on energy, transport, and End of Life are from the LCDN data node (http://lcdn.thinkstep.com/Node/).
All other background data in the supply of this product for which no EF3.0 process was available are from ecoinvent v3.7 database (www.ecoinvent.org) or other data sources.

## Data treatment and extrapolations
Several data sources have been used to model the inventory.

## Use advice
This data set is a supporting sub-data set and must be used exclusively as sub-data set of its corresponding level-1 partly disaggregated data set (see “General comment” field for exact name and UUID).

## Data sources
- Background Data for Representative products and organisations. EF 3.0 compliant (data stock)
- Kaplan, E. (2010). Investigation of energy consumption in yarn production with special Reference to open-end rotor spinning.
- Koc, E., & Kaplan, E. (2007). An investigation on energy consumption in yarn production with special reference to ring spinning. Fibres & Textiles in Eastern Europe, (4 (63)), 18-24.
- Altun, S. (2012). Prediction of textile waste profile and recycling opportunities in Turk. Fibres & Textiles in Eastern Europe.
- Preferred Fiber & Materials (2020), Market Report 2020, Textile Exchange
- Ozturk, H. K. (2005). Energy usage and cost in textile industry: A case study for Turkey. Energy, 30(13), 2424-2446.
- Paraffin use in textile, https://tekstilbilgi.net/iplikte-parafin-islemi.html, Access Date: 04.05.2021
- Freitas A., Zhang G., Mathews R., (2017), Waterfootprint Assessment of Polyester and Viscose and Comparison to Cotton, Water Footprint Network
- According to Ref 1 to providing 65% relative humidity in spinning factory needs 31-51 kg water. It is assumed that the humidity rate and factory size is similar for OE spinning.
- Condair (2019), Point Guide to Humidity Control in Textile Manufacturing, Humidification and Evaporative Cooling, https://www.condair.com/m/0/10-point-guide-to-humidity-control-in-textile-manufacturing.pdf, Access Date: 16.06.2021
- Ring-Spinning, https://www.luwa.com/en/applications/spinning/ring-spinning, Access Date: 16.06.2021
- Anateks Organize Open End,http://www.anateks.com.tr/anateks-organize-oe.aspx, Access Date: 24.06.2021
- Yarn,http://www.kandemiroglu.net/en-yarn.html, Access Date: 24.06.2021
- Open-End Yarn Plant,http://www.ilsantekstil.com.tr/pages/facilities/open-end-yarn-plant.php, Access Date: 24.06.2021
- Open End Yarn Production,http://www.teymurtekstil.com/eng/open-end-iplik.html, Access Date: 24.06.2021
- PRODUCTION,http://www.turkaylartekstil.com/production.html, Access Date: 24.06.2021
- GÜNAYDIN, G., ABDULLA, G., Tekstil, A. Ü. S. M. Y., & Programı-Antalya, T. (2014). Dünden Bugüne Kısa Stapel İplik Üretim Teknolojileri. SDÜ Teknik Bilimler Dergisi, 4(2), 18-28.
- Spinning System Bast Fiber Processing, RIETER, https://www.rieter.com/fileadmin/user_upload/products/documents/systems/fiber-preparation/VARIOline/rieter-bast-fibers-processing-2261-v2-en.pdf, Access Date: 24.06.2021

## Intended applications
Implementation of regular Product Environmental Footprint (PEF) studies and Organisation Environmental Footprint (OEF) studies exclusively under the specified Product groups and sectors as defined in the Product Environmental Footprint Category Rules (PEFCR) and Organisation Environmental Footprint Sectorial Rules (OEFSR) listed in http://ec.europa.eu/environment/eussd/smgp/PEFCR_OEFSR.htm
