# Bulk ship, regional, transport of frozen food products; technology mix, diesel driven, cargo; consumption mix, to consumer; 1,500t payload capacity

Dataset: ILCD process, Unit process, single operation
Geography: EU+EFTA+UK
Reference year: 2020
Valid until: 2024
Classification: Materials production / Water
LCI method principle: Attributional
LCI method approaches: Allocation - market value; Allocation - net calorific value; Allocation - exergetic content; Allocation - mass; Not applicable
Completeness: All relevant flows quantified
Share of supply or production covered: 95 %
Method details: GaBi Modelling Principles; GaBi Water Modelling Principles; GaBi Agriculture Model Documentation; GaBi Energy Modelling Principles; GaBi Refinery Modelling Principles; GaBi Land Use Change Model Documentation; Suggestions for updating the PEF method 2019; Guide for EF compliant data sets; GaBi Agrarian Modelling Principles
Project: Provision of product environmental footprint-compliant life cycle inventory datasets. Contract number N° 09.029901/2021/846457/SER/ENV.B.1
Generated by: Sphera Solutions GmbH
Owner: Sphera Solutions GmbH
Compliance: ILCD Data Network - Entry-level; Suggestions for updating the PEF method 2019; ISO 14040 Environmental Management – Life Cycle Assessment – Principles and Framework, 2006; ISO 14044:2006. Environmental Management – Life Cycle Assessment – Requirements and guidelines.; Environmental Footprint 3.1
Review: Independent internal review by Sphera Solutions GmbH, Dr. Michael Baumann, Sphera Solutions GmbH, Dr. Stefan Eckert
Data quality: Technological representativeness: Fair; Time representativeness: Good; Geographical representativeness: Good; Completeness: Not evaluated / unknown; Precision: Good; Methodological appropriateness and consistency: Not evaluated / unknown; Overall quality: Good
Amounts: no units in this file; such an amount is in the reference unit of its flow, which a separate flow dataset defines
copyright: true
licenseType: Free of charge for some user types or use types
accessRestrictions: Datasets can only be used in accordance with the terms and conditions of this EULA exclusively until 31st December 2024 (PERMITTED USE).

## General comment
The data set covers all relevant process steps / technologies over the inland waterway transport system with a good overall data quality. The inventory is mainly based on industry data and is complemented, where necessary, by secondary data.

## Geography
represents a global and unified applied technology

## Time period
annual average

## Technology and included processes
This dataset describes a ship transporting frozen products. Additional inventories due to cooling (energy, exhaust emissions and coolant leakage) are accounted.
The existing inland waterway ship categories in the database were matched with actual ships utilised for inland waterway transport, as documented by the Versuchsanstalt für Binnenschiffbau e.V. (VBD) in 2004. The VBD provided current technical information, including the average ship speed, utilisation ratio of the drive capacity and the fuel consumption, in cases of both current and canal waterways. The fuel consumption [in kg/h] was calculated linearly according to load from the utilisation capacity from 0% (empty) to 100% (fully loaded), with the known empty and full load capacities. The fuel consumption [in kg diesel/kg load] was then calculated taking into account the average speed of the ship [km/h], distance [km] and the maximum payload capacity [dwt]. The fuel consumption was then graphed against the capacity utilisation, which resulted in a downward sloping, concave upward curve whose corresponding power equation was of the form y=ax^-b (where y is the fuel consumption, and x is the capacity utilisation).
Inputs to the inland waterway ships are fuel, ship production and waterway infrastructure. Outputs are cargo and combustion emissions. Please note, that the waterway infrastructure has a high impact to LCA results (27%) when connected to this process.
Emission factors of emissions typically emitted from the diesel engines of inland waterway ships, consisting of NOx, NMVOC, CH4, CO, NH3, N2O and PM, were updated based on CORINAIR's Emission Inventory Guidebook from December 2006. The emission factors for CO2 and SO2 were obtained from the Intergovernmental Panel on Climate Change (IPCC) Revised Guidelines for National Greenhouse Gas Inventories from 2006.

## Technical purpose
< Transport > Standard transport of packaged goods with a payload of up to x tonnes for long distance transport over inland waterways.

## Model description
The open parameters in this processes enable the user to adjust the model to their individual circumstances. The description of the parameters is given alongside the parameters in the comments section.

For mathematical model details concerning the implementation of the CCF formula see:
http://www.gabi-software.com/fileadmin/GaBi_Databases/PEF_CFF_model_description.pdf

## Parameters
- Cap_utilisation: 0.769; min 0.1; max 1
  [-] Average capacity utilisation by mass (default 0,65)
- Distance: 1; = 1
  [km] distance start - end, default = 100 km
- Fuel_consumpt: 5.73497; = (0.0041 * Cap_utilisation ^ -0.734 * Load_actual * Distance)
  [kg] Diesel total consumption
- Load_actual: 1153.5; = 1500 * Cap_utilisation
  [t] payload
- S_content_fuel: 50; = 50
  [ppm] sulphur content in diesel, default Global - 50 ppm, Europe = 10 ppm
- Spec_consumpt: 4.9718e-6; = Fuel_consumpt / (Load_actual * 1000)
  [kg/kg] Diesel per kg cargo
- Spec_SO2_em: 4.9718e-10; = S_content_fuel / 1000000 * 2 * Spec_consumpt
  [kg] SO2 emission

## Reference product
- Transport: 1000; measured

## Inputs
- Diesel: 0.0088446; = 1778.95 * Spec_consumpt; calculated
- Cargo ship (piece): 3e-9; calculated
  German fleet 2300 pieces, 50 years of use, 16E9 tkm per year
- Waterways: 1.33e-6; calculated
  55,3E9 tkm in Germany per year, 100 years of use, 7350 km length

## Outputs
- methane (fossil) [Emissions to air, unspecified]: 8.96176e-7; = 0.180252 * Spec_consumpt; estimated
- sulfur dioxide [Emissions to air, unspecified]: 5.74636e-7; = 1155.79 * Spec_SO2_em; estimated
  cooling truck as basis: difference cooling truck- conventional truck added to ship value
- particles (PM2.5) [Emissions to air, unspecified]: 2.05368e-5; = 4.13066 * Spec_consumpt; estimated
- HFC-125 [Emissions to air, unspecified]: 2.44159e-7; calculated
- 1,1,1-trifluoroethane [Emissions to air, unspecified]: 2.88551e-7; calculated
- non-methane volatile organic compounds [Emissions to air, unspecified]: 2.35178e-5; = 4.73023 * Spec_consumpt; estimated
- carbon monoxide [Emissions to air, unspecified]: 5.72715e-5; = 11.5193 * Spec_consumpt; estimated
- carbon dioxide (fossil) [Emissions to air, unspecified]: 0.0272826; = 5487.47 * Spec_consumpt; estimated
- nitrogen oxides [Emissions to air, unspecified]: 0.000216377; = 43.5209 * Spec_consumpt; estimated
- HFC-134a [Emissions to air, unspecified]: 2.21963e-8; calculated

## Impact indicators
- Acidification: 0.000160872
- Climate change: 0.0299329
- Ecotoxicity, freshwater: 0.000204098
- Eutrophication marine: 8.41708e-5
- Eutrophication, terrestrial: 0.000921768
- Human toxicity, cancer: 2.60318e-16
- Human toxicity, non-cancer: 1.50633e-12
- EF-particulate Matter: 5.24878e-9
- Photochemical ozone formation - human health: 0.000242562
- Climate change-Fossil: 0.0299308
- Ecotoxicity, freshwater_inorganics: 1.30768e-6
- Ecotoxicity, freshwater_organics: 0.00020279
- Human toxicity, cancer_organics: 2.60318e-16
- Human toxicity, non-cancer_inorganics: 6.18246e-11
- Human toxicity, non-cancer_organics: 1.50633e-12
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
## Deviations from the LCI method approaches
Foreground system: no allocation is applied.

Background system: Within the refinery allocation by net calorific value and mass is used. For the combined crude oil, natural gas and natural gas liquids production allocation by net calorific value is applied.

## Modelling constants
Direct land use change: GHG emissions from direct LUC allocated to good/service for 20 years after the LUC occurs.
Carbon storage and delayed emissions: credits associated with temporary (carbon) storage or delayed emissions are not considered in the calculation of the EF for the default impact categories.
Emissions off-setting: not included
Fossil and biogenic carbon emissions and removals: removals and emissions are modelled as follows: All GHG emissions from fossil fuels (including peat and limestone) are modelled consistently with the ILCD list of elementary flows. In the case that the emissions refer to the molecules CO2 and CH4, they are modelled as ‘carbon dioxide (fossil)’ and ‘methane (fossil)’. Biogenic uptake and emissions are modelled separately. For land use change, all carbon emissions and uptakes are inventoried separately for each of the elementary flows. Soil carbon accumulation (uptake) via improved agricultural management is excluded from the model.

## Cut-off and completeness
A cut-off rule based on mass or energy flow or the level of environmental significance of max. 3% is applied and confirmed by the reviewer. An active cut-off within the system has not been applied, no data gaps are known and all elementary flows of environmental effect are included in the inventory.

Capital goods (including infrastructures) and their end of life are included unless the exclusion is clearly documented and conform with the cut-off principles.

System boundaries include all known processes linked to the product supply chain.

## Data selection and combination
LCI modeling is fully consistent.
Energy and transport datasets from the PEF energy and transports tender are consistently used.

## Data treatment and extrapolations
For details please see the document "GaBi Databases Modelling Principles"

## Use advice
Notice: this data set supersedes the EF3.0-compliant version (see link under "preceding data set version" below calculated with the EF3.0). The life cycle inventory is not changed from the original EF3.0 data set. The LCIA results are calculated based on the EF3.1 methods which provide updated characterisation factors in the following impact categories: Climate Change, Ecotoxicity freshwater, Photochemical Ozone Formation, Acidification, Human Toxicity non-cancer, and Human Toxicity cancer. The review report and the data quality ratings refer to the original results. The data set has been updated by the European Commission on the basis of the original EF3.0 data set delivered by the data provider.

Life Cycle Inventory (LCI) datasets to be used for implementing regular Product Environmental Footprint (PEF) studies and Organisation Environmental Footprint (OEF) studies exclusively under the specified Product groups and sectors as defined in the Product Environmental Footprint Category Rules (PEFCR) and Organisation Environmental Footprint Sectorial Rules (OEFSR) listed in https://ec.europa.eu/environment/eussd/smgp/ef_transition.htm
The datasets are specifically designed for these methodological requirements (see above) and the related LCIA methods (listed below) recommended in EF.

## Review details
The dataset is compliant to "Zampori L., Pant R.: Suggestions for updating the Product Environmental Footprint (PEF) method, 2019 and Fazio S., Zampori L., De Schryver A. et al.: Guide for EF compliant data sets, Version 2.0, 2020.
In the PEF context the fields "Methodological appropriateness and consistency" and "completeness" are not evaluated by the review since their good quality is defined as mandatory.

## Other review details
Good overall quality (2,25) interpreted into "good quality" in the PEF quality validation scheme. The quality indicator for completeness was not requested to be quantified as a single DQI for all tenders. If a value “Not evaluated / unknown” completeness is given, this indicates that a single DQI was not explicitly requested but the completeness is still to be understood as very good.
The Data Quality Indicator Results are conservative expert judgements, confirmed or - if necessary - corrected by the reviewers, based on their methodological as well as process understanding and considering semi-quantitatively the contribution of the DQIs of the used EF energy and transport datasets and of EF-related DQIs provided and reviewed within the GaBi databases. The overall DQIs of the datasets take into account primarily the quality and representativeness of the foreground technology information and that of the key upstream processes. If datasets are e.g. energy and transport intensive - or gain credits from energy recovery - the DQIs of the used EF energy and transport datasets influence the overall DQI significantly and have stronger been taken into account, via expert judgement. Analogous applies for other key background datasets. For the DQIs of the mentioned GaBi secondary datasets, similar DQIs had already been assigned to those datasets and were considered by the reviewers via expert judgement when assigning of the overall DQIs. In case of doubt, lower (i.e. lower quality) DQIs were assigned.

## Data sources
- Binnenschifffahrt in Zahlen 1994, 1994
- Verminderung der Luft- und Lärmbelastung im Güterfernverkehr 2010, Forschungsbericht, 10405962, 1994
- Verkehrswirtschaftlicher und ökologischer Vergleich der Verkehrsträger Straße, Bahn und Wasserstraße
- Technische und wirtschaftliche Konzepte für flußangepaßte Binnenschiffe
- Food transport refrigeration - Approaches to reduce energy consumption, 2009
- Emissionen und Minderungspotential von HFKW, FKW und SF6 in Deutschland Im Auftrag des UBA(29841256)
- Simulationsbasierte Energiebedarfsprognose in Seehafen Container-Terminals, 2016, online 2020
- Container Handbuch: Refrigerated containers and CA technology, online 2022

## Intended applications
Life Cycle Inventory (LCI) datasets to be used in Product Environmental Footprint Category Rules (PEFCRs) and Organisation Environmental Footprint Sectoral Rules (OEFSRs) developed in the context of the Environmental Footprint transition phase launched by the Commission in 2018.
