# elastic (synthetic fibers); spinning, weaving; Production mix, at plant; elastic for apparel (Polyester, Elastane, Nylon, PP)

Dataset: ILCD process, Partly terminated system
Geography: GLO
Reference year: 2021
Valid until: 2024
Classification: Systems / Textiles, furnitures and other interiors
LCI method principle: Attributional
LCI method approaches: Allocation - market value
Completeness: All relevant flows quantified
Project: Provision of process-based 3.0 Environmental Footprint-compliant life cycle inventory datasets - Apparel 1 - contract number 070201/2020/840291/SER/ENV.B.1
Generated by: Metsims Sustainability Consulting
Owner: PRé Sustainability B.V.
Compliance: ILCD Data Network - Entry-level; Suggestions for updating the PEF method 2019; ISO 14040 Environmental Management – Life Cycle Assessment – Principles and Framework, 2006; ISO 14044:2006. Environmental Management – Life Cycle Assessment – Requirements and guidelines.; Environmental Footprint 3.1
Review: Dependent internal review by Avraam Symeonidis, Emilia Moreno Ruiz; Independent review panel by Madhuri Nigam
Data quality: Overall quality: Good; Time representativeness: Very good; Geographical representativeness: Fair; Technological representativeness: Good; Precision: Fair; Methodological appropriateness and consistency: Not applicable
Amounts: no units in this file; such an amount is in the reference unit of its flow, which a separate flow dataset defines
copyright: true
licenseType: Free of charge for some user types or use types
accessRestrictions: Free of charge for all final users implementing a regular Product Environmental Footprint (PEF) studies and Organisation Environmental Footprint (OEF) studies exclusively under the specified Product groups and sectors as defined in the Product Environmental Footprint Category Rules (PEFCR) and Organisation Environmental Footprint Sectorial Rules (OEFSR) listed in http://ec.europa.eu/environment/eussd/smgp/PEFCR_OEFSR.htm and in accordance with the terms and conditions of the EULA (available at https://ecoinvent.lca-data.com/) exclusively until 31st December 2024. Any use of this dataset or any derivative data not within the specific context of one of the PEF/OEF projects or after the end of 2024 is not permitted.

## General comment
Notice: this data set supersedes the EF3.0-compliant version (see link under "preceding data set version" below calculated with the EF3.0). The life cycle inventory is not changed from the original EF3.0 data set. The LCIA results are calculated based on the EF3.1 methods which provide updated characterisation factors in the following impact categories: Climate Change, Ecotoxicity freshwater, Photochemical Ozone Formation, Acidification, Human Toxicity non-cancer, and Human Toxicity cancer. The review report and the data quality ratings refer to the original results. The data set has been updated by the European Commission on the basis of the original EF3.0 data set delivered by the data provider.Textile elastic band can be used in the manufacture of clothing, home textiles, advertising and souvenirs, decor for packaging gifts in the manufacture of disposable medical garments, medical masks.

For production of elastic, narrow weaving machines are used. Raw materials, spinning of yarns and weaving electricity consumption of elastic were included to process.

## Technology and included processes
Elastics can be produced with materials of Polyester, Lycra, Nylon, PP, Cotton. While production of elastics narrow weaving machines are used.

Raw material mixture, electricity consumption of narrow weaving and production wastes are included to model.

Waste processing model was generated from global waste collection rate. Global waste collection rate is 65%. 75% of waste collected are delivered to recycle facility and, 25% of collected waste are delivered to landfill areas. Uncollected part of waste (35%) was assumed that it is dropped to landfill areas. From production facility to landfill transport was assumed as 70 km.

## Parameters
- A_PET: 0.5
  The amount of waste PET produced is 0.00301546391752578kg. The assumed percentage of losses of the recycling process is 0.0999999999999999. R2 has been calculated as the original amount of waste minues losses, i.e. 0.0027139175257732kg. The value for A has been taken from the default values for the CFF. The default value for plastics is 0.5. Being pre-consumer waste, Qsout/Qp is assumed to be 1. The E*v part of the formula is modelled as a negative input of the relevant virgin material.
- Qsout/Qp_PET: 1
  (same comment as for A_PET)
- CFF_PET: 0.00301546; = (1-A_PET)*R2_PET
  (same comment as for A_PET)
- avoid_PET: 0.1; = CFF_PET*Qsout/Qp_PET
  (same comment as for A_PET)
- A_PP: 0.5
  The amount of waste PP produced is 0.0158720930232558kg. The assumed percentage of losses of the recycling process is 0.0356798457087753. R2 has been calculated as the original amount of waste minues losses, i.e. 0.0153057791931107kg. The value for A has been taken from the default values for the CFF. The default value for plastics is 0.5. Being pre-consumer waste, Qsout/Qp is assumed to be 1. The E*v part of the formula is modelled as a negative input of the relevant virgin material.
- Qsout/Qp_PP: 1
  (same comment as for A_PP)
- CFF_PP: 0.0158721; = (1-A_PP)*R2_PP
  (same comment as for A_PP)
- avoid_PP: 0.0356798; = CFF_PP*Qsout/Qp_PP
  (same comment as for A_PP)
- R2_PET: 0.00271392
  The amount of waste produced is 0.00301546391752578kg. The assumed percentage of losses of the recycling process is 0.0999999999999999. R2 has been calculated as the original amount of waste minues losses, i.e. 0.0027139175257732kg. The value for A has been taken from the default values for the CFF. The default value for plastics is 0.5. Being pre-consumer waste, Qsout/Qp is assumed to be 1. The E*v part of the formula is modelled as a negative input of the relevant virgin material.
- R2_PP: 0.0153058
  The amount of waste produced is 0.0158720930232558kg. The assumed percentage of losses of the recycling process is 0.0356798457087753. R2 has been calculated as the original amount of waste minues losses, i.e. 0.0153057791931107kg. The value for A has been taken from the default values for the CFF. The default value for plastics is 0.5. Being pre-consumer waste, Qsout/Qp is assumed to be 1. The E*v part of the formula is modelled as a negative input of the relevant virgin material.
- A_elast: 0.5
  The amount of waste elast produced is 0.00301546391752578kg. The assumed percentage of losses of the recycling process is 0.1. R2 has been calculated as the original amount of waste minues losses, i.e. 0.0027139175257732kg. The value for A has been taken from the default values for the CFF. The default value for plastics is 0.5. Being pre-consumer waste, Qsout/Qp is assumed to be 1. The E*v part of the formula is modelled as a negative input of the relevant virgin material.
- A_nylon: 0.5
  The amount of waste nylon produced is 0.00603092783505155kg. The assumed percentage of losses of the recycling process is 0.1. R2 has been calculated as the original amount of waste minues losses, i.e. 0.0054278350515464kg. The value for A has been taken from the default values for the CFF. The default value for plastics is 0.5. Being pre-consumer waste, Qsout/Qp is assumed to be 1. The E*v part of the formula is modelled as a negative input of the relevant virgin material.
- Qsout/Qp_elast: 1
  (same comment as for A_elast)
- Qsout/Qp_nylon: 1
  (same comment as for A_nylon)
- CFF_elast: 0.00301546; = (1-A_elast)*R2_elast
  (same comment as for A_elast)
- CFF_nylon: 0.00603093; = (1-A_nylon)*R2_nylon
  (same comment as for A_nylon)
- avoid_elast: 0.1; = CFF_elast*Qsout/Qp_elast
  (same comment as for A_elast)
- avoid_nylon: 0.1; = CFF_nylon*Qsout/Qp_nylon
  (same comment as for A_nylon)
- R2_elast: 0.00271392
  The amount of waste produced is 0.00301546391752578kg. The assumed percentage of losses of the recycling process is 0.1. R2 has been calculated as the original amount of waste minues losses, i.e. 0.0027139175257732kg. The value for A has been taken from the default values for the CFF. The default value for plastics is 0.5. Being pre-consumer waste, Qsout/Qp is assumed to be 1. The E*v part of the formula is modelled as a negative input of the relevant virgin material.
- R2_nylon: 0.00542784
  The amount of waste produced is 0.00603092783505155kg. The assumed percentage of losses of the recycling process is 0.1. R2 has been calculated as the original amount of waste minues losses, i.e. 0.0054278350515464kg. The value for A has been taken from the default values for the CFF. The default value for plastics is 0.5. Being pre-consumer waste, Qsout/Qp is assumed to be 1. The E*v part of the formula is modelled as a negative input of the relevant virgin material.
- kg_0: 0.206186
  Mass in kg, for elastane fibre / spandex // elastane fibre / spandex // glo; Articulated lorry transport, Euro 4, Total weight >32 t; EU+EFTA+UK
- km_0: 999.1
  Distance in km, for elastane fibre / spandex // elastane fibre / spandex // glo; Articulated lorry transport, Euro 4, Total weight >32 t; EU+EFTA+UK
- kg_km_0: 206; = kg_0*km_0
  Transport amount in km*km, for elastane fibre / spandex // elastane fibre / spandex // glo; Articulated lorry transport, Euro 4, Total weight >32 t; EU+EFTA+UK
- kg_1: 0.206186
  Mass in kg, for nylon 6 // nylon 6 production, fossil fuel-based // glo; Articulated lorry transport, Euro 4, Total weight >32 t; EU+EFTA+UK
- km_1: 999.1
  Distance in km, for nylon 6 // nylon 6 production, fossil fuel-based // glo; Articulated lorry transport, Euro 4, Total weight >32 t; EU+EFTA+UK
- kg_km_1: 206; = kg_1*km_1
  Transport amount in km*km, for nylon 6 // nylon 6 production, fossil fuel-based // glo; Articulated lorry transport, Euro 4, Total weight >32 t; EU+EFTA+UK
- kg_2: 0.206186
  Mass in kg, for polyamide 6.6 // nylon 6.6 production, fossil fuel-based // glo; Articulated lorry transport, Euro 4, Total weight >32 t; EU+EFTA+UK
- km_2: 999.1
  Distance in km, for polyamide 6.6 // nylon 6.6 production, fossil fuel-based // glo; Articulated lorry transport, Euro 4, Total weight >32 t; EU+EFTA+UK
- kg_km_2: 206; = kg_2*km_2
  Transport amount in km*km, for polyamide 6.6 // nylon 6.6 production, fossil fuel-based // glo; Articulated lorry transport, Euro 4, Total weight >32 t; EU+EFTA+UK
- kg_3: 0.206186
  Mass in kg, for polyethylene terephthalate, mix // polyethylene terephthalate (pet) production, blend of bio- based and fossil // glo; Articulated lorry transport, Euro 4, Total weight >32 t; EU+EFTA+UK
- km_3: 999.1
  Distance in km, for polyethylene terephthalate, mix // polyethylene terephthalate (pet) production, blend of bio- based and fossil // glo; Articulated lorry transport, Euro 4, Total weight >32 t; EU+EFTA+UK
- kg_km_3: 206; = kg_3*km_3
  Transport amount in km*km, for polyethylene terephthalate, mix // polyethylene terephthalate (pet) production, blend of bio- based and fossil // glo; Articulated lorry transport, Euro 4, Total weight >32 t; EU+EFTA+UK
- kg_4: 0.232558
  Mass in kg, for polypropylene, petrochemical // polypropylene (pp) production, petrochemical based // glo; Articulated lorry transport, Euro 4, Total weight >32 t; EU+EFTA+UK
- km_4: 1001.9
  Distance in km, for polypropylene, petrochemical // polypropylene (pp) production, petrochemical based // glo; Articulated lorry transport, Euro 4, Total weight >32 t; EU+EFTA+UK
- kg_km_4: 233; = kg_4*km_4
  Transport amount in km*km, for polypropylene, petrochemical // polypropylene (pp) production, petrochemical based // glo; Articulated lorry transport, Euro 4, Total weight >32 t; EU+EFTA+UK
- kg_5: 0.0293665
  Mass in kg, for waste (unspecified) // landfill of plastic waste // eu+efta+uk; Articulated lorry transport, Euro 4, Total weight >32 t; EU+EFTA+UK
- km_5: 70
  Distance in km, for waste (unspecified) // landfill of plastic waste // eu+efta+uk; Articulated lorry transport, Euro 4, Total weight >32 t; EU+EFTA+UK
- kg_km_5: 2.05565; = kg_5*km_5
  Transport amount in km*km, for waste (unspecified) // landfill of plastic waste // eu+efta+uk; Articulated lorry transport, Euro 4, Total weight >32 t; EU+EFTA+UK
- kg_6: 0.206186
  Mass in kg, for elastane fibre / spandex // elastane fibre / spandex // glo; Transoceanic ship, containers; GLO
- km_6: 17993.5
  Distance in km, for elastane fibre / spandex // elastane fibre / spandex // glo; Transoceanic ship, containers; GLO
- kg_km_6: 3710; = kg_6*km_6
  Transport amount in km*km, for elastane fibre / spandex // elastane fibre / spandex // glo; Transoceanic ship, containers; GLO
- kg_7: 0.206186
  Mass in kg, for nylon 6 // nylon 6 production, fossil fuel-based // glo; Transoceanic ship, containers; GLO
- km_7: 17993.5
  Distance in km, for nylon 6 // nylon 6 production, fossil fuel-based // glo; Transoceanic ship, containers; GLO
- kg_km_7: 3710; = kg_7*km_7
  Transport amount in km*km, for nylon 6 // nylon 6 production, fossil fuel-based // glo; Transoceanic ship, containers; GLO
- kg_8: 0.206186
  Mass in kg, for polyamide 6.6 // nylon 6.6 production, fossil fuel-based // glo; Transoceanic ship, containers; GLO
- km_8: 17993.5
  Distance in km, for polyamide 6.6 // nylon 6.6 production, fossil fuel-based // glo; Transoceanic ship, containers; GLO
- kg_km_8: 3710; = kg_8*km_8
  Transport amount in km*km, for polyamide 6.6 // nylon 6.6 production, fossil fuel-based // glo; Transoceanic ship, containers; GLO
- kg_9: 0.206186
  Mass in kg, for polyethylene terephthalate, mix // polyethylene terephthalate (pet) production, blend of bio- based and fossil // glo; Transoceanic ship, containers; GLO
- km_9: 17993.5
  Distance in km, for polyethylene terephthalate, mix // polyethylene terephthalate (pet) production, blend of bio- based and fossil // glo; Transoceanic ship, containers; GLO
- kg_km_9: 3710; = kg_9*km_9
  Transport amount in km*km, for polyethylene terephthalate, mix // polyethylene terephthalate (pet) production, blend of bio- based and fossil // glo; Transoceanic ship, containers; GLO
- kg_10: 0.232558
  Mass in kg, for polypropylene, petrochemical // polypropylene (pp) production, petrochemical based // glo; Transoceanic ship, containers; GLO
- km_10: 18017
  Distance in km, for polypropylene, petrochemical // polypropylene (pp) production, petrochemical based // glo; Transoceanic ship, containers; GLO
- kg_km_10: 4190; = kg_10*km_10
  Transport amount in km*km, for polypropylene, petrochemical // polypropylene (pp) production, petrochemical based // glo; Transoceanic ship, containers; GLO

## Reference product
- elastic // elastic (synthetic fibers) // glo: 1

## Inputs
- Electricity from Electricity grid mix 1kV-60kV - AU: 0.0068
- Electricity from Electricity grid mix 1kV-60kV - EU+EFTA+UK: 0.0996
- Electricity from Electricity grid mix 1kV-60kV - NZ: 0.0013
- Electricity from Electricity grid mix 1kV-60kV - RAF: 0.0218
- Electricity from Electricity grid mix 1kV-60kV - RNA: 0.1457
- Electricity from Electricity grid mix 1kV-60kV - RSA: 0.0495
- Electricity from Electricity grid mix 1kV-60kV - RU: 0.0291
- Transport of elastane fibre / spandex // elastane fibre / spandex // glo by Articulated lorry transport, Euro 4, Total weight >32 t - EU+EFTA+UK: 206; = kg_km_0
- Transport of nylon 6 // nylon 6 production, fossil fuel-based // glo by Articulated lorry transport, Euro 4, Total weight >32 t - EU+EFTA+UK: 206; = kg_km_1
- Transport of polyamide 6.6 // nylon 6.6 production, fossil fuel-based // glo by Articulated lorry transport, Euro 4, Total weight >32 t - EU+EFTA+UK: 206; = kg_km_2
- Transport of polyethylene terephthalate, mix // polyethylene terephthalate (pet) production, blend of bio- based and fossil // glo by Articulated lorry transport, Euro 4, Total weight >32 t - EU+EFTA+UK: 206; = kg_km_3
- Transport of polypropylene, petrochemical // polypropylene (pp) production, petrochemical based // glo by Articulated lorry transport, Euro 4, Total weight >32 t - EU+EFTA+UK: 233; = kg_km_4
- Transport of waste (unspecified) // landfill of plastic waste // eu+efta+uk by Articulated lorry transport, Euro 4, Total weight >32 t - EU+EFTA+UK: 2.05565; = kg_km_5
- Transport of elastane fibre / spandex // elastane fibre / spandex // glo by Transoceanic ship, containers - GLO: 3710; = kg_km_6
- Transport of nylon 6 // nylon 6 production, fossil fuel-based // glo by Transoceanic ship, containers - GLO: 3710; = kg_km_7
- Transport of polyamide 6.6 // nylon 6.6 production, fossil fuel-based // glo by Transoceanic ship, containers - GLO: 3710; = kg_km_8
- Transport of polyethylene terephthalate, mix // polyethylene terephthalate (pet) production, blend of bio- based and fossil // glo by Transoceanic ship, containers - GLO: 3710; = kg_km_9
- Transport of polypropylene, petrochemical // polypropylene (pp) production, petrochemical based // glo by Transoceanic ship, containers - GLO: 4190; = kg_km_10
- polyethylene terephthalate, recycled, pre-consumer // polyethylene terephthalate (pet) production, recycled, semi-mechanical, pre-consumer // glo: 0.00135696; = CFF_PET
- elastane fibre / spandex, recycled, pre-consumer // elastane fibre / spandex // glo: 0.00135696; = CFF_elast
- Electricity from Electricity grid mix 1kV-60kV - CN: 0.14931
- Electricity from Electricity grid mix 1kV-60kV - RAS w/o CN: 0.16359
- nylon, recycled // nylon production, recycled, mechanical // glo: 0.00271392; = CFF_nylon
- polypropylene, recycled // polypropylene production, recycled, pre-consumer // glo: 0.00765289; = CFF_PP
- elastic // elastic (synthetic fibers) // glo, blackbox: 1
- elastic // elastic (synthetic fibers) // glo, elementary: 1

## Outputs
- avoided product system, elast from elastic (synthetic fibers) // avoided product system elast in elastic (synthetic fibers) // glo: 0.00135696; = avoid_elast
- avoided product system, nylon from elastic (synthetic fibers) // avoided product system nylon in elastic (synthetic fibers) // glo: 0.00271392; = avoid_nylon
- avoided product system, pet from elastic (synthetic fibers) // avoided product system pet in elastic (synthetic fibers) // glo: 0.00135696; = avoid_PET
- avoided product system, pp from elastic (synthetic fibers) // avoided product system pp in elastic (synthetic fibers) // glo: 0.00765289; = avoid_PP

## Impact indicators
- Eutrophication marine: 0.0167898
- Ecotoxicity, freshwater: 87.2274
- Land use: 12.3128
- Water use: 3.15851
- Resource use, minerals and metals: 0.000279182
- Resource use, fossils: 130.269
- Climate change: 8.12145
- Ozone depletion: 8.96399e-8
- Human toxicity, cancer: 5.57317e-9
- Human toxicity, non-cancer: 5.54356e-8
- EF-particulate Matter: 1.40104e-6
- Ionising radiation, human health: 0.249799
- Photochemical ozone formation - human health: 0.0347035
- Acidification: 0.0631894
- Eutrophication, terrestrial: 0.130649
- Eutrophication, freshwater: 0.00031508

## Deviations from the LCI method principle
The background data uses:
- the \xe2\x80\x9cRecycled content cut-off\xe2\x80\x9d approach to allocate end-of-life by-products and secondary materials. This allocation is explained in the description of the recycled content system model (http://www.ecoinvent.org/database/system-models-in-ecoinvent-3/cut-off-system-model/allocation-cut-off-by-classification.html).
OR
- EF compliant data

## Deviations from the LCI method approaches
Background data:
- the \xe2\x80\x9cRecycled content cut-off\xe2\x80\x9d approach to allocate end-of-life by-products and secondary materials. This allocation is explained in the description of the recycled content system model (http://www.ecoinvent.org/database/system-models-in-ecoinvent-3/cut-off-system-model/allocation-cut-off-by-classification.html). The ecoinvent database mostly relies on “Allocation – market values” apart for few exceptions particularly in the energy sector. ecoinvent energy data is replaced with EF3.0 core data as per the EF guidelines version 2.0.
OR
- EF compliant data

CFF implementation:
-For recycling of waste cotton. The original amount of waste material was 0.0286764705882353kg. The default A of 0.8 for textile shirt was used. 20% of the original amount is therefore considered to reflect the implementation of the CFF formula. Being pre-consumer waste, Qsout/Qp is assumed to be 1. The E*v part of the formula is modelled as a negative input of the relevant virgin material. 90% of the amount of the produced waste material is used to account for losses during recycling.

## Modelling constants
All modelling constants follow the requirements listed in the Tender Specifications 070201/2020/SER/ENV.B1. Completeness: There are no intentional cut-offs in the inventory no matter how small their contribution to all the EF impact categories is. Eventual cut-offs are in compliance with the Guide for EF compliant data sets (JRC 2020), i.e. only if below the 3% cut-off rule. Water use: water use is modelled at country level using separate flows for water withdrawal, water release and water evaporation. Handling multi-functional processes: the following PEF multi- functionality decision hierarchy is applied for resolving all multi- functionality problems: (1) subdivision or system expansion; (2) allocation based on a relevant underlying physical relationship (substitution may apply here); (3) allocation based on some other relationship. Direct land use change: GHG emissions from direct LUC allocated to good/service for 20 years after the LUC occurs, with IPCC default values. Carbon storage and delayed emissions: credits associated with temporary (carbon) storage or delayed emissions up to 300 years are not be considered. Emissions off-setting: are not included. Capital goods (including infrastructures) and their End of life: they are included. System boundaries: system boundaries include all processes linked to the product supply chain (e.g. maintenance). Time period: emissions and removals are modelled as if released or removed at the beginning of the assessment method. Fossil and biogenic carbon emissions and removals: removals and emissions are modelled as follows: All GHG emissions from fossil fuels (including peat and limestone) are modelled consistently with the most updated ILCD list of elementary flows. The non-fossil (biogenic) carbon flows are modelled consistently with the most updated ILCD list of elementary flows.

## Cut-off and completeness
There are no intentional cut-offs in the inventory no matter how small their contribution to all the EF impact categories is. Eventual cut-offs are in compliance with the Guide for EF compliant data sets (JRC 2020), i.e. only if below the 3% cut-off rule. The dataset dry mass and water balance has been checked to ensure the inventory is complete. Capital goods (e.g. infrastructure) and their end-of-life are included.

## Data selection and combination
These datasets include, in both their foreground and background data, links to EF3.0 compliant data.
The relevant background data on energy, transport, and End of Life are from the LCDN data node (http://lcdn.thinkstep.com/Node/).
All other background data in the supply of this product for which no EF3.0 process was available are from ecoinvent v3.7 database (www.ecoinvent.org) or other data sources.

## Data treatment and extrapolations
Several data sources have been used to model the inventory.

## Review details
Internal reviews have been asked to review the plausibility of the unit process, LCIA scores, and DQRs. Internal reviewers have also been asked to review the data for EF compliancy. The consortium is therefore responsible for aspects such as compliancy with the ILCD format, including validation in Look@LCI, and nomenclature.
Internal reviwers have been asked to judge based on the process name, that the unit process models in a complete and representative way the process in the requested location. The review encompassed the plausability of:
- exchanges with nature (elementary flows) as well as exchanges such as product and waste flows.
- meta information (general comment, technology comment, system boundaries, allocation, cut-off rules, etc.). Reviewers were asked to judge if the provided information is enough to understand the content of the process.
- LCIA scores
- DQRs including precision, technology, time and geography. As well as the overall DQR.
External reviewers have been asked to provide their expertise in the field of interest. External reviewers have been asked to review the unit process, including eventual methodological choices, the LCIA scores (provided with contribution scores as well), and DQRs. External reviewers have been provided all the information in a tool developed by the consortium for the purpose of this project.
External reviewers have been asked to judge based on the process name, that the unit process models in a complete and representative way the process in the requested location. The review encompassed:
- Plausability and completeness of exchanges with nature (elementary flows) as well as exchanges such as product and waste flows.
- Review of meta information (general comment, technology comment, system boundaries, allocation, cut-off rules, etc.). Reviewers were asked to judge if the provided information is enough to understand the content of the process.
- Review of properties (biogenic carbon and water content).
- Review of allocation keys.
- Plausability of LCIA scores calculated by the consortium.
- Plausability of DQRs including precision, technology, time and geography. As well as the overall DQR.

## Data sources
- Background Data for Representative products and organisations. EF 3.0 compliant (data stock)
- KYANG YHE DELICATE MACHINE CO., LTD., https://kyangyhegroup.en.alibaba.com/product/50043210809-807258643/KY_high_quality_needle_loom_polyester_elastic_tape_making_machine.html, Access Date: 05.04.2021
- Guangzhou Yong Jin Machinery Co., Ltd., https://www.alibaba.com/product-detail/Elastic-Tape-Machine-Elastic-Tape-Machine_1600106297187.html?spm=a2700.7735675.normal_offer.d_title.790726c89zCC4W&s=p, Access Date: 05.04.2021
- Ningbo MH Industry Co., Ltd., https://www.alibaba.com/product-detail/Elastic-Tape-Wholesale-Custom-25mm-30mm_1243150535.html?spm=a2700.7724857.normal_offer.d_image.3bd629e7FccMQY&s=p, Access Date: 05.04.2021
- Suzhou Jinmanyi Zipper Co., Ltd., https://www.alibaba.com/product-detail/Elastic-Tape-Elastic-Elastic-Tape-Webbing_1600084241241.html?spm=a2700.7724857.normal_offer.d_image.3bd629e7FccMQY&s=p, Access Date: 05.04.2021
- Ruian Baosheng Ribbon Co., Ltd., https://www.alibaba.com/product-detail/Tape-Cheap-New-Product-35mm-100_1600210705423.html?spm=a2700.7724857.normal_offer.d_image.3bd629e7FccMQY&s=p, Access Date: 05.04.2021
- Rong Sheng Furniture Material Co., Ltd., https://www.alibaba.com/product-detail/2019-hot-upholstery-webbing-trampoline-elastic_1600157516969.html?spm=a2700.7724857.normal_offer.d_title.3bd629e7FccMQY, Access Date: 05.04.2021
- Jiangsu Xiaochen Garment Accessories Co., Ltd., https://www.alibaba.com/product-detail/1-5-inch-soft-customized-printed_60700221078.html?spm=a2700.7724857.normal_offer.d_title.3bd629e7FccMQY, Access Date: 05.04.2021
- Vignesh, K. S., Rajadesingu, S., & Arunachalam, K. D. (2021). Challenges, issues, and problems with zero-waste tools. In Concepts of Advanced Zero Waste Tools (pp. 69-90). Elsevier.
- Altun, S. (2012). Prediction of textile waste profile and recycling opportunities in Turk. Fibres & Textiles in Eastern Europe.

## Intended applications
Implementation of regular Product Environmental Footprint (PEF) studies and Organisation Environmental Footprint (OEF) studies exclusively under the specified Product groups and sectors as defined in the Product Environmental Footprint Category Rules (PEFCR) and Organisation Environmental Footprint Sectorial Rules (OEFSR) listed in http://ec.europa.eu/environment/eussd/smgp/PEFCR_OEFSR.htm
