# treatment, anti uv, elementary; anti UV treatment; production mix, at plant; service

Dataset: ILCD process, Unit process, single operation
Geography: GLO
Reference year: 2021
Valid until: 2024
Classification: Other Services / Other services
LCI method principle: Attributional
LCI method approaches: Allocation - market value
Completeness: All relevant flows quantified
Project: Provision of process-based 3.0 Environmental Footprint-compliant life cycle inventory datasets - Apparel 1 - contract number 070201/2020/840291/SER/ENV.B.1
Generated by: Life Cycle Indonesia
Owner: PRé Sustainability B.V.
Compliance: Environmental Footprint non-primary supporting data set; Environmental Footprint 3.1
Amounts: no units in this file; such an amount is in the reference unit of its flow, which a separate flow dataset defines
copyright: true
licenseType: Free of charge for some user types or use types
accessRestrictions: Free of charge for all final users implementing a regular Product Environmental Footprint (PEF) studies and Organisation Environmental Footprint (OEF) studies exclusively under the specified Product groups and sectors as defined in the Product Environmental Footprint Category Rules (PEFCR) and Organisation Environmental Footprint Sectorial Rules (OEFSR) listed in http://ec.europa.eu/environment/eussd/smgp/PEFCR_OEFSR.htm and in accordance with the terms and conditions of the EULA (available at https://ecoinvent.lca-data.com/) exclusively until 31st December 2024. Any use of this dataset or any derivative data not within the specific context of one of the PEF/OEF projects or after the end of 2024 is not permitted.

## General comment
Notice: this data set supersedes the EF3.0-compliant version (see link under "preceding data set version" below calculated with the EF3.0). The life cycle inventory is not changed from the original EF3.0 data set. The LCIA results are calculated based on the EF3.1 methods which provide updated characterisation factors in the following impact categories: Climate Change, Ecotoxicity freshwater, Photochemical Ozone Formation, Acidification, Human Toxicity non-cancer, and Human Toxicity cancer. The review report and the data quality ratings refer to the original results. The data set has been updated by the European Commission on the basis of the original EF3.0 data set delivered by the data provider.This sub-process has limited documentation only. For all detailed documentation of the full model to which this data set belongs (such as DQRs, review reports and other technical documentation), please see this process: treatment, anti uv - GLO []

## Technology and included processes
The process starts by making a bath or water with liquor ratio of 1:20 in a sealed stainless steel treatment pot. the inital bath composed of o.5% of amphoteric levelling agent (kelorian A2N-Benzema) and 1ml/l of pH-Regulator (Meropan EF-Bezema). After 20 minutes of bath circulation at 40 ◦C, 3, 6 or 9% owf (of weight-of-fabric) of individual TiO2 paste was added, raising the bath's temperature up to 98 ◦C with a heating rate of 2 ◦C/min, thereon, maintained for 60 minutes and then reduced to 60 ◦C. Treated samples were rinsed in a warm and then cold water, and dried at room temperature.

This process includes industrial washing machine with sealed pot to prevent heat loss, therefore the power needed to reach certain higher temperature will be counted by using mean heat transfer rate equation and assumed uses no eletricity if the desired temperature is lower than current temperature. Amphoteric levelling agent is identified as chemical, organic // market for chemical, organic // GLO. pH-regulator and acetic acid for pH adjustment will be excluded from this measurement. Besides electricity consumption, infrastructure, water consumptions and chemicals consumption are included. The water used in this process is de-ionised water. The de-ionised water produced on site is included as well in this dataset. There is no direct emission to air since the emission comes from electricity usage, while the emission comes from wastewater and waste lube oil. The amount of wastewater is total of water input and chemical used that is carried along with the wastewater. The consumption of lubricating oil using a thermobonding oven as a proxy.

Fakin, Darinka (2015) The Role of TiO2 Nanoparticles on the UV Protection Ability
and Hydrophilicity of Polyamide Fabrics http://przyrbwn.icm.edu.pl/APP/PDF/127/a127z4p020.pdf, 2000 Maribor, Slovenia

______________________________________________________________________________

"The process starts by soaking fabric for 10 min in dispersion of ZnO particles (5% W/W) and stirred. the fabric then squeezed on a padding mangle to remove the excess dispersion and dried in an oven at 130 degree celcius for 15 min.

This process includes padding machine and drying machine proxy to pad - dry process. the water usage of this process are proxy to Treatment, anti UV (TiO2). the water used is 20 kg for initial soak.

Kathirvelu Subramanian (2009), UV protection finishing of textiles using ZnO nanoparticles https://www.researchgate.net/publication/279585204_UV_protection_finishing_of_textiles_using_ZnO_nanoparticles, India"

_____________________________________________________________________________

The amount of materials, energies, and etc in this case will be 50% from the Treatment, Anti UV (TiO2) and 50% from Treatment, anti UV (ZnO)

## Reference product
- treatment, anti uv // treatment, anti uv // glo, elementary: 1

## Outputs
- Water, Emissions to air, unspecified: 0.008

## Impact indicators
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
## Deviations from the LCI method principle
The background data uses:
- the \xe2\x80\x9cRecycled content cut-off\xe2\x80\x9d approach to allocate end-of-life by-products and secondary materials. This allocation is explained in the description of the recycled content system model (http://www.ecoinvent.org/database/system-models-in-ecoinvent-3/cut-off-system-model/allocation-cut-off-by-classification.html).
OR
- EF compliant data

## Deviations from the LCI method approaches
Background data:
- the \xe2\x80\x9cRecycled content cut-off\xe2\x80\x9d approach to allocate end-of-life by-products and secondary materials. This allocation is explained in the description of the recycled content system model (http://www.ecoinvent.org/database/system-models-in-ecoinvent-3/cut-off-system-model/allocation-cut-off-by-classification.html). The ecoinvent database mostly relies on “Allocation – market values” apart for few exceptions particularly in the energy sector. ecoinvent energy data is replaced with EF3.0 core data as per the EF guidelines version 2.0.
OR
- EF compliant data

## Modelling constants
All modelling constants follow the requirements listed in the Tender Specifications 070201/2020/SER/ENV.B1. Completeness: There are no intentional cut-offs in the inventory no matter how small their contribution to all the EF impact categories is. Eventual cut-offs are in compliance with the Guide for EF compliant data sets (JRC 2020), i.e. only if below the 3% cut-off rule. Water use: water use is modelled at country level using separate flows for water withdrawal, water release and water evaporation. Handling multi-functional processes: the following PEF multi- functionality decision hierarchy is applied for resolving all multi- functionality problems: (1) subdivision or system expansion; (2) allocation based on a relevant underlying physical relationship (substitution may apply here); (3) allocation based on some other relationship. Direct land use change: GHG emissions from direct LUC allocated to good/service for 20 years after the LUC occurs, with IPCC default values. Carbon storage and delayed emissions: credits associated with temporary (carbon) storage or delayed emissions up to 300 years are not be considered. Emissions off-setting: are not included. Capital goods (including infrastructures) and their End of life: they are included. System boundaries: system boundaries include all processes linked to the product supply chain (e.g. maintenance). Time period: emissions and removals are modelled as if released or removed at the beginning of the assessment method. Fossil and biogenic carbon emissions and removals: removals and emissions are modelled as follows: All GHG emissions from fossil fuels (including peat and limestone) are modelled consistently with the most updated ILCD list of elementary flows. The non-fossil (biogenic) carbon flows are modelled consistently with the most updated ILCD list of elementary flows.

## Cut-off and completeness
There are no intentional cut-offs in the inventory no matter how small their contribution to all the EF impact categories is. Eventual cut-offs are in compliance with the Guide for EF compliant data sets (JRC 2020), i.e. only if below the 3% cut-off rule. The dataset dry mass and water balance has been checked to ensure the inventory is complete. Capital goods (e.g. infrastructure) and their end-of-life are included.

## Data selection and combination
These datasets include, in both their foreground and background data, links to EF3.0 compliant data.
The relevant background data on energy, transport, and End of Life are from the LCDN data node (http://lcdn.thinkstep.com/Node/).
All other background data in the supply of this product for which no EF3.0 process was available are from ecoinvent v3.7 database (www.ecoinvent.org) or other data sources.

## Data treatment and extrapolations
Several data sources have been used to model the inventory.

## Use advice
This data set is a supporting sub-data set and must be used exclusively as sub-data set of its corresponding level-1 partly disaggregated data set (see “General comment” field for exact name and UUID).

## Data sources
- Background Data for Representative products and organisations. EF 3.0 compliant (data stock)
- UN Data (2018) Statistics Data for Lubricants Productions, http://data.un.org/Data.aspx?q=Lubricants&d=EDATA&f=cmID%3aLU, United Nations Statistics Division, Global
- Kathirvelu Subramanian (2009), UV protection finishing of textiles using ZnO nanoparticles https://www.researchgate.net/publication/279585204_UV_protection_finishing_of_textiles_using_ZnO_nanoparticles, India
- Deguan (2018) Balloon Padder with Detwister and Squeezer for tubular fabric only, http://www.textilemachinery.com.cn/index.php?m=content&c=index&a=show&catid=59&id=82, Dezhou Deguan TextileMachinery Co.,Ltd., Shandong, China
- Finestart (2017) Drying Machine (Textile Dryer Machine,Relax dryer), http://www.finestart.com.cn/index.php?m=content&c=index&a=show&catid=56&id=63, Shandong Finestart Imp.& Exp. Co.,Ltd., Shandong, China
- Fakin, Darinka (2015) The Role of TiO2 Nanoparticles on the UV Protection Ability and Hydrophilicity of Polyamide Fabrics http://przyrbwn.icm.edu.pl/APP/PDF/127/a127z4p020.pdf, 2000 Maribor, Slovenia
- Tupesa (2021) SL Washer Extractors, https://www.tupesa.com/index.php?route=product/product&path=72_61&product_id=62, Tupesa Maquinaria Textil, Girona, Spain.

## Intended applications
Implementation of regular Product Environmental Footprint (PEF) studies and Organisation Environmental Footprint (OEF) studies exclusively under the specified Product groups and sectors as defined in the Product Environmental Footprint Category Rules (PEFCR) and Organisation Environmental Footprint Sectorial Rules (OEFSR) listed in http://ec.europa.eu/environment/eussd/smgp/PEFCR_OEFSR.htm
