# construction of demersal trawl; for fish capture on or near the sea floor; production mix, at plant; Construction of a 70 m long demersal trawl net, with total mass of 19.6 tonnes.

Dataset: ILCD process, Partly terminated system
Geography: EU+EFTA+UK
Reference year: 2021
Valid until: 2024
Classification: Systems / Other systems
LCI method principle: Attributional
LCI method approaches: Allocation - market value
Completeness: All relevant flows quantified
Project: Provision of process-based 3.0 Environmental Footprint-compliant life cycle inventory datasets - Others - contract number 070201/2020/840235/SER/ENV.B.1
Generated by: The Green House
Owner: PRé Sustainability B.V.
Compliance: ILCD Data Network - Entry-level; Suggestions for updating the PEF method 2019; ISO 14040 Environmental Management – Life Cycle Assessment – Principles and Framework, 2006; ISO 14044:2006. Environmental Management – Life Cycle Assessment – Requirements and guidelines.; Environmental Footprint 3.1
Review: Dependent internal review by Avraam Symeonidis, Emilia Moreno Ruiz; Independent review panel by Angel Avadi
Data quality: Overall quality: Good; Time representativeness: Very good; Geographical representativeness: Fair; Technological representativeness: Good; Precision: Good; Methodological appropriateness and consistency: Not applicable
Amounts: no units in this file; such an amount is in the reference unit of its flow, which a separate flow dataset defines
copyright: true
licenseType: Free of charge for some user types or use types
accessRestrictions: Free of charge for all final users implementing a regular Product Environmental Footprint (PEF) studies and Organisation Environmental Footprint (OEF) studies exclusively under the specified Product groups and sectors as defined in the Product Environmental Footprint Category Rules (PEFCR) and Organisation Environmental Footprint Sectorial Rules (OEFSR) listed in http://ec.europa.eu/environment/eussd/smgp/PEFCR_OEFSR.htm and in accordance with the terms and conditions of the EULA (available at https://ecoinvent.lca-data.com/) exclusively until 31st December 2024. Any use of this dataset or any derivative data not within the specific context of one of the PEF/OEF projects or after the end of 2024 is not permitted.

## General comment
Notice: this data set supersedes the EF3.0-compliant version (see link under "preceding data set version" below calculated with the EF3.0). The life cycle inventory is not changed from the original EF3.0 data set. The LCIA results are calculated based on the EF3.1 methods which provide updated characterisation factors in the following impact categories: Climate Change, Ecotoxicity freshwater, Photochemical Ozone Formation, Acidification, Human Toxicity non-cancer, and Human Toxicity cancer. The review report and the data quality ratings refer to the original results. The data set has been updated by the European Commission on the basis of the original EF3.0 data set delivered by the data provider.The dataset models one demersal trawl net, which is 70 m long and has a total mass of 19.6 tonnes. Demersal trawl nets are large nets used to capture fish on or near the sea floor. The nets have a large open end, typically kept open through the use of net doors or gates. Behind this the nets have a conical shape.

## Technology and included processes
The dataset is based on general materials of construction, as well as the quantity of material per meter of net length from the Agribalyse database. References: Agribalyse (2021) Agribalyse 3.0 database; MSC (2021) Fishing methods and gear types. Marine Stewardship Council (MSC). Available at: https://www.msc.org/what-we-are-doing/our-approach/fishing-methods-and-gear-types; Seafish (2021) Fishing gear database. Available at: https://www.seafish.org/responsible-sourcing/fishing-gear-database/; M. P Remesan, Renjith, R.K., 2017. Design and Operation of Trawls, in: Recent Trends in Harvest and Post-Harvest Technologies in Fisheries. Central Institute of Fisheries Technology, Kochi, India.

## Parameters
- kg_0: 391.943
  Mass in kg, for ethylene-vinyl acetate (eva) // ethylene-vinyl acetate (eva) production // eu+efta+uk; Articulated lorry transport, Euro 4, Total weight >32 t; EU+EFTA+UK
- km_0: 130
  Distance in km, for ethylene-vinyl acetate (eva) // ethylene-vinyl acetate (eva) production // eu+efta+uk; Articulated lorry transport, Euro 4, Total weight >32 t; EU+EFTA+UK
- kg_km_0: 50952.6; = kg_0*km_0
  Transport amount in km*km, for ethylene-vinyl acetate (eva) // ethylene-vinyl acetate (eva) production // eu+efta+uk; Articulated lorry transport, Euro 4, Total weight >32 t; EU+EFTA+UK
- kg_1: 8981.88
  Mass in kg, for waste (unspecified) // landfill of inert (steel) // eu+efta+uk; Articulated lorry transport, Euro 4, Total weight >32 t; EU+EFTA+UK
- km_1: 77
  Distance in km, for waste (unspecified) // landfill of inert (steel) // eu+efta+uk; Articulated lorry transport, Euro 4, Total weight >32 t; EU+EFTA+UK
- kg_km_1: 691605; = kg_1*km_1
  Transport amount in km*km, for waste (unspecified) // landfill of inert (steel) // eu+efta+uk; Articulated lorry transport, Euro 4, Total weight >32 t; EU+EFTA+UK
- kg_2: 7932.14
  Mass in kg, for waste (unspecified) // landfill of inert material (other materials) // eu+efta+uk; Articulated lorry transport, Euro 4, Total weight >32 t; EU+EFTA+UK
- km_2: 77
  Distance in km, for waste (unspecified) // landfill of inert material (other materials) // eu+efta+uk; Articulated lorry transport, Euro 4, Total weight >32 t; EU+EFTA+UK
- kg_km_2: 610775; = kg_2*km_2
  Transport amount in km*km, for waste (unspecified) // landfill of inert material (other materials) // eu+efta+uk; Articulated lorry transport, Euro 4, Total weight >32 t; EU+EFTA+UK
- kg_3: 3636.67
  Mass in kg, for high density polyethylene, petrochemical // high density polyethylene (hdpe) production, fossil fuel-based // glo; Articulated lorry transport, Euro 4, Total weight >32 t; EU+EFTA+UK
- km_3: 130
  Distance in km, for high density polyethylene, petrochemical // high density polyethylene (hdpe) production, fossil fuel-based // glo; Articulated lorry transport, Euro 4, Total weight >32 t; EU+EFTA+UK
- kg_km_3: 472767; = kg_3*km_3
  Transport amount in km*km, for high density polyethylene, petrochemical // high density polyethylene (hdpe) production, fossil fuel-based // glo; Articulated lorry transport, Euro 4, Total weight >32 t; EU+EFTA+UK
- kg_4: 3903.53
  Mass in kg, for isobutylene isoprene rubber (iir) // isobutylene isoprene rubber (iir) production // glo; Articulated lorry transport, Euro 4, Total weight >32 t; EU+EFTA+UK
- km_4: 130
  Distance in km, for isobutylene isoprene rubber (iir) // isobutylene isoprene rubber (iir) production // glo; Articulated lorry transport, Euro 4, Total weight >32 t; EU+EFTA+UK
- kg_km_4: 507458; = kg_4*km_4
  Transport amount in km*km, for isobutylene isoprene rubber (iir) // isobutylene isoprene rubber (iir) production // glo; Articulated lorry transport, Euro 4, Total weight >32 t; EU+EFTA+UK
- kg_5: 391.943
  Mass in kg, for ethylene-vinyl acetate (eva) // ethylene-vinyl acetate (eva) production // eu+efta+uk; Barge; EU+EFTA+UK
- km_5: 270
  Distance in km, for ethylene-vinyl acetate (eva) // ethylene-vinyl acetate (eva) production // eu+efta+uk; Barge; EU+EFTA+UK
- kg_km_5: 105825; = kg_5*km_5
  Transport amount in km*km, for ethylene-vinyl acetate (eva) // ethylene-vinyl acetate (eva) production // eu+efta+uk; Barge; EU+EFTA+UK
- kg_6: 3636.67
  Mass in kg, for high density polyethylene, petrochemical // high density polyethylene (hdpe) production, fossil fuel-based // glo; Barge; EU+EFTA+UK
- km_6: 270
  Distance in km, for high density polyethylene, petrochemical // high density polyethylene (hdpe) production, fossil fuel-based // glo; Barge; EU+EFTA+UK
- kg_km_6: 981902; = kg_6*km_6
  Transport amount in km*km, for high density polyethylene, petrochemical // high density polyethylene (hdpe) production, fossil fuel-based // glo; Barge; EU+EFTA+UK
- kg_7: 3903.53
  Mass in kg, for isobutylene isoprene rubber (iir) // isobutylene isoprene rubber (iir) production // glo; Barge; EU+EFTA+UK
- km_7: 270
  Distance in km, for isobutylene isoprene rubber (iir) // isobutylene isoprene rubber (iir) production // glo; Barge; EU+EFTA+UK
- kg_km_7: 1.05395e6; = kg_7*km_7
  Transport amount in km*km, for isobutylene isoprene rubber (iir) // isobutylene isoprene rubber (iir) production // glo; Barge; EU+EFTA+UK
- kg_8: 391.943
  Mass in kg, for ethylene-vinyl acetate (eva) // ethylene-vinyl acetate (eva) production // eu+efta+uk; Freight train, average; EU+EFTA+UK
- km_8: 240
  Distance in km, for ethylene-vinyl acetate (eva) // ethylene-vinyl acetate (eva) production // eu+efta+uk; Freight train, average; EU+EFTA+UK
- kg_km_8: 94066.4; = kg_8*km_8
  Transport amount in km*km, for ethylene-vinyl acetate (eva) // ethylene-vinyl acetate (eva) production // eu+efta+uk; Freight train, average; EU+EFTA+UK
- kg_9: 3636.67
  Mass in kg, for high density polyethylene, petrochemical // high density polyethylene (hdpe) production, fossil fuel-based // glo; Freight train, average; EU+EFTA+UK
- km_9: 240
  Distance in km, for high density polyethylene, petrochemical // high density polyethylene (hdpe) production, fossil fuel-based // glo; Freight train, average; EU+EFTA+UK
- kg_km_9: 872802; = kg_9*km_9
  Transport amount in km*km, for high density polyethylene, petrochemical // high density polyethylene (hdpe) production, fossil fuel-based // glo; Freight train, average; EU+EFTA+UK
- kg_10: 3903.53
  Mass in kg, for isobutylene isoprene rubber (iir) // isobutylene isoprene rubber (iir) production // glo; Freight train, average; EU+EFTA+UK
- km_10: 240
  Distance in km, for isobutylene isoprene rubber (iir) // isobutylene isoprene rubber (iir) production // glo; Freight train, average; EU+EFTA+UK
- kg_km_10: 936846; = kg_10*km_10
  Transport amount in km*km, for isobutylene isoprene rubber (iir) // isobutylene isoprene rubber (iir) production // glo; Freight train, average; EU+EFTA+UK

## Reference product
- construction of demersal trawl // construction of demersal trawl // eu+efta+uk: 1

## Inputs
- Transport of ethylene-vinyl acetate (eva) // ethylene-vinyl acetate (eva) production // eu+efta+uk by Articulated lorry transport, Euro 4, Total weight >32 t - EU+EFTA+UK: 50952.6; = kg_km_0
- Transport of waste (unspecified) // landfill of inert (steel) // eu+efta+uk by Articulated lorry transport, Euro 4, Total weight >32 t - EU+EFTA+UK: 691605; = kg_km_1
- Transport of waste (unspecified) // landfill of inert material (other materials) // eu+efta+uk by Articulated lorry transport, Euro 4, Total weight >32 t - EU+EFTA+UK: 610775; = kg_km_2
- Transport of high density polyethylene, petrochemical // high density polyethylene (hdpe) production, fossil fuel-based // glo by Articulated lorry transport, Euro 4, Total weight >32 t - EU+EFTA+UK: 472767; = kg_km_3
- Transport of isobutylene isoprene rubber (iir) // isobutylene isoprene rubber (iir) production // glo by Articulated lorry transport, Euro 4, Total weight >32 t - EU+EFTA+UK: 507458; = kg_km_4
- Transport of ethylene-vinyl acetate (eva) // ethylene-vinyl acetate (eva) production // eu+efta+uk by Barge - EU+EFTA+UK: 105825; = kg_km_5
- Transport of high density polyethylene, petrochemical // high density polyethylene (hdpe) production, fossil fuel-based // glo by Barge - EU+EFTA+UK: 981902; = kg_km_6
- Transport of isobutylene isoprene rubber (iir) // isobutylene isoprene rubber (iir) production // glo by Barge - EU+EFTA+UK: 1.05395e6; = kg_km_7
- Transport of ethylene-vinyl acetate (eva) // ethylene-vinyl acetate (eva) production // eu+efta+uk by Freight train, average - EU+EFTA+UK: 94066.4; = kg_km_8
- Transport of high density polyethylene, petrochemical // high density polyethylene (hdpe) production, fossil fuel-based // glo by Freight train, average - EU+EFTA+UK: 872802; = kg_km_9
- Transport of isobutylene isoprene rubber (iir) // isobutylene isoprene rubber (iir) production // glo by Freight train, average - EU+EFTA+UK: 936846; = kg_km_10
- construction of demersal trawl // construction of demersal trawl // eu+efta+uk, blackbox: 1
- construction of demersal trawl // construction of demersal trawl // eu+efta+uk, elementary: 1

## Impact indicators
- Eutrophication marine: 66.7433
- Ecotoxicity, freshwater: 504272
- Land use: 200320
- Water use: 15082.5
- Resource use, minerals and metals: 1.53791
- Resource use, fossils: 880412
- Climate change: 63429.6
- Ozone depletion: 0.000412549
- Human toxicity, cancer: 0.000288146
- Human toxicity, non-cancer: 0.000897305
- EF-particulate Matter: 0.00952802
- Ionising radiation, human health: 4325.69
- Photochemical ozone formation - human health: 224.236
- Acidification: 325.586
- Eutrophication, terrestrial: 706.774
- Eutrophication, freshwater: 6.25248

## Deviations from the LCI method principle
The background data use the \xe2\x80\x9cRecycled content cut-off\xe2\x80\x9d approach to allocate end-of-life by-products and secondary materials. This allocation is explained in the description of the recycled content system model (http://www.ecoinvent.org/database/system-models-in-ecoinvent-3/cut-off-system-model/allocation-cut-off-by-classification.html).

## Deviations from the LCI method approaches
Background data:
- the \xe2\x80\x9cRecycled content cut-off\xe2\x80\x9d approach to allocate end-of-life by-products and secondary materials. This allocation is explained in the description of the recycled content system model (http://www.ecoinvent.org/database/system-models-in-ecoinvent-3/cut-off-system-model/allocation-cut-off-by-classification.html). The ecoinvent database mostly relies on “Allocation – market values” apart for few exceptions particularly in the energy sector. ecoinvent energy data is replaced with EF3.0 core data as per the EF guidelines version 2.0.
OR
- EF compliant data

## Modelling constants
All modelling constants follow the requirements listed in the Tender Specifications ENV.B.1/SER/2016/0038vl. Completeness: All known environmental flows are included. All known resource uses and emissions are listed in the inventory. Water use: water use is modelled at country level using separate flows for water withdrawal, water release and water evaporation. Cut-off: All known environmental flows are included. All known resource uses and emissions are listed in the inventory. Handling multi-functional processes: the following PEF multi- functionality decision hierarchy is applied for resolving all multi- functionality problems: (1) subdivision or system expansion; (2) allocation based on a relevant underlying physical relationship (substitution may apply here); (3) allocation based on some other relationship. Direct land use change: GHG emissions from direct LUC allocated to good/service for 20 years after the LUC occurs, with IPCC default values. Carbon storage and delayed emissions: credits associated with temporary (carbon) storage or delayed emissions up to 300 years are not be considered. Emissions off-setting: are not included. Capital goods (including infrastructures) and their End of life: they are included. System boundaries: system boundaries include all processes linked to the product supply chain (e.g. maintenance). Time period: emissions and removals are modelled as if released or removed at the beginning of the assessment method. Fossil and biogenic carbon emissions and removals: removals and emissions are modelled as follows: All GHG emissions from fossil fuels (including peat and limestone) are modelled consistently with the most updated ILCD list of elementary flows. The non-fossil (biogenic) carbon flows are modelled consistently with the most updated ILCD list of elementary flows.

## Cut-off and completeness
All known environmental flows are included. All known resource uses and emissions are listed in the inventory. The dataset dry mass balance has been checked to ensure the inventory is complete. Capital goods (e.g. infrastructure) and their end-of-life are included.

## Data selection and combination
These datasets include, in both their foreground and background data, links to EF3.0 compliant data.
The relevant background data on energy, transport, and End of Life are from the LCDN data node (http://lcdn.thinkstep.com/Node/).
All other background data in the supply of this product for which no EF3.0 process was available are from ecoinvent v3.7 database (www.ecoinvent.org) or other data sources.

## Data treatment and extrapolations
Several data sources have been used to model the inventory.

## Review details
Internal reviews have been asked to review the plausibility of the unit process, LCIA scores, and DQRs. Internal reviewers have also been asked to review the data for EF compliancy. The consortium is therefore responsible for aspects such as compliancy with the ILCD format, including validation in Look@LCI, and nomenclature.
Internal reviwers have been asked to judge based on the process name, that the unit process models in a complete and representative way the process in the requested location. The review encompassed the plausability of:
- exchanges with nature (elementary flows) as well as exchanges such as product and waste flows.
- meta information (general comment, technology comment, system boundaries, allocation, cut-off rules, etc.). Reviewers were asked to judge if the provided information is enough to understand the content of the process.
- LCIA scores
- DQRs including precision, technology, time and geography. As well as the overall DQR.
External reviewers have been asked to provide their expertise in the field of interest. External reviewers have been asked to review the unit process, including eventual methodological choices, the LCIA scores (provided with contribution scores as well), and DQRs. External reviewers have been provided all the information in a tool developed by the consortium for the purpose of this project.
External reviewers have been asked to judge based on the process name, that the unit process models in a complete and representative way the process in the requested location. The review encompassed:
- Plausability and completeness of exchanges with nature (elementary flows) as well as exchanges such as product and waste flows.
- Review of meta information (general comment, technology comment, system boundaries, allocation, cut-off rules, etc.). Reviewers were asked to judge if the provided information is enough to understand the content of the process.
- Review of properties (biogenic carbon and water content).
- Review of allocation keys.
- Plausability of LCIA scores calculated by the consortium.
- Plausability of DQRs including precision, technology, time and geography. As well as the overall DQR.

## Data sources
- Background Data for Representative products and organisations. EF 3.0 compliant (data stock)
- Agribalyse (2021) Agribalyse 3.0 database
- MSC (2021) Fishing methods and gear types. Marine Stewardship Council (MSC). Available at: https://www.msc.org/what-we-are-doing/our-approach/fishing-methods-and-gear-types
- Seafish (2021) Fishing gear database. Available at: https://www.seafish.org/responsible-sourcing/fishing-gear-database/
- M. P Remesan, Renjith, R.K., 2017. Design and Operation of Trawls, in: Recent Trends in Harvest and Post-Harvest Technologies in Fisheries. Central Institute of Fisheries Technology, Kochi, India.

## Intended applications
Implementation of regular Product Environmental Footprint (PEF) studies and Organisation Environmental Footprint (OEF) studies exclusively under the specified Product groups and sectors as defined in the Product Environmental Footprint Category Rules (PEFCR) and Organisation Environmental Footprint Sectorial Rules (OEFSR) listed in http://ec.europa.eu/environment/eussd/smgp/PEFCR_OEFSR.htm
