# coating, solvent emulsion, 3 times (for 4 layers), elementary; Finishing; technology mix; textile service for 1 kg of fabric

Dataset: ILCD process, Unit process, single operation
Geography: GLO
Reference year: 2018
Valid until: 2024
Classification: Other Services / Other services
LCI method principle: Attributional
LCI method approaches: Allocation - market value
Completeness: All relevant flows quantified
Project: Provision of process-based 3.0 Environmental Footprint-compliant life cycle inventory datasets - Apparel 2 - contract number 070201/2020/840292/SER/ENV.B.1
Generated by: CADIS
Owner: PRé Sustainability B.V.
Compliance: Environmental Footprint non-primary supporting data set; Environmental Footprint 3.1
Amounts: no units in this file; such an amount is in the reference unit of its flow, which a separate flow dataset defines
copyright: true
licenseType: Free of charge for some user types or use types
accessRestrictions: Free of charge for all final users implementing a regular Product Environmental Footprint (PEF) studies and Organisation Environmental Footprint (OEF) studies exclusively under the specified Product groups and sectors as defined in the Product Environmental Footprint Category Rules (PEFCR) and Organisation Environmental Footprint Sectorial Rules (OEFSR) listed in http://ec.europa.eu/environment/eussd/smgp/PEFCR_OEFSR.htm and in accordance with the terms and conditions of the EULA (available at https://ecoinvent.lca-data.com/) exclusively until 31st December 2024. Any use of this dataset or any derivative data not within the specific context of one of the PEF/OEF projects or after the end of 2024 is not permitted.

## General comment
Notice: this data set supersedes the EF3.0-compliant version (see link under "preceding data set version" below calculated with the EF3.0). The life cycle inventory is not changed from the original EF3.0 data set. The LCIA results are calculated based on the EF3.1 methods which provide updated characterisation factors in the following impact categories: Climate Change, Ecotoxicity freshwater, Photochemical Ozone Formation, Acidification, Human Toxicity non-cancer, and Human Toxicity cancer. The review report and the data quality ratings refer to the original results. The data set has been updated by the European Commission on the basis of the original EF3.0 data set delivered by the data provider.This sub-process has limited documentation only. For all detailed documentation of the full model to which this data set belongs (such as DQRs, review reports and other technical documentation), please see this process: coating, solvent emulsion, 3 times (for 4 layers) - GLO []

## Technology and included processes
Coating is the application of polymer onto a textile as a paste, foam or viscous liquid. The application of polymer is made such that coating cannot be detached. In solvent emulsion coating process, a polymer is dissolved in a solvent and directly applied to textile. Solvent is extracted through coagulation and coating is dried, cured and washed. Coating curing is performed in a stenter. Solvent based water repellents may be applied by this technique to leather clothing, medical garment and wipes.

## Reference product
- coating, solvent emulsion, 3 times (for 4 layers) // coating, solvent emulsion, 3 times (for 4 layers) // glo, elementary: 1

## Outputs
- Water, Emissions to air, unspecified: 9.18e-5
- Water, Emissions to water, unspecified [AL]: 1.60228e-7
- Water, Emissions to water, unspecified [AT]: 2.06444e-6
- Water, Emissions to water, unspecified [BA]: 1.99747e-7
- Water, Emissions to water, unspecified [BE]: 2.48487e-6
- Water, Emissions to water, unspecified [BG]: 6.36298e-7
- Water, Emissions to water, unspecified [BY]: 8.26222e-7
- Water, Emissions to water, unspecified [CH]: 2.46219e-6
- Water, Emissions to water, unspecified [CZ]: 1.71367e-6
- Water, Emissions to water, unspecified [DE]: 1.86501e-5
- Water, Emissions to water, unspecified [DK]: 1.35235e-6
- Water, Emissions to water, unspecified [EE]: 1.84665e-7
- Water, Emissions to water, unspecified [ES]: 8.0033e-6
- Water, Emissions to water, unspecified [FI]: 1.15353e-6
- Water, Emissions to water, unspecified [FR]: 1.31558e-5
- Water, Emissions to water, unspecified [GB]: 1.30737e-5
- Water, Emissions to water, unspecified: 2.6119e-6
- Water, Emissions to water, unspecified [GR]: 1.48721e-6
- Water, Emissions to water, unspecified [HR]: 4.78188e-7
- Water, Emissions to water, unspecified [HU]: 1.25357e-6
- Water, Emissions to water, unspecified [IE]: 1.35034e-6
- Water, Emissions to water, unspecified [IS]: 7.70543e-8
- Water, Emissions to water, unspecified [IT]: 1.12558e-5
- Water, Emissions to water, unspecified [LT]: 3.94292e-7
- Water, Emissions to water, unspecified [LU]: 2.73719e-7
- Water, Emissions to water, unspecified [LV]: 2.32499e-7
- Water, Emissions to water, unspecified [MD]: 1.2302e-7
- Water, Emissions to water, unspecified [ME]: 4.95592e-8
- Water, Emissions to water, unspecified [MK]: 1.36877e-7
- Water, Emissions to water, unspecified [MT]: 7.57184e-8
- Water, Emissions to water, unspecified [NL]: 4.17237e-6
- Water, Emissions to water, unspecified [NO]: 1.57937e-6
- Water, Emissions to water, unspecified [PL]: 4.80193e-6
- Water, Emissions to water, unspecified [PT]: 1.51518e-6
- Water, Emissions to water, unspecified [RO]: 2.10356e-6
- Water, Emissions to water, unspecified [RS]: 5.22005e-7
- Water, Emissions to water, unspecified [SE]: 2.27901e-6
- Water, Emissions to water, unspecified [SI]: 3.2274e-7
- Water, Emissions to water, unspecified [SK]: 7.5752e-7
- Water, Emissions to water, unspecified [SM]: 9.42808e-9
- Water, Emissions to water, unspecified [UA]: 2.22105e-6
- water vapour, Emissions to air, unspecified: 23.4882
- Water, Emissions to water, unspecified [AE]: 3.05875e-6
- Water, Emissions to water, unspecified [AF]: 3.14107e-7
- Water, Emissions to water, unspecified [AG]: 9.17275e-9
- Water, Emissions to water, unspecified [AM]: 1.41638e-7
- Water, Emissions to water, unspecified [AO]: 9.51471e-7
- Water, Emissions to water, unspecified [AR]: 4.24049e-6
- Water, Emissions to water, unspecified [AU]: 5.23622e-6
- Water, Emissions to water, unspecified [AW]: 1.84192e-8
- Water, Emissions to water, unspecified [AZ]: 7.17148e-7
- Water, Emissions to water, unspecified [BB]: 2.23112e-8
- Water, Emissions to water, unspecified [BD]: 2.53159e-6
- Water, Emissions to water, unspecified [BF]: 1.51146e-7
- Water, Emissions to water, unspecified [BH]: 3.21828e-7
- Water, Emissions to water, unspecified [BI]: 3.59661e-8
- Water, Emissions to water, unspecified [BJ]: 1.39254e-7
- Water, Emissions to water, unspecified [BN]: 1.48455e-7
- Water, Emissions to water, unspecified [BO]: 3.57311e-7
- Water, Emissions to water, unspecified [BR]: 1.47908e-5
- Water, Emissions to water, unspecified [BS]: 6.09785e-8
- Water, Emissions to water, unspecified [BT]: 3.12324e-8
- Water, Emissions to water, unspecified [BW]: 1.59278e-7
- Water, Emissions to water, unspecified [BZ]: 1.26875e-8
- Water, Emissions to water, unspecified [CA]: 7.77325e-6
- Water, Emissions to water, unspecified [CD]: 3.03501e-7
- Water, Emissions to water, unspecified [CF]: 1.99256e-8
- Water, Emissions to water, unspecified [CG]: 1.17586e-7
- Water, Emissions to water, unspecified [CI]: 4.02706e-7
- Water, Emissions to water, unspecified [CL]: 1.90254e-6
- Water, Emissions to water, unspecified [CM]: 3.49043e-7
- Water, Emissions to water, unspecified [CN]: 8.14235e-5
- Water, Emissions to water, unspecified [CO]: 2.97679e-6
- Water, Emissions to water, unspecified [CR]: 3.7179e-7
- Water, Emissions to water, unspecified [CV]: 1.55509e-8
- Water, Emissions to water, unspecified [CY]: 1.4295e-7
- Water, Emissions to water, unspecified [DJ]: 2.00032e-8
- Water, Emissions to water, unspecified [DM]: 3.79231e-9
- Water, Emissions to water, unspecified [DO]: 6.93915e-7
- Water, Emissions to water, unspecified [DZ]: 2.41265e-6
- Water, Emissions to water, unspecified [EC]: 8.43393e-7
- Water, Emissions to water, unspecified [EG]: 4.77701e-6
- Water, Emissions to water, unspecified [ER]: 2.53717e-8
- Water, Emissions to water, unspecified [ET]: 7.29097e-7
- Water, Emissions to water, unspecified [FJ]: 4.58767e-8
- Water, Emissions to water, unspecified [GA]: 1.37291e-7
- Water, Emissions to water, unspecified [GD]: 7.11467e-9
- Water, Emissions to water, unspecified [GE]: 2.00702e-7
- Water, Emissions to water, unspecified [GH]: 5.96023e-7
- Water, Emissions to water, unspecified [GM]: 2.15575e-8
- Water, Emissions to water, unspecified [GN]: 1.07343e-7
- Water, Emissions to water, unspecified [GQ]: 1.59709e-7
- Water, Emissions to water, unspecified [GT]: 5.7748e-7
- Water, Emissions to water, unspecified [GW]: 1.29803e-8
- Water, Emissions to water, unspecified [GY]: 4.09268e-8
- Water, Emissions to water, unspecified [HN]: 2.01591e-7
- Water, Emissions to water, unspecified [HT]: 1.49472e-7
- Water, Emissions to water, unspecified [ID]: 1.25105e-5
- Water, Emissions to water, unspecified [IL]: 1.38501e-6
- Water, Emissions to water, unspecified [IN]: 3.33936e-5
- Water, Emissions to water, unspecified [IQ]: 2.08513e-6
- Water, Emissions to water, unspecified [IR]: 5.89413e-6
- Water, Emissions to water, unspecified [JM]: 1.23708e-7
- Water, Emissions to water, unspecified [JO]: 4.07883e-7
- Water, Emissions to water, unspecified [JP]: 2.41641e-5
- Water, Emissions to water, unspecified [KE]: 7.12642e-7
- Water, Emissions to water, unspecified [KG]: 1.18357e-7
- Water, Emissions to water, unspecified [KH]: 2.40809e-7
- Water, Emissions to water, unspecified [KM]: 9.93271e-9
- Water, Emissions to water, unspecified [KN]: 5.91906e-9
- Water, Emissions to water, unspecified [KR]: 8.99926e-6
- Water, Emissions to water, unspecified [KW]: 1.13399e-6
- Water, Emissions to water, unspecified [KZ]: 1.94781e-6
- Water, Emissions to water, unspecified [LA]: 1.84166e-7
- Water, Emissions to water, unspecified [LB]: 4.4917e-7
- Water, Emissions to water, unspecified [LC]: 1.20738e-8
- Water, Emissions to water, unspecified [LK]: 1.10647e-6
- Water, Emissions to water, unspecified [LR]: 2.74629e-8
- Water, Emissions to water, unspecified [LS]: 2.66685e-8
- Water, Emissions to water, unspecified [LY]: 5.67006e-7
- Water, Emissions to water, unspecified [MA]: 1.17548e-6
- Water, Emissions to water, unspecified [MG]: 1.81669e-7
- Water, Emissions to water, unspecified [ML]: 1.64937e-7
- Water, Emissions to water, unspecified [MM]: 1.04923e-6
- Water, Emissions to water, unspecified [MN]: 1.46746e-7
- Water, Emissions to water, unspecified [MR]: 8.65226e-8
- Water, Emissions to water, unspecified [MU]: 1.15524e-7
- Water, Emissions to water, unspecified [MW]: 8.34649e-8
- Water, Emissions to water, unspecified [MX]: 1.05368e-5
- Water, Emissions to water, unspecified [MY]: 3.51901e-6
- Water, Emissions to water, unspecified [MZ]: 1.49219e-7
- Water, Emissions to water, unspecified [NA]: 1.07915e-7
- Water, Emissions to water, unspecified [NE]: 1.06691e-7
- Water, Emissions to water, unspecified [NG]: 4.42898e-6
- Water, Emissions to water, unspecified [NI]: 1.49071e-7
- Water, Emissions to water, unspecified [NP]: 3.31082e-7
- Water, Emissions to water, unspecified [NZ]: 8.21155e-7
- Water, Emissions to water, unspecified [OM]: 7.03618e-7
- Water, Emissions to water, unspecified [PA]: 4.37195e-7
- Water, Emissions to water, unspecified [PE]: 1.68129e-6
- Water, Emissions to water, unspecified [PG]: 1.41608e-7
- Water, Emissions to water, unspecified [PH]: 3.4083e-6
- Water, Emissions to water, unspecified [PK]: 4.08738e-6
- Water, Emissions to water, unspecified [PR]: 5.78464e-7
- Water, Emissions to water, unspecified [PS]: 1.09476e-7
- Water, Emissions to water, unspecified [PY]: 3.64081e-7
- Water, Emissions to water, unspecified [QA]: 1.31742e-6
- Water, Emissions to water, unspecified [RW]: 9.18381e-8
- Water, Emissions to water, unspecified [SA]: 7.76759e-6
- Water, Emissions to water, unspecified [SB]: 7.0362e-9
- Water, Emissions to water, unspecified [SD]: 8.1497e-7
- Water, Emissions to water, unspecified [SG]: 2.2625e-6
- Water, Emissions to water, unspecified [SL]: 5.18702e-8
- Water, Emissions to water, unspecified [SN]: 2.03085e-7
- Water, Emissions to water, unspecified [SR]: 4.22965e-8
- Water, Emissions to water, unspecified [ST]: 3.34512e-9
- Water, Emissions to water, unspecified [SV]: 2.25591e-7
- Water, Emissions to water, unspecified [SZ]: 4.55258e-8
- Water, Emissions to water, unspecified [TC]: 4.06752e-9
- Water, Emissions to water, unspecified [TD]: 1.13018e-7
- Water, Emissions to water, unspecified [TG]: 4.68175e-8
- Water, Emissions to water, unspecified [TH]: 5.19692e-6
- Water, Emissions to water, unspecified [TJ]: 1.17297e-7
- Water, Emissions to water, unspecified [TL]: 1.5043e-8
- Water, Emissions to water, unspecified [TM]: 3.40203e-7
- Water, Emissions to water, unspecified [TN]: 5.65376e-7
- Water, Emissions to water, unspecified [TO]: 2.82033e-9
- Water, Emissions to water, unspecified [TR]: 8.80097e-6
- Water, Emissions to water, unspecified [TT]: 1.93843e-7
- Water, Emissions to water, unspecified [TZ]: 5.48995e-7
- Water, Emissions to water, unspecified [UG]: 3.80352e-7
- Water, Emissions to water, unspecified [US]: 8.57345e-5
- Water, Emissions to water, unspecified [UY]: 3.24446e-7
- Water, Emissions to water, unspecified [UZ]: 9.06548e-7
- Water, Emissions to water, unspecified [VC]: 6.09865e-9
- Water, Emissions to water, unspecified [VE]: 2.48685e-6
- Water, Emissions to water, unspecified [VN]: 2.57573e-6
- Water, Emissions to water, unspecified [VU]: 3.87403e-9
- Water, Emissions to water, unspecified [WS]: 5.51093e-9
- Water, Emissions to water, unspecified [YE]: 4.53526e-7
- Water, Emissions to water, unspecified [ZA]: 3.31564e-6
- Water, Emissions to water, unspecified [ZM]: 2.57193e-7
- Water, Emissions to water, unspecified [ZW]: 1.67061e-7
- Water, Emissions to water, unspecified [RU]: 1.74158e-5
- dimethyl formamide, Emissions to air, unspecified: 0.193424

## Impact indicators
- Ecotoxicity, freshwater: 0.111876
- Water use: -0.0143696
- Human toxicity, non-cancer: 7.17369e-9
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
## Deviations from the LCI method principle
The background data uses:
- the \xe2\x80\x9cRecycled content cut-off\xe2\x80\x9d approach to allocate end-of-life by-products and secondary materials. This allocation is explained in the description of the recycled content system model (http://www.ecoinvent.org/database/system-models-in-ecoinvent-3/cut-off-system-model/allocation-cut-off-by-classification.html).
OR
- EF compliant data

## Deviations from the LCI method approaches
Background data:
- the \xe2\x80\x9cRecycled content cut-off\xe2\x80\x9d approach to allocate end-of-life by-products and secondary materials. This allocation is explained in the description of the recycled content system model (http://www.ecoinvent.org/database/system-models-in-ecoinvent-3/cut-off-system-model/allocation-cut-off-by-classification.html). The ecoinvent database mostly relies on “Allocation – market values” apart for few exceptions particularly in the energy sector. ecoinvent energy data is replaced with EF3.0 core data as per the EF guidelines version 2.0.
OR
- EF compliant data

## Modelling constants
All modelling constants follow the requirements listed in the Tender Specifications 070201/2020/SER/ENV.B1. Completeness: There are no intentional cut-offs in the inventory no matter how small their contribution to all the EF impact categories is. Eventual cut-offs are in compliance with the Guide for EF compliant data sets (JRC 2020), i.e. only if below the 3% cut-off rule. Water use: water use is modelled at country level using separate flows for water withdrawal, water release and water evaporation. Handling multi-functional processes: the following PEF multi- functionality decision hierarchy is applied for resolving all multi- functionality problems: (1) subdivision or system expansion; (2) allocation based on a relevant underlying physical relationship (substitution may apply here); (3) allocation based on some other relationship. Direct land use change: GHG emissions from direct LUC allocated to good/service for 20 years after the LUC occurs, with IPCC default values. Carbon storage and delayed emissions: credits associated with temporary (carbon) storage or delayed emissions up to 300 years are not be considered. Emissions off-setting: are not included. Capital goods (including infrastructures) and their End of life: they are included. System boundaries: system boundaries include all processes linked to the product supply chain (e.g. maintenance). Time period: emissions and removals are modelled as if released or removed at the beginning of the assessment method. Fossil and biogenic carbon emissions and removals: removals and emissions are modelled as follows: All GHG emissions from fossil fuels (including peat and limestone) are modelled consistently with the most updated ILCD list of elementary flows. The non-fossil (biogenic) carbon flows are modelled consistently with the most updated ILCD list of elementary flows.

## Cut-off and completeness
There are no intentional cut-offs in the inventory no matter how small their contribution to all the EF impact categories is. Eventual cut-offs are in compliance with the Guide for EF compliant data sets (JRC 2020), i.e. only if below the 3% cut-off rule. The dataset dry mass and water balance has been checked to ensure the inventory is complete. Capital goods (e.g. infrastructure) and their end-of-life are included.

## Data selection and combination
These datasets include, in both their foreground and background data, links to EF3.0 compliant data.
The relevant background data on energy, transport, and End of Life are from the LCDN data node (http://lcdn.thinkstep.com/Node/).
All other background data in the supply of this product for which no EF3.0 process was available are from ecoinvent v3.7 database (www.ecoinvent.org) or other data sources.

## Data treatment and extrapolations
Several data sources have been used to model the inventory.

## Use advice
This data set is a supporting sub-data set and must be used exclusively as sub-data set of its corresponding level-1 partly disaggregated data set (see “General comment” field for exact name and UUID).

## Data sources
- Background Data for Representative products and organisations. EF 3.0 compliant (data stock)
- Sur SH, Choi PJ, Ko JW, Lee JY, Lee YH, KHD (2018) Preparation and Properties of DMF-Based Polyurethanes for Wet-Type Polyurethane Artificial Leather. International Journal of Polymer Science Volume 2018, Article ID 7370852, 9 pages https://doi.org/10.1155/2018/7370852
- Ka T, Geberehiwot Z (2020) Economy and Ecology in Dyeing-Cold Pad batch Dyeing Method for Cotton Knitted Fabric. Journal of Textile Science & Engineering. Volume 10:4, 2020 DOI: 10.37421/jtese.2020.10.411
- Mazo-Restrepo R, Alvarado P, Cacua K (2021) Analysis of potential waste heat recovery from a stenter in a textile plant.. DYNA, 88(217), pp. 292-302, April - June, 2021.
- M.H. Abo-Shosha, Z.H. El-Hilw, A.A. Aly, A. Amr and Al Said I. El. Nagdy (2008) Paraffin Wax Emulsion as Water Repellent for Cotton/Polyester Blended fabric. Journal of Industrial Textiles 2008 37: 315 DOI: 10.1177/1528083707083793
- thinkstep AG. 2017. LCA Update of Cotton Fiber and Fabric Life Cycle Inventory.
- UNFCCC (2012) COMPONENT PROJECT ACTIVITIES DESIGN DOCUMENT (CPA-DD). Accessed online August 8th 2021: http://gec.jp/gec/jp/Activities/cdm-fs/2012/2012_cdmfs01_jPear_bangladesh_cpa-dd.pdf
- XiNLiLONG (2021) Solvent based adhesive coating leather fabric bonding machine upholstery making machine. Accessed online August 10th, 2021: https://www.alibaba.com/product-detail/solvent-based-adhesive-coating-leather-fabric_62269930388.html?spm=a2700.7724857.normal_offer.d_title.2e1623ce0I6uFC
- EUREKA (2021) Production activities in line with the “green factory” approach in the textile sector. Accessed online August 8th 2021: https://eureka-eurogia-green.eu/offering_expertise/production-activities-in-line-with-the-green-factory-approach-in-the-textile-sector-13-04-2021/

## Intended applications
Implementation of regular Product Environmental Footprint (PEF) studies and Organisation Environmental Footprint (OEF) studies exclusively under the specified Product groups and sectors as defined in the Product Environmental Footprint Category Rules (PEFCR) and Organisation Environmental Footprint Sectorial Rules (OEFSR) listed in http://ec.europa.eu/environment/eussd/smgp/PEFCR_OEFSR.htm
