# semi-chemical wood pulp, elementary; technology mix; production mix, at plant; dry mass 0.9 kg; carbon content, non fossil 0.494

Dataset: ILCD process, Unit process, single operation
Geography: EU+EFTA+UK
Reference year: 2020
Valid until: 2024
Classification: Other Services / Other services
LCI method principle: Attributional
LCI method approaches: Allocation - market value
Completeness: All relevant flows quantified
Project: Provision of process-based 3.0 Environmental Footprint-compliant life cycle inventory datasets - Renewable materials - contract number 070201/2020/840085/SER/ENV.B.1
Generated by: ecoinvent
Owner: ecoinvent
Compliance: Environmental Footprint non-primary supporting data set; Environmental Footprint 3.1
Amounts: no units in this file; such an amount is in the reference unit of its flow, which a separate flow dataset defines
copyright: true
licenseType: Free of charge for some user types or use types
accessRestrictions: Free of charge for all final users implementing a regular Product Environmental Footprint (PEF) studies and Organisation Environmental Footprint (OEF) studies exclusively under the specified Product groups and sectors as defined in the Product Environmental Footprint Category Rules (PEFCR) and Organisation Environmental Footprint Sectorial Rules (OEFSR) listed in http://ec.europa.eu/environment/eussd/smgp/PEFCR_OEFSR.htm and in accordance with the terms and conditions of the EULA (available at https://ecoinvent.lca-data.com/) exclusively until 31st December 2024. Any use of this dataset or any derivative data not within the specific context of one of the PEF/OEF projects or after the end of 2024 is not permitted.

## General comment
Notice: this data set supersedes the EF3.0-compliant version (see link under "preceding data set version" below calculated with the EF3.0). The life cycle inventory is not changed from the original EF3.0 data set. The LCIA results are calculated based on the EF3.1 methods which provide updated characterisation factors in the following impact categories: Climate Change, Ecotoxicity freshwater, Photochemical Ozone Formation, Acidification, Human Toxicity non-cancer, and Human Toxicity cancer. The review report and the data quality ratings refer to the original results. The data set has been updated by the European Commission on the basis of the original EF3.0 data set delivered by the data provider.This sub-process has limited documentation only. For all detailed documentation of the full model to which this data set belongs (such as DQRs, review reports and other technical documentation), please see this process: semi-chemical wood pulp - EU+EFTA+UK []

## Technology and included processes
Semi-chemical pulping is similar to chemical mechanical methods in that the material is first chemically treated and then ground into pulp. It can be seen that semi-chemical pulp and chemical mechanical pulp are both chemical and mechanical two-stage pulping. The distinction between the two is often based on the yield of wood raw materials. The yields obtained are generally 10% to 40% higher than those of chemical process since only 25% to 50% of the ligning and 30% to 40% of the hemicelluloses are removed. The major difference between all semichemical techniques and those of acid sulfite processes is that only a portion of the lignin is removed during the cook, after which the pulp is further reduced by mechanical disintegration. This method achieves yields as high as 60 to 80 percent, as opposed to 50 to 55 percent for other chemical processes.

## Reference product
- semi-chemical wood pulp // semi-chemical wood pulp // eu+efta+uk, elementary: 1

## Inputs
- Water to Cooling, Renewable material resources from water [AL]: 1.76594e-5
- Water to Cooling, Renewable material resources from water [AT]: 0.000227531
- Water to Cooling, Renewable material resources from water [BA]: 2.2015e-5
- Water to Cooling, Renewable material resources from water [BE]: 0.000273869
- Water to Cooling, Renewable material resources from water [BG]: 7.01291e-5
- Water to Cooling, Renewable material resources from water [BY]: 9.10614e-5
- Water to Cooling, Renewable material resources from water [CH]: 0.000271368
- Water to Cooling, Renewable material resources from water [CZ]: 0.00018887
- Water to Cooling, Renewable material resources from water [DE]: 0.00205551
- Water to Cooling, Renewable material resources from water [DK]: 0.000149048
- Water to Cooling, Renewable material resources from water [EE]: 2.03527e-5
- Water to Cooling, Renewable material resources from water [ES]: 0.000882078
- Water to Cooling, Renewable material resources from water [FI]: 0.000127135
- Water to Cooling, Renewable material resources from water [FR]: 0.00144995
- Water to Cooling, Renewable material resources from water [GB]: 0.0014409
- Water to Cooling, Renewable material resources from water: 8.94999e-6
- Water to Cooling, Renewable material resources from water [GR]: 0.000163912
- Water to Cooling, Renewable material resources from water [HR]: 5.27031e-5
- Water to Cooling, Renewable material resources from water [HU]: 0.000138161
- Water to Cooling, Renewable material resources from water [IE]: 0.000148827
- Water to Cooling, Renewable material resources from water [IS]: 8.49248e-6
- Water to Cooling, Renewable material resources from water [IT]: 0.00124055
- Water to Cooling, Renewable material resources from water [LT]: 4.34566e-5
- Water to Cooling, Renewable material resources from water [LU]: 3.01677e-5
- Water to Cooling, Renewable material resources from water [LV]: 2.56247e-5
- Water to Cooling, Renewable material resources from water [MD]: 1.35585e-5
- Water to Cooling, Renewable material resources from water [ME]: 5.46213e-6
- Water to Cooling, Renewable material resources from water [MK]: 1.50858e-5
- Water to Cooling, Renewable material resources from water [MT]: 8.34525e-6
- Water to Cooling, Renewable material resources from water [NL]: 0.000459855
- Water to Cooling, Renewable material resources from water [NO]: 0.000174069
- Water to Cooling, Renewable material resources from water [PL]: 0.000529241
- Water to Cooling, Renewable material resources from water [PT]: 0.000166994
- Water to Cooling, Renewable material resources from water [RO]: 0.000231842
- Water to Cooling, Renewable material resources from water [RS]: 5.75324e-5
- Water to Cooling, Renewable material resources from water [SE]: 0.000251179
- Water to Cooling, Renewable material resources from water [SI]: 3.55706e-5
- Water to Cooling, Renewable material resources from water [SK]: 8.34894e-5
- Water to Cooling, Renewable material resources from water [SM]: 1.03911e-6
- Water to Cooling, Renewable material resources from water [UA]: 0.000244792
- water, Renewable material resources from water [AL]: 0.000108707
- water, Renewable material resources from water [AT]: 0.00140062
- water, Renewable material resources from water [BA]: 0.000135519
- water, Renewable material resources from water [BE]: 0.00168586
- water, Renewable material resources from water [BG]: 0.000431696
- water, Renewable material resources from water [BY]: 0.000560551
- water, Renewable material resources from water [CH]: 0.00167047
- water, Renewable material resources from water [CZ]: 0.00116264
- water, Renewable material resources from water [DE]: 0.0126532
- water, Renewable material resources from water [DK]: 0.000917502
- water, Renewable material resources from water [EE]: 0.000125286
- water, Renewable material resources from water [ES]: 0.00542984
- water, Renewable material resources from water [FI]: 0.00078261
- water, Renewable material resources from water [FR]: 0.00892554
- water, Renewable material resources from water [GB]: 0.00886983
- water, Renewable material resources from water: 5.50938e-5
- water, Renewable material resources from water [GR]: 0.001009
- water, Renewable material resources from water [HR]: 0.000324427
- water, Renewable material resources from water [HU]: 0.000850484
- water, Renewable material resources from water [IE]: 0.000916138
- water, Renewable material resources from water [IS]: 5.22775e-5
- water, Renewable material resources from water [IT]: 0.00763652
- water, Renewable material resources from water [LT]: 0.000267507
- water, Renewable material resources from water [LU]: 0.000185704
- water, Renewable material resources from water [LV]: 0.000157739
- water, Renewable material resources from water [MD]: 8.34628e-5
- water, Renewable material resources from water [ME]: 3.36235e-5
- water, Renewable material resources from water [MK]: 9.28642e-5
- water, Renewable material resources from water [MT]: 5.13712e-5
- water, Renewable material resources from water [NL]: 0.00283075
- water, Renewable material resources from water [NO]: 0.00107152
- water, Renewable material resources from water [PL]: 0.00325787
- water, Renewable material resources from water [PT]: 0.00102797
- water, Renewable material resources from water [RO]: 0.00142716
- water, Renewable material resources from water [RS]: 0.000354155
- water, Renewable material resources from water [SE]: 0.00154619
- water, Renewable material resources from water [SI]: 0.000218963
- water, Renewable material resources from water [SK]: 0.000513939
- water, Renewable material resources from water [SM]: 6.39648e-6
- water, Renewable material resources from water [UA]: 0.00150688

## Outputs
- Water, Emissions to air, unspecified: 0.0188565
- Water, Emissions to water, unspecified [AL]: 9.72238e-5
- Water, Emissions to water, unspecified [AT]: 0.00125267
- Water, Emissions to water, unspecified [BA]: 0.000121203
- Water, Emissions to water, unspecified [BE]: 0.00150778
- Water, Emissions to water, unspecified [BG]: 0.000386095
- Water, Emissions to water, unspecified [BY]: 0.000501337
- Water, Emissions to water, unspecified [CH]: 0.00149401
- Water, Emissions to water, unspecified [CZ]: 0.00103982
- Water, Emissions to water, unspecified [DE]: 0.0113166
- Water, Emissions to water, unspecified [DK]: 0.000820582
- Water, Emissions to water, unspecified [EE]: 0.000112052
- Water, Emissions to water, unspecified [ES]: 0.00485627
- Water, Emissions to water, unspecified [FI]: 0.00069994
- Water, Emissions to water, unspecified [FR]: 0.0079827
- Water, Emissions to water, unspecified [GB]: 0.00793287
- Water, Emissions to water, unspecified: 4.9274e-5
- Water, Emissions to water, unspecified [GR]: 0.000902414
- Water, Emissions to water, unspecified [HR]: 0.000290156
- Water, Emissions to water, unspecified [HU]: 0.000760644
- Water, Emissions to water, unspecified [IE]: 0.000819362
- Water, Emissions to water, unspecified [IS]: 4.67552e-5
- Water, Emissions to water, unspecified [IT]: 0.00682984
- Water, Emissions to water, unspecified [LT]: 0.000239249
- Water, Emissions to water, unspecified [LU]: 0.000166088
- Water, Emissions to water, unspecified [LV]: 0.000141077
- Water, Emissions to water, unspecified [MD]: 7.46462e-5
- Water, Emissions to water, unspecified [ME]: 3.00717e-5
- Water, Emissions to water, unspecified [MK]: 8.30546e-5
- Water, Emissions to water, unspecified [MT]: 4.59447e-5
- Water, Emissions to water, unspecified [NL]: 0.00253172
- Water, Emissions to water, unspecified [NO]: 0.000958333
- Water, Emissions to water, unspecified [PL]: 0.00291373
- Water, Emissions to water, unspecified [PT]: 0.000919385
- Water, Emissions to water, unspecified [RO]: 0.0012764
- Water, Emissions to water, unspecified [RS]: 0.000316744
- Water, Emissions to water, unspecified [SE]: 0.00138286
- Water, Emissions to water, unspecified [SI]: 0.000195833
- Water, Emissions to water, unspecified [SK]: 0.00045965
- Water, Emissions to water, unspecified [SM]: 5.72079e-6
- Water, Emissions to water, unspecified [UA]: 0.0013477
- Phosphorus, Emissions to water, unspecified: 3.61175e-5
- biological oxygen demand, Emissions to water, unspecified: 0.0118489
- chemical oxygen demand, Emissions to water, unspecified: 0.0601668
- total organic carbon, Emissions to water, unspecified: 0.022284
- DOC, Dissolved Organic Carbon, Emissions to water, unspecified: 0.022284
- Nitrogen oxides, Emissions to air, unspecified: 8.55812e-6
- nitrogen, total (excluding N2), Emissions to water, unspecified: 0.000412998
- Suspended solids, unspecified, Emissions to water, unspecified: 0.00467998
- adsorbable organic halogen compounds, Emissions to water, unspecified: 0.000130587
- sulfate, Emissions to water, unspecified: 0.015344
- sulfur dioxide, Emissions to air, unspecified (long-term): 1.2575e-5
- Nitrogen oxides, Emissions to air, unspecified [AL]: 1.68258e-6
- Nitrogen oxides, Emissions to air, unspecified [AT]: 2.1679e-5
- Nitrogen oxides, Emissions to air, unspecified [BA]: 2.09757e-6
- Nitrogen oxides, Emissions to air, unspecified [BE]: 2.6094e-5
- Nitrogen oxides, Emissions to air, unspecified [BG]: 6.68185e-6
- Nitrogen oxides, Emissions to air, unspecified [BY]: 8.67627e-6
- Nitrogen oxides, Emissions to air, unspecified [CH]: 2.58558e-5
- Nitrogen oxides, Emissions to air, unspecified [CZ]: 1.79954e-5
- Nitrogen oxides, Emissions to air, unspecified [DE]: 0.000195848
- Nitrogen oxides, Emissions to air, unspecified [DK]: 1.42012e-5
- Nitrogen oxides, Emissions to air, unspecified [EE]: 1.93919e-6
- Nitrogen oxides, Emissions to air, unspecified [ES]: 8.40438e-5
- Nitrogen oxides, Emissions to air, unspecified [FI]: 1.21133e-5
- Nitrogen oxides, Emissions to air, unspecified [FR]: 0.000138151
- Nitrogen oxides, Emissions to air, unspecified [GB]: 0.000137288
- Nitrogen oxides, Emissions to air, unspecified [GR]: 1.56174e-5
- Nitrogen oxides, Emissions to air, unspecified [HR]: 5.02152e-6
- Nitrogen oxides, Emissions to air, unspecified [HU]: 1.31639e-5
- Nitrogen oxides, Emissions to air, unspecified [IE]: 1.41801e-5
- Nitrogen oxides, Emissions to air, unspecified [IT]: 0.000118199
- Nitrogen oxides, Emissions to air, unspecified [LT]: 4.14051e-6
- Nitrogen oxides, Emissions to air, unspecified [LU]: 2.87436e-6
- Nitrogen oxides, Emissions to air, unspecified [LV]: 2.44151e-6
- Nitrogen oxides, Emissions to air, unspecified [MD]: 1.29185e-6
- Nitrogen oxides, Emissions to air, unspecified [MK]: 1.43736e-6
- Nitrogen oxides, Emissions to air, unspecified [NL]: 4.38147e-5
- Nitrogen oxides, Emissions to air, unspecified [NO]: 1.65852e-5
- Nitrogen oxides, Emissions to air, unspecified [PL]: 5.04257e-5
- Nitrogen oxides, Emissions to air, unspecified [PT]: 1.59111e-5
- Nitrogen oxides, Emissions to air, unspecified [RO]: 2.20897e-5
- Nitrogen oxides, Emissions to air, unspecified [SE]: 2.39322e-5
- Nitrogen oxides, Emissions to air, unspecified [SI]: 3.38914e-6
- Nitrogen oxides, Emissions to air, unspecified [SK]: 7.95482e-6
- Nitrogen oxides, Emissions to air, unspecified [UA]: 2.33236e-5
- sulfur dioxide, Emissions to air, unspecified (long-term) [AL]: 2.47232e-6
- sulfur dioxide, Emissions to air, unspecified (long-term) [AT]: 3.18543e-5
- sulfur dioxide, Emissions to air, unspecified (long-term) [BA]: 3.0821e-6
- sulfur dioxide, Emissions to air, unspecified (long-term) [BE]: 3.83416e-5
- sulfur dioxide, Emissions to air, unspecified (long-term) [BG]: 9.81807e-6
- sulfur dioxide, Emissions to air, unspecified (long-term) [BY]: 1.27486e-5
- sulfur dioxide, Emissions to air, unspecified (long-term) [CH]: 3.79915e-5
- sulfur dioxide, Emissions to air, unspecified (long-term) [CZ]: 2.64418e-5
- sulfur dioxide, Emissions to air, unspecified (long-term) [DE]: 0.000287772
- sulfur dioxide, Emissions to air, unspecified (long-term) [DK]: 2.08667e-5
- sulfur dioxide, Emissions to air, unspecified (long-term) [EE]: 2.84938e-6
- sulfur dioxide, Emissions to air, unspecified (long-term) [ES]: 0.000123491
- sulfur dioxide, Emissions to air, unspecified (long-term) [FI]: 1.77989e-5
- sulfur dioxide, Emissions to air, unspecified (long-term) [FR]: 0.000202994
- sulfur dioxide, Emissions to air, unspecified (long-term) [GB]: 0.000201726
- sulfur dioxide, Emissions to air, unspecified (long-term) [GR]: 2.29477e-5
- sulfur dioxide, Emissions to air, unspecified (long-term) [HR]: 7.37844e-6
- sulfur dioxide, Emissions to air, unspecified (long-term) [HU]: 1.93426e-5
- sulfur dioxide, Emissions to air, unspecified (long-term) [IE]: 2.08357e-5
- sulfur dioxide, Emissions to air, unspecified (long-term) [IT]: 0.000173677
- sulfur dioxide, Emissions to air, unspecified (long-term) [LT]: 6.08392e-6
- sulfur dioxide, Emissions to air, unspecified (long-term) [LU]: 4.22347e-6
- sulfur dioxide, Emissions to air, unspecified (long-term) [LV]: 3.58746e-6
- sulfur dioxide, Emissions to air, unspecified (long-term) [MD]: 1.89819e-6
- sulfur dioxide, Emissions to air, unspecified (long-term) [MK]: 2.11201e-6
- sulfur dioxide, Emissions to air, unspecified (long-term) [NL]: 6.43796e-5
- sulfur dioxide, Emissions to air, unspecified (long-term) [NO]: 2.43696e-5
- sulfur dioxide, Emissions to air, unspecified (long-term) [PL]: 7.40937e-5
- sulfur dioxide, Emissions to air, unspecified (long-term) [PT]: 2.33792e-5
- sulfur dioxide, Emissions to air, unspecified (long-term) [RO]: 3.24579e-5
- sulfur dioxide, Emissions to air, unspecified (long-term) [SE]: 3.51651e-5
- sulfur dioxide, Emissions to air, unspecified (long-term) [SI]: 4.97988e-6
- sulfur dioxide, Emissions to air, unspecified (long-term) [SK]: 1.16885e-5
- sulfur dioxide, Emissions to air, unspecified (long-term) [UA]: 3.42709e-5

## Impact indicators
- Eutrophication marine: 0.000836501
- Ecotoxicity, freshwater: 0.481836
- Water use: 0.298712
- Human toxicity, non-cancer: 3.04317e-11
- EF-particulate Matter: 1.45395e-8
- Photochemical ozone formation - human health: 0.00121843
- Acidification: 0.002301
- Eutrophication, terrestrial: 0.00206818
- Eutrophication, freshwater: 3.61175e-5
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
## Deviations from the LCI method principle
The background data uses:
- the \xe2\x80\x9cRecycled content cut-off\xe2\x80\x9d approach to allocate end-of-life by-products and secondary materials. This allocation is explained in the description of the recycled content system model (http://www.ecoinvent.org/database/system-models-in-ecoinvent-3/cut-off-system-model/allocation-cut-off-by-classification.html).
OR
- EF compliant data

## Deviations from the LCI method approaches
Background data:
- the \xe2\x80\x9cRecycled content cut-off\xe2\x80\x9d approach to allocate end-of-life by-products and secondary materials. This allocation is explained in the description of the recycled content system model (http://www.ecoinvent.org/database/system-models-in-ecoinvent-3/cut-off-system-model/allocation-cut-off-by-classification.html). The ecoinvent database mostly relies on “Allocation – market values” apart for few exceptions particularly in the energy sector. ecoinvent energy data is replaced with EF3.0 core data as per the EF guidelines version 2.0.
OR
- EF compliant data

## Modelling constants
All modelling constants follow the requirements listed in the Tender Specifications 070201/2020/SER/ENV.B1. Completeness: There are no intentional cut-offs in the inventory no matter how small their contribution to all the EF impact categories is. Eventual cut-offs are in compliance with the Guide for EF compliant data sets (JRC 2020), i.e. only if below the 3% cut-off rule. Water use: water use is modelled at country level using separate flows for water withdrawal, water release and water evaporation. Handling multi-functional processes: the following PEF multi- functionality decision hierarchy is applied for resolving all multi- functionality problems: (1) subdivision or system expansion; (2) allocation based on a relevant underlying physical relationship (substitution may apply here); (3) allocation based on some other relationship. Direct land use change: GHG emissions from direct LUC allocated to good/service for 20 years after the LUC occurs, with IPCC default values. Carbon storage and delayed emissions: credits associated with temporary (carbon) storage or delayed emissions up to 300 years are not be considered. Emissions off-setting: are not included. Capital goods (including infrastructures) and their End of life: they are included. System boundaries: system boundaries include all processes linked to the product supply chain (e.g. maintenance). Time period: emissions and removals are modelled as if released or removed at the beginning of the assessment method. Fossil and biogenic carbon emissions and removals: removals and emissions are modelled as follows: All GHG emissions from fossil fuels (including peat and limestone) are modelled consistently with the most updated ILCD list of elementary flows. The non-fossil (biogenic) carbon flows are modelled consistently with the most updated ILCD list of elementary flows.

## Cut-off and completeness
There are no intentional cut-offs in the inventory no matter how small their contribution to all the EF impact categories is. Eventual cut-offs are in compliance with the Guide for EF compliant data sets (JRC 2020), i.e. only if below the 3% cut-off rule. The dataset dry mass and water balance has been checked to ensure the inventory is complete. Capital goods (e.g. infrastructure) and their end-of-life are included.

## Data selection and combination
These datasets include, in both their foreground and background data, links to EF3.0 compliant data.
The relevant background data on energy, transport, and End of Life are from the LCDN data node (http://lcdn.thinkstep.com/Node/).
All other background data in the supply of this product for which no EF3.0 process was available are from ecoinvent v3.7 database (www.ecoinvent.org) or other data sources.

## Data treatment and extrapolations
Several data sources have been used to model the inventory.

## Use advice
This data set is a supporting sub-data set and must be used exclusively as sub-data set of its corresponding level-1 partly disaggregated data set (see “General comment” field for exact name and UUID).

## Data sources
- Background Data for Representative products and organisations. EF 3.0 compliant (data stock)
- KCL, 2002. KCL (2002) KCL EcoData - life cycle inventory database. The Finnish Pulp and Paper Research Institute (KCL), Espoo (Finnland).
- Naturvardsverket, 2001. Naturvardsverket (2001) Skogsindustrins utsläpp - avfallsmängder och energiförbrukning 2000. Report 5154. Naturvardsverket (Swedish EPA), Stockholm.
- Tiedemann et al., 2000. Tiedemann A., Böttcher Tiedemann C., Buschardt A., Georgi B., Giersberg G., Goosmann G., Gregor H.-D., Mehlhorn B., Modi A., Neitzel H., Oels H.-J., Schmitz S. and Suhr M. (2000) Ökobilanzen für graphische Papiere. Texte 22/00. Umweltbundesamt, Berlin.
- European Commission, 2000. European Commission (2000) Integrated Pollution Prevention and Control (IPPC) - Reference Document on Best Available Techniques in the Pulp and Pa-per Industry. Institute for Prospective Technological Studies, Sevilla.
- Shackford, L. D., 2003. A comparison of pulping and bleaching of kraft softwood and Eucalyptus Pulps. http://www.celso-foelkel.com.br/artigos/outros/A%20Comparison%20of%20Pulping%20and%20Bleaching%20of%20Kraft%20Softwood%20and%20Eucalyptus%20Pulps.pdf
- Malo, B. A. (1967). Semichemical Hardwood Pulping and Effluent Treatment. Journal (Water Pollution Control Federation), 39(11), 1875–1891. http://www.jstor.org/stable/25035864
- CNMB, ISSUES ABOUT SEMI-CHEMICAL PULPING, consulted on october, 2021: http://www.paperpulping.com/news/Issues-about-semi-chemical-pulping.html
- US EPA, 1995. AP-42: Compilation of Air Emissions Factors. Chemical Pulping, consulted on October 2021: https://www3.epa.gov/ttnchie1/ap42/ch10/final/c10s02.pdf
- Bajpai, P. (2016). Chapter 3 - Pulp and paper production processes and energy overview. Pulp and Paper Industry. Pages 15-49. ISBN 9780128034118. https://doi.org/10.1016/B978-0-12-803411-8.00003-2. Elsevier.
- ecoinvent database v3.7.1, sulfite pulp production, bleached, RER
- ecoinvent database v3.7.1, stone groundwood pulp production, RER
- Suhr M, Klein G, Kourti I, Rodrigo Gonzalo M, Giner Santonja G, Roudier S, Delgado Sancho L. Best Available Techniques (BAT) Reference Document for the Production of Pulp, Paper and Board. Industrial Emissions Directive 2010/75/EU (Integrated Pollution Prevention and Control). EUR 27235. Luxembourg (Luxembourg): Publications Office of the European Union; 2015. JRC95678

## Intended applications
Implementation of regular Product Environmental Footprint (PEF) studies and Organisation Environmental Footprint (OEF) studies exclusively under the specified Product groups and sectors as defined in the Product Environmental Footprint Category Rules (PEFCR) and Organisation Environmental Footprint Sectorial Rules (OEFSR) listed in http://ec.europa.eu/environment/eussd/smgp/PEFCR_OEFSR.htm
