# bleached kraft pulp, softwood; technology mix; production mix, at plant; dry mass 0.9, carbon content, non-fossil 0.494

Dataset: ILCD process, Partly terminated system
Geography: WORLD (WITHOUT EU+EFTA+UK, US AND CA)
Reference year: 2020
Valid until: 2024
Classification: Materials production / Paper and cardboards
LCI method principle: Attributional
LCI method approaches: Allocation - market value
Completeness: All relevant flows quantified
Project: Provision of process-based 3.0 Environmental Footprint-compliant life cycle inventory datasets - Renewable materials - contract number 070201/2020/840085/SER/ENV.B.1
Generated by: EPIS
Owner: EPIS
Compliance: ILCD Data Network - Entry-level; Suggestions for updating the PEF method 2019; ISO 14040 Environmental Management – Life Cycle Assessment – Principles and Framework, 2006; ISO 14044:2006. Environmental Management – Life Cycle Assessment – Requirements and guidelines.; Environmental Footprint 3.1
Review: Dependent internal review by Marisa Vieira, Emilia Moreno Ruiz; Independent review panel by Michael Sturges
Data quality: Overall quality: Very good; Time representativeness: Very good; Geographical representativeness: Very good; Technological representativeness: Very good; Precision: Good; Methodological appropriateness and consistency: Not applicable
Amounts: no units in this file; such an amount is in the reference unit of its flow, which a separate flow dataset defines
copyright: true
licenseType: Free of charge for some user types or use types
accessRestrictions: Free of charge for all final users implementing a regular Product Environmental Footprint (PEF) studies and Organisation Environmental Footprint (OEF) studies exclusively under the specified Product groups and sectors as defined in the Product Environmental Footprint Category Rules (PEFCR) and Organisation Environmental Footprint Sectorial Rules (OEFSR) listed in http://ec.europa.eu/environment/eussd/smgp/PEFCR_OEFSR.htm and in accordance with the terms and conditions of the EULA (available at https://ecoinvent.lca-data.com/) exclusively until 31st December 2024. Any use of this dataset or any derivative data not within the specific context of one of the PEF/OEF projects or after the end of 2024 is not permitted.

## General comment
Notice: this data set supersedes the EF3.0-compliant version (see link under "preceding data set version" below calculated with the EF3.0). The life cycle inventory is not changed from the original EF3.0 data set. The LCIA results are calculated based on the EF3.1 methods which provide updated characterisation factors in the following impact categories: Climate Change, Ecotoxicity freshwater, Photochemical Ozone Formation, Acidification, Human Toxicity non-cancer, and Human Toxicity cancer. The review report and the data quality ratings refer to the original results. The data set has been updated by the European Commission on the basis of the original EF3.0 data set delivered by the data provider.This dataset represents the production of bleached softwood kraft pulp for the geography World (without EU+EFTA+UK, US and CA) for the year 2020.
Pulp is a clean, wood-based, renewable and biodegradable raw material to make different paper, board and other products. Main end uses for market pulp are tissue (toilet paper), graphic papers, specialty products, packaging, fluff pulp, viscose, CMC etc. Softwood pulp is made from coniferous trees, most typically from different species of pine and spruce. Softwood fibres are long and slender and are used to give the paper and board products their strength properties.
This activity starts with the transport of raw material to the pulp factory. The activity ends when the kraft pulp is ready to be sold.
Due to lack of data, the World (without EU+EFTA+UK, US and CA) dataset was extrapolated from the European dataset which is based on industry data for European bleached softwood kraft pulp production. Industry data for Europe was provided by the European Pulp Industry Sector Association AISBL (EPIS). European data represents the weighted average of 16 corresponding pulp mills located in Nordic countries and Germany. In 2020, total production of the 16 pulp mills corresponded to 86% of the European market capacity.
The dataset has been allocated based on the following products: Bleached kraft pulp, softwood // Bleached kraft pulp, softwood // World (without EU+EFTA+UK, US and CA) with allocation factor of 96.2035%, tall oil, crude with allocation factor of 2.5336%, Turpentine with allocation factor of 0.3408%, Bark with allocation factor of 0.841%, sawdust, wet, measured as dry mass with allocation factor of 0.0062%, methanol, from biomass with allocation factor of 0.0748%, Sodium hydroxide with allocation factor of 0.0002%.

## Technology and included processes
The pulp, or fibres from the wood are separated in a kraft cooking process in a so-called fibre line. In a recovery line, the chemicals used in the cooking process are recovered to be used again and energy is produced. The third process is effluent treatment where gaseous and liquid discharges to the environment are continuously minimized and monitored.
The process includes transports to the pulp mill, wood handling, chemical pulping and bleaching, drying process, energy production on-site, recovery cycles of chemicals and internal waste water treatment. The input of magnesium sulphate (0.0027 kg/kg) has been excluded from the inventory since its contribution was less than 3 % in terms of mass and single score.
The following air emissions were reported in the study:
CO2 (fossil and biogenic), SOx (as SO2), NOx, TRS (as S), SO2 (reported as S), Dust (unspecified). Next to these key emissions, additional emissions from on-site energy production from external and internal fuels were calculated, using emission profiles from ecoinvent combustion processes. Internal biogenic fuels are represented by the calculated emissions but do not have the corresponding fuel input from technosphere, because they are supplied from within the system boundaries. The amounts of internal fuels used in the process are: Biogas (55MJ/t), Bark (1952MJ/t), Black liquor(18349MJ/t), Sludge (61 MJ/t), Methanol (145 MJ7t), Biomass (6 MJ/t), tall oil pitch (229 MJ/t), Biomass (wood residuals) (84 MJ/t)

The following ecoinvent combustion processes were used to estimate additional air emissions:

Hard coal: heat production, at hard coal industrial furnace 1-10MW, Europe without Switzerland; Heavy fuel oil: heat production, heavy fuel oil, at industrial furnace 1MW, Europe without Switzerland; Light fuel oil: heat production, light fuel oil, at industrial furnace 1MW, Europe without Switzerland; Biofuel - Biogas: heat production, natural gas, at industrial furnace >100kW, Europe without Switzerland; Methanol: heat production, natural gas, at industrial furnace >100kW, Europe without Switzerland; Natural gas: heat production, natural gas, at industrial furnace >100kW, Europe without Switzerland; Biofuel - Bark (wet weight): heat production, wood chips from industry, at furnace 1000kW, CH; Biofuel - Biomass: heat production, wood chips from industry, at furnace 1000kW, CH; Biofuel - Biomass - wood residuals: heat production, wood chips from industry, at furnace 1000kW, CH; Biofuel - Bark: heat production, wood chips from industry, at furnace 1000kW, CH; Wood pellets: heat production, wood chips from industry, at furnace 1000kW, CH;
Black liquor, sludge, tall oil pitch, and sodium formiate were not included in the emissions calculations because no specific emission profiles, e.g. for the black liquor recovery process, were available. Emissions from these internal energy generation processes are therefore only reflected in the key emission factors provided by the industry, other emissions constitute a data gap. Emissions of stemming from biogas are approximated with the combustion of natural gas, whereby CO2, CO and CH4 emissions stemming from biogas were modelled as non-fossil.
The amount of infrastructure (pulp factory) was taken from the dataset “The European Pulp Industry Sector Association AISBL, sulfate pulp production, from softwood, bleached, RER, Undefined, ecoinvent database version 3.7.1”

## Parameters
- kg_0: 0.00501269
  Mass in kg, for methanol, from biomass; Freight train, diesel traction; EU+EFTA+UK
- km_0: 32.6956
  Distance in km, for methanol, from biomass; Freight train, diesel traction; EU+EFTA+UK
- kg_km_0: 0.163893; = kg_0*km_0
  Transport amount in km*km, for methanol, from biomass; Freight train, diesel traction; EU+EFTA+UK
- kg_1: 0.00501269
  Mass in kg, for methanol, from biomass; Freight train, electricity traction; EU+EFTA+UK
- km_1: 11.042
  Distance in km, for methanol, from biomass; Freight train, electricity traction; EU+EFTA+UK
- kg_km_1: 0.0553503; = kg_1*km_1
  Transport amount in km*km, for methanol, from biomass; Freight train, electricity traction; EU+EFTA+UK
- kg_2: 0.00501269
  Mass in kg, for methanol, from biomass; Freight train, average; EU+EFTA+UK
- km_2: 0.262339
  Distance in km, for methanol, from biomass; Freight train, average; EU+EFTA+UK
- kg_km_2: 0.00131502; = kg_2*km_2
  Transport amount in km*km, for methanol, from biomass; Freight train, average; EU+EFTA+UK
- kg_3: 0.00501269
  Mass in kg, for methanol, from biomass; Barge; EU+EFTA+UK
- km_3: 10.6781
  Distance in km, for methanol, from biomass; Barge; EU+EFTA+UK
- kg_km_3: 0.0535261; = kg_3*km_3
  Transport amount in km*km, for methanol, from biomass; Barge; EU+EFTA+UK
- kg_4: 0.00501269
  Mass in kg, for methanol, from biomass; Articulated lorry transport, Total weight >32 t, mix Euro 0-5; ROW w/o EU+EFTA
- km_4: 56.7
  Distance in km, for methanol, from biomass; Articulated lorry transport, Total weight >32 t, mix Euro 0-5; ROW w/o EU+EFTA
- kg_km_4: 0.284219; = kg_4*km_4
  Transport amount in km*km, for methanol, from biomass; Articulated lorry transport, Total weight >32 t, mix Euro 0-5; ROW w/o EU+EFTA
- kg_5: 0.00501269
  Mass in kg, for methanol, from biomass; Articulated lorry transport, Total weight <7.5 t, mix Euro 0-5; EU+EFTA+UK
- km_5: 1.71121
  Distance in km, for methanol, from biomass; Articulated lorry transport, Total weight <7.5 t, mix Euro 0-5; EU+EFTA+UK
- kg_km_5: 0.00857777; = kg_5*km_5
  Transport amount in km*km, for methanol, from biomass; Articulated lorry transport, Total weight <7.5 t, mix Euro 0-5; EU+EFTA+UK
- kg_6: 0.00501269
  Mass in kg, for methanol, from biomass; Barge; ROW w/o EU+EFTA
- km_6: 21.6219
  Distance in km, for methanol, from biomass; Barge; ROW w/o EU+EFTA
- kg_km_6: 0.108384; = kg_6*km_6
  Transport amount in km*km, for methanol, from biomass; Barge; ROW w/o EU+EFTA
- kg_7: 0.000190874
  Mass in kg, for malusil; Transoceanic ship, bulk; GLO
- km_7: 219.908
  Distance in km, for malusil; Transoceanic ship, bulk; GLO
- kg_km_7: 0.0419748; = kg_7*km_7
  Transport amount in km*km, for malusil; Transoceanic ship, bulk; GLO
- kg_8: 0.000190874
  Mass in kg, for malusil; Freight train, diesel traction; EU+EFTA+UK
- km_8: 27.1484
  Distance in km, for malusil; Freight train, diesel traction; EU+EFTA+UK
- kg_km_8: 0.00518192; = kg_8*km_8
  Transport amount in km*km, for malusil; Freight train, diesel traction; EU+EFTA+UK
- kg_9: 0.000190874
  Mass in kg, for malusil; Freight train, electricity traction; EU+EFTA+UK
- km_9: 9.23477
  Distance in km, for malusil; Freight train, electricity traction; EU+EFTA+UK
- kg_km_9: 0.00176268; = kg_9*km_9
  Transport amount in km*km, for malusil; Freight train, electricity traction; EU+EFTA+UK
- kg_10: 0.000190874
  Mass in kg, for malusil; Freight train, average; EU+EFTA+UK
- km_10: 0.217806
  Distance in km, for malusil; Freight train, average; EU+EFTA+UK
- kg_km_10: 4.15736e-5; = kg_10*km_10
  Transport amount in km*km, for malusil; Freight train, average; EU+EFTA+UK
- kg_11: 0.000190874
  Mass in kg, for malusil; Barge; EU+EFTA+UK
- km_11: 2.08821
  Distance in km, for malusil; Barge; EU+EFTA+UK
- kg_km_11: 0.000398585; = kg_11*km_11
  Transport amount in km*km, for malusil; Barge; EU+EFTA+UK
- kg_12: 0.000190874
  Mass in kg, for malusil; Barge; ROW w/o EU+EFTA
- km_12: 4.26403
  Distance in km, for malusil; Barge; ROW w/o EU+EFTA
- kg_km_12: 0.000813891; = kg_12*km_12
  Transport amount in km*km, for malusil; Barge; ROW w/o EU+EFTA
- kg_13: 0.000190874
  Mass in kg, for malusil; Articulated lorry transport, Total weight <7.5 t, mix Euro 0-5; EU+EFTA+UK
- km_13: 2.87567
  Distance in km, for malusil; Articulated lorry transport, Total weight <7.5 t, mix Euro 0-5; EU+EFTA+UK
- kg_km_13: 0.000548889; = kg_13*km_13
  Transport amount in km*km, for malusil; Articulated lorry transport, Total weight <7.5 t, mix Euro 0-5; EU+EFTA+UK
- kg_14: 0.000190874
  Mass in kg, for malusil; Articulated lorry transport, Euro 4, Total weight >32 t; EU+EFTA+UK
- km_14: 26.8476
  Distance in km, for malusil; Articulated lorry transport, Euro 4, Total weight >32 t; EU+EFTA+UK
- kg_km_14: 0.0051245; = kg_14*km_14
  Transport amount in km*km, for malusil; Articulated lorry transport, Euro 4, Total weight >32 t; EU+EFTA+UK
- kg_15: 0.000190874
  Mass in kg, for malusil; Articulated lorry transport, Total weight >32 t, mix Euro 0-5; ROW w/o EU+EFTA
- km_15: 70.8559
  Distance in km, for malusil; Articulated lorry transport, Total weight >32 t, mix Euro 0-5; ROW w/o EU+EFTA
- kg_km_15: 0.0135245; = kg_15*km_15
  Transport amount in km*km, for malusil; Articulated lorry transport, Total weight >32 t, mix Euro 0-5; ROW w/o EU+EFTA
- kg_16: 0.00150355
  Mass in kg, for sodium hydrogen sulphite // sodium hydrogen sulphite production // eu+efta+uk; Articulated lorry transport, Euro 4, Total weight >32 t; EU+EFTA+UK
- km_16: 1128.04
  Distance in km, for sodium hydrogen sulphite // sodium hydrogen sulphite production // eu+efta+uk; Articulated lorry transport, Euro 4, Total weight >32 t; EU+EFTA+UK
- kg_km_16: 1.69607; = kg_16*km_16
  Transport amount in km*km, for sodium hydrogen sulphite // sodium hydrogen sulphite production // eu+efta+uk; Articulated lorry transport, Euro 4, Total weight >32 t; EU+EFTA+UK
- kg_17: 3.0536
  Mass in kg, for softwood under bark // softwood forestry // world (without eu+efta+uk, us and ca); Articulated lorry transport, Euro 4, Total weight >32 t; EU+EFTA+UK
- km_17: 74.0691
  Distance in km, for softwood under bark // softwood forestry // world (without eu+efta+uk, us and ca); Articulated lorry transport, Euro 4, Total weight >32 t; EU+EFTA+UK
- kg_km_17: 226.178; = kg_17*km_17
  Transport amount in km*km, for softwood under bark // softwood forestry // world (without eu+efta+uk, us and ca); Articulated lorry transport, Euro 4, Total weight >32 t; EU+EFTA+UK
- kg_18: 3.0536
  Mass in kg, for softwood under bark // softwood forestry // world (without eu+efta+uk, us and ca); Barge; ROW w/o EU+EFTA
- km_18: 7.43276
  Distance in km, for softwood under bark // softwood forestry // world (without eu+efta+uk, us and ca); Barge; ROW w/o EU+EFTA
- kg_km_18: 22.6967; = kg_18*km_18
  Transport amount in km*km, for softwood under bark // softwood forestry // world (without eu+efta+uk, us and ca); Barge; ROW w/o EU+EFTA
- kg_19: 3.0536
  Mass in kg, for softwood under bark // softwood forestry // world (without eu+efta+uk, us and ca); Freight train, average; EU+EFTA+UK
- km_19: 114.418
  Distance in km, for softwood under bark // softwood forestry // world (without eu+efta+uk, us and ca); Freight train, average; EU+EFTA+UK
- kg_km_19: 349.388; = kg_19*km_19
  Transport amount in km*km, for softwood under bark // softwood forestry // world (without eu+efta+uk, us and ca); Freight train, average; EU+EFTA+UK
- kg_20: 3.0536
  Mass in kg, for softwood under bark // softwood forestry // world (without eu+efta+uk, us and ca); Transoceanic ship, bulk; GLO
- km_20: 169.025
  Distance in km, for softwood under bark // softwood forestry // world (without eu+efta+uk, us and ca); Transoceanic ship, bulk; GLO
- kg_km_20: 516.137; = kg_20*km_20
  Transport amount in km*km, for softwood under bark // softwood forestry // world (without eu+efta+uk, us and ca); Transoceanic ship, bulk; GLO
- kg_21: 0.428327
  Mass in kg, for wood chips, softwood // wood chips, softwood // world (without eu+efta+uk, us and ca); Articulated lorry transport, Euro 4, Total weight >32 t; EU+EFTA+UK
- km_21: 106.37
  Distance in km, for wood chips, softwood // wood chips, softwood // world (without eu+efta+uk, us and ca); Articulated lorry transport, Euro 4, Total weight >32 t; EU+EFTA+UK
- kg_km_21: 45.5613; = kg_21*km_21
  Transport amount in km*km, for wood chips, softwood // wood chips, softwood // world (without eu+efta+uk, us and ca); Articulated lorry transport, Euro 4, Total weight >32 t; EU+EFTA+UK
- kg_22: 0.428327
  Mass in kg, for wood chips, softwood // wood chips, softwood // world (without eu+efta+uk, us and ca); Barge; ROW w/o EU+EFTA
- km_22: 9.68459
  Distance in km, for wood chips, softwood // wood chips, softwood // world (without eu+efta+uk, us and ca); Barge; ROW w/o EU+EFTA
- kg_km_22: 4.14818; = kg_22*km_22
  Transport amount in km*km, for wood chips, softwood // wood chips, softwood // world (without eu+efta+uk, us and ca); Barge; ROW w/o EU+EFTA
- kg_23: 0.428327
  Mass in kg, for wood chips, softwood // wood chips, softwood // world (without eu+efta+uk, us and ca); Freight train, average; EU+EFTA+UK
- km_23: 162.615
  Distance in km, for wood chips, softwood // wood chips, softwood // world (without eu+efta+uk, us and ca); Freight train, average; EU+EFTA+UK
- kg_km_23: 69.6524; = kg_23*km_23
  Transport amount in km*km, for wood chips, softwood // wood chips, softwood // world (without eu+efta+uk, us and ca); Freight train, average; EU+EFTA+UK
- kg_24: 0.428327
  Mass in kg, for wood chips, softwood // wood chips, softwood // world (without eu+efta+uk, us and ca); Transoceanic ship, bulk; GLO
- km_24: 201.065
  Distance in km, for wood chips, softwood // wood chips, softwood // world (without eu+efta+uk, us and ca); Transoceanic ship, bulk; GLO
- kg_km_24: 86.1219; = kg_24*km_24
  Transport amount in km*km, for wood chips, softwood // wood chips, softwood // world (without eu+efta+uk, us and ca); Transoceanic ship, bulk; GLO
- kg_25: 0.00569845
  Mass in kg, for biogas for bioenergy // biogas for bioenergy // cn; Articulated lorry transport, Euro 4, Total weight >32 t; EU+EFTA+UK
- km_25: 999.438
  Distance in km, for biogas for bioenergy // biogas for bioenergy // cn; Articulated lorry transport, Euro 4, Total weight >32 t; EU+EFTA+UK
- kg_km_25: 5.69525; = kg_25*km_25
  Transport amount in km*km, for biogas for bioenergy // biogas for bioenergy // cn; Articulated lorry transport, Euro 4, Total weight >32 t; EU+EFTA+UK
- kg_26: 0.00569845
  Mass in kg, for biogas for bioenergy // biogas for bioenergy // cn; Transoceanic ship, containers; GLO
- km_26: 18064.2
  Distance in km, for biogas for bioenergy // biogas for bioenergy // cn; Transoceanic ship, containers; GLO
- kg_km_26: 102.938; = kg_26*km_26
  Transport amount in km*km, for biogas for bioenergy // biogas for bioenergy // cn; Transoceanic ship, containers; GLO
- kg_27: 0.000493822
  Mass in kg, for biogas for bioenergy // biogas for bioenergy // ras w/o cn; Articulated lorry transport, Euro 4, Total weight >32 t; EU+EFTA+UK
- km_27: 999.396
  Distance in km, for biogas for bioenergy // biogas for bioenergy // ras w/o cn; Articulated lorry transport, Euro 4, Total weight >32 t; EU+EFTA+UK
- kg_km_27: 0.493524; = kg_27*km_27
  Transport amount in km*km, for biogas for bioenergy // biogas for bioenergy // ras w/o cn; Articulated lorry transport, Euro 4, Total weight >32 t; EU+EFTA+UK
- kg_28: 0.000493822
  Mass in kg, for biogas for bioenergy // biogas for bioenergy // ras w/o cn; Transoceanic ship, containers; GLO
- km_28: 18000.8
  Distance in km, for biogas for bioenergy // biogas for bioenergy // ras w/o cn; Transoceanic ship, containers; GLO
- kg_km_28: 8.8892; = kg_28*km_28
  Transport amount in km*km, for biogas for bioenergy // biogas for bioenergy // ras w/o cn; Transoceanic ship, containers; GLO
- kg_29: 0.00030539
  Mass in kg, for biogas for bioenergy // biogas for bioenergy // in; Articulated lorry transport, Euro 4, Total weight >32 t; EU+EFTA+UK
- km_29: 998.608
  Distance in km, for biogas for bioenergy // biogas for bioenergy // in; Articulated lorry transport, Euro 4, Total weight >32 t; EU+EFTA+UK
- kg_km_29: 0.304965; = kg_29*km_29
  Transport amount in km*km, for biogas for bioenergy // biogas for bioenergy // in; Articulated lorry transport, Euro 4, Total weight >32 t; EU+EFTA+UK
- kg_30: 0.00030539
  Mass in kg, for biogas for bioenergy // biogas for bioenergy // in; Transoceanic ship, containers; GLO
- km_30: 17987.6
  Distance in km, for biogas for bioenergy // biogas for bioenergy // in; Transoceanic ship, containers; GLO
- kg_km_30: 5.49322; = kg_30*km_30
  Transport amount in km*km, for biogas for bioenergy // biogas for bioenergy // in; Transoceanic ship, containers; GLO
- kg_31: 0.0083749
  Mass in kg, for bark, hardwood // bark, hardwood // eu+efta+uk; Articulated lorry transport, Euro 4, Total weight >32 t; EU+EFTA+UK
- km_31: 1699.98
  Distance in km, for bark, hardwood // bark, hardwood // eu+efta+uk; Articulated lorry transport, Euro 4, Total weight >32 t; EU+EFTA+UK
- kg_km_31: 14.2372; = kg_31*km_31
  Transport amount in km*km, for bark, hardwood // bark, hardwood // eu+efta+uk; Articulated lorry transport, Euro 4, Total weight >32 t; EU+EFTA+UK
- kg_32: 0.0083749
  Mass in kg, for bark, hardwood // bark, hardwood // eu+efta+uk; Transoceanic ship, containers; GLO
- km_32: 30599.6
  Distance in km, for bark, hardwood // bark, hardwood // eu+efta+uk; Transoceanic ship, containers; GLO
- kg_km_32: 256.269; = kg_32*km_32
  Transport amount in km*km, for bark, hardwood // bark, hardwood // eu+efta+uk; Transoceanic ship, containers; GLO
- kg_33: 0.0083749
  Mass in kg, for bark, softwood // bark, softwood // eu+efta+uk; Articulated lorry transport, Euro 4, Total weight >32 t; EU+EFTA+UK
- km_33: 1699.98
  Distance in km, for bark, softwood // bark, softwood // eu+efta+uk; Articulated lorry transport, Euro 4, Total weight >32 t; EU+EFTA+UK
- kg_km_33: 14.2372; = kg_33*km_33
  Transport amount in km*km, for bark, softwood // bark, softwood // eu+efta+uk; Articulated lorry transport, Euro 4, Total weight >32 t; EU+EFTA+UK
- kg_34: 0.0083749
  Mass in kg, for bark, softwood // bark, softwood // eu+efta+uk; Transoceanic ship, containers; GLO
- km_34: 30599.6
  Distance in km, for bark, softwood // bark, softwood // eu+efta+uk; Transoceanic ship, containers; GLO
- kg_km_34: 256.269; = kg_34*km_34
  Transport amount in km*km, for bark, softwood // bark, softwood // eu+efta+uk; Transoceanic ship, containers; GLO
- kg_35: 0.000273401
  Mass in kg, for heavy fuel oil (1.0 wt.% s) // heavy fuel oil at refinery // in; Articulated lorry transport, Euro 4, Total weight >32 t; EU+EFTA+UK
- km_35: 999.33
  Distance in km, for heavy fuel oil (1.0 wt.% s) // heavy fuel oil at refinery // in; Articulated lorry transport, Euro 4, Total weight >32 t; EU+EFTA+UK
- kg_km_35: 0.273218; = kg_35*km_35
  Transport amount in km*km, for heavy fuel oil (1.0 wt.% s) // heavy fuel oil at refinery // in; Articulated lorry transport, Euro 4, Total weight >32 t; EU+EFTA+UK
- kg_36: 0.000273401
  Mass in kg, for heavy fuel oil (1.0 wt.% s) // heavy fuel oil at refinery // in; Transoceanic ship, containers; GLO
- km_36: 18016.1
  Distance in km, for heavy fuel oil (1.0 wt.% s) // heavy fuel oil at refinery // in; Transoceanic ship, containers; GLO
- kg_km_36: 4.92562; = kg_36*km_36
  Transport amount in km*km, for heavy fuel oil (1.0 wt.% s) // heavy fuel oil at refinery // in; Transoceanic ship, containers; GLO
- kg_37: 0.000462679
  Mass in kg, for heavy fuel oil (1.0 wt.% s) // heavy fuel oil at refinery // jp; Articulated lorry transport, Euro 4, Total weight >32 t; EU+EFTA+UK
- km_37: 1000.13
  Distance in km, for heavy fuel oil (1.0 wt.% s) // heavy fuel oil at refinery // jp; Articulated lorry transport, Euro 4, Total weight >32 t; EU+EFTA+UK
- kg_km_37: 0.462739; = kg_37*km_37
  Transport amount in km*km, for heavy fuel oil (1.0 wt.% s) // heavy fuel oil at refinery // jp; Articulated lorry transport, Euro 4, Total weight >32 t; EU+EFTA+UK
- kg_38: 0.000462679
  Mass in kg, for heavy fuel oil (1.0 wt.% s) // heavy fuel oil at refinery // jp; Transoceanic ship, containers; GLO
- km_38: 18006.5
  Distance in km, for heavy fuel oil (1.0 wt.% s) // heavy fuel oil at refinery // jp; Transoceanic ship, containers; GLO
- kg_km_38: 8.33122; = kg_38*km_38
  Transport amount in km*km, for heavy fuel oil (1.0 wt.% s) // heavy fuel oil at refinery // jp; Transoceanic ship, containers; GLO
- kg_39: 0.0027971
  Mass in kg, for heavy fuel oil (1.0 wt.% s) // heavy fuel oil at refinery // ras w/o cn; Articulated lorry transport, Euro 4, Total weight >32 t; EU+EFTA+UK
- km_39: 1000.86
  Distance in km, for heavy fuel oil (1.0 wt.% s) // heavy fuel oil at refinery // ras w/o cn; Articulated lorry transport, Euro 4, Total weight >32 t; EU+EFTA+UK
- kg_km_39: 2.79952; = kg_39*km_39
  Transport amount in km*km, for heavy fuel oil (1.0 wt.% s) // heavy fuel oil at refinery // ras w/o cn; Articulated lorry transport, Euro 4, Total weight >32 t; EU+EFTA+UK
- kg_40: 0.0027971
  Mass in kg, for heavy fuel oil (1.0 wt.% s) // heavy fuel oil at refinery // ras w/o cn; Transoceanic ship, containers; GLO
- km_40: 17988
  Distance in km, for heavy fuel oil (1.0 wt.% s) // heavy fuel oil at refinery // ras w/o cn; Transoceanic ship, containers; GLO
- kg_km_40: 50.3144; = kg_40*km_40
  Transport amount in km*km, for heavy fuel oil (1.0 wt.% s) // heavy fuel oil at refinery // ras w/o cn; Transoceanic ship, containers; GLO
- kg_41: 2.80411e-5
  Mass in kg, for heavy fuel oil (1.0 wt.% s) // heavy fuel oil at refinery // au; Articulated lorry transport, Euro 4, Total weight >32 t; EU+EFTA+UK
- km_41: 998.362
  Distance in km, for heavy fuel oil (1.0 wt.% s) // heavy fuel oil at refinery // au; Articulated lorry transport, Euro 4, Total weight >32 t; EU+EFTA+UK
- kg_km_41: 0.0279952; = kg_41*km_41
  Transport amount in km*km, for heavy fuel oil (1.0 wt.% s) // heavy fuel oil at refinery // au; Articulated lorry transport, Euro 4, Total weight >32 t; EU+EFTA+UK
- kg_42: 2.80411e-5
  Mass in kg, for heavy fuel oil (1.0 wt.% s) // heavy fuel oil at refinery // au; Transoceanic ship, containers; GLO
- km_42: 18011.7
  Distance in km, for heavy fuel oil (1.0 wt.% s) // heavy fuel oil at refinery // au; Transoceanic ship, containers; GLO
- kg_km_42: 0.505068; = kg_42*km_42
  Transport amount in km*km, for heavy fuel oil (1.0 wt.% s) // heavy fuel oil at refinery // au; Transoceanic ship, containers; GLO
- kg_43: 0.000287422
  Mass in kg, for heavy fuel oil (1.0 wt.% s) // heavy fuel oil at refinery // cn; Articulated lorry transport, Euro 4, Total weight >32 t; EU+EFTA+UK
- km_43: 1000.79
  Distance in km, for heavy fuel oil (1.0 wt.% s) // heavy fuel oil at refinery // cn; Articulated lorry transport, Euro 4, Total weight >32 t; EU+EFTA+UK
- kg_km_43: 0.287648; = kg_43*km_43
  Transport amount in km*km, for heavy fuel oil (1.0 wt.% s) // heavy fuel oil at refinery // cn; Articulated lorry transport, Euro 4, Total weight >32 t; EU+EFTA+UK
- kg_44: 0.000287422
  Mass in kg, for heavy fuel oil (1.0 wt.% s) // heavy fuel oil at refinery // cn; Transoceanic ship, containers; GLO
- km_44: 18007.5
  Distance in km, for heavy fuel oil (1.0 wt.% s) // heavy fuel oil at refinery // cn; Transoceanic ship, containers; GLO
- kg_km_44: 5.17575; = kg_44*km_44
  Transport amount in km*km, for heavy fuel oil (1.0 wt.% s) // heavy fuel oil at refinery // cn; Transoceanic ship, containers; GLO
- kg_45: 0.00143711
  Mass in kg, for heavy fuel oil (1.0 wt.% s) // heavy fuel oil at refinery // ru; Articulated lorry transport, Euro 4, Total weight >32 t; EU+EFTA+UK
- km_45: 997.442
  Distance in km, for heavy fuel oil (1.0 wt.% s) // heavy fuel oil at refinery // ru; Articulated lorry transport, Euro 4, Total weight >32 t; EU+EFTA+UK
- kg_km_45: 1.43343; = kg_45*km_45
  Transport amount in km*km, for heavy fuel oil (1.0 wt.% s) // heavy fuel oil at refinery // ru; Articulated lorry transport, Euro 4, Total weight >32 t; EU+EFTA+UK
- kg_46: 0.00143711
  Mass in kg, for heavy fuel oil (1.0 wt.% s) // heavy fuel oil at refinery // ru; Transoceanic ship, containers; GLO
- km_46: 18007.5
  Distance in km, for heavy fuel oil (1.0 wt.% s) // heavy fuel oil at refinery // ru; Transoceanic ship, containers; GLO
- kg_km_46: 25.8787; = kg_46*km_46
  Transport amount in km*km, for heavy fuel oil (1.0 wt.% s) // heavy fuel oil at refinery // ru; Transoceanic ship, containers; GLO
- kg_47: 0.000511751
  Mass in kg, for heavy fuel oil (1.0 wt.% s) // heavy fuel oil at refinery // raf; Articulated lorry transport, Euro 4, Total weight >32 t; EU+EFTA+UK
- km_47: 1000.1
  Distance in km, for heavy fuel oil (1.0 wt.% s) // heavy fuel oil at refinery // raf; Articulated lorry transport, Euro 4, Total weight >32 t; EU+EFTA+UK
- kg_km_47: 0.511802; = kg_47*km_47
  Transport amount in km*km, for heavy fuel oil (1.0 wt.% s) // heavy fuel oil at refinery // raf; Articulated lorry transport, Euro 4, Total weight >32 t; EU+EFTA+UK
- kg_48: 0.000511751
  Mass in kg, for heavy fuel oil (1.0 wt.% s) // heavy fuel oil at refinery // raf; Transoceanic ship, containers; GLO
- km_48: 18009.3
  Distance in km, for heavy fuel oil (1.0 wt.% s) // heavy fuel oil at refinery // raf; Transoceanic ship, containers; GLO
- kg_km_48: 9.21629; = kg_48*km_48
  Transport amount in km*km, for heavy fuel oil (1.0 wt.% s) // heavy fuel oil at refinery // raf; Transoceanic ship, containers; GLO
- kg_49: 0.00024536
  Mass in kg, for heavy fuel oil (1.0 wt.% s) // heavy fuel oil at refinery // br; Articulated lorry transport, Euro 4, Total weight >32 t; EU+EFTA+UK
- km_49: 999.833
  Distance in km, for heavy fuel oil (1.0 wt.% s) // heavy fuel oil at refinery // br; Articulated lorry transport, Euro 4, Total weight >32 t; EU+EFTA+UK
- kg_km_49: 0.245319; = kg_49*km_49
  Transport amount in km*km, for heavy fuel oil (1.0 wt.% s) // heavy fuel oil at refinery // br; Articulated lorry transport, Euro 4, Total weight >32 t; EU+EFTA+UK
- kg_50: 0.00024536
  Mass in kg, for heavy fuel oil (1.0 wt.% s) // heavy fuel oil at refinery // br; Transoceanic ship, containers; GLO
- km_50: 17997
  Distance in km, for heavy fuel oil (1.0 wt.% s) // heavy fuel oil at refinery // br; Transoceanic ship, containers; GLO
- kg_km_50: 4.41574; = kg_50*km_50
  Transport amount in km*km, for heavy fuel oil (1.0 wt.% s) // heavy fuel oil at refinery // br; Transoceanic ship, containers; GLO
- kg_51: 0.000974429
  Mass in kg, for heavy fuel oil (1.0 wt.% s) // heavy fuel oil at refinery // rsa; Articulated lorry transport, Euro 4, Total weight >32 t; EU+EFTA+UK
- km_51: 997.153
  Distance in km, for heavy fuel oil (1.0 wt.% s) // heavy fuel oil at refinery // rsa; Articulated lorry transport, Euro 4, Total weight >32 t; EU+EFTA+UK
- kg_km_51: 0.971655; = kg_51*km_51
  Transport amount in km*km, for heavy fuel oil (1.0 wt.% s) // heavy fuel oil at refinery // rsa; Articulated lorry transport, Euro 4, Total weight >32 t; EU+EFTA+UK
- kg_52: 0.000974429
  Mass in kg, for heavy fuel oil (1.0 wt.% s) // heavy fuel oil at refinery // rsa; Transoceanic ship, containers; GLO
- km_52: 17968.5
  Distance in km, for heavy fuel oil (1.0 wt.% s) // heavy fuel oil at refinery // rsa; Transoceanic ship, containers; GLO
- kg_km_52: 17.509; = kg_52*km_52
  Transport amount in km*km, for heavy fuel oil (1.0 wt.% s) // heavy fuel oil at refinery // rsa; Transoceanic ship, containers; GLO
- kg_53: 6.16249e-5
  Mass in kg, for light fuel oil // light fuel oil at refinery // in; Articulated lorry transport, Euro 4, Total weight >32 t; EU+EFTA+UK
- km_53: 1000.67
  Distance in km, for light fuel oil // light fuel oil at refinery // in; Articulated lorry transport, Euro 4, Total weight >32 t; EU+EFTA+UK
- kg_km_53: 0.0616664; = kg_53*km_53
  Transport amount in km*km, for light fuel oil // light fuel oil at refinery // in; Articulated lorry transport, Euro 4, Total weight >32 t; EU+EFTA+UK
- kg_54: 6.16249e-5
  Mass in kg, for light fuel oil // light fuel oil at refinery // in; Transoceanic ship, containers; GLO
- km_54: 17952.8
  Distance in km, for light fuel oil // light fuel oil at refinery // in; Transoceanic ship, containers; GLO
- kg_km_54: 1.10634; = kg_54*km_54
  Transport amount in km*km, for light fuel oil // light fuel oil at refinery // in; Transoceanic ship, containers; GLO
- kg_55: 3.05535e-5
  Mass in kg, for light fuel oil // light fuel oil at refinery // jp; Articulated lorry transport, Euro 4, Total weight >32 t; EU+EFTA+UK
- km_55: 1001.28
  Distance in km, for light fuel oil // light fuel oil at refinery // jp; Articulated lorry transport, Euro 4, Total weight >32 t; EU+EFTA+UK
- kg_km_55: 0.0305927; = kg_55*km_55
  Transport amount in km*km, for light fuel oil // light fuel oil at refinery // jp; Articulated lorry transport, Euro 4, Total weight >32 t; EU+EFTA+UK
- kg_56: 3.05535e-5
  Mass in kg, for light fuel oil // light fuel oil at refinery // jp; Transoceanic ship, containers; GLO
- km_56: 18010.5
  Distance in km, for light fuel oil // light fuel oil at refinery // jp; Transoceanic ship, containers; GLO
- kg_km_56: 0.550284; = kg_56*km_56
  Transport amount in km*km, for light fuel oil // light fuel oil at refinery // jp; Transoceanic ship, containers; GLO
- kg_57: 0.000166232
  Mass in kg, for light fuel oil // light fuel oil at refinery // ras w/o cn; Articulated lorry transport, Euro 4, Total weight >32 t; EU+EFTA+UK
- km_57: 1001.2
  Distance in km, for light fuel oil // light fuel oil at refinery // ras w/o cn; Articulated lorry transport, Euro 4, Total weight >32 t; EU+EFTA+UK
- kg_km_57: 0.166432; = kg_57*km_57
  Transport amount in km*km, for light fuel oil // light fuel oil at refinery // ras w/o cn; Articulated lorry transport, Euro 4, Total weight >32 t; EU+EFTA+UK
- kg_58: 0.000166232
  Mass in kg, for light fuel oil // light fuel oil at refinery // ras w/o cn; Transoceanic ship, containers; GLO
- km_58: 17998.5
  Distance in km, for light fuel oil // light fuel oil at refinery // ras w/o cn; Transoceanic ship, containers; GLO
- kg_km_58: 2.99193; = kg_58*km_58
  Transport amount in km*km, for light fuel oil // light fuel oil at refinery // ras w/o cn; Transoceanic ship, containers; GLO
- kg_59: 8.80355e-6
  Mass in kg, for light fuel oil // light fuel oil at refinery // au; Articulated lorry transport, Euro 4, Total weight >32 t; EU+EFTA+UK
- km_59: 999.894
  Distance in km, for light fuel oil // light fuel oil at refinery // au; Articulated lorry transport, Euro 4, Total weight >32 t; EU+EFTA+UK
- kg_km_59: 0.00880262; = kg_59*km_59
  Transport amount in km*km, for light fuel oil // light fuel oil at refinery // au; Articulated lorry transport, Euro 4, Total weight >32 t; EU+EFTA+UK
- kg_60: 8.80355e-6
  Mass in kg, for light fuel oil // light fuel oil at refinery // au; Transoceanic ship, containers; GLO
- km_60: 18030.9
  Distance in km, for light fuel oil // light fuel oil at refinery // au; Transoceanic ship, containers; GLO
- kg_km_60: 0.158736; = kg_60*km_60
  Transport amount in km*km, for light fuel oil // light fuel oil at refinery // au; Transoceanic ship, containers; GLO
- kg_61: 0.000114446
  Mass in kg, for light fuel oil // light fuel oil at refinery // cn; Articulated lorry transport, Euro 4, Total weight >32 t; EU+EFTA+UK
- km_61: 1000.31
  Distance in km, for light fuel oil // light fuel oil at refinery // cn; Articulated lorry transport, Euro 4, Total weight >32 t; EU+EFTA+UK
- kg_km_61: 0.114482; = kg_61*km_61
  Transport amount in km*km, for light fuel oil // light fuel oil at refinery // cn; Articulated lorry transport, Euro 4, Total weight >32 t; EU+EFTA+UK
- kg_62: 0.000114446
  Mass in kg, for light fuel oil // light fuel oil at refinery // cn; Transoceanic ship, containers; GLO
- km_62: 17988.8
  Distance in km, for light fuel oil // light fuel oil at refinery // cn; Transoceanic ship, containers; GLO
- kg_km_62: 2.05875; = kg_62*km_62
  Transport amount in km*km, for light fuel oil // light fuel oil at refinery // cn; Transoceanic ship, containers; GLO
- kg_63: 4.71249e-5
  Mass in kg, for light fuel oil // light fuel oil at refinery // ru; Articulated lorry transport, Euro 4, Total weight >32 t; EU+EFTA+UK
- km_63: 1000.31
  Distance in km, for light fuel oil // light fuel oil at refinery // ru; Articulated lorry transport, Euro 4, Total weight >32 t; EU+EFTA+UK
- kg_km_63: 0.0471397; = kg_63*km_63
  Transport amount in km*km, for light fuel oil // light fuel oil at refinery // ru; Articulated lorry transport, Euro 4, Total weight >32 t; EU+EFTA+UK
- kg_64: 4.71249e-5
  Mass in kg, for light fuel oil // light fuel oil at refinery // ru; Transoceanic ship, containers; GLO
- km_64: 18005.7
  Distance in km, for light fuel oil // light fuel oil at refinery // ru; Transoceanic ship, containers; GLO
- kg_km_64: 0.848515; = kg_64*km_64
  Transport amount in km*km, for light fuel oil // light fuel oil at refinery // ru; Transoceanic ship, containers; GLO
- kg_65: 2.12321e-5
  Mass in kg, for light fuel oil // light fuel oil at refinery // raf; Articulated lorry transport, Euro 4, Total weight >32 t; EU+EFTA+UK
- km_65: 1001.36
  Distance in km, for light fuel oil // light fuel oil at refinery // raf; Articulated lorry transport, Euro 4, Total weight >32 t; EU+EFTA+UK
- kg_km_65: 0.021261; = kg_65*km_65
  Transport amount in km*km, for light fuel oil // light fuel oil at refinery // raf; Articulated lorry transport, Euro 4, Total weight >32 t; EU+EFTA+UK
- kg_66: 2.12321e-5
  Mass in kg, for light fuel oil // light fuel oil at refinery // raf; Transoceanic ship, containers; GLO
- km_66: 17988.2
  Distance in km, for light fuel oil // light fuel oil at refinery // raf; Transoceanic ship, containers; GLO
- kg_km_66: 0.381928; = kg_66*km_66
  Transport amount in km*km, for light fuel oil // light fuel oil at refinery // raf; Transoceanic ship, containers; GLO
- kg_67: 2.74464e-5
  Mass in kg, for light fuel oil // light fuel oil at refinery // br; Articulated lorry transport, Euro 4, Total weight >32 t; EU+EFTA+UK
- km_67: 998.966
  Distance in km, for light fuel oil // light fuel oil at refinery // br; Articulated lorry transport, Euro 4, Total weight >32 t; EU+EFTA+UK
- kg_km_67: 0.027418; = kg_67*km_67
  Transport amount in km*km, for light fuel oil // light fuel oil at refinery // br; Articulated lorry transport, Euro 4, Total weight >32 t; EU+EFTA+UK
- kg_68: 2.74464e-5
  Mass in kg, for light fuel oil // light fuel oil at refinery // br; Transoceanic ship, containers; GLO
- km_68: 18016.4
  Distance in km, for light fuel oil // light fuel oil at refinery // br; Transoceanic ship, containers; GLO
- kg_km_68: 0.494486; = kg_68*km_68
  Transport amount in km*km, for light fuel oil // light fuel oil at refinery // br; Transoceanic ship, containers; GLO
- kg_69: 3.98749e-5
  Mass in kg, for light fuel oil // light fuel oil at refinery // rsa; Articulated lorry transport, Euro 4, Total weight >32 t; EU+EFTA+UK
- km_69: 998.83
  Distance in km, for light fuel oil // light fuel oil at refinery // rsa; Articulated lorry transport, Euro 4, Total weight >32 t; EU+EFTA+UK
- kg_km_69: 0.0398282; = kg_69*km_69
  Transport amount in km*km, for light fuel oil // light fuel oil at refinery // rsa; Articulated lorry transport, Euro 4, Total weight >32 t; EU+EFTA+UK
- kg_70: 3.98749e-5
  Mass in kg, for light fuel oil // light fuel oil at refinery // rsa; Transoceanic ship, containers; GLO
- km_70: 17998.2
  Distance in km, for light fuel oil // light fuel oil at refinery // rsa; Transoceanic ship, containers; GLO
- kg_km_70: 0.717678; = kg_70*km_70
  Transport amount in km*km, for light fuel oil // light fuel oil at refinery // rsa; Transoceanic ship, containers; GLO
- kg_71: 4.85213e-6
  Mass in kg, for hard coal, at consumer russia // hard coal mix // ru; Articulated lorry transport, Euro 4, Total weight >32 t; EU+EFTA+UK
- km_71: 999.285
  Distance in km, for hard coal, at consumer russia // hard coal mix // ru; Articulated lorry transport, Euro 4, Total weight >32 t; EU+EFTA+UK
- kg_km_71: 0.00484865; = kg_71*km_71
  Transport amount in km*km, for hard coal, at consumer russia // hard coal mix // ru; Articulated lorry transport, Euro 4, Total weight >32 t; EU+EFTA+UK
- kg_72: 4.85213e-6
  Mass in kg, for hard coal, at consumer russia // hard coal mix // ru; Transoceanic ship, containers; GLO
- km_72: 18003
  Distance in km, for hard coal, at consumer russia // hard coal mix // ru; Transoceanic ship, containers; GLO
- kg_km_72: 0.0873528; = kg_72*km_72
  Transport amount in km*km, for hard coal, at consumer russia // hard coal mix // ru; Transoceanic ship, containers; GLO
- kg_73: 7.81274e-6
  Mass in kg, for hard coal, at consumer ras w/o cn // hard coal mix // ras w/o cn; Articulated lorry transport, Euro 4, Total weight >32 t; EU+EFTA+UK
- km_73: 999.869
  Distance in km, for hard coal, at consumer ras w/o cn // hard coal mix // ras w/o cn; Articulated lorry transport, Euro 4, Total weight >32 t; EU+EFTA+UK
- kg_km_73: 0.00781172; = kg_73*km_73
  Transport amount in km*km, for hard coal, at consumer ras w/o cn // hard coal mix // ras w/o cn; Articulated lorry transport, Euro 4, Total weight >32 t; EU+EFTA+UK
- kg_74: 7.81274e-6
  Mass in kg, for hard coal, at consumer ras w/o cn // hard coal mix // ras w/o cn; Transoceanic ship, containers; GLO
- km_74: 17977.9
  Distance in km, for hard coal, at consumer ras w/o cn // hard coal mix // ras w/o cn; Transoceanic ship, containers; GLO
- kg_km_74: 0.140457; = kg_74*km_74
  Transport amount in km*km, for hard coal, at consumer ras w/o cn // hard coal mix // ras w/o cn; Transoceanic ship, containers; GLO
- kg_75: 6.2502e-6
  Mass in kg, for hard coal, at consumer australia // hard coal mix // au; Articulated lorry transport, Euro 4, Total weight >32 t; EU+EFTA+UK
- km_75: 1000.48
  Distance in km, for hard coal, at consumer australia // hard coal mix // au; Articulated lorry transport, Euro 4, Total weight >32 t; EU+EFTA+UK
- kg_km_75: 0.00625323; = kg_75*km_75
  Transport amount in km*km, for hard coal, at consumer australia // hard coal mix // au; Articulated lorry transport, Euro 4, Total weight >32 t; EU+EFTA+UK
- kg_76: 6.2502e-6
  Mass in kg, for hard coal, at consumer australia // hard coal mix // au; Transoceanic ship, containers; GLO
- km_76: 18008.7
  Distance in km, for hard coal, at consumer australia // hard coal mix // au; Transoceanic ship, containers; GLO
- kg_km_76: 0.112558; = kg_76*km_76
  Transport amount in km*km, for hard coal, at consumer australia // hard coal mix // au; Transoceanic ship, containers; GLO
- kg_77: 4.86035e-5
  Mass in kg, for hard coal, at consumer china // hard coal mix // cn; Articulated lorry transport, Euro 4, Total weight >32 t; EU+EFTA+UK
- km_77: 999.573
  Distance in km, for hard coal, at consumer china // hard coal mix // cn; Articulated lorry transport, Euro 4, Total weight >32 t; EU+EFTA+UK
- kg_km_77: 0.0485828; = kg_77*km_77
  Transport amount in km*km, for hard coal, at consumer china // hard coal mix // cn; Articulated lorry transport, Euro 4, Total weight >32 t; EU+EFTA+UK
- kg_78: 4.86035e-5
  Mass in kg, for hard coal, at consumer china // hard coal mix // cn; Transoceanic ship, containers; GLO
- km_78: 17992.3
  Distance in km, for hard coal, at consumer china // hard coal mix // cn; Transoceanic ship, containers; GLO
- kg_km_78: 0.87449; = kg_78*km_78
  Transport amount in km*km, for hard coal, at consumer china // hard coal mix // cn; Transoceanic ship, containers; GLO
- kg_79: 1.15135e-6
  Mass in kg, for hard coal, at consumer rsa // hard coal mix // rsa; Articulated lorry transport, Euro 4, Total weight >32 t; EU+EFTA+UK
- km_79: 1002.68
  Distance in km, for hard coal, at consumer rsa // hard coal mix // rsa; Articulated lorry transport, Euro 4, Total weight >32 t; EU+EFTA+UK
- kg_km_79: 0.00115444; = kg_79*km_79
  Transport amount in km*km, for hard coal, at consumer rsa // hard coal mix // rsa; Articulated lorry transport, Euro 4, Total weight >32 t; EU+EFTA+UK
- kg_80: 1.15135e-6
  Mass in kg, for hard coal, at consumer rsa // hard coal mix // rsa; Transoceanic ship, containers; GLO
- km_80: 17964.7
  Distance in km, for hard coal, at consumer rsa // hard coal mix // rsa; Transoceanic ship, containers; GLO
- kg_km_80: 0.0206837; = kg_80*km_80
  Transport amount in km*km, for hard coal, at consumer rsa // hard coal mix // rsa; Transoceanic ship, containers; GLO
- kg_81: 3.45406e-6
  Mass in kg, for hard coal, at consumer raf // hard coal mix // raf; Articulated lorry transport, Euro 4, Total weight >32 t; EU+EFTA+UK
- km_81: 999.898
  Distance in km, for hard coal, at consumer raf // hard coal mix // raf; Articulated lorry transport, Euro 4, Total weight >32 t; EU+EFTA+UK
- kg_km_81: 0.0034537; = kg_81*km_81
  Transport amount in km*km, for hard coal, at consumer raf // hard coal mix // raf; Articulated lorry transport, Euro 4, Total weight >32 t; EU+EFTA+UK
- kg_82: 3.45406e-6
  Mass in kg, for hard coal, at consumer raf // hard coal mix // raf; Transoceanic ship, containers; GLO
- km_82: 17992.6
  Distance in km, for hard coal, at consumer raf // hard coal mix // raf; Transoceanic ship, containers; GLO
- kg_km_82: 0.0621474; = kg_82*km_82
  Transport amount in km*km, for hard coal, at consumer raf // hard coal mix // raf; Transoceanic ship, containers; GLO
- kg_83: 1.00332e-5
  Mass in kg, for hard coal, at consumer india // hard coal mix // in; Articulated lorry transport, Euro 4, Total weight >32 t; EU+EFTA+UK
- km_83: 997.205
  Distance in km, for hard coal, at consumer india // hard coal mix // in; Articulated lorry transport, Euro 4, Total weight >32 t; EU+EFTA+UK
- kg_km_83: 0.0100052; = kg_83*km_83
  Transport amount in km*km, for hard coal, at consumer india // hard coal mix // in; Articulated lorry transport, Euro 4, Total weight >32 t; EU+EFTA+UK
- kg_84: 1.00332e-5
  Mass in kg, for hard coal, at consumer india // hard coal mix // in; Transoceanic ship, containers; GLO
- km_84: 18026.4
  Distance in km, for hard coal, at consumer india // hard coal mix // in; Transoceanic ship, containers; GLO
- kg_km_84: 0.180863; = kg_84*km_84
  Transport amount in km*km, for hard coal, at consumer india // hard coal mix // in; Transoceanic ship, containers; GLO
- kg_85: 0.00079538
  Mass in kg, for sodium formate // sodium formate production // eu+efta+uk; Articulated lorry transport, Euro 4, Total weight >32 t; EU+EFTA+UK
- km_85: 1000.28
  Distance in km, for sodium formate // sodium formate production // eu+efta+uk; Articulated lorry transport, Euro 4, Total weight >32 t; EU+EFTA+UK
- kg_km_85: 0.795603; = kg_85*km_85
  Transport amount in km*km, for sodium formate // sodium formate production // eu+efta+uk; Articulated lorry transport, Euro 4, Total weight >32 t; EU+EFTA+UK
- kg_86: 0.00079538
  Mass in kg, for sodium formate // sodium formate production // eu+efta+uk; Transoceanic ship, containers; GLO
- km_86: 18022
  Distance in km, for sodium formate // sodium formate production // eu+efta+uk; Transoceanic ship, containers; GLO
- kg_km_86: 14.3343; = kg_86*km_86
  Transport amount in km*km, for sodium formate // sodium formate production // eu+efta+uk; Transoceanic ship, containers; GLO
- kg_87: 0.0102337
  Mass in kg, for hydrogen peroxide, 100% // hydrogen peroxide, 100% production // eu+efta+uk; Articulated lorry transport, Euro 4, Total weight >32 t; EU+EFTA+UK
- km_87: 996.469
  Distance in km, for hydrogen peroxide, 100% // hydrogen peroxide, 100% production // eu+efta+uk; Articulated lorry transport, Euro 4, Total weight >32 t; EU+EFTA+UK
- kg_km_87: 10.1976; = kg_87*km_87
  Transport amount in km*km, for hydrogen peroxide, 100% // hydrogen peroxide, 100% production // eu+efta+uk; Articulated lorry transport, Euro 4, Total weight >32 t; EU+EFTA+UK
- kg_88: 0.0102337
  Mass in kg, for hydrogen peroxide, 100% // hydrogen peroxide, 100% production // eu+efta+uk; Transoceanic ship, containers; GLO
- km_88: 17955.2
  Distance in km, for hydrogen peroxide, 100% // hydrogen peroxide, 100% production // eu+efta+uk; Transoceanic ship, containers; GLO
- kg_km_88: 183.749; = kg_88*km_88
  Transport amount in km*km, for hydrogen peroxide, 100% // hydrogen peroxide, 100% production // eu+efta+uk; Transoceanic ship, containers; GLO
- kg_89: 0.020821
  Mass in kg, for oxygen // oxygen production // eu+efta+uk; Articulated lorry transport, Euro 4, Total weight >32 t; EU+EFTA+UK
- km_89: 998.027
  Distance in km, for oxygen // oxygen production // eu+efta+uk; Articulated lorry transport, Euro 4, Total weight >32 t; EU+EFTA+UK
- kg_km_89: 20.7799; = kg_89*km_89
  Transport amount in km*km, for oxygen // oxygen production // eu+efta+uk; Articulated lorry transport, Euro 4, Total weight >32 t; EU+EFTA+UK
- kg_90: 0.020821
  Mass in kg, for oxygen // oxygen production // eu+efta+uk; Transoceanic ship, containers; GLO
- km_90: 18019.9
  Distance in km, for oxygen // oxygen production // eu+efta+uk; Transoceanic ship, containers; GLO
- kg_km_90: 375.194; = kg_90*km_90
  Transport amount in km*km, for oxygen // oxygen production // eu+efta+uk; Transoceanic ship, containers; GLO
- kg_91: 0.011951
  Mass in kg, for sodium chlorate // sodium chlorate production // glo; Articulated lorry transport, Euro 4, Total weight >32 t; EU+EFTA+UK
- km_91: 998.182
  Distance in km, for sodium chlorate // sodium chlorate production // glo; Articulated lorry transport, Euro 4, Total weight >32 t; EU+EFTA+UK
- kg_km_91: 11.9292; = kg_91*km_91
  Transport amount in km*km, for sodium chlorate // sodium chlorate production // glo; Articulated lorry transport, Euro 4, Total weight >32 t; EU+EFTA+UK
- kg_92: 0.011951
  Mass in kg, for sodium chlorate // sodium chlorate production // glo; Transoceanic ship, containers; GLO
- km_92: 18031.7
  Distance in km, for sodium chlorate // sodium chlorate production // glo; Transoceanic ship, containers; GLO
- kg_km_92: 215.496; = kg_92*km_92
  Transport amount in km*km, for sodium chlorate // sodium chlorate production // glo; Transoceanic ship, containers; GLO
- kg_93: 0.0279281
  Mass in kg, for sodium hydroxide // sodium hydroxide production // eu+efta+uk; Articulated lorry transport, Euro 4, Total weight >32 t; EU+EFTA+UK
- km_93: 998.959
  Distance in km, for sodium hydroxide // sodium hydroxide production // eu+efta+uk; Articulated lorry transport, Euro 4, Total weight >32 t; EU+EFTA+UK
- kg_km_93: 27.899; = kg_93*km_93
  Transport amount in km*km, for sodium hydroxide // sodium hydroxide production // eu+efta+uk; Articulated lorry transport, Euro 4, Total weight >32 t; EU+EFTA+UK
- kg_94: 0.0279281
  Mass in kg, for sodium hydroxide // sodium hydroxide production // eu+efta+uk; Transoceanic ship, containers; GLO
- km_94: 18015.7
  Distance in km, for sodium hydroxide // sodium hydroxide production // eu+efta+uk; Transoceanic ship, containers; GLO
- kg_km_94: 503.144; = kg_94*km_94
  Transport amount in km*km, for sodium hydroxide // sodium hydroxide production // eu+efta+uk; Transoceanic ship, containers; GLO
- kg_95: 0.0259189
  Mass in kg, for sulphuric acid // sulphuric acid production // eu+efta+uk; Articulated lorry transport, Euro 4, Total weight >32 t; EU+EFTA+UK
- km_95: 998.45
  Distance in km, for sulphuric acid // sulphuric acid production // eu+efta+uk; Articulated lorry transport, Euro 4, Total weight >32 t; EU+EFTA+UK
- kg_km_95: 25.8787; = kg_95*km_95
  Transport amount in km*km, for sulphuric acid // sulphuric acid production // eu+efta+uk; Articulated lorry transport, Euro 4, Total weight >32 t; EU+EFTA+UK
- kg_96: 0.0259189
  Mass in kg, for sulphuric acid // sulphuric acid production // eu+efta+uk; Transoceanic ship, containers; GLO
- km_96: 18001.8
  Distance in km, for sulphuric acid // sulphuric acid production // eu+efta+uk; Transoceanic ship, containers; GLO
- kg_km_96: 466.587; = kg_96*km_96
  Transport amount in km*km, for sulphuric acid // sulphuric acid production // eu+efta+uk; Transoceanic ship, containers; GLO
- kg_97: 2.77535e-5
  Mass in kg, for ozone // ozone production // glo; Articulated lorry transport, Euro 4, Total weight >32 t; EU+EFTA+UK
- km_97: 998.31
  Distance in km, for ozone // ozone production // glo; Articulated lorry transport, Euro 4, Total weight >32 t; EU+EFTA+UK
- kg_km_97: 0.0277066; = kg_97*km_97
  Transport amount in km*km, for ozone // ozone production // glo; Articulated lorry transport, Euro 4, Total weight >32 t; EU+EFTA+UK
- kg_98: 2.77535e-5
  Mass in kg, for ozone // ozone production // glo; Transoceanic ship, containers; GLO
- km_98: 17990.4
  Distance in km, for ozone // ozone production // glo; Transoceanic ship, containers; GLO
- kg_km_98: 0.499296; = kg_98*km_98
  Transport amount in km*km, for ozone // ozone production // glo; Transoceanic ship, containers; GLO
- kg_99: 5.36793e-5
  Mass in kg, for sulphur // sulphur production // eu+efta+uk; Articulated lorry transport, Euro 4, Total weight >32 t; EU+EFTA+UK
- km_99: 1000.04
  Distance in km, for sulphur // sulphur production // eu+efta+uk; Articulated lorry transport, Euro 4, Total weight >32 t; EU+EFTA+UK
- kg_km_99: 0.0536815; = kg_99*km_99
  Transport amount in km*km, for sulphur // sulphur production // eu+efta+uk; Articulated lorry transport, Euro 4, Total weight >32 t; EU+EFTA+UK
- kg_100: 5.36793e-5
  Mass in kg, for sulphur // sulphur production // eu+efta+uk; Transoceanic ship, containers; GLO
- km_100: 17921.9
  Distance in km, for sulphur // sulphur production // eu+efta+uk; Transoceanic ship, containers; GLO
- kg_km_100: 0.962035; = kg_100*km_100
  Transport amount in km*km, for sulphur // sulphur production // eu+efta+uk; Transoceanic ship, containers; GLO
- kg_101: 0.00443998
  Mass in kg, for chlorine dioxide // chlorine dioxide production // glo; Articulated lorry transport, Euro 4, Total weight >32 t; EU+EFTA+UK
- km_101: 1001.04
  Distance in km, for chlorine dioxide // chlorine dioxide production // glo; Articulated lorry transport, Euro 4, Total weight >32 t; EU+EFTA+UK
- kg_km_101: 4.4446; = kg_101*km_101
  Transport amount in km*km, for chlorine dioxide // chlorine dioxide production // glo; Articulated lorry transport, Euro 4, Total weight >32 t; EU+EFTA+UK
- kg_102: 0.00443998
  Mass in kg, for chlorine dioxide // chlorine dioxide production // glo; Transoceanic ship, containers; GLO
- km_102: 18005.7
  Distance in km, for chlorine dioxide // chlorine dioxide production // glo; Transoceanic ship, containers; GLO
- kg_km_102: 79.9451; = kg_102*km_102
  Transport amount in km*km, for chlorine dioxide // chlorine dioxide production // glo; Transoceanic ship, containers; GLO
- kg_103: 0.00035099
  Mass in kg, for hydrochloric acid // hydrochloric acid production // eu+efta+uk; Articulated lorry transport, Euro 4, Total weight >32 t; EU+EFTA+UK
- km_103: 1000.44
  Distance in km, for hydrochloric acid // hydrochloric acid production // eu+efta+uk; Articulated lorry transport, Euro 4, Total weight >32 t; EU+EFTA+UK
- kg_km_103: 0.351143; = kg_103*km_103
  Transport amount in km*km, for hydrochloric acid // hydrochloric acid production // eu+efta+uk; Articulated lorry transport, Euro 4, Total weight >32 t; EU+EFTA+UK
- kg_104: 0.00035099
  Mass in kg, for hydrochloric acid // hydrochloric acid production // eu+efta+uk; Transoceanic ship, containers; GLO
- km_104: 18007.8
  Distance in km, for hydrochloric acid // hydrochloric acid production // eu+efta+uk; Transoceanic ship, containers; GLO
- kg_km_104: 6.32057; = kg_104*km_104
  Transport amount in km*km, for hydrochloric acid // hydrochloric acid production // eu+efta+uk; Transoceanic ship, containers; GLO
- kg_105: 0.000363886
  Mass in kg, for sodium sulphate // sodium sulphate production // eu+efta+uk; Articulated lorry transport, Euro 4, Total weight >32 t; EU+EFTA+UK
- km_105: 999.349
  Distance in km, for sodium sulphate // sodium sulphate production // eu+efta+uk; Articulated lorry transport, Euro 4, Total weight >32 t; EU+EFTA+UK
- kg_km_105: 0.363649; = kg_105*km_105
  Transport amount in km*km, for sodium sulphate // sodium sulphate production // eu+efta+uk; Articulated lorry transport, Euro 4, Total weight >32 t; EU+EFTA+UK
- kg_106: 0.000363886
  Mass in kg, for sodium sulphate // sodium sulphate production // eu+efta+uk; Transoceanic ship, containers; GLO
- km_106: 18004.1
  Distance in km, for sodium sulphate // sodium sulphate production // eu+efta+uk; Transoceanic ship, containers; GLO
- kg_km_106: 6.55146; = kg_106*km_106
  Transport amount in km*km, for sodium sulphate // sodium sulphate production // eu+efta+uk; Transoceanic ship, containers; GLO
- kg_107: 0.00197821
  Mass in kg, for precipitated calcium carbonate // precipitated calcium carbonate production // eu+efta+uk; Articulated lorry transport, Euro 4, Total weight >32 t; EU+EFTA+UK
- km_107: 1001.81
  Distance in km, for precipitated calcium carbonate // precipitated calcium carbonate production // eu+efta+uk; Articulated lorry transport, Euro 4, Total weight >32 t; EU+EFTA+UK
- kg_km_107: 1.98179; = kg_107*km_107
  Transport amount in km*km, for precipitated calcium carbonate // precipitated calcium carbonate production // eu+efta+uk; Articulated lorry transport, Euro 4, Total weight >32 t; EU+EFTA+UK
- kg_108: 0.00197821
  Mass in kg, for precipitated calcium carbonate // precipitated calcium carbonate production // eu+efta+uk; Transoceanic ship, containers; GLO
- km_108: 17993.6
  Distance in km, for precipitated calcium carbonate // precipitated calcium carbonate production // eu+efta+uk; Transoceanic ship, containers; GLO
- kg_km_108: 35.5953; = kg_108*km_108
  Transport amount in km*km, for precipitated calcium carbonate // precipitated calcium carbonate production // eu+efta+uk; Transoceanic ship, containers; GLO
- kg_109: 0.000648333
  Mass in kg, for aluminium sulphate powder // aluminium sulphate powder production // eu+efta+uk; Articulated lorry transport, Euro 4, Total weight >32 t; EU+EFTA+UK
- km_109: 1000.12
  Distance in km, for aluminium sulphate powder // aluminium sulphate powder production // eu+efta+uk; Articulated lorry transport, Euro 4, Total weight >32 t; EU+EFTA+UK
- kg_km_109: 0.648411; = kg_109*km_109
  Transport amount in km*km, for aluminium sulphate powder // aluminium sulphate powder production // eu+efta+uk; Articulated lorry transport, Euro 4, Total weight >32 t; EU+EFTA+UK
- kg_110: 0.000648333
  Mass in kg, for aluminium sulphate powder // aluminium sulphate powder production // eu+efta+uk; Transoceanic ship, containers; GLO
- km_110: 17954.7
  Distance in km, for aluminium sulphate powder // aluminium sulphate powder production // eu+efta+uk; Transoceanic ship, containers; GLO
- kg_km_110: 11.6406; = kg_110*km_110
  Transport amount in km*km, for aluminium sulphate powder // aluminium sulphate powder production // eu+efta+uk; Transoceanic ship, containers; GLO
- kg_111: 0.000630637
  Mass in kg, for edta // edta production // eu+efta+uk; Articulated lorry transport, Euro 4, Total weight >32 t; EU+EFTA+UK
- km_111: 1000.73
  Distance in km, for edta // edta production // eu+efta+uk; Articulated lorry transport, Euro 4, Total weight >32 t; EU+EFTA+UK
- kg_km_111: 0.631095; = kg_111*km_111
  Transport amount in km*km, for edta // edta production // eu+efta+uk; Articulated lorry transport, Euro 4, Total weight >32 t; EU+EFTA+UK
- kg_112: 0.000630637
  Mass in kg, for edta // edta production // eu+efta+uk; Transoceanic ship, containers; GLO
- km_112: 18000.9
  Distance in km, for edta // edta production // eu+efta+uk; Transoceanic ship, containers; GLO
- kg_km_112: 11.352; = kg_112*km_112
  Transport amount in km*km, for edta // edta production // eu+efta+uk; Transoceanic ship, containers; GLO
- kg_113: 0.000168356
  Mass in kg, for methanol // methanol production // eu+efta+uk; Articulated lorry transport, Euro 4, Total weight >32 t; EU+EFTA+UK
- km_113: 1000
  Distance in km, for methanol // methanol production // eu+efta+uk; Articulated lorry transport, Euro 4, Total weight >32 t; EU+EFTA+UK
- kg_km_113: 0.168356; = kg_113*km_113
  Transport amount in km*km, for methanol // methanol production // eu+efta+uk; Articulated lorry transport, Euro 4, Total weight >32 t; EU+EFTA+UK
- kg_114: 0.000168356
  Mass in kg, for methanol // methanol production // eu+efta+uk; Transoceanic ship, containers; GLO
- km_114: 18000
  Distance in km, for methanol // methanol production // eu+efta+uk; Transoceanic ship, containers; GLO
- kg_km_114: 3.03041; = kg_114*km_114
  Transport amount in km*km, for methanol // methanol production // eu+efta+uk; Transoceanic ship, containers; GLO
- kg_115: 0.0168319
  Mass in kg, for biodegradable waste to landfill // landfill of biodegradable waste // eu+efta+uk; Articulated lorry transport, Euro 4, Total weight >32 t; EU+EFTA+UK
- km_115: 77
  Distance in km, for biodegradable waste to landfill // landfill of biodegradable waste // eu+efta+uk; Articulated lorry transport, Euro 4, Total weight >32 t; EU+EFTA+UK
- kg_km_115: 1.29606; = kg_115*km_115
  Transport amount in km*km, for biodegradable waste to landfill // landfill of biodegradable waste // eu+efta+uk; Articulated lorry transport, Euro 4, Total weight >32 t; EU+EFTA+UK

## Reference product
- bleached kraft pulp, softwood // bleached kraft pulp, softwood // world (without eu+efta+uk, us and ca): 1

## Inputs
- Thermal energy (MJ) from Thermal energy from natural gas - ROW: 0.0378408
- Transport of methanol, from biomass by Freight train, diesel traction - EU+EFTA+UK: 0.163893; = kg_km_0
- Transport of methanol, from biomass by Freight train, electricity traction - EU+EFTA+UK: 0.0553503; = kg_km_1
- Transport of methanol, from biomass by Freight train, average - EU+EFTA+UK: 0.00131502; = kg_km_2
- Transport of methanol, from biomass by Barge - EU+EFTA+UK: 0.0535261; = kg_km_3
- Transport of methanol, from biomass by Articulated lorry transport, Total weight >32 t, mix Euro 0-5 - ROW w/o EU+EFTA: 0.284219; = kg_km_4
- Transport of methanol, from biomass by Articulated lorry transport, Total weight <7.5 t, mix Euro 0-5 - EU+EFTA+UK: 0.00857777; = kg_km_5
- Transport of methanol, from biomass by Barge - ROW w/o EU+EFTA: 0.108384; = kg_km_6
- Transport of malusil by Transoceanic ship, bulk - GLO: 0.0419748; = kg_km_7
- Transport of malusil by Freight train, diesel traction - EU+EFTA+UK: 0.00518192; = kg_km_8
- Transport of malusil by Freight train, electricity traction - EU+EFTA+UK: 0.00176268; = kg_km_9
- Transport of malusil by Freight train, average - EU+EFTA+UK: 4.15736e-5; = kg_km_10
- Transport of malusil by Barge - EU+EFTA+UK: 0.000398585; = kg_km_11
- Transport of malusil by Barge - ROW w/o EU+EFTA: 0.000813891; = kg_km_12
- Transport of malusil by Articulated lorry transport, Total weight <7.5 t, mix Euro 0-5 - EU+EFTA+UK: 0.000548889; = kg_km_13
- Transport of malusil by Articulated lorry transport, Euro 4, Total weight >32 t - EU+EFTA+UK: 0.0051245; = kg_km_14
- Transport of malusil by Articulated lorry transport, Total weight >32 t, mix Euro 0-5 - ROW w/o EU+EFTA: 0.0135245; = kg_km_15
- Transport of sodium hydrogen sulphite // sodium hydrogen sulphite production // eu+efta+uk by Articulated lorry transport, Euro 4, Total weight >32 t - EU+EFTA+UK: 1.69607; = kg_km_16
- Transport of softwood under bark // softwood forestry // world (without eu+efta+uk, us and ca) by Articulated lorry transport, Euro 4, Total weight >32 t - EU+EFTA+UK: 226.178; = kg_km_17
- Transport of softwood under bark // softwood forestry // world (without eu+efta+uk, us and ca) by Barge - ROW w/o EU+EFTA: 22.6967; = kg_km_18
- Transport of softwood under bark // softwood forestry // world (without eu+efta+uk, us and ca) by Freight train, average - EU+EFTA+UK: 349.388; = kg_km_19
- Transport of softwood under bark // softwood forestry // world (without eu+efta+uk, us and ca) by Transoceanic ship, bulk - GLO: 516.137; = kg_km_20
- Transport of wood chips, softwood // wood chips, softwood // world (without eu+efta+uk, us and ca) by Articulated lorry transport, Euro 4, Total weight >32 t - EU+EFTA+UK: 45.5613; = kg_km_21
- Transport of wood chips, softwood // wood chips, softwood // world (without eu+efta+uk, us and ca) by Barge - ROW w/o EU+EFTA: 4.14818; = kg_km_22
- Transport of wood chips, softwood // wood chips, softwood // world (without eu+efta+uk, us and ca) by Freight train, average - EU+EFTA+UK: 69.6524; = kg_km_23
- Transport of wood chips, softwood // wood chips, softwood // world (without eu+efta+uk, us and ca) by Transoceanic ship, bulk - GLO: 86.1219; = kg_km_24
- Transport of biogas for bioenergy // biogas for bioenergy // cn by Articulated lorry transport, Euro 4, Total weight >32 t - EU+EFTA+UK: 5.69525; = kg_km_25
- Transport of biogas for bioenergy // biogas for bioenergy // cn by Transoceanic ship, containers - GLO: 102.938; = kg_km_26
- Transport of biogas for bioenergy // biogas for bioenergy // ras w/o cn by Articulated lorry transport, Euro 4, Total weight >32 t - EU+EFTA+UK: 0.493524; = kg_km_27
- Transport of biogas for bioenergy // biogas for bioenergy // ras w/o cn by Transoceanic ship, containers - GLO: 8.8892; = kg_km_28
- Transport of biogas for bioenergy // biogas for bioenergy // in by Articulated lorry transport, Euro 4, Total weight >32 t - EU+EFTA+UK: 0.304965; = kg_km_29
- Transport of biogas for bioenergy // biogas for bioenergy // in by Transoceanic ship, containers - GLO: 5.49322; = kg_km_30
- Transport of bark, hardwood // bark, hardwood // eu+efta+uk by Articulated lorry transport, Euro 4, Total weight >32 t - EU+EFTA+UK: 14.2372; = kg_km_31
- Transport of bark, hardwood // bark, hardwood // eu+efta+uk by Transoceanic ship, containers - GLO: 256.269; = kg_km_32
- Transport of bark, softwood // bark, softwood // eu+efta+uk by Articulated lorry transport, Euro 4, Total weight >32 t - EU+EFTA+UK: 14.2372; = kg_km_33
- Transport of bark, softwood // bark, softwood // eu+efta+uk by Transoceanic ship, containers - GLO: 256.269; = kg_km_34
- Transport of heavy fuel oil (1.0 wt.% s) // heavy fuel oil at refinery // in by Articulated lorry transport, Euro 4, Total weight >32 t - EU+EFTA+UK: 0.273218; = kg_km_35
- Transport of heavy fuel oil (1.0 wt.% s) // heavy fuel oil at refinery // in by Transoceanic ship, containers - GLO: 4.92562; = kg_km_36
- Transport of heavy fuel oil (1.0 wt.% s) // heavy fuel oil at refinery // jp by Articulated lorry transport, Euro 4, Total weight >32 t - EU+EFTA+UK: 0.462739; = kg_km_37
- Transport of heavy fuel oil (1.0 wt.% s) // heavy fuel oil at refinery // jp by Transoceanic ship, containers - GLO: 8.33122; = kg_km_38
- Transport of heavy fuel oil (1.0 wt.% s) // heavy fuel oil at refinery // ras w/o cn by Articulated lorry transport, Euro 4, Total weight >32 t - EU+EFTA+UK: 2.79952; = kg_km_39
- Transport of heavy fuel oil (1.0 wt.% s) // heavy fuel oil at refinery // ras w/o cn by Transoceanic ship, containers - GLO: 50.3144; = kg_km_40
- Transport of heavy fuel oil (1.0 wt.% s) // heavy fuel oil at refinery // au by Articulated lorry transport, Euro 4, Total weight >32 t - EU+EFTA+UK: 0.0279952; = kg_km_41
- Transport of heavy fuel oil (1.0 wt.% s) // heavy fuel oil at refinery // au by Transoceanic ship, containers - GLO: 0.505068; = kg_km_42
- Transport of heavy fuel oil (1.0 wt.% s) // heavy fuel oil at refinery // cn by Articulated lorry transport, Euro 4, Total weight >32 t - EU+EFTA+UK: 0.287648; = kg_km_43
- Transport of heavy fuel oil (1.0 wt.% s) // heavy fuel oil at refinery // cn by Transoceanic ship, containers - GLO: 5.17575; = kg_km_44
- Transport of heavy fuel oil (1.0 wt.% s) // heavy fuel oil at refinery // ru by Articulated lorry transport, Euro 4, Total weight >32 t - EU+EFTA+UK: 1.43343; = kg_km_45
- Transport of heavy fuel oil (1.0 wt.% s) // heavy fuel oil at refinery // ru by Transoceanic ship, containers - GLO: 25.8787; = kg_km_46
- Transport of heavy fuel oil (1.0 wt.% s) // heavy fuel oil at refinery // raf by Articulated lorry transport, Euro 4, Total weight >32 t - EU+EFTA+UK: 0.511802; = kg_km_47
- Transport of heavy fuel oil (1.0 wt.% s) // heavy fuel oil at refinery // raf by Transoceanic ship, containers - GLO: 9.21629; = kg_km_48
- Transport of heavy fuel oil (1.0 wt.% s) // heavy fuel oil at refinery // br by Articulated lorry transport, Euro 4, Total weight >32 t - EU+EFTA+UK: 0.245319; = kg_km_49
- Transport of heavy fuel oil (1.0 wt.% s) // heavy fuel oil at refinery // br by Transoceanic ship, containers - GLO: 4.41574; = kg_km_50
- Transport of heavy fuel oil (1.0 wt.% s) // heavy fuel oil at refinery // rsa by Articulated lorry transport, Euro 4, Total weight >32 t - EU+EFTA+UK: 0.971655; = kg_km_51
- Transport of heavy fuel oil (1.0 wt.% s) // heavy fuel oil at refinery // rsa by Transoceanic ship, containers - GLO: 17.509; = kg_km_52
- Transport of light fuel oil // light fuel oil at refinery // in by Articulated lorry transport, Euro 4, Total weight >32 t - EU+EFTA+UK: 0.0616664; = kg_km_53
- Transport of light fuel oil // light fuel oil at refinery // in by Transoceanic ship, containers - GLO: 1.10634; = kg_km_54
- Transport of light fuel oil // light fuel oil at refinery // jp by Articulated lorry transport, Euro 4, Total weight >32 t - EU+EFTA+UK: 0.0305927; = kg_km_55
- Transport of light fuel oil // light fuel oil at refinery // jp by Transoceanic ship, containers - GLO: 0.550284; = kg_km_56
- Transport of light fuel oil // light fuel oil at refinery // ras w/o cn by Articulated lorry transport, Euro 4, Total weight >32 t - EU+EFTA+UK: 0.166432; = kg_km_57
- Transport of light fuel oil // light fuel oil at refinery // ras w/o cn by Transoceanic ship, containers - GLO: 2.99193; = kg_km_58
- Transport of light fuel oil // light fuel oil at refinery // au by Articulated lorry transport, Euro 4, Total weight >32 t - EU+EFTA+UK: 0.00880262; = kg_km_59
- Transport of light fuel oil // light fuel oil at refinery // au by Transoceanic ship, containers - GLO: 0.158736; = kg_km_60
- Transport of light fuel oil // light fuel oil at refinery // cn by Articulated lorry transport, Euro 4, Total weight >32 t - EU+EFTA+UK: 0.114482; = kg_km_61
- Transport of light fuel oil // light fuel oil at refinery // cn by Transoceanic ship, containers - GLO: 2.05875; = kg_km_62
- Transport of light fuel oil // light fuel oil at refinery // ru by Articulated lorry transport, Euro 4, Total weight >32 t - EU+EFTA+UK: 0.0471397; = kg_km_63
- Transport of light fuel oil // light fuel oil at refinery // ru by Transoceanic ship, containers - GLO: 0.848515; = kg_km_64
- Transport of light fuel oil // light fuel oil at refinery // raf by Articulated lorry transport, Euro 4, Total weight >32 t - EU+EFTA+UK: 0.021261; = kg_km_65
- Transport of light fuel oil // light fuel oil at refinery // raf by Transoceanic ship, containers - GLO: 0.381928; = kg_km_66
- Transport of light fuel oil // light fuel oil at refinery // br by Articulated lorry transport, Euro 4, Total weight >32 t - EU+EFTA+UK: 0.027418; = kg_km_67
- Transport of light fuel oil // light fuel oil at refinery // br by Transoceanic ship, containers - GLO: 0.494486; = kg_km_68
- Transport of light fuel oil // light fuel oil at refinery // rsa by Articulated lorry transport, Euro 4, Total weight >32 t - EU+EFTA+UK: 0.0398282; = kg_km_69
- Transport of light fuel oil // light fuel oil at refinery // rsa by Transoceanic ship, containers - GLO: 0.717678; = kg_km_70
- Transport of hard coal, at consumer russia // hard coal mix // ru by Articulated lorry transport, Euro 4, Total weight >32 t - EU+EFTA+UK: 0.00484865; = kg_km_71
- Transport of hard coal, at consumer russia // hard coal mix // ru by Transoceanic ship, containers - GLO: 0.0873528; = kg_km_72
- Transport of hard coal, at consumer ras w/o cn // hard coal mix // ras w/o cn by Articulated lorry transport, Euro 4, Total weight >32 t - EU+EFTA+UK: 0.00781172; = kg_km_73
- Transport of hard coal, at consumer ras w/o cn // hard coal mix // ras w/o cn by Transoceanic ship, containers - GLO: 0.140457; = kg_km_74
- Transport of hard coal, at consumer australia // hard coal mix // au by Articulated lorry transport, Euro 4, Total weight >32 t - EU+EFTA+UK: 0.00625323; = kg_km_75
- Transport of hard coal, at consumer australia // hard coal mix // au by Transoceanic ship, containers - GLO: 0.112558; = kg_km_76
- Transport of hard coal, at consumer china // hard coal mix // cn by Articulated lorry transport, Euro 4, Total weight >32 t - EU+EFTA+UK: 0.0485828; = kg_km_77
- Transport of hard coal, at consumer china // hard coal mix // cn by Transoceanic ship, containers - GLO: 0.87449; = kg_km_78
- Transport of hard coal, at consumer rsa // hard coal mix // rsa by Articulated lorry transport, Euro 4, Total weight >32 t - EU+EFTA+UK: 0.00115444; = kg_km_79
- Transport of hard coal, at consumer rsa // hard coal mix // rsa by Transoceanic ship, containers - GLO: 0.0206837; = kg_km_80
- Transport of hard coal, at consumer raf // hard coal mix // raf by Articulated lorry transport, Euro 4, Total weight >32 t - EU+EFTA+UK: 0.0034537; = kg_km_81
- Transport of hard coal, at consumer raf // hard coal mix // raf by Transoceanic ship, containers - GLO: 0.0621474; = kg_km_82
- Transport of hard coal, at consumer india // hard coal mix // in by Articulated lorry transport, Euro 4, Total weight >32 t - EU+EFTA+UK: 0.0100052; = kg_km_83
- Transport of hard coal, at consumer india // hard coal mix // in by Transoceanic ship, containers - GLO: 0.180863; = kg_km_84
- Transport of sodium formate // sodium formate production // eu+efta+uk by Articulated lorry transport, Euro 4, Total weight >32 t - EU+EFTA+UK: 0.795603; = kg_km_85
- Transport of sodium formate // sodium formate production // eu+efta+uk by Transoceanic ship, containers - GLO: 14.3343; = kg_km_86
- Transport of hydrogen peroxide, 100% // hydrogen peroxide, 100% production // eu+efta+uk by Articulated lorry transport, Euro 4, Total weight >32 t - EU+EFTA+UK: 10.1976; = kg_km_87
- Transport of hydrogen peroxide, 100% // hydrogen peroxide, 100% production // eu+efta+uk by Transoceanic ship, containers - GLO: 183.749; = kg_km_88
- Transport of oxygen // oxygen production // eu+efta+uk by Articulated lorry transport, Euro 4, Total weight >32 t - EU+EFTA+UK: 20.7799; = kg_km_89
- Transport of oxygen // oxygen production // eu+efta+uk by Transoceanic ship, containers - GLO: 375.194; = kg_km_90
- Transport of sodium chlorate // sodium chlorate production // glo by Articulated lorry transport, Euro 4, Total weight >32 t - EU+EFTA+UK: 11.9292; = kg_km_91
- Transport of sodium chlorate // sodium chlorate production // glo by Transoceanic ship, containers - GLO: 215.496; = kg_km_92
- Transport of sodium hydroxide // sodium hydroxide production // eu+efta+uk by Articulated lorry transport, Euro 4, Total weight >32 t - EU+EFTA+UK: 27.899; = kg_km_93
- Transport of sodium hydroxide // sodium hydroxide production // eu+efta+uk by Transoceanic ship, containers - GLO: 503.144; = kg_km_94
- Transport of sulphuric acid // sulphuric acid production // eu+efta+uk by Articulated lorry transport, Euro 4, Total weight >32 t - EU+EFTA+UK: 25.8787; = kg_km_95
- Transport of sulphuric acid // sulphuric acid production // eu+efta+uk by Transoceanic ship, containers - GLO: 466.587; = kg_km_96
- Transport of ozone // ozone production // glo by Articulated lorry transport, Euro 4, Total weight >32 t - EU+EFTA+UK: 0.0277066; = kg_km_97
- Transport of ozone // ozone production // glo by Transoceanic ship, containers - GLO: 0.499296; = kg_km_98
- Transport of sulphur // sulphur production // eu+efta+uk by Articulated lorry transport, Euro 4, Total weight >32 t - EU+EFTA+UK: 0.0536815; = kg_km_99
- Transport of sulphur // sulphur production // eu+efta+uk by Transoceanic ship, containers - GLO: 0.962035; = kg_km_100
- Transport of chlorine dioxide // chlorine dioxide production // glo by Articulated lorry transport, Euro 4, Total weight >32 t - EU+EFTA+UK: 4.4446; = kg_km_101
- Transport of chlorine dioxide // chlorine dioxide production // glo by Transoceanic ship, containers - GLO: 79.9451; = kg_km_102
- Transport of hydrochloric acid // hydrochloric acid production // eu+efta+uk by Articulated lorry transport, Euro 4, Total weight >32 t - EU+EFTA+UK: 0.351143; = kg_km_103
- Transport of hydrochloric acid // hydrochloric acid production // eu+efta+uk by Transoceanic ship, containers - GLO: 6.32057; = kg_km_104
- Transport of sodium sulphate // sodium sulphate production // eu+efta+uk by Articulated lorry transport, Euro 4, Total weight >32 t - EU+EFTA+UK: 0.363649; = kg_km_105
- Transport of sodium sulphate // sodium sulphate production // eu+efta+uk by Transoceanic ship, containers - GLO: 6.55146; = kg_km_106
- Transport of precipitated calcium carbonate // precipitated calcium carbonate production // eu+efta+uk by Articulated lorry transport, Euro 4, Total weight >32 t - EU+EFTA+UK: 1.98179; = kg_km_107
- Transport of precipitated calcium carbonate // precipitated calcium carbonate production // eu+efta+uk by Transoceanic ship, containers - GLO: 35.5953; = kg_km_108
- Transport of aluminium sulphate powder // aluminium sulphate powder production // eu+efta+uk by Articulated lorry transport, Euro 4, Total weight >32 t - EU+EFTA+UK: 0.648411; = kg_km_109
- Transport of aluminium sulphate powder // aluminium sulphate powder production // eu+efta+uk by Transoceanic ship, containers - GLO: 11.6406; = kg_km_110
- Transport of edta // edta production // eu+efta+uk by Articulated lorry transport, Euro 4, Total weight >32 t - EU+EFTA+UK: 0.631095; = kg_km_111
- Transport of edta // edta production // eu+efta+uk by Transoceanic ship, containers - GLO: 11.352; = kg_km_112
- Transport of methanol // methanol production // eu+efta+uk by Articulated lorry transport, Euro 4, Total weight >32 t - EU+EFTA+UK: 0.168356; = kg_km_113
- Transport of methanol // methanol production // eu+efta+uk by Transoceanic ship, containers - GLO: 3.03041; = kg_km_114
- Electricity from Electricity grid mix 1kV-60kV - AU: 0.00192407
- Electricity from Electricity grid mix 1kV-60kV - NZ: 0.000384814
- Electricity from Electricity grid mix 1kV-60kV - RU: 0.00846591
- Electricity from Electricity grid mix 1kV-60kV - RAF: 0.00634943
- Electricity from Electricity grid mix 1kV-60kV - RSA: 0.0143343
- Transport of biodegradable waste to landfill // landfill of biodegradable waste // eu+efta+uk by Articulated lorry transport, Euro 4, Total weight >32 t - EU+EFTA+UK: 1.29606; = kg_km_115
- Electricity from Electricity grid mix 1kV-60kV - CN: 0.0434276
- Electricity from Electricity grid mix 1kV-60kV - RAS w/o CN: 0.0475809
- bleached kraft pulp, softwood // bleached kraft pulp, softwood // world (without eu+efta+uk, us and ca), blackbox: 1
- bleached kraft pulp, softwood // bleached kraft pulp, softwood // world (without eu+efta+uk, us and ca), elementary: 1

## Impact indicators
- Eutrophication marine: 0.00100406
- Ecotoxicity, freshwater: 1.55057
- Land use: 444.877
- Water use: 2.11292
- Resource use, minerals and metals: 2.6391e-6
- Resource use, fossils: 1.13618
- Climate change: 0.0553144
- Ozone depletion: 2.077e-8
- Human toxicity, cancer: 1.96959e-10
- Human toxicity, non-cancer: 2.01945e-9
- EF-particulate Matter: -2.30153e-8
- Ionising radiation, human health: 0.0227884
- Photochemical ozone formation - human health: 0.00266098
- Acidification: 0.00172699
- Eutrophication, terrestrial: 0.00972204
- Eutrophication, freshwater: 4.15189e-5

## Deviations from the LCI method principle
The background data uses:
- the \xe2\x80\x9cRecycled content cut-off\xe2\x80\x9d approach to allocate end-of-life by-products and secondary materials. This allocation is explained in the description of the recycled content system model (http://www.ecoinvent.org/database/system-models-in-ecoinvent-3/cut-off-system-model/allocation-cut-off-by-classification.html).
OR
- EF compliant data

## Deviations from the LCI method approaches
Background data:
- the \xe2\x80\x9cRecycled content cut-off\xe2\x80\x9d approach to allocate end-of-life by-products and secondary materials. This allocation is explained in the description of the recycled content system model (http://www.ecoinvent.org/database/system-models-in-ecoinvent-3/cut-off-system-model/allocation-cut-off-by-classification.html). The ecoinvent database mostly relies on “Allocation – market values” apart for few exceptions particularly in the energy sector. ecoinvent energy data is replaced with EF3.0 core data as per the EF guidelines version 2.0.
OR
- EF compliant data

## Modelling constants
All modelling constants follow the requirements listed in the Tender Specifications 070201/2020/SER/ENV.B1. Completeness: There are no intentional cut-offs in the inventory no matter how small their contribution to all the EF impact categories is. Eventual cut-offs are in compliance with the Guide for EF compliant data sets (JRC 2020), i.e. only if below the 3% cut-off rule. Water use: water use is modelled at country level using separate flows for water withdrawal, water release and water evaporation. Handling multi-functional processes: the following PEF multi- functionality decision hierarchy is applied for resolving all multi- functionality problems: (1) subdivision or system expansion; (2) allocation based on a relevant underlying physical relationship (substitution may apply here); (3) allocation based on some other relationship. Direct land use change: GHG emissions from direct LUC allocated to good/service for 20 years after the LUC occurs, with IPCC default values. Carbon storage and delayed emissions: credits associated with temporary (carbon) storage or delayed emissions up to 300 years are not be considered. Emissions off-setting: are not included. Capital goods (including infrastructures) and their End of life: they are included. System boundaries: system boundaries include all processes linked to the product supply chain (e.g. maintenance). Time period: emissions and removals are modelled as if released or removed at the beginning of the assessment method. Fossil and biogenic carbon emissions and removals: removals and emissions are modelled as follows: All GHG emissions from fossil fuels (including peat and limestone) are modelled consistently with the most updated ILCD list of elementary flows. The non-fossil (biogenic) carbon flows are modelled consistently with the most updated ILCD list of elementary flows.

## Cut-off and completeness
There are no intentional cut-offs in the inventory no matter how small their contribution to all the EF impact categories is. Eventual cut-offs are in compliance with the Guide for EF compliant data sets (JRC 2020), i.e. only if below the 3% cut-off rule. The dataset dry mass and water balance has been checked to ensure the inventory is complete. Capital goods (e.g. infrastructure) and their end-of-life are included.

## Data selection and combination
These datasets include, in both their foreground and background data, links to EF3.0 compliant data.
The relevant background data on energy, transport, and End of Life are from the LCDN data node (http://lcdn.thinkstep.com/Node/).
All other background data in the supply of this product for which no EF3.0 process was available are from ecoinvent v3.7 database (www.ecoinvent.org) or other data sources.

## Data treatment and extrapolations
Several data sources have been used to model the inventory.

## Review details
Internal reviews have been asked to review the plausibility of the unit process, LCIA scores, and DQRs. Internal reviewers have also been asked to review the data for EF compliancy. The consortium is therefore responsible for aspects such as compliancy with the ILCD format, including validation in Look@LCI, and nomenclature.
Internal reviwers have been asked to judge based on the process name, that the unit process models in a complete and representative way the process in the requested location. The review encompassed the plausability of:
- exchanges with nature (elementary flows) as well as exchanges such as product and waste flows.
- meta information (general comment, technology comment, system boundaries, allocation, cut-off rules, etc.). Reviewers were asked to judge if the provided information is enough to understand the content of the process.
- LCIA scores
- DQRs including precision, technology, time and geography. As well as the overall DQR.
External reviewers have been asked to provide their expertise in the field of interest. External reviewers have been asked to review the unit process, including eventual methodological choices, the LCIA scores (provided with contribution scores as well), and DQRs. External reviewers have been provided all the information in a tool developed by the consortium for the purpose of this project.
External reviewers have been asked to judge based on the process name, that the unit process models in a complete and representative way the process in the requested location. The review encompassed:
- Plausability and completeness of exchanges with nature (elementary flows) as well as exchanges such as product and waste flows.
- Review of meta information (general comment, technology comment, system boundaries, allocation, cut-off rules, etc.). Reviewers were asked to judge if the provided information is enough to understand the content of the process.
- Review of properties (biogenic carbon and water content).
- Review of allocation keys.
- Plausability of LCIA scores calculated by the consortium.
- Plausability of DQRs including precision, technology, time and geography. As well as the overall DQR.

## Data sources
- Background Data for Representative products and organisations. EF 3.0 compliant (data stock)
- The European Pulp Industry Sector Association AISBL (EPIS), (2020). EPIS Life Cycle Inventory data for Northern Bleached Softwood Kraft Pulp, 2020 Data.

## Intended applications
Implementation of regular Product Environmental Footprint (PEF) studies and Organisation Environmental Footprint (OEF) studies exclusively under the specified Product groups and sectors as defined in the Product Environmental Footprint Category Rules (PEFCR) and Organisation Environmental Footprint Sectorial Rules (OEFSR) listed in http://ec.europa.eu/environment/eussd/smgp/PEFCR_OEFSR.htm
