# washing, dry cleaning, elementary; washing process; production mix, at plant; service

Dataset: ILCD process, Unit process, single operation
Geography: EU+EFTA+UK
Reference year: 2021
Valid until: 2024
Classification: Other Services / Other services
LCI method principle: Attributional
LCI method approaches: Allocation - market value
Completeness: All relevant flows quantified
Project: Provision of process-based 3.0 Environmental Footprint-compliant life cycle inventory datasets - Others - contract number 070201/2020/840235/SER/ENV.B.1
Generated by: Life Cycle Indonesia
Owner: PRé Sustainability B.V.
Compliance: Environmental Footprint non-primary supporting data set; Environmental Footprint 3.1
Amounts: no units in this file; such an amount is in the reference unit of its flow, which a separate flow dataset defines
copyright: true
licenseType: Free of charge for some user types or use types
accessRestrictions: Free of charge for all final users implementing a regular Product Environmental Footprint (PEF) studies and Organisation Environmental Footprint (OEF) studies exclusively under the specified Product groups and sectors as defined in the Product Environmental Footprint Category Rules (PEFCR) and Organisation Environmental Footprint Sectorial Rules (OEFSR) listed in http://ec.europa.eu/environment/eussd/smgp/PEFCR_OEFSR.htm and in accordance with the terms and conditions of the EULA (available at https://ecoinvent.lca-data.com/) exclusively until 31st December 2024. Any use of this dataset or any derivative data not within the specific context of one of the PEF/OEF projects or after the end of 2024 is not permitted.

## General comment
Notice: this data set supersedes the EF3.0-compliant version (see link under "preceding data set version" below calculated with the EF3.0). The life cycle inventory is not changed from the original EF3.0 data set. The LCIA results are calculated based on the EF3.1 methods which provide updated characterisation factors in the following impact categories: Climate Change, Ecotoxicity freshwater, Photochemical Ozone Formation, Acidification, Human Toxicity non-cancer, and Human Toxicity cancer. The review report and the data quality ratings refer to the original results. The data set has been updated by the European Commission on the basis of the original EF3.0 data set delivered by the data provider.This sub-process has limited documentation only. For all detailed documentation of the full model to which this data set belongs (such as DQRs, review reports and other technical documentation), please see this process: washing, dry cleaning - EU+EFTA+UK []

## Technology and included processes
A dry-cleaning machine is similar to a combination of a domestic washing machine and clothes dryer. Clothes are placed in the washing or extraction chamber (referred to as the "basket" or "drum"), which constitutes the core of the machine. The washing chamber contains a horizontal, perforated drum that rotates within an outer shell. The shell holds the solvent while the rotating drum holds the clothes load. (S, Ramon., 2020)

In general, the dry cleaning process can be divided into five steps: cleaning in solvent, spinning to extract solvent, drying with hot air and recovery of solvent, deodorisation, and regeneration of used solvent after the clothes have been cleaned. (epa, 2013)

During the wash cycle, the solvent in the chamber (commonly known as the "cage" or "tackle box") is passed through a filtration chamber and then fed back into the "cage". The solvent is then removed and sent to a distillation unit consisting of a boiler and condenser. The condensed solvent is fed into a separator unit where any remaining water is separated from the solvent and then fed into the "clean solvent" tank. At the end of the wash cycle, the machine starts a rinse cycle wherein the fabric load is rinsed with fresh distilled solvent from the pure solvent tank. After the rinse cycle, the machine begins the extraction process, which recovers the solvent for reuse. The extraction cycle begins by draining the solvent from the washing chamber and accelerating the basket to 350–450 rpm, causing much of the solvent to spin free of the fabric. After there are no more solvent to be removed, the machine starts the drying cycle. After the drying cycle is complete, a deodorizing cycle cools the clothes and removes any traces of solvent, by circulating cool air over the. After the aeration cycle, the garments are clean and ready for pressing and finishing. (S, Ramon., 2020)

The activity starts when the raw materials enter the process. Materials entering the process are included as well as energy uses, infrastructure, and chemicals. There is no direct emission to soil, but there is direct emission to air and water from this process such as trichloroethene emission. Chemical agents that are used in the process are emitted through the wastewater, except silica and tetrachloroethylene that also evaporated to air. In this model, the chemical used is tetrachloroethylene (perchloroethylene) solvent in a closed-loop system, however, this solvent is not 100% recycled due to an imperfect filtration process. In addition, the drying process also causes solvent evaporation. The consumption of lubricating oil using an oven bonding machines as a proxy.

S, Ramon. 2020. Laundry & Dry Cleaning Business: Learn, Start, & Grow From Anywhere. Nigeria: Independently Published
EPA. 2013. Best Practice Guidelines for Dry Cleaning Issued to support European Union (Installations and Activities using Solvents) Regulations 2012. Ireland

## Reference product
- washing, dry cleaning // washing, dry cleaning // eu+efta+uk, elementary: 1

## Outputs
- tetrachloroethene, Emissions to air, unspecified: 0.00195
- tetrachloroethene, Emissions to water, unspecified: 1.05e-6

## Impact indicators
- Ecotoxicity, freshwater: 0.00357682
- Climate change: 0.012363
- Human toxicity, cancer: 5.48863e-10
- Human toxicity, non-cancer: 2.07988e-9
- Photochemical ozone formation - human health: 9.555e-5
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
## Deviations from the LCI method principle
The background data uses:
- the \xe2\x80\x9cRecycled content cut-off\xe2\x80\x9d approach to allocate end-of-life by-products and secondary materials. This allocation is explained in the description of the recycled content system model (http://www.ecoinvent.org/database/system-models-in-ecoinvent-3/cut-off-system-model/allocation-cut-off-by-classification.html).
OR
- EF compliant data

## Deviations from the LCI method approaches
Background data:
- the \xe2\x80\x9cRecycled content cut-off\xe2\x80\x9d approach to allocate end-of-life by-products and secondary materials. This allocation is explained in the description of the recycled content system model (http://www.ecoinvent.org/database/system-models-in-ecoinvent-3/cut-off-system-model/allocation-cut-off-by-classification.html). The ecoinvent database mostly relies on “Allocation – market values” apart for few exceptions particularly in the energy sector. ecoinvent energy data is replaced with EF3.0 core data as per the EF guidelines version 2.0.
OR
- EF compliant data

## Modelling constants
All modelling constants follow the requirements listed in the Tender Specifications 070201/2020/SER/ENV.B1. Completeness: There are no intentional cut-offs in the inventory no matter how small their contribution to all the EF impact categories is. Eventual cut-offs are in compliance with the Guide for EF compliant data sets (JRC 2020), i.e. only if below the 3% cut-off rule. Water use: water use is modelled at country level using separate flows for water withdrawal, water release and water evaporation. Handling multi-functional processes: the following PEF multi- functionality decision hierarchy is applied for resolving all multi- functionality problems: (1) subdivision or system expansion; (2) allocation based on a relevant underlying physical relationship (substitution may apply here); (3) allocation based on some other relationship. Direct land use change: GHG emissions from direct LUC allocated to good/service for 20 years after the LUC occurs, with IPCC default values. Carbon storage and delayed emissions: credits associated with temporary (carbon) storage or delayed emissions up to 300 years are not be considered. Emissions off-setting: are not included. Capital goods (including infrastructures) and their End of life: they are included. System boundaries: system boundaries include all processes linked to the product supply chain (e.g. maintenance). Time period: emissions and removals are modelled as if released or removed at the beginning of the assessment method. Fossil and biogenic carbon emissions and removals: removals and emissions are modelled as follows: All GHG emissions from fossil fuels (including peat and limestone) are modelled consistently with the most updated ILCD list of elementary flows. The non-fossil (biogenic) carbon flows are modelled consistently with the most updated ILCD list of elementary flows.

## Cut-off and completeness
There are no intentional cut-offs in the inventory no matter how small their contribution to all the EF impact categories is. Eventual cut-offs are in compliance with the Guide for EF compliant data sets (JRC 2020), i.e. only if below the 3% cut-off rule. The dataset dry mass and water balance has been checked to ensure the inventory is complete. Capital goods (e.g. infrastructure) and their end-of-life are included.

## Data selection and combination
These datasets include, in both their foreground and background data, links to EF3.0 compliant data.
The relevant background data on energy, transport, and End of Life are from the LCDN data node (http://lcdn.thinkstep.com/Node/).
All other background data in the supply of this product for which no EF3.0 process was available are from ecoinvent v3.7 database (www.ecoinvent.org) or other data sources.

## Data treatment and extrapolations
Several data sources have been used to model the inventory.

## Use advice
This data set is a supporting sub-data set and must be used exclusively as sub-data set of its corresponding level-1 partly disaggregated data set (see “General comment” field for exact name and UUID).

## Data sources
- Background Data for Representative products and organisations. EF 3.0 compliant (data stock)
- Kirsi Laitala, Ingun Grimstad Klepp, Roy Kettlewell and Stephen Wiedemann (2020). Laundry Care Regimes: Do the Practices of Keeping Clothes Clean Have Different Environmental Impacts Based on the Fibre Content?, www.mdpi.com, Molecular Diversity Preservation International (MDPI) Sustainability Foundation, Basel, Switzerland
- CINET (2013) Safe and Sustainable use of Tetrachloroethylene in Professional Textile Cleaning by Best Practice Approach, https://www.cinet-online.com/uploads/files/CINET_Safe%20and%20sustainable%20processing%20with%20PERC.pdf, Comité International De L`Entretien du Textile, Ophemert, The Netherlands
- CINET (2012) European Legislation Perc, https://www.cinet-online.com/uploads/files/CINET_European%20Legislation%20PERC.pdf, Comité International De L`Entretien du Textile, Ophemert, The Netherlands
- Lebon (2021) Nonwoven Oven Machine, Catalog and Company Messages, Qingdao Lebon Industry Co., Ltd., China
- Lindus (2021) Dry Cleaning Machine, http://www.lindus-srl.com/, Bergparma, Parma, Italy
- epa (2006) National Perchloroethylene Air Emission Standards for Dry Cleaning Facilities, Environmental Protection Agency Office of Environmental Enforcement (OEE), Wexford, Ireland
- Kirsi Laitala, Ingun G. Klepp and Beverley Henry (2017). Global laundering practices-Alternatives to machine washing. Oslo and Akershus University College of Applied Sciences, Oslo, Norway.
- epa (2013) Best Practice Guidelines for Dry Cleaning Issued to support European Union (Installations and Activities using Solvents) Regulations 2012, https://www.epa.ie/, Environmental Protection Agency Office of Environmental Enforcement (OEE), Wexford, Ireland
- J. Räisänen , R. Niemelä & C. Rosenberg (2001) Tetrachloroethylene Emissions and Exposure in Dry Cleaning, Journal of the Air & Waste Management Association, Finnish Institute of Occupational Health, Helsinki, Finland

## Intended applications
Implementation of regular Product Environmental Footprint (PEF) studies and Organisation Environmental Footprint (OEF) studies exclusively under the specified Product groups and sectors as defined in the Product Environmental Footprint Category Rules (PEFCR) and Organisation Environmental Footprint Sectorial Rules (OEFSR) listed in http://ec.europa.eu/environment/eussd/smgp/PEFCR_OEFSR.htm
