# wool, elementary; alpaca; production mix, at plant; Textile

Dataset: ILCD process, Unit process, single operation
Geography: GLO
Reference year: 2019
Valid until: 2024
Classification: Other Services / Other services
LCI method principle: Attributional
LCI method approaches: Allocation - physical causality
Completeness: All relevant flows quantified
Project: Provision of process-based 3.0 Environmental Footprint-compliant life cycle inventory datasets - Renewable materials - contract number 070201/2020/840085/SER/ENV.B.1
Generated by: CADIS
Owner: Blonk Sustainability Tools
Compliance: Environmental Footprint non-primary supporting data set; Environmental Footprint 3.1
Amounts: no units in this file; such an amount is in the reference unit of its flow, which a separate flow dataset defines
copyright: true
licenseType: Free of charge for some user types or use types
accessRestrictions: Free of charge for all final users implementing a regular Product Environmental Footprint (PEF) studies and Organisation Environmental Footprint (OEF) studies exclusively under the specified Product groups and sectors as defined in the Product Environmental Footprint Category Rules (PEFCR) and Organisation Environmental Footprint Sectorial Rules (OEFSR) listed in http://ec.europa.eu/environment/eussd/smgp/PEFCR_OEFSR.htm and in accordance with the terms and conditions of the EULA (available at https://ecoinvent.lca-data.com/) exclusively until 31st December 2024. Any use of this dataset or any derivative data not within the specific context of one of the PEF/OEF projects or after the end of 2024 is not permitted.

## General comment
Notice: this data set supersedes the EF3.0-compliant version (see link under "preceding data set version" below calculated with the EF3.0). The life cycle inventory is not changed from the original EF3.0 data set. The LCIA results are calculated based on the EF3.1 methods which provide updated characterisation factors in the following impact categories: Climate Change, Ecotoxicity freshwater, Photochemical Ozone Formation, Acidification, Human Toxicity non-cancer, and Human Toxicity cancer. The review report and the data quality ratings refer to the original results. The data set has been updated by the European Commission on the basis of the original EF3.0 data set delivered by the data provider.This sub-process has limited documentation only. For all detailed documentation of the full model to which this data set belongs (such as DQRs, review reports and other technical documentation), please see this process: wool - GLO []

## Technology and included processes
Australian Wool/Lamb production is taken as basis for alpaca wool production and then adapted to make it specific for globalAplaca production. The liveweight output, wool output, feed intake and entric methane emissions were adapted using efficiency factors that take in consideration different weight, FCR and wool production yield of alpaca compared to sheeps.
This process includes the most relevant alpaca wool production inputs up to farm gate.

## Reference product
- wool, alpaca // wool // glo, elementary: 1

## Inputs
- water, Renewable material resources from water [AE]: 3.56737
- water, Renewable material resources from water [AF]: 0.366339
- water, Renewable material resources from water [AG]: 0.010698
- water, Renewable material resources from water [AL]: 0.186872
- water, Renewable material resources from water [AM]: 0.165191
- water, Renewable material resources from water [AO]: 1.10969
- water, Renewable material resources from water [AR]: 4.94562
- water, Renewable material resources from water [AT]: 2.40773
- water, Renewable material resources from water [AU]: 6.10693
- water, Renewable material resources from water [AW]: 0.0214821
- water, Renewable material resources from water [AZ]: 0.836399
- water, Renewable material resources from water [BA]: 0.232962
- water, Renewable material resources from water [BB]: 0.0260212
- water, Renewable material resources from water [BD]: 2.95255
- water, Renewable material resources from water [BE]: 2.89807
- water, Renewable material resources from water [BF]: 0.176279
- water, Renewable material resources from water [BG]: 0.742105
- water, Renewable material resources from water [BH]: 0.375343
- water, Renewable material resources from water [BI]: 0.0419468
- water, Renewable material resources from water [BJ]: 0.16241
- water, Renewable material resources from water [BN]: 0.173141
- water, Renewable material resources from water [BO]: 0.416727
- water, Renewable material resources from water [BR]: 17.2503
- water, Renewable material resources from water [BS]: 0.0711183
- water, Renewable material resources from water [BT]: 0.0364258
- water, Renewable material resources from water [BW]: 0.185764
- water, Renewable material resources from water [BY]: 0.96361
- water, Renewable material resources from water [BZ]: 0.0147972
- water, Renewable material resources from water [CA]: 9.06583
- water, Renewable material resources from water [CD]: 0.353968
- water, Renewable material resources from water [CF]: 0.023239
- water, Renewable material resources from water [CG]: 0.137139
- water, Renewable material resources from water [CH]: 2.87161
- water, Renewable material resources from water [CI]: 0.46967
- water, Renewable material resources from water [CL]: 2.21891
- water, Renewable material resources from water [CM]: 0.407084
- water, Renewable material resources from water [CN]: 94.963
- water, Renewable material resources from water [CO]: 3.47178
- water, Renewable material resources from water [CR]: 0.433613
- water, Renewable material resources from water [CV]: 0.0181368
- water, Renewable material resources from water [CY]: 0.16672
- water, Renewable material resources from water [CZ]: 1.99862
- water, Renewable material resources from water [DE]: 21.7514
- water, Renewable material resources from water [DJ]: 0.0233294
- water, Renewable material resources from water [DK]: 1.57722
- water, Renewable material resources from water [DM]: 0.00442292
- water, Renewable material resources from water [DO]: 0.809303
- water, Renewable material resources from water [DZ]: 2.81384
- water, Renewable material resources from water [EC]: 0.983637
- water, Renewable material resources from water [EE]: 0.215372
- water, Renewable material resources from water [EG]: 5.57135
- water, Renewable material resources from water [ER]: 0.0295906
- water, Renewable material resources from water [ES]: 9.33414
- water, Renewable material resources from water [ET]: 0.850335
- water, Renewable material resources from water [FI]: 1.34534
- water, Renewable material resources from water [FJ]: 0.0535053
- water, Renewable material resources from water [FR]: 15.3434
- water, Renewable material resources from water [GA]: 0.160121
- water, Renewable material resources from water [GB]: 15.2476
- water, Renewable material resources from water [GD]: 0.00829773
- water, Renewable material resources from water [GE]: 0.234076
- water, Renewable material resources from water [GH]: 0.695133
- water, Renewable material resources from water: 3.04622
- water, Renewable material resources from water [GM]: 0.0251422
- water, Renewable material resources from water [GN]: 0.125193
- water, Renewable material resources from water [GQ]: 0.186266
- water, Renewable material resources from water [GR]: 1.73451
- water, Renewable material resources from water [GT]: 0.673506
- water, Renewable material resources from water [GW]: 0.0151388
- water, Renewable material resources from water [GY]: 0.0477323
- water, Renewable material resources from water [HN]: 0.235112
- water, Renewable material resources from water [HR]: 0.557704
- water, Renewable material resources from water [HT]: 0.174327
- water, Renewable material resources from water [HU]: 1.46202
- water, Renewable material resources from water [ID]: 14.5908
- water, Renewable material resources from water [IE]: 1.57488
- water, Renewable material resources from water [IL]: 1.61532
- water, Renewable material resources from water [IN]: 38.9465
- water, Renewable material resources from water [IQ]: 2.43186
- water, Renewable material resources from water [IR]: 6.87424
- water, Renewable material resources from water [IS]: 0.0898673
- water, Renewable material resources from water [IT]: 13.1275
- water, Renewable material resources from water [JM]: 0.144279
- water, Renewable material resources from water [JO]: 0.475708
- water, Renewable material resources from water [JP]: 28.1823
- water, Renewable material resources from water [KE]: 0.831144
- water, Renewable material resources from water [KG]: 0.138038
- water, Renewable material resources from water [KH]: 0.280852
- water, Renewable material resources from water [KM]: 0.0115844
- water, Renewable material resources from water [KN]: 0.00690332
- water, Renewable material resources from water [KR]: 10.4957
- water, Renewable material resources from water [KW]: 1.32255
- water, Renewable material resources from water [KZ]: 2.2717
- water, Renewable material resources from water [LA]: 0.21479
- water, Renewable material resources from water [LB]: 0.523861
- water, Renewable material resources from water [LC]: 0.0140815
- water, Renewable material resources from water [LK]: 1.29046
- water, Renewable material resources from water [LR]: 0.0320296
- water, Renewable material resources from water [LS]: 0.031103
- water, Renewable material resources from water [LT]: 0.459857
- water, Renewable material resources from water [LU]: 0.319234
- water, Renewable material resources from water [LV]: 0.271161
- water, Renewable material resources from water [LY]: 0.661291
- water, Renewable material resources from water [MA]: 1.37094
- water, Renewable material resources from water [MD]: 0.143476
- water, Renewable material resources from water [ME]: 0.0578002
- water, Renewable material resources from water [MG]: 0.211878
- water, Renewable material resources from water [MK]: 0.159638
- water, Renewable material resources from water [ML]: 0.192364
- water, Renewable material resources from water [MM]: 1.2237
- water, Renewable material resources from water [MN]: 0.171148
- water, Renewable material resources from water [MR]: 0.10091
- water, Renewable material resources from water [MT]: 0.0883093
- water, Renewable material resources from water [MU]: 0.134734
- water, Renewable material resources from water [MW]: 0.0973439
- water, Renewable material resources from water [MX]: 12.2889
- water, Renewable material resources from water [MY]: 4.10417
- water, Renewable material resources from water [MZ]: 0.174032
- water, Renewable material resources from water [NA]: 0.125859
- water, Renewable material resources from water [NE]: 0.124432
- water, Renewable material resources from water [NG]: 5.16546
- water, Renewable material resources from water [NI]: 0.17386
- water, Renewable material resources from water [NL]: 4.86617
- water, Renewable material resources from water [NO]: 1.84199
- water, Renewable material resources from water [NP]: 0.386137
- water, Renewable material resources from water [NZ]: 0.957701
- water, Renewable material resources from water [OM]: 0.820619
- water, Renewable material resources from water [PA]: 0.509894
- water, Renewable material resources from water [PE]: 1.96087
- water, Renewable material resources from water [PG]: 0.165155
- water, Renewable material resources from water [PH]: 3.97506
- water, Renewable material resources from water [PK]: 4.76705
- water, Renewable material resources from water [PL]: 5.60042
- water, Renewable material resources from water [PR]: 0.674654
- water, Renewable material resources from water [PS]: 0.12768
- water, Renewable material resources from water [PT]: 1.76713
- water, Renewable material resources from water [PY]: 0.424622
- water, Renewable material resources from water [QA]: 1.53649
- water, Renewable material resources from water [RO]: 2.45335
- water, Renewable material resources from water [RS]: 0.608807
- water, Renewable material resources from water [RU]: 20.3118
- water, Renewable material resources from water [RW]: 0.107109
- water, Renewable material resources from water [SA]: 9.05923
- water, Renewable material resources from water [SB]: 0.00820622
- water, Renewable material resources from water [SD]: 0.950488
- water, Renewable material resources from water [SE]: 2.65797
- water, Renewable material resources from water [SG]: 2.63872
- water, Renewable material resources from water [SI]: 0.376407
- water, Renewable material resources from water [SK]: 0.883484
- water, Renewable material resources from water [SL]: 0.0604955
- water, Renewable material resources from water [SM]: 0.0109958
- water, Renewable material resources from water [SN]: 0.236855
- water, Renewable material resources from water [SR]: 0.0493298
- water, Renewable material resources from water [ST]: 0.00390137
- water, Renewable material resources from water [SV]: 0.263104
- water, Renewable material resources from water [SZ]: 0.0530961
- water, Renewable material resources from water [TC]: 0.00474388
- water, Renewable material resources from water [TD]: 0.131811
- water, Renewable material resources from water [TG]: 0.0546026
- water, Renewable material resources from water [TH]: 6.06109
- water, Renewable material resources from water [TJ]: 0.136801
- water, Renewable material resources from water [TL]: 0.0175445
- water, Renewable material resources from water [TM]: 0.396774
- water, Renewable material resources from water [TN]: 0.65939
- water, Renewable material resources from water [TO]: 0.0032893
- water, Renewable material resources from water [TR]: 10.2644
- water, Renewable material resources from water [TT]: 0.226076
- water, Renewable material resources from water [TZ]: 0.640285
- water, Renewable material resources from water [UA]: 2.59038
- water, Renewable material resources from water [UG]: 0.443598
- water, Renewable material resources from water [US]: 99.9909
- water, Renewable material resources from water [UY]: 0.378397
- water, Renewable material resources from water [UZ]: 1.05729
- water, Renewable material resources from water [VC]: 0.00711276
- water, Renewable material resources from water [VE]: 2.90038
- water, Renewable material resources from water [VN]: 3.00404
- water, Renewable material resources from water [VU]: 0.00451823
- water, Renewable material resources from water [WS]: 0.00642732
- water, Renewable material resources from water [YE]: 0.52894
- water, Renewable material resources from water [ZA]: 3.86698
- water, Renewable material resources from water [ZM]: 0.29996
- water, Renewable material resources from water [ZW]: 0.194841

## Outputs
- nitrous oxide, Emissions to air, unspecified: 319.134
- ammonia, Emissions to air, unspecified [AL]: 1.06669
- ammonia, Emissions to air, unspecified [AT]: 13.7436
- ammonia, Emissions to air, unspecified [BA]: 1.32978
- ammonia, Emissions to air, unspecified [BE]: 16.5426
- ammonia, Emissions to air, unspecified [BG]: 4.23603
- ammonia, Emissions to air, unspecified [BY]: 5.50042
- ammonia, Emissions to air, unspecified [CH]: 16.3916
- ammonia, Emissions to air, unspecified [CZ]: 11.4084
- ammonia, Emissions to air, unspecified [DE]: 124.16
- ammonia, Emissions to air, unspecified [DK]: 9.00301
- ammonia, Emissions to air, unspecified [EE]: 1.22937
- ammonia, Emissions to air, unspecified [ES]: 53.2805
- ammonia, Emissions to air, unspecified [FI]: 7.67938
- ammonia, Emissions to air, unspecified [FR]: 87.5822
- ammonia, Emissions to air, unspecified [GB]: 87.0354
- ammonia, Emissions to air, unspecified: 2662.43
- ammonia, Emissions to air, unspecified [GR]: 9.90084
- ammonia, Emissions to air, unspecified [HR]: 3.18345
- ammonia, Emissions to air, unspecified [HU]: 8.3454
- ammonia, Emissions to air, unspecified [IE]: 8.98963
- ammonia, Emissions to air, unspecified [IT]: 74.9336
- ammonia, Emissions to air, unspecified [LT]: 2.62492
- ammonia, Emissions to air, unspecified [LU]: 1.82223
- ammonia, Emissions to air, unspecified [LV]: 1.54782
- ammonia, Emissions to air, unspecified [MD]: 0.818981
- ammonia, Emissions to air, unspecified [MK]: 0.911233
- ammonia, Emissions to air, unspecified [NL]: 27.7768
- ammonia, Emissions to air, unspecified [NO]: 10.5143
- ammonia, Emissions to air, unspecified [PL]: 31.9679
- ammonia, Emissions to air, unspecified [PT]: 10.087
- ammonia, Emissions to air, unspecified [RO]: 14.004
- ammonia, Emissions to air, unspecified [RU]: 115.943
- ammonia, Emissions to air, unspecified [SE]: 15.1721
- ammonia, Emissions to air, unspecified [SI]: 2.14858
- ammonia, Emissions to air, unspecified [SK]: 5.04305
- ammonia, Emissions to air, unspecified [UA]: 14.7863
- Phosphorus, Emissions to water, unspecified: 6.39368
- nitrate, Emissions to water, unspecified: 18915.1
- methane (biogenic), Emissions to air, unspecified: 4238.16
- arsenic, Emissions to soil, unspecified: 0.00071196
- mercury, Emissions to soil, unspecified: 6.67288e-5
- cadmium, Emissions to soil, unspecified: 0.000135133
- nickel, Emissions to soil, unspecified: 0.00457888
- chromium, Emissions to soil, unspecified: 0.012927
- zinc, Emissions to soil, unspecified: 0.0608656
- copper, Emissions to soil, unspecified: 0.0131224
- lead, Emissions to soil, unspecified: 0.0061424

## Impact indicators
- Eutrophication marine: 4593.42
- Ecotoxicity, freshwater: 467131
- Land use: 0
- Water use: 16759
- Resource use, minerals and metals: 0
- Resource use, fossils: 0
- Climate change: 201554
- Ozone depletion: 0
- Human toxicity, cancer: 9.31996e-7
- Human toxicity, non-cancer: 0.000297436
- EF-particulate Matter: 0.0727258
- Ionising radiation, human health: 0
- Photochemical ozone formation - human health: 42.8055
- Acidification: 9422.32
- Eutrophication, terrestrial: 41647.5
- Eutrophication, freshwater: 6.39368

## Deviations from the LCI method principle
The background data use the \xe2\x80\x9cRecycled content cut-off\xe2\x80\x9d approach to allocate end-of-life by-products and secondary materials. This allocation is explained in the description of the recycled content system model (http://www.ecoinvent.org/database/system-models-in-ecoinvent-3/cut-off-system-model/allocation-cut-off-by-classification.html).

## Deviations from the LCI method approaches
Background data:
- the \xe2\x80\x9cRecycled content cut-off\xe2\x80\x9d approach to allocate end-of-life by-products and secondary materials. This allocation is explained in the description of the recycled content system model (http://www.ecoinvent.org/database/system-models-in-ecoinvent-3/cut-off-system-model/allocation-cut-off-by-classification.html). The ecoinvent database mostly relies on “Allocation – market values” apart for few exceptions particularly in the energy sector. ecoinvent energy data is replaced with EF3.0 core data as per the EF guidelines version 2.0.
OR
- EF compliant data

## Modelling constants
All modelling constants follow the requirements listed in the Tender Specifications ENV.B.1/SER/2016/0038vl. Completeness: All known environmental flows are included. All known resource uses and emissions are listed in the inventory. Water use: water use is modelled at country level using separate flows for water withdrawal, water release and water evaporation. Cut-off: All known environmental flows are included. All known resource uses and emissions are listed in the inventory. Handling multi-functional processes: the following PEF multi- functionality decision hierarchy is applied for resolving all multi- functionality problems: (1) subdivision or system expansion; (2) allocation based on a relevant underlying physical relationship (substitution may apply here); (3) allocation based on some other relationship. Direct land use change: GHG emissions from direct LUC allocated to good/service for 20 years after the LUC occurs, with IPCC default values. Carbon storage and delayed emissions: credits associated with temporary (carbon) storage or delayed emissions up to 300 years are not be considered. Emissions off-setting: are not included. Capital goods (including infrastructures) and their End of life: they are included. System boundaries: system boundaries include all processes linked to the product supply chain (e.g. maintenance). Time period: emissions and removals are modelled as if released or removed at the beginning of the assessment method. Fossil and biogenic carbon emissions and removals: removals and emissions are modelled as follows: All GHG emissions from fossil fuels (including peat and limestone) are modelled consistently with the most updated ILCD list of elementary flows. The non-fossil (biogenic) carbon flows are modelled consistently with the most updated ILCD list of elementary flows.

## Cut-off and completeness
All known environmental flows are included. All known resource uses and emissions are listed in the inventory. The dataset dry mass balance has been checked to ensure the inventory is complete. Capital goods (e.g. infrastructure) and their end-of-life are included.

## Data selection and combination
These datasets include, in both their foreground and background data, links to EF3.0 compliant data.
The relevant background data on energy, transport, and End of Life are from the LCDN data node (http://lcdn.thinkstep.com/Node/).
All other background data in the supply of this product for which no EF3.0 process was available are from ecoinvent v3.7 database (www.ecoinvent.org) or other data sources.

## Data treatment and extrapolations
Several data sources have been used to model the inventory.

## Use advice
This data set is a supporting sub-data set and must be used exclusively as sub-data set of its corresponding level-1 partly disaggregated data set (see “General comment” field for exact name and UUID).

## Data sources
- Background Data for Representative products and organisations. EF 3.0 compliant (data stock)
- USLCI Database; "Wool, at fiel/US" process, Geography: US, from SimaPRO 9.2.0.2
- Quispe, Edgar, et al. (2009). Producción de fibra de alpaca, llama, vicuña y guanaco. Animal Genetic Resources Information, 2009, 45, 1–14. Food and Agriculture Organization of the United Nations.
- Carrasco, A. et al (2019). Ecoperfil del top de fibra de alpaca en base a un estudio del inventario del ciclo de vida del producto en la región de Arequipa. Universidad Católica de Santa María, Arequipa, Perú.
- Universidad de Chile, 1992. Avances en Medicina Veterinaria, Vol.6, N°2, Julio-Diciembre, 1991. Características biológicas y productivas de los camélidos sudamericanos.
- Sewport Support Team, (2022). What is Alpaca Wool Fabric: Properties, How its Made and Where. Available: https://sewport.com/fabrics-directory/alpaca-wool-fabric

## Intended applications
Implementation of regular Product Environmental Footprint (PEF) studies and Organisation Environmental Footprint (OEF) studies exclusively under the specified Product groups and sectors as defined in the Product Environmental Footprint Category Rules (PEFCR) and Organisation Environmental Footprint Sectorial Rules (OEFSR) listed in http://ec.europa.eu/environment/eussd/smgp/PEFCR_OEFSR.htm
