# treatment, water repellent, pfc; water repellent treatment; production mix, at plant; service

Dataset: ILCD process, Partly terminated system
Geography: GLO
Reference year: 2021
Valid until: 2024
Classification: Systems / Textiles, furnitures and other interiors
LCI method principle: Attributional
LCI method approaches: Allocation - market value
Completeness: All relevant flows quantified
Project: Provision of process-based 3.0 Environmental Footprint-compliant life cycle inventory datasets - Apparel 1 - contract number 070201/2020/840291/SER/ENV.B.1
Generated by: Life Cycle Indonesia
Owner: PRé Sustainability B.V.
Compliance: ILCD Data Network - Entry-level; Suggestions for updating the PEF method 2019; ISO 14040 Environmental Management – Life Cycle Assessment – Principles and Framework, 2006; ISO 14044:2006. Environmental Management – Life Cycle Assessment – Requirements and guidelines.; Environmental Footprint 3.1
Review: Dependent internal review by Avraam Symeonidis, Emilia Moreno Ruiz; Independent review panel by Fábio Valebona
Data quality: Overall quality: Good; Time representativeness: Very good; Geographical representativeness: Good; Technological representativeness: Very good; Precision: Good; Methodological appropriateness and consistency: Not applicable
Amounts: no units in this file; such an amount is in the reference unit of its flow, which a separate flow dataset defines
copyright: true
licenseType: Free of charge for some user types or use types
accessRestrictions: Free of charge for all final users implementing a regular Product Environmental Footprint (PEF) studies and Organisation Environmental Footprint (OEF) studies exclusively under the specified Product groups and sectors as defined in the Product Environmental Footprint Category Rules (PEFCR) and Organisation Environmental Footprint Sectorial Rules (OEFSR) listed in http://ec.europa.eu/environment/eussd/smgp/PEFCR_OEFSR.htm and in accordance with the terms and conditions of the EULA (available at https://ecoinvent.lca-data.com/) exclusively until 31st December 2024. Any use of this dataset or any derivative data not within the specific context of one of the PEF/OEF projects or after the end of 2024 is not permitted.

## General comment
Notice: this data set supersedes the EF3.0-compliant version (see link under "preceding data set version" below calculated with the EF3.0). The life cycle inventory is not changed from the original EF3.0 data set. The LCIA results are calculated based on the EF3.1 methods which provide updated characterisation factors in the following impact categories: Climate Change, Ecotoxicity freshwater, Photochemical Ozone Formation, Acidification, Human Toxicity non-cancer, and Human Toxicity cancer. The review report and the data quality ratings refer to the original results. The data set has been updated by the European Commission on the basis of the original EF3.0 data set delivered by the data provider.The term ‘water repellent’ is actually a relative term because there is always some attraction between a solid and a liquid in contact, though the force of attraction may be small. No solid surface actually exerts a repulsive force upon a liquid, Thus water repellency may be defined as ‘the relative degree of resistance of a fabric to surface wetting, water penetration, water absorption or any combination of these properties’. Its assessment is dependent upon objective and/or subjective factors pertaining to the test conditions used.

Water Repellent is a processing agent that covers the surface of fiber by nanoparticle compound and gives the fabric excellent water repellency. It also provides washing durability. The advantage of this finishing is that it can keep the original hand of fabric itself without losing air permeability since it is not coating finish covering the fabric completely with thick resins.

Choudhury, Asim Kumar Roy. 2017. Principle of textile finishing. United Kingdom: Elsevier. pp 161
NICCA (2021) What is "Water Repellent"? https://nctexchem.com/product/process/finishing/waterrepellent/ , NICCA Chemical Co., Ltd., Japan

## Technology and included processes
The usual techniques for applying a coating on solvent or water basis are the so-called "knife-over-roller", the "dip" and the "reverse roller" screen coaters. A solution, suspension or dispersion of a polymer substance in water is usually applied to the cloth and any excess coating is then scraped off. For such procedures to be effective, the coating formulation must be in a highly viscous, pasty form. A further procedure sometimes employed for finishing of the textile is the use of immersion or bath techniques known as foularding. The textile is fully immersed in an aqueous solution containing the functional composition that is to be applied. Subsequent repeated cycles of drying, fixation and condensation are required to complete the operation
With respect to imparting water repellency and water proofing to textile products UK Patent No. GB2,221,928 discloses a method of applying a ketene dimer to a fabric using the methods of exhaustion (immersion), padding or spraying. Exhaustion or immersion techniques are inflexible as they necessarily impart a property on the whole of the textile whereas in many practical applications it may be more appropriate only to treat a portion thereof. The application by padding involves wetting the fabric in a liquid medium having a relatively high concentration, for example, by dipping, followed by squeezing the fabric through a pad mangle, the nip pressure of which is set to permit the retention of the desired proportion of the liquid medium.
Concomitantly, after the water-repellent finish has been applied, the finished substrate may be subjected to post-treatment which includes at least the step of drying the substrate. Further post-treatment steps will be apparent to a person of ordinary skill in the art and would, by way of example only, include curing by the use of UV radiation or heat treatment, fixing, washing, stretching and brushing.
Fluorocarbons are known to introduce durable water and oil repellency (DWOR) and, as such, they are applied in water- and stain-repellent fabrics for apparel. The combination of water and oil repellency is a typical behavior of fluorocarbon products. In the past, finishes based on C8 fluorocarbons (eight carbon atoms in the structure) were mainly used. However, concerns arose associated with these C8 fluorocarbons, more specifically with respect to PFOA (perfluorooctanoic acid or pentadecafluorooctanoic acid) and PFOS (perfluorooctane sulphonate or heptadecafluoro-1-octanesulfonic acid). The tendency is to replace the C8 fluorocarbon chemistry by C6 or C4 fluorocarbon products or even fluorine-free water repellents. Currently, new commercial DWOR finishes are coming onto the market based on short chain fluorocarbons (C6 or C4 fluorocarbon chemistry), hybrid systems, or they are fluorine free.

This process is about water repellent treatment using PFC. The process includes the use of balloon padder and dryer. The process includes chemicals, energy, water, lube oil consumption and infrastructure. There is no direct emission to air since the emission comes from electricity usage, while hazardous waste comes from waste lube oil. In the model, the energy sources of machines used is from electricity and steam. The chemical is assumed to be carried in wastewater. The consumption of lubricating oil using a thermobonding oven as a proxy. The GSM of the fabric is assumed to be 135 GSM cotton fabric

Craamer, Johannes A., James E. Fox, and Jagvi Ramesh Patel. 2006. “Method for Providing a Water-Repellent Finish on a Textile Article.” September 28, 2006. https://patents.google.com/patent/WO2006100279A1/en.
De Smet, D., Weydts, D., & Vanneste, M. (2015). Environmentally friendly fabric finishes. Sustainable Apparel, 3–33. https://sci-hub.do/https://doi.org/10.1016/B978-1-78242-339-3.00001-7

## Parameters
- kg_0: 0.15
  Mass in kg, for silicone product; Freight train, diesel traction; EU+EFTA+UK
- km_0: 220.339
  Distance in km, for silicone product; Freight train, diesel traction; EU+EFTA+UK
- kg_km_0: 33.0509; = kg_0*km_0
  Transport amount in km*km, for silicone product; Freight train, diesel traction; EU+EFTA+UK
- kg_1: 0.15
  Mass in kg, for silicone product; Freight train, electricity traction; EU+EFTA+UK
- km_1: 66.5384
  Distance in km, for silicone product; Freight train, electricity traction; EU+EFTA+UK
- kg_km_1: 9.98076; = kg_1*km_1
  Transport amount in km*km, for silicone product; Freight train, electricity traction; EU+EFTA+UK
- kg_2: 0.15
  Mass in kg, for silicone product; Freight train, average; EU+EFTA+UK
- km_2: 1.82229
  Distance in km, for silicone product; Freight train, average; EU+EFTA+UK
- kg_km_2: 0.273344; = kg_2*km_2
  Transport amount in km*km, for silicone product; Freight train, average; EU+EFTA+UK
- kg_3: 0.15
  Mass in kg, for silicone product; Articulated lorry transport, Total weight >32 t, mix Euro 0-5; ROW w/o EU+EFTA
- km_3: 450.4
  Distance in km, for silicone product; Articulated lorry transport, Total weight >32 t, mix Euro 0-5; ROW w/o EU+EFTA
- kg_km_3: 67.56; = kg_3*km_3
  Transport amount in km*km, for silicone product; Articulated lorry transport, Total weight >32 t, mix Euro 0-5; ROW w/o EU+EFTA
- kg_4: 0.15
  Mass in kg, for silicone product; Transoceanic ship, containers; GLO
- km_4: 524.8
  Distance in km, for silicone product; Transoceanic ship, containers; GLO
- kg_km_4: 78.72; = kg_4*km_4
  Transport amount in km*km, for silicone product; Transoceanic ship, containers; GLO
- kg_5: 0.15
  Mass in kg, for tetrafluoroethylene // tetrafluoroethylene production // glo; Articulated lorry transport, Euro 4, Total weight >32 t; EU+EFTA+UK
- km_5: 1000
  Distance in km, for tetrafluoroethylene // tetrafluoroethylene production // glo; Articulated lorry transport, Euro 4, Total weight >32 t; EU+EFTA+UK
- kg_km_5: 150; = kg_5*km_5
  Transport amount in km*km, for tetrafluoroethylene // tetrafluoroethylene production // glo; Articulated lorry transport, Euro 4, Total weight >32 t; EU+EFTA+UK
- kg_6: 0.75
  Mass in kg, for urea-formaldehyde resin // urea-formaldehyde resin production // eu+efta+uk; Articulated lorry transport, Euro 4, Total weight >32 t; EU+EFTA+UK
- km_6: 1000
  Distance in km, for urea-formaldehyde resin // urea-formaldehyde resin production // eu+efta+uk; Articulated lorry transport, Euro 4, Total weight >32 t; EU+EFTA+UK
- kg_km_6: 750; = kg_6*km_6
  Transport amount in km*km, for urea-formaldehyde resin // urea-formaldehyde resin production // eu+efta+uk; Articulated lorry transport, Euro 4, Total weight >32 t; EU+EFTA+UK
- kg_7: 0.075
  Mass in kg, for non-ionic surfactant, ethyleneoxidederivate // non-ionic surfactant, ethyleneoxidederivate production // glo; Articulated lorry transport, Euro 4, Total weight >32 t; EU+EFTA+UK
- km_7: 1000
  Distance in km, for non-ionic surfactant, ethyleneoxidederivate // non-ionic surfactant, ethyleneoxidederivate production // glo; Articulated lorry transport, Euro 4, Total weight >32 t; EU+EFTA+UK
- kg_km_7: 75; = kg_7*km_7
  Transport amount in km*km, for non-ionic surfactant, ethyleneoxidederivate // non-ionic surfactant, ethyleneoxidederivate production // glo; Articulated lorry transport, Euro 4, Total weight >32 t; EU+EFTA+UK
- kg_8: 0.0024
  Mass in kg, for alkylbenzene sulfonate // alkylbenzene sulfonate production // glo; Articulated lorry transport, Euro 4, Total weight >32 t; EU+EFTA+UK
- km_8: 1000
  Distance in km, for alkylbenzene sulfonate // alkylbenzene sulfonate production // glo; Articulated lorry transport, Euro 4, Total weight >32 t; EU+EFTA+UK
- kg_km_8: 2.4; = kg_8*km_8
  Transport amount in km*km, for alkylbenzene sulfonate // alkylbenzene sulfonate production // glo; Articulated lorry transport, Euro 4, Total weight >32 t; EU+EFTA+UK
- kg_9: 0.0045
  Mass in kg, for acetic acid // acetic acid production, product in 98% solution state // glo; Articulated lorry transport, Euro 4, Total weight >32 t; EU+EFTA+UK
- km_9: 1000
  Distance in km, for acetic acid // acetic acid production, product in 98% solution state // glo; Articulated lorry transport, Euro 4, Total weight >32 t; EU+EFTA+UK
- kg_km_9: 4.5; = kg_9*km_9
  Transport amount in km*km, for acetic acid // acetic acid production, product in 98% solution state // glo; Articulated lorry transport, Euro 4, Total weight >32 t; EU+EFTA+UK
- kg_10: 2.42116e-7
  Mass in kg, for lubricating oil // lubricants at refinery // rsa; Articulated lorry transport, Euro 4, Total weight >32 t; EU+EFTA+UK
- km_10: 1000
  Distance in km, for lubricating oil // lubricants at refinery // rsa; Articulated lorry transport, Euro 4, Total weight >32 t; EU+EFTA+UK
- kg_km_10: 0.000242116; = kg_10*km_10
  Transport amount in km*km, for lubricating oil // lubricants at refinery // rsa; Articulated lorry transport, Euro 4, Total weight >32 t; EU+EFTA+UK
- kg_11: 9.93295e-8
  Mass in kg, for lubricating oil // lubricants at refinery // raf; Articulated lorry transport, Euro 4, Total weight >32 t; EU+EFTA+UK
- km_11: 1000
  Distance in km, for lubricating oil // lubricants at refinery // raf; Articulated lorry transport, Euro 4, Total weight >32 t; EU+EFTA+UK
- kg_km_11: 9.93295e-5; = kg_11*km_11
  Transport amount in km*km, for lubricating oil // lubricants at refinery // raf; Articulated lorry transport, Euro 4, Total weight >32 t; EU+EFTA+UK
- kg_12: 2.60297e-6
  Mass in kg, for lubricating oil // lubricants at refinery // ras w/o cn; Articulated lorry transport, Euro 4, Total weight >32 t; EU+EFTA+UK
- km_12: 1000
  Distance in km, for lubricating oil // lubricants at refinery // ras w/o cn; Articulated lorry transport, Euro 4, Total weight >32 t; EU+EFTA+UK
- kg_km_12: 0.00260297; = kg_12*km_12
  Transport amount in km*km, for lubricating oil // lubricants at refinery // ras w/o cn; Articulated lorry transport, Euro 4, Total weight >32 t; EU+EFTA+UK
- kg_13: 2.15244e-6
  Mass in kg, for lubricating oil // lubricants at refinery // ru; Articulated lorry transport, Euro 4, Total weight >32 t; EU+EFTA+UK
- km_13: 1000
  Distance in km, for lubricating oil // lubricants at refinery // ru; Articulated lorry transport, Euro 4, Total weight >32 t; EU+EFTA+UK
- kg_km_13: 0.00215244; = kg_13*km_13
  Transport amount in km*km, for lubricating oil // lubricants at refinery // ru; Articulated lorry transport, Euro 4, Total weight >32 t; EU+EFTA+UK
- kg_14: 1.32587e-6
  Mass in kg, for lubricating oil // lubricants at refinery // eu+efta+uk; Articulated lorry transport, Euro 4, Total weight >32 t; EU+EFTA+UK
- km_14: 1000
  Distance in km, for lubricating oil // lubricants at refinery // eu+efta+uk; Articulated lorry transport, Euro 4, Total weight >32 t; EU+EFTA+UK
- kg_km_14: 0.00132587; = kg_14*km_14
  Transport amount in km*km, for lubricating oil // lubricants at refinery // eu+efta+uk; Articulated lorry transport, Euro 4, Total weight >32 t; EU+EFTA+UK
- kg_15: 2.03182e-6
  Mass in kg, for lubricating oil // lubricants at refinery // rna; Articulated lorry transport, Euro 4, Total weight >32 t; EU+EFTA+UK
- km_15: 1000
  Distance in km, for lubricating oil // lubricants at refinery // rna; Articulated lorry transport, Euro 4, Total weight >32 t; EU+EFTA+UK
- kg_km_15: 0.00203182; = kg_15*km_15
  Transport amount in km*km, for lubricating oil // lubricants at refinery // rna; Articulated lorry transport, Euro 4, Total weight >32 t; EU+EFTA+UK
- kg_16: 4.13282e-7
  Mass in kg, for lubricating oil // lubricants at refinery // cn; Articulated lorry transport, Euro 4, Total weight >32 t; EU+EFTA+UK
- km_16: 1000
  Distance in km, for lubricating oil // lubricants at refinery // cn; Articulated lorry transport, Euro 4, Total weight >32 t; EU+EFTA+UK
- kg_km_16: 0.000413282; = kg_16*km_16
  Transport amount in km*km, for lubricating oil // lubricants at refinery // cn; Articulated lorry transport, Euro 4, Total weight >32 t; EU+EFTA+UK
- kg_17: 0.15
  Mass in kg, for tetrafluoroethylene // tetrafluoroethylene production // glo; Transoceanic ship, containers; GLO
- km_17: 18000
  Distance in km, for tetrafluoroethylene // tetrafluoroethylene production // glo; Transoceanic ship, containers; GLO
- kg_km_17: 2700; = kg_17*km_17
  Transport amount in km*km, for tetrafluoroethylene // tetrafluoroethylene production // glo; Transoceanic ship, containers; GLO
- kg_18: 0.75
  Mass in kg, for urea-formaldehyde resin // urea-formaldehyde resin production // eu+efta+uk; Transoceanic ship, containers; GLO
- km_18: 18000
  Distance in km, for urea-formaldehyde resin // urea-formaldehyde resin production // eu+efta+uk; Transoceanic ship, containers; GLO
- kg_km_18: 13500; = kg_18*km_18
  Transport amount in km*km, for urea-formaldehyde resin // urea-formaldehyde resin production // eu+efta+uk; Transoceanic ship, containers; GLO
- kg_19: 0.075
  Mass in kg, for non-ionic surfactant, ethyleneoxidederivate // non-ionic surfactant, ethyleneoxidederivate production // glo; Transoceanic ship, containers; GLO
- km_19: 18000
  Distance in km, for non-ionic surfactant, ethyleneoxidederivate // non-ionic surfactant, ethyleneoxidederivate production // glo; Transoceanic ship, containers; GLO
- kg_km_19: 1350; = kg_19*km_19
  Transport amount in km*km, for non-ionic surfactant, ethyleneoxidederivate // non-ionic surfactant, ethyleneoxidederivate production // glo; Transoceanic ship, containers; GLO
- kg_20: 0.0024
  Mass in kg, for alkylbenzene sulfonate // alkylbenzene sulfonate production // glo; Transoceanic ship, containers; GLO
- km_20: 18000
  Distance in km, for alkylbenzene sulfonate // alkylbenzene sulfonate production // glo; Transoceanic ship, containers; GLO
- kg_km_20: 43.2; = kg_20*km_20
  Transport amount in km*km, for alkylbenzene sulfonate // alkylbenzene sulfonate production // glo; Transoceanic ship, containers; GLO
- kg_21: 0.0045
  Mass in kg, for acetic acid // acetic acid production, product in 98% solution state // glo; Transoceanic ship, containers; GLO
- km_21: 18000
  Distance in km, for acetic acid // acetic acid production, product in 98% solution state // glo; Transoceanic ship, containers; GLO
- kg_km_21: 81; = kg_21*km_21
  Transport amount in km*km, for acetic acid // acetic acid production, product in 98% solution state // glo; Transoceanic ship, containers; GLO
- kg_22: 2.42116e-7
  Mass in kg, for lubricating oil // lubricants at refinery // rsa; Transoceanic ship, containers; GLO
- km_22: 18000
  Distance in km, for lubricating oil // lubricants at refinery // rsa; Transoceanic ship, containers; GLO
- kg_km_22: 0.00435808; = kg_22*km_22
  Transport amount in km*km, for lubricating oil // lubricants at refinery // rsa; Transoceanic ship, containers; GLO
- kg_23: 9.93295e-8
  Mass in kg, for lubricating oil // lubricants at refinery // raf; Transoceanic ship, containers; GLO
- km_23: 18000
  Distance in km, for lubricating oil // lubricants at refinery // raf; Transoceanic ship, containers; GLO
- kg_km_23: 0.00178793; = kg_23*km_23
  Transport amount in km*km, for lubricating oil // lubricants at refinery // raf; Transoceanic ship, containers; GLO
- kg_24: 2.60297e-6
  Mass in kg, for lubricating oil // lubricants at refinery // ras w/o cn; Transoceanic ship, containers; GLO
- km_24: 18000
  Distance in km, for lubricating oil // lubricants at refinery // ras w/o cn; Transoceanic ship, containers; GLO
- kg_km_24: 0.0468534; = kg_24*km_24
  Transport amount in km*km, for lubricating oil // lubricants at refinery // ras w/o cn; Transoceanic ship, containers; GLO
- kg_25: 2.15244e-6
  Mass in kg, for lubricating oil // lubricants at refinery // ru; Transoceanic ship, containers; GLO
- km_25: 18000
  Distance in km, for lubricating oil // lubricants at refinery // ru; Transoceanic ship, containers; GLO
- kg_km_25: 0.0387438; = kg_25*km_25
  Transport amount in km*km, for lubricating oil // lubricants at refinery // ru; Transoceanic ship, containers; GLO
- kg_26: 1.32587e-6
  Mass in kg, for lubricating oil // lubricants at refinery // eu+efta+uk; Transoceanic ship, containers; GLO
- km_26: 18000
  Distance in km, for lubricating oil // lubricants at refinery // eu+efta+uk; Transoceanic ship, containers; GLO
- kg_km_26: 0.0238657; = kg_26*km_26
  Transport amount in km*km, for lubricating oil // lubricants at refinery // eu+efta+uk; Transoceanic ship, containers; GLO
- kg_27: 2.03182e-6
  Mass in kg, for lubricating oil // lubricants at refinery // rna; Transoceanic ship, containers; GLO
- km_27: 18000
  Distance in km, for lubricating oil // lubricants at refinery // rna; Transoceanic ship, containers; GLO
- kg_km_27: 0.0365728; = kg_27*km_27
  Transport amount in km*km, for lubricating oil // lubricants at refinery // rna; Transoceanic ship, containers; GLO
- kg_28: 4.13282e-7
  Mass in kg, for lubricating oil // lubricants at refinery // cn; Transoceanic ship, containers; GLO
- km_28: 18000
  Distance in km, for lubricating oil // lubricants at refinery // cn; Transoceanic ship, containers; GLO
- kg_km_28: 0.00743907; = kg_28*km_28
  Transport amount in km*km, for lubricating oil // lubricants at refinery // cn; Transoceanic ship, containers; GLO

## Reference product
- treatment, water repellent, pfc // treatment, water repellent, pfc // glo: 1

## Inputs
- Electricity from Electricity grid mix 1kV-60kV - AU: 0.0067
- Electricity from Electricity grid mix 1kV-60kV - EU+EFTA+UK: 0.0986
- Electricity from Electricity grid mix 1kV-60kV - NZ: 0.0013
- Electricity from Electricity grid mix 1kV-60kV - RAF: 0.0216
- Electricity from Electricity grid mix 1kV-60kV - RNA: 0.1443
- Electricity from Electricity grid mix 1kV-60kV - RSA: 0.049
- Electricity from Electricity grid mix 1kV-60kV - RU: 0.0289
- Transport of silicone product by Freight train, diesel traction - EU+EFTA+UK: 33.0509; = kg_km_0
- Transport of silicone product by Freight train, electricity traction - EU+EFTA+UK: 9.98076; = kg_km_1
- Transport of silicone product by Freight train, average - EU+EFTA+UK: 0.273344; = kg_km_2
- Transport of silicone product by Articulated lorry transport, Total weight >32 t, mix Euro 0-5 - ROW w/o EU+EFTA: 67.56; = kg_km_3
- Transport of silicone product by Transoceanic ship, containers - GLO: 78.72; = kg_km_4
- Transport of tetrafluoroethylene // tetrafluoroethylene production // glo by Articulated lorry transport, Euro 4, Total weight >32 t - EU+EFTA+UK: 150; = kg_km_5
- Transport of urea-formaldehyde resin // urea-formaldehyde resin production // eu+efta+uk by Articulated lorry transport, Euro 4, Total weight >32 t - EU+EFTA+UK: 750; = kg_km_6
- Transport of non-ionic surfactant, ethyleneoxidederivate // non-ionic surfactant, ethyleneoxidederivate production // glo by Articulated lorry transport, Euro 4, Total weight >32 t - EU+EFTA+UK: 75; = kg_km_7
- Transport of alkylbenzene sulfonate // alkylbenzene sulfonate production // glo by Articulated lorry transport, Euro 4, Total weight >32 t - EU+EFTA+UK: 2.4; = kg_km_8
- Transport of acetic acid // acetic acid production, product in 98% solution state // glo by Articulated lorry transport, Euro 4, Total weight >32 t - EU+EFTA+UK: 4.5; = kg_km_9
- Transport of lubricating oil // lubricants at refinery // rsa by Articulated lorry transport, Euro 4, Total weight >32 t - EU+EFTA+UK: 0.000242116; = kg_km_10
- Transport of lubricating oil // lubricants at refinery // raf by Articulated lorry transport, Euro 4, Total weight >32 t - EU+EFTA+UK: 9.93295e-5; = kg_km_11
- Transport of lubricating oil // lubricants at refinery // ras w/o cn by Articulated lorry transport, Euro 4, Total weight >32 t - EU+EFTA+UK: 0.00260297; = kg_km_12
- Transport of lubricating oil // lubricants at refinery // ru by Articulated lorry transport, Euro 4, Total weight >32 t - EU+EFTA+UK: 0.00215244; = kg_km_13
- Transport of lubricating oil // lubricants at refinery // eu+efta+uk by Articulated lorry transport, Euro 4, Total weight >32 t - EU+EFTA+UK: 0.00132587; = kg_km_14
- Transport of lubricating oil // lubricants at refinery // rna by Articulated lorry transport, Euro 4, Total weight >32 t - EU+EFTA+UK: 0.00203182; = kg_km_15
- Transport of lubricating oil // lubricants at refinery // cn by Articulated lorry transport, Euro 4, Total weight >32 t - EU+EFTA+UK: 0.000413282; = kg_km_16
- Transport of tetrafluoroethylene // tetrafluoroethylene production // glo by Transoceanic ship, containers - GLO: 2700; = kg_km_17
- Transport of urea-formaldehyde resin // urea-formaldehyde resin production // eu+efta+uk by Transoceanic ship, containers - GLO: 13500; = kg_km_18
- Transport of non-ionic surfactant, ethyleneoxidederivate // non-ionic surfactant, ethyleneoxidederivate production // glo by Transoceanic ship, containers - GLO: 1350; = kg_km_19
- Transport of alkylbenzene sulfonate // alkylbenzene sulfonate production // glo by Transoceanic ship, containers - GLO: 43.2; = kg_km_20
- Transport of acetic acid // acetic acid production, product in 98% solution state // glo by Transoceanic ship, containers - GLO: 81; = kg_km_21
- Transport of lubricating oil // lubricants at refinery // rsa by Transoceanic ship, containers - GLO: 0.00435808; = kg_km_22
- Transport of lubricating oil // lubricants at refinery // raf by Transoceanic ship, containers - GLO: 0.00178793; = kg_km_23
- Transport of lubricating oil // lubricants at refinery // ras w/o cn by Transoceanic ship, containers - GLO: 0.0468534; = kg_km_24
- Transport of lubricating oil // lubricants at refinery // ru by Transoceanic ship, containers - GLO: 0.0387438; = kg_km_25
- Transport of lubricating oil // lubricants at refinery // eu+efta+uk by Transoceanic ship, containers - GLO: 0.0238657; = kg_km_26
- Transport of lubricating oil // lubricants at refinery // rna by Transoceanic ship, containers - GLO: 0.0365728; = kg_km_27
- Transport of lubricating oil // lubricants at refinery // cn by Transoceanic ship, containers - GLO: 0.00743907; = kg_km_28
- Electricity from Electricity grid mix 1kV-60kV - CN: 0.147879
- Electricity from Electricity grid mix 1kV-60kV - RAS w/o CN: 0.162021
- treatment, water repellent, pfc // treatment, water repellent, pfc // glo, blackbox: 1
- treatment, water repellent, pfc // treatment, water repellent, pfc // glo, elementary: 1

## Impact indicators
- Eutrophication marine: 0.0067267
- Ecotoxicity, freshwater: 52.9401
- Land use: 21.9993
- Water use: 4.97936
- Resource use, minerals and metals: 6.16698e-5
- Resource use, fossils: 91.9672
- Climate change: 25.2533
- Ozone depletion: 0.000524241
- Human toxicity, cancer: 4.58634e-8
- Human toxicity, non-cancer: 5.78468e-8
- EF-particulate Matter: 7.75894e-7
- Ionising radiation, human health: 0.137853
- Photochemical ozone formation - human health: 0.0183152
- Acidification: 0.0360286
- Eutrophication, terrestrial: 0.0858184
- Eutrophication, freshwater: 0.000437373

## Deviations from the LCI method principle
The background data uses:
- the \xe2\x80\x9cRecycled content cut-off\xe2\x80\x9d approach to allocate end-of-life by-products and secondary materials. This allocation is explained in the description of the recycled content system model (http://www.ecoinvent.org/database/system-models-in-ecoinvent-3/cut-off-system-model/allocation-cut-off-by-classification.html).
OR
- EF compliant data

## Deviations from the LCI method approaches
Background data:
- the \xe2\x80\x9cRecycled content cut-off\xe2\x80\x9d approach to allocate end-of-life by-products and secondary materials. This allocation is explained in the description of the recycled content system model (http://www.ecoinvent.org/database/system-models-in-ecoinvent-3/cut-off-system-model/allocation-cut-off-by-classification.html). The ecoinvent database mostly relies on “Allocation – market values” apart for few exceptions particularly in the energy sector. ecoinvent energy data is replaced with EF3.0 core data as per the EF guidelines version 2.0.
OR
- EF compliant data

## Modelling constants
All modelling constants follow the requirements listed in the Tender Specifications 070201/2020/SER/ENV.B1. Completeness: There are no intentional cut-offs in the inventory no matter how small their contribution to all the EF impact categories is. Eventual cut-offs are in compliance with the Guide for EF compliant data sets (JRC 2020), i.e. only if below the 3% cut-off rule. Water use: water use is modelled at country level using separate flows for water withdrawal, water release and water evaporation. Handling multi-functional processes: the following PEF multi- functionality decision hierarchy is applied for resolving all multi- functionality problems: (1) subdivision or system expansion; (2) allocation based on a relevant underlying physical relationship (substitution may apply here); (3) allocation based on some other relationship. Direct land use change: GHG emissions from direct LUC allocated to good/service for 20 years after the LUC occurs, with IPCC default values. Carbon storage and delayed emissions: credits associated with temporary (carbon) storage or delayed emissions up to 300 years are not be considered. Emissions off-setting: are not included. Capital goods (including infrastructures) and their End of life: they are included. System boundaries: system boundaries include all processes linked to the product supply chain (e.g. maintenance). Time period: emissions and removals are modelled as if released or removed at the beginning of the assessment method. Fossil and biogenic carbon emissions and removals: removals and emissions are modelled as follows: All GHG emissions from fossil fuels (including peat and limestone) are modelled consistently with the most updated ILCD list of elementary flows. The non-fossil (biogenic) carbon flows are modelled consistently with the most updated ILCD list of elementary flows.

## Cut-off and completeness
There are no intentional cut-offs in the inventory no matter how small their contribution to all the EF impact categories is. Eventual cut-offs are in compliance with the Guide for EF compliant data sets (JRC 2020), i.e. only if below the 3% cut-off rule. The dataset dry mass and water balance has been checked to ensure the inventory is complete. Capital goods (e.g. infrastructure) and their end-of-life are included.

## Data selection and combination
These datasets include, in both their foreground and background data, links to EF3.0 compliant data.
The relevant background data on energy, transport, and End of Life are from the LCDN data node (http://lcdn.thinkstep.com/Node/).
All other background data in the supply of this product for which no EF3.0 process was available are from ecoinvent v3.7 database (www.ecoinvent.org) or other data sources.

## Data treatment and extrapolations
Several data sources have been used to model the inventory.

## Review details
Internal reviews have been asked to review the plausibility of the unit process, LCIA scores, and DQRs. Internal reviewers have also been asked to review the data for EF compliancy. The consortium is therefore responsible for aspects such as compliancy with the ILCD format, including validation in Look@LCI, and nomenclature.
Internal reviwers have been asked to judge based on the process name, that the unit process models in a complete and representative way the process in the requested location. The review encompassed the plausability of:
- exchanges with nature (elementary flows) as well as exchanges such as product and waste flows.
- meta information (general comment, technology comment, system boundaries, allocation, cut-off rules, etc.). Reviewers were asked to judge if the provided information is enough to understand the content of the process.
- LCIA scores
- DQRs including precision, technology, time and geography. As well as the overall DQR.
External reviewers have been asked to provide their expertise in the field of interest. External reviewers have been asked to review the unit process, including eventual methodological choices, the LCIA scores (provided with contribution scores as well), and DQRs. External reviewers have been provided all the information in a tool developed by the consortium for the purpose of this project.
External reviewers have been asked to judge based on the process name, that the unit process models in a complete and representative way the process in the requested location. The review encompassed:
- Plausability and completeness of exchanges with nature (elementary flows) as well as exchanges such as product and waste flows.
- Review of meta information (general comment, technology comment, system boundaries, allocation, cut-off rules, etc.). Reviewers were asked to judge if the provided information is enough to understand the content of the process.
- Review of properties (biogenic carbon and water content).
- Review of allocation keys.
- Plausability of LCIA scores calculated by the consortium.
- Plausability of DQRs including precision, technology, time and geography. As well as the overall DQR.

## Data sources
- Background Data for Representative products and organisations. EF 3.0 compliant (data stock)
- UN Data (2018) Statistics Data for Lubricants Productions, http://data.un.org/Data.aspx?q=Lubricants&d=EDATA&f=cmID%3aLU, United Nations Statistics Division, Global
- Lebon (2021) Nonwoven Oven Machine, Catalog and Company Messages, Qingdao Lebon Industry Co., Ltd., China
- Chowdhury, Kawser Parveen (2018) Effect of Special Finishes on the Functional Properties of Cotton Fabrics, Journal of Textile Science and Technology, 4, 49-66, https://file.scirp.org/pdf/JTST_2018050815303131.pdf, Bangladesh
- Deguan (2018) Balloon Padder with Detwister and Squeezer for tubular fabric only, http://www.textilemachinery.com.cn/index.php?m=content&c=index&a=show&catid=59&id=82, Dezhou Deguan TextileMachinery Co.,Ltd., Shandong, China
- Finestart (2017) Open Width Compactor(Dryer, Stenter and Compactor 3in1), http://www.finestart.com.cn/index.php?m=content&c=index&a=show&catid=55&id=62, Shandong Finestart Imp.& Exp. Co.,Ltd., Shandong, China
- Asim Kumar Roy Choudhury (2017) Principles of Textile Finishing
- Expert interview (2021)
- Madhu, Amit (2012), Low wet pick-up techniques in textile finishing https://www.researchgate.net/publication/291935918_Low_wet_pick-up_techniques_in_textile_finishing

## Intended applications
Implementation of regular Product Environmental Footprint (PEF) studies and Organisation Environmental Footprint (OEF) studies exclusively under the specified Product groups and sectors as defined in the Product Environmental Footprint Category Rules (PEFCR) and Organisation Environmental Footprint Sectorial Rules (OEFSR) listed in http://ec.europa.eu/environment/eussd/smgp/PEFCR_OEFSR.htm
