# zipper tape and puller, plastic; production, at plant; 1kg of product, nylon zipper

Dataset: ILCD process, Partly terminated system
Geography: GLO
Reference year: 2021
Valid until: 2024
Classification: Systems / Textiles, furnitures and other interiors
LCI method principle: Attributional
LCI method approaches: Allocation - market value
Completeness: All relevant flows quantified
Project: Provision of process-based 3.0 Environmental Footprint-compliant life cycle inventory datasets - Others - contract number 070201/2020/840235/SER/ENV.B.1
Generated by: Metsims Sustainability Consulting
Owner: PRé Sustainability B.V.
Compliance: ILCD Data Network - Entry-level; Suggestions for updating the PEF method 2019; ISO 14040 Environmental Management – Life Cycle Assessment – Principles and Framework, 2006; ISO 14044:2006. Environmental Management – Life Cycle Assessment – Requirements and guidelines.; Environmental Footprint 3.1
Review: Dependent internal review by Avraam Symeonidis, Emilia Moreno Ruiz; Independent review panel by Madhuri Nigam
Data quality: Overall quality: Good; Time representativeness: Very good; Geographical representativeness: Fair; Technological representativeness: Good; Precision: Good; Methodological appropriateness and consistency: Not applicable
Amounts: no units in this file; such an amount is in the reference unit of its flow, which a separate flow dataset defines
copyright: true
licenseType: Free of charge for some user types or use types
accessRestrictions: Free of charge for all final users implementing a regular Product Environmental Footprint (PEF) studies and Organisation Environmental Footprint (OEF) studies exclusively under the specified Product groups and sectors as defined in the Product Environmental Footprint Category Rules (PEFCR) and Organisation Environmental Footprint Sectorial Rules (OEFSR) listed in http://ec.europa.eu/environment/eussd/smgp/PEFCR_OEFSR.htm and in accordance with the terms and conditions of the EULA (available at https://ecoinvent.lca-data.com/) exclusively until 31st December 2024. Any use of this dataset or any derivative data not within the specific context of one of the PEF/OEF projects or after the end of 2024 is not permitted.

## General comment
Notice: this data set supersedes the EF3.0-compliant version (see link under "preceding data set version" below calculated with the EF3.0). The life cycle inventory is not changed from the original EF3.0 data set. The LCIA results are calculated based on the EF3.1 methods which provide updated characterisation factors in the following impact categories: Climate Change, Ecotoxicity freshwater, Photochemical Ozone Formation, Acidification, Human Toxicity non-cancer, and Human Toxicity cancer. The review report and the data quality ratings refer to the original results. The data set has been updated by the European Commission on the basis of the original EF3.0 data set delivered by the data provider.Zipper is a commonly used device for binding the edges of an opening of fabric or other flexible material, such as on a garment or a bag.

A zipper consist of fabric and zipper part. Raw materials used zipper production, raw material waste and their processing were included the data set.

## Technology and included processes
This data covers zipper machine consumptions, production of nylon polymer which is used as raw material for the puller and binder and zipper tape produced from PET fabric. Binder teeth of zipper are produced from thick flament and sewed onto zipper tape.

Waste processing model was generated from global waste collection rate. Global waste collection rate is 65%. 75% of waste collected are delivered to recycle facility and, 25% of collected waste are delivered to landfill areas. Uncollected part of waste (35%) was assumed that it is dropped to landfill areas. From production facility to landfill transport was assumed as 70 km.

## Parameters
- R2_nylon: 0.00963661
  The amount of waste nylon produced is 0.012kg. The assumed percentage of losses of the recycling process is 0.1. R2 has been therefore calculated as the original amount of waste minues losses, i.e. 0.01kg. The value for A has been taken from the default values for the implementation of the CFF provided. The default value for plastics is 0.5. Being pre-consumer waste, Qsout/Qp is assumed to be 1. The E*v part of the formula is modelled as a negative input of the relevant virgin material.
- A_nylon: 0.5
  (same comment as for R2_nylon)
- Qsout/Qp_nylon: 1
  (same comment as for R2_nylon)
- CFF_nylon: 0.0107073; = R2_nylon*A_nylon
  (same comment as for R2_nylon)
- avoid_nylon: 0.00481831; = CFF_nylon*Qsout/Qp_nylon
  (same comment as for R2_nylon)
- R2_PET: 0.0110579
  The amount of waste PET produced is 0.012kg. The assumed percentage of losses of the recycling process is 0.1. R2 has been therefore calculated as the original amount of waste minues losses, i.e. 0.011kg. The value for A has been taken from the default values for the implementation of the CFF provided. The default value for plastics is 0.5. Being pre-consumer waste, Qsout/Qp is assumed to be 1. The E*v part of the formula is modelled as a negative input of the relevant virgin material.
- A_PET: 0.5
  (same comment as for R2_PET)
- Qsout/Qp_PET: 1
  (same comment as for R2_PET)
- CFF_PET: 0.0122866; = R2_PET*A_PET
  (same comment as for R2_PET)
- avoid_PET: 0.00552897; = CFF_PET*Qsout/Qp_PET
  (same comment as for R2_PET)
- kg_0: 0.366063
  Mass in kg, for nylon 6 // nylon 6 production, fossil fuel-based // glo; Articulated lorry transport, Euro 4, Total weight >32 t; EU+EFTA+UK
- km_0: 999.827
  Distance in km, for nylon 6 // nylon 6 production, fossil fuel-based // glo; Articulated lorry transport, Euro 4, Total weight >32 t; EU+EFTA+UK
- kg_km_0: 366; = kg_0*km_0
  Transport amount in km*km, for nylon 6 // nylon 6 production, fossil fuel-based // glo; Articulated lorry transport, Euro 4, Total weight >32 t; EU+EFTA+UK
- kg_1: 0.366063
  Mass in kg, for polyamide 6.6 // nylon 6.6 production, fossil fuel-based // glo; Articulated lorry transport, Euro 4, Total weight >32 t; EU+EFTA+UK
- km_1: 999.827
  Distance in km, for polyamide 6.6 // nylon 6.6 production, fossil fuel-based // glo; Articulated lorry transport, Euro 4, Total weight >32 t; EU+EFTA+UK
- kg_km_1: 366; = kg_1*km_1
  Transport amount in km*km, for polyamide 6.6 // nylon 6.6 production, fossil fuel-based // glo; Articulated lorry transport, Euro 4, Total weight >32 t; EU+EFTA+UK
- kg_2: 0.315041
  Mass in kg, for polyethylene terephthalate, mix // polyethylene terephthalate (pet) production, blend of bio- based and fossil // glo; Articulated lorry transport, Euro 4, Total weight >32 t; EU+EFTA+UK
- km_2: 999.871
  Distance in km, for polyethylene terephthalate, mix // polyethylene terephthalate (pet) production, blend of bio- based and fossil // glo; Articulated lorry transport, Euro 4, Total weight >32 t; EU+EFTA+UK
- kg_km_2: 315; = kg_2*km_2
  Transport amount in km*km, for polyethylene terephthalate, mix // polyethylene terephthalate (pet) production, blend of bio- based and fossil // glo; Articulated lorry transport, Euro 4, Total weight >32 t; EU+EFTA+UK
- kg_3: 0.0241731
  Mass in kg, for waste (unspecified) // landfill of plastic waste // eu+efta+uk; Articulated lorry transport, Euro 4, Total weight >32 t; EU+EFTA+UK
- km_3: 70
  Distance in km, for waste (unspecified) // landfill of plastic waste // eu+efta+uk; Articulated lorry transport, Euro 4, Total weight >32 t; EU+EFTA+UK
- kg_km_3: 1.69212; = kg_3*km_3
  Transport amount in km*km, for waste (unspecified) // landfill of plastic waste // eu+efta+uk; Articulated lorry transport, Euro 4, Total weight >32 t; EU+EFTA+UK
- kg_4: 0.366063
  Mass in kg, for nylon 6 // nylon 6 production, fossil fuel-based // glo; Transoceanic ship, containers; GLO
- km_4: 18002.4
  Distance in km, for nylon 6 // nylon 6 production, fossil fuel-based // glo; Transoceanic ship, containers; GLO
- kg_km_4: 6590; = kg_4*km_4
  Transport amount in km*km, for nylon 6 // nylon 6 production, fossil fuel-based // glo; Transoceanic ship, containers; GLO
- kg_5: 0.366063
  Mass in kg, for polyamide 6.6 // nylon 6.6 production, fossil fuel-based // glo; Transoceanic ship, containers; GLO
- km_5: 18002.4
  Distance in km, for polyamide 6.6 // nylon 6.6 production, fossil fuel-based // glo; Transoceanic ship, containers; GLO
- kg_km_5: 6590; = kg_5*km_5
  Transport amount in km*km, for polyamide 6.6 // nylon 6.6 production, fossil fuel-based // glo; Transoceanic ship, containers; GLO
- kg_6: 0.315041
  Mass in kg, for polyethylene terephthalate, mix // polyethylene terephthalate (pet) production, blend of bio- based and fossil // glo; Transoceanic ship, containers; GLO
- km_6: 17997.7
  Distance in km, for polyethylene terephthalate, mix // polyethylene terephthalate (pet) production, blend of bio- based and fossil // glo; Transoceanic ship, containers; GLO
- kg_km_6: 5670; = kg_6*km_6
  Transport amount in km*km, for polyethylene terephthalate, mix // polyethylene terephthalate (pet) production, blend of bio- based and fossil // glo; Transoceanic ship, containers; GLO

## Reference product
- zipper tape and puller // zipper tape and puller, plastic // glo: 1

## Inputs
- Electricity from Electricity grid mix 1kV-60kV - AU: 0.002
- Electricity from Electricity grid mix 1kV-60kV - EU+EFTA+UK: 0.0291
- Electricity from Electricity grid mix 1kV-60kV - NZ: 0.0004
- Electricity from Electricity grid mix 1kV-60kV - RAF: 0.0064
- Electricity from Electricity grid mix 1kV-60kV - RNA: 0.0425
- Electricity from Electricity grid mix 1kV-60kV - RSA: 0.0144
- Electricity from Electricity grid mix 1kV-60kV - RU: 0.0085
- Transport of nylon 6 // nylon 6 production, fossil fuel-based // glo by Articulated lorry transport, Euro 4, Total weight >32 t - EU+EFTA+UK: 366; = kg_km_0
- Transport of polyamide 6.6 // nylon 6.6 production, fossil fuel-based // glo by Articulated lorry transport, Euro 4, Total weight >32 t - EU+EFTA+UK: 366; = kg_km_1
- Transport of polyethylene terephthalate, mix // polyethylene terephthalate (pet) production, blend of bio- based and fossil // glo by Articulated lorry transport, Euro 4, Total weight >32 t - EU+EFTA+UK: 315; = kg_km_2
- Transport of waste (unspecified) // landfill of plastic waste // eu+efta+uk by Articulated lorry transport, Euro 4, Total weight >32 t - EU+EFTA+UK: 1.69212; = kg_km_3
- Transport of nylon 6 // nylon 6 production, fossil fuel-based // glo by Transoceanic ship, containers - GLO: 6590; = kg_km_4
- Transport of polyamide 6.6 // nylon 6.6 production, fossil fuel-based // glo by Transoceanic ship, containers - GLO: 6590; = kg_km_5
- Transport of polyethylene terephthalate, mix // polyethylene terephthalate (pet) production, blend of bio- based and fossil // glo by Transoceanic ship, containers - GLO: 5670; = kg_km_6
- polyethylene terephthalate, recycled, pre-consumer // polyethylene terephthalate (pet) production, recycled, semi-mechanical, pre-consumer // glo: 0.00552897; = CFF_PET
- Electricity from Electricity grid mix 1kV-60kV - CN: 0.0435667
- Electricity from Electricity grid mix 1kV-60kV - RAS w/o CN: 0.0477333
- nylon, recycled // nylon production, recycled, mechanical // glo: 0.00481831; = CFF_nylon
- zipper tape and puller // zipper tape and puller, plastic // glo, blackbox: 1
- zipper tape and puller // zipper tape and puller, plastic // glo, elementary: 1

## Outputs
- avoided product system, nylon from zipper tape or puller, plastic // avoided product system nylon in zipper tape or puller, plastic // glo: 0.00481831; = avoid_nylon
- avoided product system, pet from zipper tape or puller, plastic // avoided product system pet in zipper tape or puller, plastic // glo: 0.00552897; = avoid_PET

## Impact indicators
- Eutrophication marine: 0.0219351
- Ecotoxicity, freshwater: 117.957
- Land use: 15.3851
- Water use: 3.64737
- Resource use, minerals and metals: 0.000281502
- Resource use, fossils: 171.188
- Climate change: 11.6145
- Ozone depletion: 8.63437e-8
- Human toxicity, cancer: 7.74516e-9
- Human toxicity, non-cancer: 6.90733e-8
- EF-particulate Matter: 1.71046e-6
- Ionising radiation, human health: 0.431012
- Photochemical ozone formation - human health: 0.0434187
- Acidification: 0.0894346
- Eutrophication, terrestrial: 0.165007
- Eutrophication, freshwater: 0.000343939

## Deviations from the LCI method principle
The background data use the \xe2\x80\x9cRecycled content cut-off\xe2\x80\x9d approach to allocate end-of-life by-products and secondary materials. This allocation is explained in the description of the recycled content system model (http://www.ecoinvent.org/database/system-models-in-ecoinvent-3/cut-off-system-model/allocation-cut-off-by-classification.html).

## Deviations from the LCI method approaches
Allocation following the ISO 14044 hierarchy.

## Modelling constants
All modelling constants follow the requirements listed in the Tender Specifications ENV.B.1/SER/2016/0038vl. Completeness: All known environmental flows are included. All known resource uses and emissions are listed in the inventory. Water use: water use is modelled at country level using separate flows for water withdrawal, water release and water evaporation. Cut-off: All known environmental flows are included. All known resource uses and emissions are listed in the inventory. Handling multi-functional processes: the following PEF multi- functionality decision hierarchy is applied for resolving all multi- functionality problems: (1) subdivision or system expansion; (2) allocation based on a relevant underlying physical relationship (substitution may apply here); (3) allocation based on some other relationship. Direct land use change: GHG emissions from direct LUC allocated to good/service for 20 years after the LUC occurs, with IPCC default values. Carbon storage and delayed emissions: credits associated with temporary (carbon) storage or delayed emissions up to 300 years are not be considered. Emissions off-setting: are not included. Capital goods (including infrastructures) and their End of life: they are included. System boundaries: system boundaries include all processes linked to the product supply chain (e.g. maintenance). Time period: emissions and removals are modelled as if released or removed at the beginning of the assessment method. Fossil and biogenic carbon emissions and removals: removals and emissions are modelled as follows: All GHG emissions from fossil fuels (including peat and limestone) are modelled consistently with the most updated ILCD list of elementary flows. The non-fossil (biogenic) carbon flows are modelled consistently with the most updated ILCD list of elementary flows.

## Cut-off and completeness
All known environmental flows are included. All known resource uses and emissions are listed in the inventory. The dataset dry mass balance has been checked to ensure the inventory is complete. Capital goods (e.g. infrastructure) and their end-of-life are included.

## Data selection and combination
These datasets include, in both their foreground and background data, links to EF3.0 compliant data.
The relevant background data on energy, transport, and End of Life are from the LCDN data node (http://lcdn.thinkstep.com/Node/).
All other background data in the supply of this product for which no EF3.0 process was available are from ecoinvent v3.7 database (www.ecoinvent.org) or other data sources.

## Data treatment and extrapolations
Several data sources have been used to model the inventory.

## Review details
Internal reviews have been asked to review the plausibility of the unit process, LCIA scores, and DQRs. Internal reviewers have also been asked to review the data for EF compliancy. The consortium is therefore responsible for aspects such as compliancy with the ILCD format, including validation in Look@LCI, and nomenclature.
Internal reviwers have been asked to judge based on the process name, that the unit process models in a complete and representative way the process in the requested location. The review encompassed the plausability of:
- exchanges with nature (elementary flows) as well as exchanges such as product and waste flows.
- meta information (general comment, technology comment, system boundaries, allocation, cut-off rules, etc.). Reviewers were asked to judge if the provided information is enough to understand the content of the process.
- LCIA scores
- DQRs including precision, technology, time and geography. As well as the overall DQR.
External reviewers have been asked to provide their expertise in the field of interest. External reviewers have been asked to review the unit process, including eventual methodological choices, the LCIA scores (provided with contribution scores as well), and DQRs. External reviewers have been provided all the information in a tool developed by the consortium for the purpose of this project.
External reviewers have been asked to judge based on the process name, that the unit process models in a complete and representative way the process in the requested location. The review encompassed:
- Plausability and completeness of exchanges with nature (elementary flows) as well as exchanges such as product and waste flows.
- Review of meta information (general comment, technology comment, system boundaries, allocation, cut-off rules, etc.). Reviewers were asked to judge if the provided information is enough to understand the content of the process.
- Review of properties (biogenic carbon and water content).
- Review of allocation keys.
- Plausability of LCIA scores calculated by the consortium.
- Plausability of DQRs including precision, technology, time and geography. As well as the overall DQR.

## Data sources
- Background Data for Representative products and organisations. EF 3.0 compliant (data stock)
- Åslund Hedman, E. (2018). Comparative Life Cycle Assessment of Jeans: A case study performed at Nudie Jeans.
- Vignesh, K. S., Rajadesingu, S., & Arunachalam, K. D. (2021). Challenges, issues, and problems with zero-waste tools. In Concepts of Advanced Zero Waste Tools (pp. 69-90). Elsevier.
- Rosato, D. V. (1998). Blown film. In Extruding Plastics (pp. 305-348). Springer, Boston, MA.
- Altun, S. (2012). Prediction of textile waste profile and recycling opportunities in Turk. Fibres & Textiles in Eastern Europe.
- Y-Teeth Zipper Machine, https://www.alibaba.com/product-detail/Y-Teeth-Zipper-Machine_60316671113.html?spm=a2700.galleryofferlist.normal_offer.d_title.76e32864CifwY9, Access Date: 22.06.2021
- CE QLQ zipper Slider mounting machine Factory Price Zipper slider Making Machine, https://www.alibaba.com/product-detail/Zipper-Machine-CE-QLQ-Zipper-Slider_1600245455795.html?spm=a2700.galleryofferlist.normal_offer.d_title.76e32864CifwY9&s=p, Access Date: 22.06.2021
- Automatic Metal Zipper Fasteners Making Machine, https://www.alibaba.com/product-detail/Zipper-Machine-Zipper-Machine-Automatic-Metal_60694297951.html?spm=a2700.galleryofferlist.normal_offer.d_title.76e32864CifwY9&s=p, Access Date: 22.06.2021

## Intended applications
Implementation of regular Product Environmental Footprint (PEF) studies and Organisation Environmental Footprint (OEF) studies exclusively under the specified Product groups and sectors as defined in the Product Environmental Footprint Category Rules (PEFCR) and Organisation Environmental Footprint Sectorial Rules (OEFSR) listed in http://ec.europa.eu/environment/eussd/smgp/PEFCR_OEFSR.htm
