# bamboo fibre, elementary; technology mix; production mix, at farm

Dataset: ILCD process, Unit process, single operation
Geography: RAS
Reference year: 2016
Valid until: 2024
Classification: Other Services / Other services
LCI method principle: Attributional
LCI method approaches: Allocation - market value
Completeness: All relevant flows quantified
Project: Provision of process-based 3.0 Environmental Footprint-compliant life cycle inventory datasets - Renewable materials - contract number 070201/2020/840085/SER/ENV.B.1
Generated by: Blonk Sustainability Tools
Owner: Blonk Sustainability Tools
Compliance: Environmental Footprint non-primary supporting data set; Environmental Footprint 3.1
Amounts: no units in this file; such an amount is in the reference unit of its flow, which a separate flow dataset defines
copyright: true
licenseType: Free of charge for some user types or use types
accessRestrictions: Free of charge for all final users implementing a regular Product Environmental Footprint (PEF) studies and Organisation Environmental Footprint (OEF) studies exclusively under the specified Product groups and sectors as defined in the Product Environmental Footprint Category Rules (PEFCR) and Organisation Environmental Footprint Sectorial Rules (OEFSR) listed in http://ec.europa.eu/environment/eussd/smgp/PEFCR_OEFSR.htm and in accordance with the terms and conditions of the EULA (available at https://ecoinvent.lca-data.com/) exclusively until 31st December 2024. Any use of this dataset or any derivative data not within the specific context of one of the PEF/OEF projects or after the end of 2024 is not permitted.

## General comment
Notice: this data set supersedes the EF3.0-compliant version (see link under "preceding data set version" below calculated with the EF3.0). The life cycle inventory is not changed from the original EF3.0 data set. The LCIA results are calculated based on the EF3.1 methods which provide updated characterisation factors in the following impact categories: Climate Change, Ecotoxicity freshwater, Photochemical Ozone Formation, Acidification, Human Toxicity non-cancer, and Human Toxicity cancer. The review report and the data quality ratings refer to the original results. The data set has been updated by the European Commission on the basis of the original EF3.0 data set delivered by the data provider.This sub-process has limited documentation only. For all detailed documentation of the full model to which this data set belongs (such as DQRs, review reports and other technical documentation), please see this process: bamboo fibre - RAS []

## Technology and included processes
This process takes into account only the cultivation and the processing of bamboo using Alkali extraction process based on a viscose fibre processing proxy. This model is for bamboo cultivated in Asia (India, and China with respective percentages of 72 and 28%) India is a proxy for South and Southeast Asia and China is a proxy for East Asia

## Reference product
- bamboo fibre // bamboo fibre // ras, elementary: 1

## Inputs
- river water, Renewable material resources from water: 0.00153126
- river water, Renewable material resources from water [CN]: 0.0531638
- river water, Renewable material resources from water [ID]: 0.00816844
- river water, Renewable material resources from water [IN]: 0.0218037
- river water, Renewable material resources from water [JP]: 0.0157775
- river water, Renewable material resources from water [KR]: 0.00587588
- river water, Renewable material resources from water [KZ]: 0.00127178
- river water, Renewable material resources from water [MY]: 0.00229766
- river water, Renewable material resources from water [PH]: 0.00222538
- river water, Renewable material resources from water [SG]: 0.00147725
- river water, Renewable material resources from water [TH]: 0.00339322
- river water, Renewable material resources from water [TR]: 0.00574641
- river water, Renewable material resources from water [VN]: 0.00168177
- river water, Renewable material resources from water [AE]: 0.00199714
- river water, Renewable material resources from water [AF]: 0.00020509
- river water, Renewable material resources from water [AM]: 9.24798e-5
- river water, Renewable material resources from water [AZ]: 0.000468247
- river water, Renewable material resources from water [BD]: 0.00165295
- river water, Renewable material resources from water [BH]: 0.000210131
- river water, Renewable material resources from water [BN]: 9.69307e-5
- river water, Renewable material resources from water [BT]: 2.03925e-5
- river water, Renewable material resources from water [CY]: 9.33359e-5
- river water, Renewable material resources from water [GE]: 0.000131044
- river water, Renewable material resources from water [IL]: 0.000904313
- river water, Renewable material resources from water [IQ]: 0.00136144
- river water, Renewable material resources from water [IR]: 0.00384845
- river water, Renewable material resources from water [JO]: 0.000266319
- river water, Renewable material resources from water [KG]: 7.72786e-5
- river water, Renewable material resources from water [KH]: 0.000157231
- river water, Renewable material resources from water [KW]: 0.000740412
- river water, Renewable material resources from water [LA]: 0.000120247
- river water, Renewable material resources from water [LB]: 0.000293276
- river water, Renewable material resources from water [LK]: 0.000722446
- river water, Renewable material resources from water [MM]: 0.000685073
- river water, Renewable material resources from water [MN]: 9.58147e-5
- river water, Renewable material resources from water [NP]: 0.000216173
- river water, Renewable material resources from water [OM]: 0.000459412
- river water, Renewable material resources from water [PK]: 0.00266877
- river water, Renewable material resources from water [PS]: 7.14799e-5
- river water, Renewable material resources from water [QA]: 0.000860181
- river water, Renewable material resources from water [SA]: 0.00507169
- river water, Renewable material resources from water [TJ]: 7.65864e-5
- river water, Renewable material resources from water [TL]: 9.82203e-6
- river water, Renewable material resources from water [TM]: 0.000222128
- river water, Renewable material resources from water [UZ]: 0.000591911
- river water, Renewable material resources from water [YE]: 0.00029612

## Outputs
- Water, Emissions to air, unspecified: 0.0305856
- Water, Emissions to water, unspecified: 0.00121735
- Water, Emissions to water, unspecified [AE]: 0.00158773
- Water, Emissions to water, unspecified [AF]: 0.000163046
- Water, Emissions to water, unspecified [AM]: 7.35214e-5
- Water, Emissions to water, unspecified [AZ]: 0.000372256
- Water, Emissions to water, unspecified [BD]: 0.00131409
- Water, Emissions to water, unspecified [BH]: 0.000167054
- Water, Emissions to water, unspecified [BN]: 7.70599e-5
- Water, Emissions to water, unspecified [BT]: 1.6212e-5
- Water, Emissions to water, unspecified [CN]: 0.0422652
- Water, Emissions to water, unspecified [CY]: 7.42021e-5
- Water, Emissions to water, unspecified [GE]: 0.00010418
- Water, Emissions to water, unspecified [ID]: 0.00649391
- Water, Emissions to water, unspecified [IL]: 0.000718929
- Water, Emissions to water, unspecified [IN]: 0.0173339
- Water, Emissions to water, unspecified [IQ]: 0.00108235
- Water, Emissions to water, unspecified [IR]: 0.00305952
- Water, Emissions to water, unspecified [JO]: 0.000211723
- Water, Emissions to water, unspecified [JP]: 0.0125431
- Water, Emissions to water, unspecified [KG]: 6.14365e-5
- Water, Emissions to water, unspecified [KH]: 0.000124999
- Water, Emissions to water, unspecified [KR]: 0.00467133
- Water, Emissions to water, unspecified [KW]: 0.000588628
- Water, Emissions to water, unspecified [KZ]: 0.00101107
- Water, Emissions to water, unspecified [LA]: 9.55968e-5
- Water, Emissions to water, unspecified [LB]: 0.000233155
- Water, Emissions to water, unspecified [LK]: 0.000574345
- Water, Emissions to water, unspecified [MM]: 0.000544633
- Water, Emissions to water, unspecified [MN]: 7.61727e-5
- Water, Emissions to water, unspecified [MY]: 0.00182664
- Water, Emissions to water, unspecified [NP]: 0.000171858
- Water, Emissions to water, unspecified [OM]: 0.000365233
- Water, Emissions to water, unspecified [PH]: 0.00176918
- Water, Emissions to water, unspecified [PK]: 0.00212167
- Water, Emissions to water, unspecified [PS]: 5.68265e-5
- Water, Emissions to water, unspecified [QA]: 0.000683844
- Water, Emissions to water, unspecified [SA]: 0.00403199
- Water, Emissions to water, unspecified [SG]: 0.00117441
- Water, Emissions to water, unspecified [TH]: 0.00269761
- Water, Emissions to water, unspecified [TJ]: 6.08862e-5
- Water, Emissions to water, unspecified [TL]: 7.80851e-6
- Water, Emissions to water, unspecified [TM]: 0.000176592
- Water, Emissions to water, unspecified [TR]: 0.0045684
- Water, Emissions to water, unspecified [UZ]: 0.00047057
- Water, Emissions to water, unspecified [VN]: 0.00133701
- Water, Emissions to water, unspecified [YE]: 0.000235415

## Impact indicators
- Water use: 0.961859
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
## Deviations from the LCI method principle
The background data uses: the Recycled content cut-off approach to allocate end-of-life by-products and secondary materials. This allocation is explained in the description of the recycled content system model (http://www.ecoinvent.org/database/system-models-in-ecoinvent-3/cut-off-system-model/allocation-cut-off-by-classification.html) or EF compliant data

## Deviations from the LCI method approaches
Background data:
- the Recycled content cut-off approach to allocate end-of-life by-products and secondary materials. This allocation is explained in the description of the recycled content system model (http://www.ecoinvent.org/database/system-models-in-ecoinvent-3/cut-off-system-model/allocation-cut-off-by-classification.html). The ecoinvent database mostly relies on “Allocation – market values” apart for few exceptions particularly in the energy sector. ecoinvent energy data is replaced with EF3.0 core data as per the EF guidelines version 2.0.
OR
- EF compliant data

## Modelling constants
All modelling constants follow the requirements listed in the Tender Specifications 070201/2020/SER/ENV.B1. Completeness: There are no intentional cut-offs in the inventory no matter how small their contribution to all the EF impact categories is. Eventual cut-offs are in compliance with the Guide for EF compliant data sets (JRC 2020), i.e. only if below the 3% cut-off rule. Water use: water use is modelled at country level using separate flows for water withdrawal, water release and water evaporation. Handling multi-functional processes: the following PEF multi- functionality decision hierarchy is applied for resolving all multi- functionality problems: (1) subdivision or system expansion; (2) allocation based on a relevant underlying physical relationship (substitution may apply here); (3) allocation based on some other relationship. Direct land use change: GHG emissions from direct LUC allocated to good/service for 20 years after the LUC occurs, with IPCC default values. Carbon storage and delayed emissions: credits associated with temporary (carbon) storage or delayed emissions up to 300 years are not be considered. Emissions off-setting: are not included. Capital goods (including infrastructures) and their End of life: they are included. System boundaries: system boundaries include all processes linked to the product supply chain (e.g. maintenance). Time period: emissions and removals are modelled as if released or removed at the beginning of the assessment method. Fossil and biogenic carbon emissions and removals: removals and emissions are modelled as follows: All GHG emissions from fossil fuels (including peat and limestone) are modelled consistently with the most updated ILCD list of elementary flows. The non-fossil (biogenic) carbon flows are modelled consistently with the most updated ILCD list of elementary flows.

## Cut-off and completeness
There are no intentional cut-offs in the inventory no matter how small their contribution to all the EF impact categories is. Eventual cut-offs are in compliance with the Guide for EF compliant data sets (JRC 2020), i.e. only if below the 3% cut-off rule. The dataset dry mass and water balance has been checked to ensure the inventory is complete. Capital goods (e.g. infrastructure) and their end-of-life are included.

## Data selection and combination
These datasets include, in both their foreground and background data, links to EF3.0 compliant data.
The relevant background data on energy, transport, and End of Life are from the LCDN data node (http://lcdn.thinkstep.com/Node/).
All other background data in the supply of this product for which no EF3.0 process was available are from ecoinvent v3.7 database (www.ecoinvent.org) or other data sources.

## Data treatment and extrapolations
Several data sources have been used to model the inventory.

## Use advice
This data set is a supporting sub-data set and must be used exclusively as sub-data set of its corresponding level-1 partly disaggregated data set (see “General comment” field for exact name and UUID).

## Data sources
- Background Data for Representative products and organisations. EF 3.0 compliant (data stock)
- JaingHua X., XiaoSheng Y., (2001). Medium and large scale Bamboo. International network for bamboo and rattan.China
- Marinussen M., Kernebeek H ., van Broekema R., Groen E., Kool A., van Zeist WJ., Dolman M., Blonk, H., (2012). LCI data for the calculation tool Feedprint for greenhouse gas emissions of feed production and utilization: Cultivation oil seeds and oil fruits. Blonk Consultants and WUR Livestock Research.
- Mekonnen M., Hoekstra A. (2010). The green, blue and grey water footprint of crops and derived crop products - Volume 1: Main Report volume 1.(41)
- Blonk Consultants., (2019). Agrifootprint database v5.0
- Blonk Consultants. (2018). The Direct Land Use Change Assessment Tool v.2018
- IPCC., (2006). IPCC Guidelines for National Greenhouse Gas Inventories. http://www.ipcc-nggip.iges.or.jp/public/2006gl/index.html
- European Environment Agency., (2013). EMEP/EEA Air Pollutant Emission Inventory Guidebook 2013. 12. http://www.eea.europa.eu/publications/emep-eea-guidebook-2013
- PRé consultants., Radboud University Nijmegen., Leiden University ., RIVM., (2013). ReCiPe 1.08: Characterisation factors spreadsheet.
- Nemecek T., Schnetzer J., (2012). Methods of assessment of direct field emissions for LCIs of agricultural production systems.
- Banik RL., (2016). Introduction to South Asian Bamboos (pp. 3–14). https://doi.org/10.1007/978-981-10-0569-5_1
- FEA., (2004) Fibre production. Lenzing AG, Austria.

## Intended applications
Implementation of regular Product Environmental Footprint (PEF) studies and Organisation Environmental Footprint (OEF) studies exclusively under the specified Product groups and sectors as defined in the Product Environmental Footprint Category Rules (PEFCR) and Organisation Environmental Footprint Sectorial Rules (OEFSR) listed in http://ec.europa.eu/environment/eussd/smgp/PEFCR_OEFSR.htm
