# desizing, natural fibers; technology mix; production mix, at plant; service (raw materials excluded)

Dataset: ILCD process, Partly terminated system
Geography: GLO
Reference year: 2021
Valid until: 2024
Classification: Systems / Textiles, furnitures and other interiors
LCI method principle: Attributional
LCI method approaches: Allocation - market value
Completeness: All relevant flows quantified
Project: Provision of process-based 3.0 Environmental Footprint-compliant life cycle inventory datasets - Apparel 1 - contract number 070201/2020/840291/SER/ENV.B.1
Generated by: Life Cycle Indonesia
Owner: PRé Sustainability B.V.
Compliance: ILCD Data Network - Entry-level; Suggestions for updating the PEF method 2019; ISO 14040 Environmental Management – Life Cycle Assessment – Principles and Framework, 2006; ISO 14044:2006. Environmental Management – Life Cycle Assessment – Requirements and guidelines.; Environmental Footprint 3.1
Review: Dependent internal review by Avraam Symeonidis, Emilia Moreno Ruiz; Independent review panel by Fábio Valebona
Data quality: Overall quality: Good; Time representativeness: Very good; Geographical representativeness: Good; Technological representativeness: Very good; Precision: Good; Methodological appropriateness and consistency: Not applicable
Amounts: no units in this file; such an amount is in the reference unit of its flow, which a separate flow dataset defines
copyright: true
licenseType: Free of charge for some user types or use types
accessRestrictions: Free of charge for all final users implementing a regular Product Environmental Footprint (PEF) studies and Organisation Environmental Footprint (OEF) studies exclusively under the specified Product groups and sectors as defined in the Product Environmental Footprint Category Rules (PEFCR) and Organisation Environmental Footprint Sectorial Rules (OEFSR) listed in http://ec.europa.eu/environment/eussd/smgp/PEFCR_OEFSR.htm and in accordance with the terms and conditions of the EULA (available at https://ecoinvent.lca-data.com/) exclusively until 31st December 2024. Any use of this dataset or any derivative data not within the specific context of one of the PEF/OEF projects or after the end of 2024 is not permitted.

## General comment
Notice: this data set supersedes the EF3.0-compliant version (see link under "preceding data set version" below calculated with the EF3.0). The life cycle inventory is not changed from the original EF3.0 data set. The LCIA results are calculated based on the EF3.1 methods which provide updated characterisation factors in the following impact categories: Climate Change, Ecotoxicity freshwater, Photochemical Ozone Formation, Acidification, Human Toxicity non-cancer, and Human Toxicity cancer. The review report and the data quality ratings refer to the original results. The data set has been updated by the European Commission on the basis of the original EF3.0 data set delivered by the data provider.Desizing is one of the textiles pre-treatment processes to prepare the material for dyeing, printing, or finishing. Desizing is the process of removing sizing products to ensure the success of scour boiling and bleaching and production of faultless dyeing. For an effective desizing operation it is necessary to find out sizing products used. Sizing products are generally natural polymers (e.g., Starch) as is or modified to improve certain of its properties with respect to the yarn to be sized (e.g., Carboxymethyl starch (CMS)) as well as synthetic polymers and co-polymers, (e.g., Polyvinyl Alcohol (PVA), Polyacrylate (PAC)) etc. Any one or a mixture of two or more sizing products are used along with waxes, fats and lubricating agents. On natural fibers, the desizing can be done for cotton and linen material.

Kolanjikombil, Mathews. 2019. Handbook of Textile Processors Series Pretreatment of Textile Substrates. New Delhi: Woodhead Publishing India, pp 20

## Technology and included processes
There are various methods of desizing including enzymatic desizing, oxidative desizing, acid steeping, rot steeping (use of bacteria), desizing with hot caustic soda treatment, and hot washing with detergents. The most widely practice for natural fiber is the enzymatic desizing. Desizing process can be executed in a discontinuous, half-continuous or continuous process. (Kolanjikombil, 2019)

The process of desizing the natural fiber textiles treated with the starch based sizes, using the enzymes can be divided into three stages: impregnation, dwelling and after wash. Enzymes exercise a selective action over the substrate and convert starch into soluble state. Amylolatic enzymes are capable of breaking starch sizes completely without attacking the cellulose. Bacterial amylases are more stable than other amylases. In a typical enzyme desizing, the grey fabric is first treated with a non-ionic wetting agent at high temperature which is known as pre-wash. In the enzymatic scouring operation, lipase and protease enzymes are used. Stock solution of 18% weight by volume solution of sodium chloride is used to reduce the activity to an appropriate level. But at high temperatures, certain metal ions are detrimental to the enzymes, including Cu, Cd, Zn, Hg and oxidising. (Kolanjikombil, 2019)

The input raw materials are not included in the model. Energy uses, infrastructure water and chemicals are included. There is no direct emission to soil, but there is direct emission to water from this process such as BOD, COD, TOC, ......... etc. In the model, the cotton natural fibers with natural polymers (starch) sizing product are pre-treated by an enzymatic desizing method using the average value of 4 types of machines (jet, winch, jigger, and padder). The consumption of lubricating oil using an oven bonding machines as a proxy.

Kolanjikombil, Mathews. 2019. Handbook of Textile Processors Series Pretreatment of Textile Substrates. New Delhi: Woodhead Publishing India, pp 20, pp 43-46

## Parameters
- kg_0: 1.49568e-6
  Mass in kg, for lubricating oil // lubricants at refinery // eu+efta+uk; Articulated lorry transport, Euro 4, Total weight >32 t; EU+EFTA+UK
- km_0: 1002.89
  Distance in km, for lubricating oil // lubricants at refinery // eu+efta+uk; Articulated lorry transport, Euro 4, Total weight >32 t; EU+EFTA+UK
- kg_km_0: 0.0015; = kg_0*km_0
  Transport amount in km*km, for lubricating oil // lubricants at refinery // eu+efta+uk; Articulated lorry transport, Euro 4, Total weight >32 t; EU+EFTA+UK
- kg_1: 2.73125e-7
  Mass in kg, for lubricating oil // lubricants at refinery // rsa; Articulated lorry transport, Euro 4, Total weight >32 t; EU+EFTA+UK
- km_1: 1000
  Distance in km, for lubricating oil // lubricants at refinery // rsa; Articulated lorry transport, Euro 4, Total weight >32 t; EU+EFTA+UK
- kg_km_1: 0.000273125; = kg_1*km_1
  Transport amount in km*km, for lubricating oil // lubricants at refinery // rsa; Articulated lorry transport, Euro 4, Total weight >32 t; EU+EFTA+UK
- kg_2: 1.12051e-7
  Mass in kg, for lubricating oil // lubricants at refinery // raf; Articulated lorry transport, Euro 4, Total weight >32 t; EU+EFTA+UK
- km_2: 1000
  Distance in km, for lubricating oil // lubricants at refinery // raf; Articulated lorry transport, Euro 4, Total weight >32 t; EU+EFTA+UK
- kg_km_2: 0.000112051; = kg_2*km_2
  Transport amount in km*km, for lubricating oil // lubricants at refinery // raf; Articulated lorry transport, Euro 4, Total weight >32 t; EU+EFTA+UK
- kg_3: 2.93634e-6
  Mass in kg, for lubricating oil // lubricants at refinery // ras w/o cn; Articulated lorry transport, Euro 4, Total weight >32 t; EU+EFTA+UK
- km_3: 1000
  Distance in km, for lubricating oil // lubricants at refinery // ras w/o cn; Articulated lorry transport, Euro 4, Total weight >32 t; EU+EFTA+UK
- kg_km_3: 0.00293634; = kg_3*km_3
  Transport amount in km*km, for lubricating oil // lubricants at refinery // ras w/o cn; Articulated lorry transport, Euro 4, Total weight >32 t; EU+EFTA+UK
- kg_4: 2.42811e-6
  Mass in kg, for lubricating oil // lubricants at refinery // ru; Articulated lorry transport, Euro 4, Total weight >32 t; EU+EFTA+UK
- km_4: 1000
  Distance in km, for lubricating oil // lubricants at refinery // ru; Articulated lorry transport, Euro 4, Total weight >32 t; EU+EFTA+UK
- kg_km_4: 0.00242811; = kg_4*km_4
  Transport amount in km*km, for lubricating oil // lubricants at refinery // ru; Articulated lorry transport, Euro 4, Total weight >32 t; EU+EFTA+UK
- kg_5: 2.29205e-6
  Mass in kg, for lubricating oil // lubricants at refinery // rna; Articulated lorry transport, Euro 4, Total weight >32 t; EU+EFTA+UK
- km_5: 1000
  Distance in km, for lubricating oil // lubricants at refinery // rna; Articulated lorry transport, Euro 4, Total weight >32 t; EU+EFTA+UK
- kg_km_5: 0.00229205; = kg_5*km_5
  Transport amount in km*km, for lubricating oil // lubricants at refinery // rna; Articulated lorry transport, Euro 4, Total weight >32 t; EU+EFTA+UK
- kg_6: 4.66213e-7
  Mass in kg, for lubricating oil // lubricants at refinery // cn; Articulated lorry transport, Euro 4, Total weight >32 t; EU+EFTA+UK
- km_6: 1000
  Distance in km, for lubricating oil // lubricants at refinery // cn; Articulated lorry transport, Euro 4, Total weight >32 t; EU+EFTA+UK
- kg_km_6: 0.000466213; = kg_6*km_6
  Transport amount in km*km, for lubricating oil // lubricants at refinery // cn; Articulated lorry transport, Euro 4, Total weight >32 t; EU+EFTA+UK
- kg_7: 0.06
  Mass in kg, for enzymes // enzymes production // eu+efta+uk; Articulated lorry transport, Euro 4, Total weight >32 t; EU+EFTA+UK
- km_7: 1000
  Distance in km, for enzymes // enzymes production // eu+efta+uk; Articulated lorry transport, Euro 4, Total weight >32 t; EU+EFTA+UK
- kg_km_7: 60; = kg_7*km_7
  Transport amount in km*km, for enzymes // enzymes production // eu+efta+uk; Articulated lorry transport, Euro 4, Total weight >32 t; EU+EFTA+UK
- kg_8: 0.002
  Mass in kg, for antifoaming agent, ethoxylate fatty alcohols // antifoaming agent, ethoxylate fatty alcohols production // glo; Articulated lorry transport, Euro 4, Total weight >32 t; EU+EFTA+UK
- km_8: 1000
  Distance in km, for antifoaming agent, ethoxylate fatty alcohols // antifoaming agent, ethoxylate fatty alcohols production // glo; Articulated lorry transport, Euro 4, Total weight >32 t; EU+EFTA+UK
- kg_km_8: 2; = kg_8*km_8
  Transport amount in km*km, for antifoaming agent, ethoxylate fatty alcohols // antifoaming agent, ethoxylate fatty alcohols production // glo; Articulated lorry transport, Euro 4, Total weight >32 t; EU+EFTA+UK
- kg_9: 0.002
  Mass in kg, for antifoaming agent, silicone emulsion // antifoaming agent, silicone emulsion production // glo; Articulated lorry transport, Euro 4, Total weight >32 t; EU+EFTA+UK
- km_9: 1000
  Distance in km, for antifoaming agent, silicone emulsion // antifoaming agent, silicone emulsion production // glo; Articulated lorry transport, Euro 4, Total weight >32 t; EU+EFTA+UK
- kg_km_9: 2; = kg_9*km_9
  Transport amount in km*km, for antifoaming agent, silicone emulsion // antifoaming agent, silicone emulsion production // glo; Articulated lorry transport, Euro 4, Total weight >32 t; EU+EFTA+UK
- kg_10: 0.04
  Mass in kg, for ethoxylated alcohol (ae7), petrochemical // ethoxylated alcohol (ae7) production, petrochemical // eu+efta+uk; Articulated lorry transport, Euro 4, Total weight >32 t; EU+EFTA+UK
- km_10: 1000
  Distance in km, for ethoxylated alcohol (ae7), petrochemical // ethoxylated alcohol (ae7) production, petrochemical // eu+efta+uk; Articulated lorry transport, Euro 4, Total weight >32 t; EU+EFTA+UK
- kg_km_10: 40; = kg_10*km_10
  Transport amount in km*km, for ethoxylated alcohol (ae7), petrochemical // ethoxylated alcohol (ae7) production, petrochemical // eu+efta+uk; Articulated lorry transport, Euro 4, Total weight >32 t; EU+EFTA+UK
- kg_11: 0.06
  Mass in kg, for sodium chloride powder // sodium chloride powder production // eu+efta+uk; Articulated lorry transport, Euro 4, Total weight >32 t; EU+EFTA+UK
- km_11: 1000
  Distance in km, for sodium chloride powder // sodium chloride powder production // eu+efta+uk; Articulated lorry transport, Euro 4, Total weight >32 t; EU+EFTA+UK
- kg_km_11: 60; = kg_11*km_11
  Transport amount in km*km, for sodium chloride powder // sodium chloride powder production // eu+efta+uk; Articulated lorry transport, Euro 4, Total weight >32 t; EU+EFTA+UK
- kg_12: 2.73125e-7
  Mass in kg, for lubricating oil // lubricants at refinery // rsa; Transoceanic ship, containers; GLO
- km_12: 18000
  Distance in km, for lubricating oil // lubricants at refinery // rsa; Transoceanic ship, containers; GLO
- kg_km_12: 0.00491625; = kg_12*km_12
  Transport amount in km*km, for lubricating oil // lubricants at refinery // rsa; Transoceanic ship, containers; GLO
- kg_13: 1.12051e-7
  Mass in kg, for lubricating oil // lubricants at refinery // raf; Transoceanic ship, containers; GLO
- km_13: 18000
  Distance in km, for lubricating oil // lubricants at refinery // raf; Transoceanic ship, containers; GLO
- kg_km_13: 0.00201692; = kg_13*km_13
  Transport amount in km*km, for lubricating oil // lubricants at refinery // raf; Transoceanic ship, containers; GLO
- kg_14: 2.93634e-6
  Mass in kg, for lubricating oil // lubricants at refinery // ras w/o cn; Transoceanic ship, containers; GLO
- km_14: 18000
  Distance in km, for lubricating oil // lubricants at refinery // ras w/o cn; Transoceanic ship, containers; GLO
- kg_km_14: 0.0528542; = kg_14*km_14
  Transport amount in km*km, for lubricating oil // lubricants at refinery // ras w/o cn; Transoceanic ship, containers; GLO
- kg_15: 2.42811e-6
  Mass in kg, for lubricating oil // lubricants at refinery // ru; Transoceanic ship, containers; GLO
- km_15: 18000
  Distance in km, for lubricating oil // lubricants at refinery // ru; Transoceanic ship, containers; GLO
- kg_km_15: 0.043706; = kg_15*km_15
  Transport amount in km*km, for lubricating oil // lubricants at refinery // ru; Transoceanic ship, containers; GLO
- kg_16: 1.49568e-6
  Mass in kg, for lubricating oil // lubricants at refinery // eu+efta+uk; Transoceanic ship, containers; GLO
- km_16: 17985.1
  Distance in km, for lubricating oil // lubricants at refinery // eu+efta+uk; Transoceanic ship, containers; GLO
- kg_km_16: 0.0269; = kg_16*km_16
  Transport amount in km*km, for lubricating oil // lubricants at refinery // eu+efta+uk; Transoceanic ship, containers; GLO
- kg_17: 0.04
  Mass in kg, for ethoxylated alcohol (ae7), petrochemical // ethoxylated alcohol (ae7) production, petrochemical // eu+efta+uk; Transoceanic ship, containers; GLO
- km_17: 18000
  Distance in km, for ethoxylated alcohol (ae7), petrochemical // ethoxylated alcohol (ae7) production, petrochemical // eu+efta+uk; Transoceanic ship, containers; GLO
- kg_km_17: 720; = kg_17*km_17
  Transport amount in km*km, for ethoxylated alcohol (ae7), petrochemical // ethoxylated alcohol (ae7) production, petrochemical // eu+efta+uk; Transoceanic ship, containers; GLO
- kg_18: 0.06
  Mass in kg, for sodium chloride powder // sodium chloride powder production // eu+efta+uk; Transoceanic ship, containers; GLO
- km_18: 18000
  Distance in km, for sodium chloride powder // sodium chloride powder production // eu+efta+uk; Transoceanic ship, containers; GLO
- kg_km_18: 1080; = kg_18*km_18
  Transport amount in km*km, for sodium chloride powder // sodium chloride powder production // eu+efta+uk; Transoceanic ship, containers; GLO
- kg_19: 2.29205e-6
  Mass in kg, for lubricating oil // lubricants at refinery // rna; Transoceanic ship, containers; GLO
- km_19: 18000
  Distance in km, for lubricating oil // lubricants at refinery // rna; Transoceanic ship, containers; GLO
- kg_km_19: 0.0412569; = kg_19*km_19
  Transport amount in km*km, for lubricating oil // lubricants at refinery // rna; Transoceanic ship, containers; GLO
- kg_20: 4.66213e-7
  Mass in kg, for lubricating oil // lubricants at refinery // cn; Transoceanic ship, containers; GLO
- km_20: 18000
  Distance in km, for lubricating oil // lubricants at refinery // cn; Transoceanic ship, containers; GLO
- kg_km_20: 0.00839183; = kg_20*km_20
  Transport amount in km*km, for lubricating oil // lubricants at refinery // cn; Transoceanic ship, containers; GLO
- kg_21: 0.06
  Mass in kg, for enzymes // enzymes production // eu+efta+uk; Transoceanic ship, containers; GLO
- km_21: 18000
  Distance in km, for enzymes // enzymes production // eu+efta+uk; Transoceanic ship, containers; GLO
- kg_km_21: 1080; = kg_21*km_21
  Transport amount in km*km, for enzymes // enzymes production // eu+efta+uk; Transoceanic ship, containers; GLO
- kg_22: 0.002
  Mass in kg, for antifoaming agent, ethoxylate fatty alcohols // antifoaming agent, ethoxylate fatty alcohols production // glo; Transoceanic ship, containers; GLO
- km_22: 18000
  Distance in km, for antifoaming agent, ethoxylate fatty alcohols // antifoaming agent, ethoxylate fatty alcohols production // glo; Transoceanic ship, containers; GLO
- kg_km_22: 36; = kg_22*km_22
  Transport amount in km*km, for antifoaming agent, ethoxylate fatty alcohols // antifoaming agent, ethoxylate fatty alcohols production // glo; Transoceanic ship, containers; GLO
- kg_23: 0.002
  Mass in kg, for antifoaming agent, silicone emulsion // antifoaming agent, silicone emulsion production // glo; Transoceanic ship, containers; GLO
- km_23: 18000
  Distance in km, for antifoaming agent, silicone emulsion // antifoaming agent, silicone emulsion production // glo; Transoceanic ship, containers; GLO
- kg_km_23: 36; = kg_23*km_23
  Transport amount in km*km, for antifoaming agent, silicone emulsion // antifoaming agent, silicone emulsion production // glo; Transoceanic ship, containers; GLO

## Reference product
- desizing, natural fibers // desizing, natural fibers // glo: 1

## Inputs
- Electricity from Electricity grid mix 1kV-60kV - AU: 0.0012
- Electricity from Electricity grid mix 1kV-60kV - EU+EFTA+UK: 0.0176
- Electricity from Electricity grid mix 1kV-60kV - NZ: 0.0002
- Electricity from Electricity grid mix 1kV-60kV - RAF: 0.0038
- Electricity from Electricity grid mix 1kV-60kV - RNA: 0.0258
- Electricity from Electricity grid mix 1kV-60kV - RSA: 0.0087
- Electricity from Electricity grid mix 1kV-60kV - RU: 0.0052
- Transport of lubricating oil // lubricants at refinery // eu+efta+uk by Articulated lorry transport, Euro 4, Total weight >32 t - EU+EFTA+UK: 0.0015; = kg_km_0
- Transport of lubricating oil // lubricants at refinery // rsa by Articulated lorry transport, Euro 4, Total weight >32 t - EU+EFTA+UK: 0.000273125; = kg_km_1
- Transport of lubricating oil // lubricants at refinery // raf by Articulated lorry transport, Euro 4, Total weight >32 t - EU+EFTA+UK: 0.000112051; = kg_km_2
- Transport of lubricating oil // lubricants at refinery // ras w/o cn by Articulated lorry transport, Euro 4, Total weight >32 t - EU+EFTA+UK: 0.00293634; = kg_km_3
- Transport of lubricating oil // lubricants at refinery // ru by Articulated lorry transport, Euro 4, Total weight >32 t - EU+EFTA+UK: 0.00242811; = kg_km_4
- Transport of lubricating oil // lubricants at refinery // rna by Articulated lorry transport, Euro 4, Total weight >32 t - EU+EFTA+UK: 0.00229205; = kg_km_5
- Transport of lubricating oil // lubricants at refinery // cn by Articulated lorry transport, Euro 4, Total weight >32 t - EU+EFTA+UK: 0.000466213; = kg_km_6
- Transport of enzymes // enzymes production // eu+efta+uk by Articulated lorry transport, Euro 4, Total weight >32 t - EU+EFTA+UK: 60; = kg_km_7
- Transport of antifoaming agent, ethoxylate fatty alcohols // antifoaming agent, ethoxylate fatty alcohols production // glo by Articulated lorry transport, Euro 4, Total weight >32 t - EU+EFTA+UK: 2; = kg_km_8
- Transport of antifoaming agent, silicone emulsion // antifoaming agent, silicone emulsion production // glo by Articulated lorry transport, Euro 4, Total weight >32 t - EU+EFTA+UK: 2; = kg_km_9
- Transport of ethoxylated alcohol (ae7), petrochemical // ethoxylated alcohol (ae7) production, petrochemical // eu+efta+uk by Articulated lorry transport, Euro 4, Total weight >32 t - EU+EFTA+UK: 40; = kg_km_10
- Transport of sodium chloride powder // sodium chloride powder production // eu+efta+uk by Articulated lorry transport, Euro 4, Total weight >32 t - EU+EFTA+UK: 60; = kg_km_11
- Transport of lubricating oil // lubricants at refinery // rsa by Transoceanic ship, containers - GLO: 0.00491625; = kg_km_12
- Transport of lubricating oil // lubricants at refinery // raf by Transoceanic ship, containers - GLO: 0.00201692; = kg_km_13
- Transport of lubricating oil // lubricants at refinery // ras w/o cn by Transoceanic ship, containers - GLO: 0.0528542; = kg_km_14
- Transport of lubricating oil // lubricants at refinery // ru by Transoceanic ship, containers - GLO: 0.043706; = kg_km_15
- Transport of lubricating oil // lubricants at refinery // eu+efta+uk by Transoceanic ship, containers - GLO: 0.0269; = kg_km_16
- Transport of ethoxylated alcohol (ae7), petrochemical // ethoxylated alcohol (ae7) production, petrochemical // eu+efta+uk by Transoceanic ship, containers - GLO: 720; = kg_km_17
- Transport of sodium chloride powder // sodium chloride powder production // eu+efta+uk by Transoceanic ship, containers - GLO: 1080; = kg_km_18
- Transport of lubricating oil // lubricants at refinery // rna by Transoceanic ship, containers - GLO: 0.0412569; = kg_km_19
- Transport of lubricating oil // lubricants at refinery // cn by Transoceanic ship, containers - GLO: 0.00839183; = kg_km_20
- Transport of enzymes // enzymes production // eu+efta+uk by Transoceanic ship, containers - GLO: 1080; = kg_km_21
- Transport of antifoaming agent, ethoxylate fatty alcohols // antifoaming agent, ethoxylate fatty alcohols production // glo by Transoceanic ship, containers - GLO: 36; = kg_km_22
- Transport of antifoaming agent, silicone emulsion // antifoaming agent, silicone emulsion production // glo by Transoceanic ship, containers - GLO: 36; = kg_km_23
- Electricity from Electricity grid mix 1kV-60kV - CN: 0.0264359
- Electricity from Electricity grid mix 1kV-60kV - RAS w/o CN: 0.0289641
- desizing, natural fibers // desizing, natural fibers // glo, blackbox: 1
- desizing, natural fibers // desizing, natural fibers // glo, elementary: 1

## Impact indicators
- Eutrophication marine: 0.000819453
- Ecotoxicity, freshwater: 4.45945
- Land use: 3.91392
- Water use: 1.02932
- Resource use, minerals and metals: 9.34717e-7
- Resource use, fossils: 10.4439
- Climate change: 0.958882
- Ozone depletion: 2.29688e-6
- Human toxicity, cancer: 3.27031e-10
- Human toxicity, non-cancer: 5.33121e-9
- EF-particulate Matter: 1.04812e-7
- Ionising radiation, human health: 0.0809761
- Photochemical ozone formation - human health: 0.00257403
- Acidification: 0.00486379
- Eutrophication, terrestrial: 0.00750632
- Eutrophication, freshwater: 0.000157194

## Deviations from the LCI method principle
The background data uses:
- the \xe2\x80\x9cRecycled content cut-off\xe2\x80\x9d approach to allocate end-of-life by-products and secondary materials. This allocation is explained in the description of the recycled content system model (http://www.ecoinvent.org/database/system-models-in-ecoinvent-3/cut-off-system-model/allocation-cut-off-by-classification.html).
OR
- EF compliant data

## Deviations from the LCI method approaches
Background data:
- the \xe2\x80\x9cRecycled content cut-off\xe2\x80\x9d approach to allocate end-of-life by-products and secondary materials. This allocation is explained in the description of the recycled content system model (http://www.ecoinvent.org/database/system-models-in-ecoinvent-3/cut-off-system-model/allocation-cut-off-by-classification.html). The ecoinvent database mostly relies on “Allocation – market values” apart for few exceptions particularly in the energy sector. ecoinvent energy data is replaced with EF3.0 core data as per the EF guidelines version 2.0.
OR
- EF compliant data

## Modelling constants
All modelling constants follow the requirements listed in the Tender Specifications 070201/2020/SER/ENV.B1. Completeness: There are no intentional cut-offs in the inventory no matter how small their contribution to all the EF impact categories is. Eventual cut-offs are in compliance with the Guide for EF compliant data sets (JRC 2020), i.e. only if below the 3% cut-off rule. Water use: water use is modelled at country level using separate flows for water withdrawal, water release and water evaporation. Handling multi-functional processes: the following PEF multi- functionality decision hierarchy is applied for resolving all multi- functionality problems: (1) subdivision or system expansion; (2) allocation based on a relevant underlying physical relationship (substitution may apply here); (3) allocation based on some other relationship. Direct land use change: GHG emissions from direct LUC allocated to good/service for 20 years after the LUC occurs, with IPCC default values. Carbon storage and delayed emissions: credits associated with temporary (carbon) storage or delayed emissions up to 300 years are not be considered. Emissions off-setting: are not included. Capital goods (including infrastructures) and their End of life: they are included. System boundaries: system boundaries include all processes linked to the product supply chain (e.g. maintenance). Time period: emissions and removals are modelled as if released or removed at the beginning of the assessment method. Fossil and biogenic carbon emissions and removals: removals and emissions are modelled as follows: All GHG emissions from fossil fuels (including peat and limestone) are modelled consistently with the most updated ILCD list of elementary flows. The non-fossil (biogenic) carbon flows are modelled consistently with the most updated ILCD list of elementary flows.

## Cut-off and completeness
There are no intentional cut-offs in the inventory no matter how small their contribution to all the EF impact categories is. Eventual cut-offs are in compliance with the Guide for EF compliant data sets (JRC 2020), i.e. only if below the 3% cut-off rule. The dataset dry mass and water balance has been checked to ensure the inventory is complete. Capital goods (e.g. infrastructure) and their end-of-life are included.

## Data selection and combination
These datasets include, in both their foreground and background data, links to EF3.0 compliant data.
The relevant background data on energy, transport, and End of Life are from the LCDN data node (http://lcdn.thinkstep.com/Node/).
All other background data in the supply of this product for which no EF3.0 process was available are from ecoinvent v3.7 database (www.ecoinvent.org) or other data sources.

## Data treatment and extrapolations
Several data sources have been used to model the inventory.

## Review details
Internal reviews have been asked to review the plausibility of the unit process, LCIA scores, and DQRs. Internal reviewers have also been asked to review the data for EF compliancy. The consortium is therefore responsible for aspects such as compliancy with the ILCD format, including validation in Look@LCI, and nomenclature.
Internal reviwers have been asked to judge based on the process name, that the unit process models in a complete and representative way the process in the requested location. The review encompassed the plausability of:
- exchanges with nature (elementary flows) as well as exchanges such as product and waste flows.
- meta information (general comment, technology comment, system boundaries, allocation, cut-off rules, etc.). Reviewers were asked to judge if the provided information is enough to understand the content of the process.
- LCIA scores
- DQRs including precision, technology, time and geography. As well as the overall DQR.
External reviewers have been asked to provide their expertise in the field of interest. External reviewers have been asked to review the unit process, including eventual methodological choices, the LCIA scores (provided with contribution scores as well), and DQRs. External reviewers have been provided all the information in a tool developed by the consortium for the purpose of this project.
External reviewers have been asked to judge based on the process name, that the unit process models in a complete and representative way the process in the requested location. The review encompassed:
- Plausability and completeness of exchanges with nature (elementary flows) as well as exchanges such as product and waste flows.
- Review of meta information (general comment, technology comment, system boundaries, allocation, cut-off rules, etc.). Reviewers were asked to judge if the provided information is enough to understand the content of the process.
- Review of properties (biogenic carbon and water content).
- Review of allocation keys.
- Plausability of LCIA scores calculated by the consortium.
- Plausability of DQRs including precision, technology, time and geography. As well as the overall DQR.

## Data sources
- Background Data for Representative products and organisations. EF 3.0 compliant (data stock)
- Mathews Kolanjikombil, (2019). Handbook of Textile Processors Series Pretreatment of Textile Substrates. WOODHEAD PUBLISHING INDIA PVT LTD, New Delhi, India
- Umweltbundesamt (2003). Best Available Techniques in Textile Industry. Federal Environmental Agency (Umweltbundesamt), Berlin, Germany
- Lebon (2021) Nonwoven Oven Machine, Catalog and Company Messages, Qingdao Lebon Industry Co., Ltd., China
- UN Data (2018) Statistics Data for Lubricants Productions, http://data.un.org/Data.aspx?q=Lubricants&d=EDATA&f=cmID%3aLU, United Nations Statistics Division, Global.
- Buentex (2021) Jet Dyeing Machine, https://buentex.com/en/product/high-temperature-jet-dyeing-machine.html, Buentex Machinery Trading Co.,Ltd, China
- Buentex (2021) Low Liquor Ratio Dyeing Machine, https://buentex.com/en/product/low-liquor-ratio-dyeing-machine.html, Buetex Machinery Trading Co.,Ltd, China
- Zen (2021) Jigger Machine, https://www.zenindustrialengineers.com/automatic-dyeing-jigger.html, Zen Industrial Engineers, Gujarat, India
- Buentex (2021), Cold Pad Batch Dyeing Machine, https://buentex.com/en/product/Cold-Pad-Batch.html, Buentex Machinery Trading Co.,Ltd, China
- M. Clark (2011). Handbook of textile and industrial dyeing Volume 1: Principles, processes and types of dyes. Woodhead Publishing Limited, Cambridge, UK

## Intended applications
Implementation of regular Product Environmental Footprint (PEF) studies and Organisation Environmental Footprint (OEF) studies exclusively under the specified Product groups and sectors as defined in the Product Environmental Footprint Category Rules (PEFCR) and Organisation Environmental Footprint Sectorial Rules (OEFSR) listed in http://ec.europa.eu/environment/eussd/smgp/PEFCR_OEFSR.htm
