# leather, caprine (goat), chrome tanned (wet- blue), elementary; technology mix; production mix, at tannery; m2

Dataset: ILCD process, Unit process, single operation
Geography: GLO
Reference year: 2021
Valid until: 2024
Classification: Other Services / Other services
LCI method principle: Attributional
LCI method approaches: Allocation - market value
Completeness: All relevant flows quantified
Project: Provision of process-based 3.0 Environmental Footprint-compliant life cycle inventory datasets - Apparel 1 - contract number 070201/2020/840291/SER/ENV.B.1
Generated by: PRé Sustainability B.V.
Owner: PRé Sustainability B.V.
Compliance: Environmental Footprint non-primary supporting data set; Environmental Footprint 3.1
Amounts: no units in this file; such an amount is in the reference unit of its flow, which a separate flow dataset defines
copyright: true
licenseType: Free of charge for some user types or use types
accessRestrictions: Free of charge for all final users implementing a regular Product Environmental Footprint (PEF) studies and Organisation Environmental Footprint (OEF) studies exclusively under the specified Product groups and sectors as defined in the Product Environmental Footprint Category Rules (PEFCR) and Organisation Environmental Footprint Sectorial Rules (OEFSR) listed in http://ec.europa.eu/environment/eussd/smgp/PEFCR_OEFSR.htm and in accordance with the terms and conditions of the EULA (available at https://ecoinvent.lca-data.com/) exclusively until 31st December 2024. Any use of this dataset or any derivative data not within the specific context of one of the PEF/OEF projects or after the end of 2024 is not permitted.

## General comment
Notice: this data set supersedes the EF3.0-compliant version (see link under "preceding data set version" below calculated with the EF3.0). The life cycle inventory is not changed from the original EF3.0 data set. The LCIA results are calculated based on the EF3.1 methods which provide updated characterisation factors in the following impact categories: Climate Change, Ecotoxicity freshwater, Photochemical Ozone Formation, Acidification, Human Toxicity non-cancer, and Human Toxicity cancer. The review report and the data quality ratings refer to the original results. The data set has been updated by the European Commission on the basis of the original EF3.0 data set delivered by the data provider.This sub-process has limited documentation only. For all detailed documentation of the full model to which this data set belongs (such as DQRs, review reports and other technical documentation), please see this process: leather, caprine (goat), chrome tanned (wet- blue) - GLO []

## Technology and included processes
System boundaries: The dataset describes the tanning and finishing of goat leather. The inventory includes the following flows:
- Electricity and heat use
- Chemicals: chromium tanning agent, wetting agents, liming agents, fatliquors and other agents used in the processing of leather
- Water
- Emissions to water
- Transport of chemicals, and raw materials

It does not include:
- Packaging materials
- Certain chemicals have been replaced with proxies where there is no exact match

## Reference product
- leather, caprine (goat), chrome tanned (wet- blue) // leather, caprine (goat), chrome tanned (wet- blue) // glo, elementary: 1

## Outputs
- ammonia, Emissions to air, unspecified [AL]: 2.66608e-5
- ammonia, Emissions to air, unspecified [AT]: 0.000343507
- ammonia, Emissions to air, unspecified [BA]: 3.32365e-5
- ammonia, Emissions to air, unspecified [BE]: 0.000413464
- ammonia, Emissions to air, unspecified [BG]: 0.000105875
- ammonia, Emissions to air, unspecified [BY]: 0.000137477
- ammonia, Emissions to air, unspecified [CH]: 0.00040969
- ammonia, Emissions to air, unspecified [CZ]: 0.000285141
- ammonia, Emissions to air, unspecified [DE]: 0.00310324
- ammonia, Emissions to air, unspecified [DK]: 0.000225021
- ammonia, Emissions to air, unspecified [EE]: 3.07269e-5
- ammonia, Emissions to air, unspecified [ES]: 0.00133169
- ammonia, Emissions to air, unspecified [FI]: 0.000191938
- ammonia, Emissions to air, unspecified [FR]: 0.00218902
- ammonia, Emissions to air, unspecified [GB]: 0.00217536
- ammonia, Emissions to air, unspecified: 0.0665445
- ammonia, Emissions to air, unspecified [GR]: 0.000247461
- ammonia, Emissions to air, unspecified [HR]: 7.95669e-5
- ammonia, Emissions to air, unspecified [HU]: 0.000208585
- ammonia, Emissions to air, unspecified [IE]: 0.000224686
- ammonia, Emissions to air, unspecified [IT]: 0.00187288
- ammonia, Emissions to air, unspecified [LT]: 6.56072e-5
- ammonia, Emissions to air, unspecified [LU]: 4.55447e-5
- ammonia, Emissions to air, unspecified [LV]: 3.86862e-5
- ammonia, Emissions to air, unspecified [MD]: 2.04696e-5
- ammonia, Emissions to air, unspecified [MK]: 2.27753e-5
- ammonia, Emissions to air, unspecified [NL]: 0.000694251
- ammonia, Emissions to air, unspecified [NO]: 0.000262795
- ammonia, Emissions to air, unspecified [PL]: 0.000799005
- ammonia, Emissions to air, unspecified [PT]: 0.000252115
- ammonia, Emissions to air, unspecified [RO]: 0.000350016
- ammonia, Emissions to air, unspecified [RU]: 0.00289786
- ammonia, Emissions to air, unspecified [SE]: 0.00037921
- ammonia, Emissions to air, unspecified [SI]: 5.37016e-5
- ammonia, Emissions to air, unspecified [SK]: 0.000126046
- ammonia, Emissions to air, unspecified [UA]: 0.000369567
- biological oxygen demand, Emissions to water, unspecified: 1.36
- chemical oxygen demand, Emissions to water, unspecified: 0.765
- chromium (iii), Emissions to fresh water: 0.008
- Nitrogen oxides, Emissions to air, unspecified: 0.048396
- sulfur oxides, Emissions to air, unspecified: 0.012099
- nitrogen, total (excluding N2), Emissions to water, unspecified: 0.0672
- Suspended solids, unspecified, Emissions to water, unspecified: 0.264
- sulfate, Emissions to water, unspecified: 0.589
- volatile organic compound, Emissions to air, unspecified: 0.0196721
- formaldehyde, Emissions to water, unspecified: 0.031
- sulfide, Emissions to water, unspecified: 0.009
- Chlorides, unspecified, Emissions to water, unspecified: 1.83
- Nitrogen oxides, Emissions to air, unspecified [AL]: 1.93897e-5
- Nitrogen oxides, Emissions to air, unspecified [AT]: 0.000249823
- Nitrogen oxides, Emissions to air, unspecified [BA]: 2.4172e-5
- Nitrogen oxides, Emissions to air, unspecified [BE]: 0.000300701
- Nitrogen oxides, Emissions to air, unspecified [BG]: 7.70001e-5
- Nitrogen oxides, Emissions to air, unspecified [BY]: 9.99834e-5
- Nitrogen oxides, Emissions to air, unspecified [CH]: 0.000297956
- Nitrogen oxides, Emissions to air, unspecified [CZ]: 0.000207375
- Nitrogen oxides, Emissions to air, unspecified [DE]: 0.00225691
- Nitrogen oxides, Emissions to air, unspecified [DK]: 0.000163651
- Nitrogen oxides, Emissions to air, unspecified [EE]: 2.23468e-5
- Nitrogen oxides, Emissions to air, unspecified [ES]: 0.000968502
- Nitrogen oxides, Emissions to air, unspecified [FI]: 0.000139591
- Nitrogen oxides, Emissions to air, unspecified [FR]: 0.00159202
- Nitrogen oxides, Emissions to air, unspecified [GB]: 0.00158208
- Nitrogen oxides, Emissions to air, unspecified [GR]: 0.000179972
- Nitrogen oxides, Emissions to air, unspecified [HR]: 5.78668e-5
- Nitrogen oxides, Emissions to air, unspecified [HU]: 0.000151698
- Nitrogen oxides, Emissions to air, unspecified [IE]: 0.000163408
- Nitrogen oxides, Emissions to air, unspecified [IT]: 0.0013621
- Nitrogen oxides, Emissions to air, unspecified [LT]: 4.77143e-5
- Nitrogen oxides, Emissions to air, unspecified [LU]: 3.31234e-5
- Nitrogen oxides, Emissions to air, unspecified [LV]: 2.81354e-5
- Nitrogen oxides, Emissions to air, unspecified [MD]: 1.48869e-5
- Nitrogen oxides, Emissions to air, unspecified [MK]: 1.65639e-5
- Nitrogen oxides, Emissions to air, unspecified [NL]: 0.00050491
- Nitrogen oxides, Emissions to air, unspecified [NO]: 0.000191124
- Nitrogen oxides, Emissions to air, unspecified [PL]: 0.000581094
- Nitrogen oxides, Emissions to air, unspecified [PT]: 0.000183356
- Nitrogen oxides, Emissions to air, unspecified [RO]: 0.000254557
- Nitrogen oxides, Emissions to air, unspecified [RU]: 0.00210753
- Nitrogen oxides, Emissions to air, unspecified [SE]: 0.000275789
- Nitrogen oxides, Emissions to air, unspecified [SI]: 3.90557e-5
- Nitrogen oxides, Emissions to air, unspecified [SK]: 9.16695e-5
- Nitrogen oxides, Emissions to air, unspecified [UA]: 0.000268776
- Dissolved solids, Emissions to water, unspecified: 4.269
- sulfur oxides, Emissions to air, unspecified [AL]: 4.84742e-6
- sulfur oxides, Emissions to air, unspecified [AT]: 6.24559e-5
- sulfur oxides, Emissions to air, unspecified [BA]: 6.04299e-6
- sulfur oxides, Emissions to air, unspecified [BE]: 7.51754e-5
- sulfur oxides, Emissions to air, unspecified [BG]: 1.925e-5
- sulfur oxides, Emissions to air, unspecified [BY]: 2.49958e-5
- sulfur oxides, Emissions to air, unspecified [CH]: 7.4489e-5
- sulfur oxides, Emissions to air, unspecified [CZ]: 5.18438e-5
- sulfur oxides, Emissions to air, unspecified [DE]: 0.000564226
- sulfur oxides, Emissions to air, unspecified [DK]: 4.09129e-5
- sulfur oxides, Emissions to air, unspecified [EE]: 5.5867e-6
- sulfur oxides, Emissions to air, unspecified [ES]: 0.000242125
- sulfur oxides, Emissions to air, unspecified [FI]: 3.48978e-5
- sulfur oxides, Emissions to air, unspecified [FR]: 0.000398004
- sulfur oxides, Emissions to air, unspecified [GB]: 0.00039552
- sulfur oxides, Emissions to air, unspecified [GR]: 4.49929e-5
- sulfur oxides, Emissions to air, unspecified [HR]: 1.44667e-5
- sulfur oxides, Emissions to air, unspecified [HU]: 3.79245e-5
- sulfur oxides, Emissions to air, unspecified [IE]: 4.0852e-5
- sulfur oxides, Emissions to air, unspecified [IT]: 0.000340524
- sulfur oxides, Emissions to air, unspecified [LT]: 1.19286e-5
- sulfur oxides, Emissions to air, unspecified [LU]: 8.28086e-6
- sulfur oxides, Emissions to air, unspecified [LV]: 7.03385e-6
- sulfur oxides, Emissions to air, unspecified [MD]: 3.72174e-6
- sulfur oxides, Emissions to air, unspecified [MK]: 4.14096e-6
- sulfur oxides, Emissions to air, unspecified [NL]: 0.000126227
- sulfur oxides, Emissions to air, unspecified [NO]: 4.77809e-5
- sulfur oxides, Emissions to air, unspecified [PL]: 0.000145274
- sulfur oxides, Emissions to air, unspecified [PT]: 4.5839e-5
- sulfur oxides, Emissions to air, unspecified [RO]: 6.36393e-5
- sulfur oxides, Emissions to air, unspecified [RU]: 0.000526884
- sulfur oxides, Emissions to air, unspecified [SE]: 6.89472e-5
- sulfur oxides, Emissions to air, unspecified [SI]: 9.76392e-6
- sulfur oxides, Emissions to air, unspecified [SK]: 2.29174e-5
- sulfur oxides, Emissions to air, unspecified [UA]: 6.7194e-5

## Impact indicators
- Eutrophication marine: 0.0996511
- Ecotoxicity, freshwater: 702.698
- Human toxicity, cancer: 1.82795e-9
- Human toxicity, non-cancer: 7.17084e-9
- EF-particulate Matter: 2.04433e-6
- Photochemical ozone formation - human health: 0.0688501
- Acidification: 0.296651
- Eutrophication, terrestrial: 1.27185
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
## Modelling constants
All modelling constants follow the requirements listed in the Tender Specifications 070201/2020/SER/ENV.B1. Completeness: There are no intentional cut-offs in the inventory no matter how small their contribution to all the EF impact categories is. Eventual cut-offs are in compliance with the Guide for EF compliant data sets (JRC 2020), i.e. only if below the 3% cut-off rule. Water use: water use is modelled at country level using separate flows for water withdrawal, water release and water evaporation. Handling multi-functional processes: the following PEF multi- functionality decision hierarchy is applied for resolving all multi- functionality problems: (1) subdivision or system expansion; (2) allocation based on a relevant underlying physical relationship (substitution may apply here); (3) allocation based on some other relationship. Direct land use change: GHG emissions from direct LUC allocated to good/service for 20 years after the LUC occurs, with IPCC default values. Carbon storage and delayed emissions: credits associated with temporary (carbon) storage or delayed emissions up to 300 years are not be considered. Emissions off-setting: are not included. Capital goods (including infrastructures) and their End of life: they are included. System boundaries: system boundaries include all processes linked to the product supply chain (e.g. maintenance). Time period: emissions and removals are modelled as if released or removed at the beginning of the assessment method. Fossil and biogenic carbon emissions and removals: removals and emissions are modelled as follows: All GHG emissions from fossil fuels (including peat and limestone) are modelled consistently with the most updated ILCD list of elementary flows. The non-fossil (biogenic) carbon flows are modelled consistently with the most updated ILCD list of elementary flows.

## Cut-off and completeness
All known environmental flows are included. All known resource uses and emissions are listed in the inventory. The dataset dry mass balance has been checked to ensure the inventory is complete. Capital goods (e.g. infrastructure) and their end-of-life are included.

## Data selection and combination
These datasets include, in both their foreground and background data, links to EF3.0 compliant data.
The relevant background data on energy, transport, and End of Life are from the LCDN data node (http://lcdn.thinkstep.com/Node/).
All other background data in the supply of this product for which no EF3.0 process was available are from ecoinvent v3.7 database (www.ecoinvent.org) or other data sources.

## Data treatment and extrapolations
Several data sources have been used to model the inventory.

## Use advice
This data set is a supporting sub-data set and must be used exclusively as sub-data set of its corresponding level-1 partly disaggregated data set (see “General comment” field for exact name and UUID).

## Data sources
- Background Data for Representative products and organisations. EF 3.0 compliant (data stock)
- Directorate-General for Environment. “Recommendation on the Use of Environmental Footprint Methods ANNEX 1.” European Commission, December 16, 2021. https://environment.ec.europa.eu/document/download/680503dc-5a19-4f6a-bb92-84d9bfc8f312_en.
- De Rosa-Giglio, Fontanella, Gonzalez-Quijano, Ioannidis, Nucci, and Brugnoli. ‘PRODUCT ENVIRONMENTAL FOOTPRINT CATEGORY RULES Leather’, 25 April 2018.
- BASF. ‘BASF Pocket Book for the Leather Technologist’, no. 4 (2003). https://www.academia.edu/32384925/Book_for_Leather_BASF_pdf.
- Pant, R, L Zampori, European Commission, and Joint Research Centre. Suggestions for Updating the Organisation Environmental Footprint (OEF) Method., 2019. http://publications.europa.eu/publication/manifestation_identifier/PUB_KJNA29682ENN.
- Andrea Fontanella, Benedetta Nucci, Primiano De Rosa-Giglio, and Ioannis Ioannidis. ‘Leather PEF Screening Report in the Context of the EU Product Environmental Footprint Category Rules (PEFCR) Pilots’, 11 November 2015.
- UNIDO. ‘Future Trends in the World Leather and Leather Products Industry and Trade’, 2010. https://leatherpanel.org/sites/default/files/publications-attachments/future_trends_in_the_world_leather_and_leather_products_industry_and_trade.pdf.
- UNIDO Leatherpanel, J. Buljan, and I. Kral. ‘INTRODUCTION TO TREATMENT OF TANNERY EFFLUENTS’, 2011. https://leatherpanel.org/sites/default/files/publications-attachments/introduction_to_treatment_of_tannery_effluents.pdf.
- COTANCE and industriAll-Europe. ‘European Leather Industry - SOCIAL & ENVIRONMENTAL REPORT 2020’, 2020. https://www.euroleather.com/doc/SER/European%20Leather%20Industry%20-%20Social%20and%20Environmental%20Report%202020%20-%20EN%20web.pdf.
- Khwaja, A R, Rashmi Singh, and S N Tandon. ‘MONITORING OF GANGA WATER AND SEDIMENTS VIS-À-VIS TANNERY POLLUTION AT KANPUR (INDIA): A CASE STUDY’, n.d., 17.
- IFC, World Bank Group. ‘Environmental, Health, and Safety Guidelines for Tanning and Leather Finishing’. International Finance Corporation, 30 April 2007. https://www.ifc.org/wps/wcm/connect/e497d468-6fbe-462e-86a9-e3ff55ea0236/Final%2B-%2BTanning%2Band%2BLeather%2BFinishing.pdf?MOD=AJPERES&CVID=jqezJDY&id=1323152378134.
- Banuraman, Saritha. ‘Treatability Study of Tannery Effluent by Enhanced Primary Treatment’, 2013. https://citeseerx.ist.psu.edu/viewdoc/download?doi=10.1.1.417.417&rep=rep1&type=pdf.
- FOOD AND AGRICULTURE ORGANIZATION OF THE UNITED NATIONS. ‘Guidelines for Slaughtering, Meat Cutting and Further Processing’. FAO ANIMAL PRODUCTION AND HEALTH PAPER, 1991. http://www.fao.org/3/T0279E/T0279E05.htm.
- Miljögiraff. ‘EPD Dani Leather for Furniture, Footwear and Leather Goods (S-P-00344)’, 4 April 2012. https://portal.environdec.com/api/api/v1/EPDLibrary/Files/54434c97-7440-4562-41bf-08d8dc8471b1/Data.
- Hou, X, X Xie, and X Huo. ‘Chemical Composition and Nutritive Value of Leather Meals in Broilers’, 2001, 1.
- Hunter, L. Mohair, Cashmere and other animal hair fibers. In: Kozlowski et al. Handbook of Natural Fibres: Vol. 1: Types, Properties and Factors Affecting Breeding and Cultivation. Ensevier, 2020.
- IPCC (2019). Chapter 10: Emissions from Livestoch and Manure Management. Refinement to the 2006 IPCC Guidelines for National Greenhouse Gas Inventories.
- Koch, P., Salou, T. AGRIBALYSE® : METHODOLOGY, AGRICULTURAL STAGE. Version 3.0. April 2020.
- SFA. Sustainable Fiber Alliance. https://sustainablefibre.org/about-cashmere/. 2021.
- Wang et al. Relationships between cashmere production and other important economic traits of Inner Mongolia cashmere goats. ITALIAN JOURNAL OF ANIMAL SCIENCE 2019, VOL. 18, NO. 1, 1154–1160.
- Bar-On, Yinon M., Rob Phillips, and Ron Milo. ‘The Biomass Distribution on Earth’. Proceedings of the National Academy of Sciences of the United States of America 115, no. 25 (19 June 2018): 6506–11. https://doi.org/10.1073/pnas.1711842115.
- OEC. ‘Goat or Kid Skin Leather, Nes (HS: 410620) Product Trade, Exporters and Importers’, 3 May 2021. https://oec.world/en/profile/hs92/goat-or-kid-skin-leather-nes?redirect=true.

## Intended applications
Implementation of regular Product Environmental Footprint (PEF) studies and Organisation Environmental Footprint (OEF) studies exclusively under the specified Product groups and sectors as defined in the Product Environmental Footprint Category Rules (PEFCR) and Organisation Environmental Footprint Sectorial Rules (OEFSR) listed in http://ec.europa.eu/environment/eussd/smgp/PEFCR_OEFSR.htm
