# heat pressing; heat processing process; production mix, at plant; service for 1 pair

Dataset: ILCD process, Partly terminated system
Geography: GLO
Reference year: 2021
Valid until: 2024
Classification: Systems / Textiles, furnitures and other interiors
LCI method principle: Attributional
LCI method approaches: Allocation - market value
Completeness: All relevant flows quantified
Project: Provision of process-based 3.0 Environmental Footprint-compliant life cycle inventory datasets - Apparel 1 - contract number 070201/2020/840291/SER/ENV.B.1
Generated by: Life Cycle Indonesia
Owner: PRé Sustainability B.V.
Compliance: ILCD Data Network - Entry-level; Suggestions for updating the PEF method 2019; ISO 14040 Environmental Management – Life Cycle Assessment – Principles and Framework, 2006; ISO 14044:2006. Environmental Management – Life Cycle Assessment – Requirements and guidelines.; Environmental Footprint 3.1
Review: Dependent internal review by Avraam Symeonidis, Emilia Moreno Ruiz; Independent review panel by Subramanian Senthilkannan Muthu
Data quality: Overall quality: Very good; Time representativeness: Very good; Geographical representativeness: Good; Technological representativeness: Very good; Precision: Good; Methodological appropriateness and consistency: Not applicable
Amounts: no units in this file; such an amount is in the reference unit of its flow, which a separate flow dataset defines
copyright: true
licenseType: Free of charge for some user types or use types
accessRestrictions: Free of charge for all final users implementing a regular Product Environmental Footprint (PEF) studies and Organisation Environmental Footprint (OEF) studies exclusively under the specified Product groups and sectors as defined in the Product Environmental Footprint Category Rules (PEFCR) and Organisation Environmental Footprint Sectorial Rules (OEFSR) listed in http://ec.europa.eu/environment/eussd/smgp/PEFCR_OEFSR.htm and in accordance with the terms and conditions of the EULA (available at https://ecoinvent.lca-data.com/) exclusively until 31st December 2024. Any use of this dataset or any derivative data not within the specific context of one of the PEF/OEF projects or after the end of 2024 is not permitted.

## General comment
Notice: this data set supersedes the EF3.0-compliant version (see link under "preceding data set version" below calculated with the EF3.0). The life cycle inventory is not changed from the original EF3.0 data set. The LCIA results are calculated based on the EF3.1 methods which provide updated characterisation factors in the following impact categories: Climate Change, Ecotoxicity freshwater, Photochemical Ozone Formation, Acidification, Human Toxicity non-cancer, and Human Toxicity cancer. The review report and the data quality ratings refer to the original results. The data set has been updated by the European Commission on the basis of the original EF3.0 data set delivered by the data provider.In general, heat pressing is the process of printing by transfer onto textiles. During the pressing, the heat either sublimates the dye from paper onto the cloth or traps the dyestuff onto the cloth. This process requires relative minimal machinery such as a paper-based inkjet printer and a heat press or calendar machine (Cie, 2015).

in footwear manufacturing, Heat pressing is one of the finishing processes. Heat pressing refers to thermal heat transfers and labels for the footwear industry. These labels must have resistance against atmospheric and environmental effects. The footwear item must be robust, so the inks and transfer must be robust and not affected by external parameters. Heat transfer must be scratch resistant. The heat press machine is widely used to customize sneakers, cleats, slippers, golf shoes, fashion footwear, slippers, etc.

Cie, Christina (2015). Ink Jet Textile Printing: Heat Transfer and submlimation Printing, 10.1016/B978-0-85709-230-4.00010-8, Woodhead Publishing, United Kingdom
Microtec (2021) Shoe Heat Press DCH-100-S, https://www.heatpress.cn/products/DCH-100-S-Shoe-Heat-Press.html, MICROTEC TECHNOLOGY COMPANY LTD., Shenzhen, China
SpinksWorld (2021) Heat Transfers and Label for footwear industry, http://footwearinks.com/heat-transfer, Spinks World's house, India

## Technology and included processes
This model only covered the usage of heat pressing machines. The printing process is not included. Hence the material input is only the paper cover. Several types of cover can be used to protect the printed design and avoid ink bleeding during the process. In this model, aluminium kraft paper is used as a proxy.

The model represents the process itself. Hence, the input raw materials are not included in the model. The user will use this dataset along with the input raw materials. This process includes upper component preparation — used to attach size labels for example. The heat transfer using shoe heat press machines. Supporting materials (silicone kraft paper) entering the process are included as well as energy uses and infrastructure. The silicone kraft paper is used as a cover. It is usually placed on top of the transfer paper/design, to protect the printed design and avoid ink bleeding during heat pressing. there's no emission generated from the silicone kraft paper. Indirect emission comes from the production process of the electricity, it is already covered by using the database for the electricity. There is no direct emission to the air since the emission comes from electricity usage, while non-hazardous waste comes from waste silicone kraft paper. However, since the machine used is a handheld machine and the size is relatively small compared to other industrial machines, the lube oil consumption is assumed to be very little and therefore are not significant in this process.

## Parameters
- kg_0: 0.000797517
  Mass in kg, for kraft paper // kraft paper // eu+efta+uk; Articulated lorry transport, Euro 4, Total weight >32 t; EU+EFTA+UK
- km_0: 1000.61
  Distance in km, for kraft paper // kraft paper // eu+efta+uk; Articulated lorry transport, Euro 4, Total weight >32 t; EU+EFTA+UK
- kg_km_0: 0.798; = kg_0*km_0
  Transport amount in km*km, for kraft paper // kraft paper // eu+efta+uk; Articulated lorry transport, Euro 4, Total weight >32 t; EU+EFTA+UK
- kg_1: 0.000797517
  Mass in kg, for paper and paperboard waste to landfill // landfill of paper and paperboard waste // eu+efta+uk; Articulated lorry transport, Euro 4, Total weight >32 t; EU+EFTA+UK
- km_1: 70
  Distance in km, for paper and paperboard waste to landfill // landfill of paper and paperboard waste // eu+efta+uk; Articulated lorry transport, Euro 4, Total weight >32 t; EU+EFTA+UK
- kg_km_1: 0.0558262; = kg_1*km_1
  Transport amount in km*km, for paper and paperboard waste to landfill // landfill of paper and paperboard waste // eu+efta+uk; Articulated lorry transport, Euro 4, Total weight >32 t; EU+EFTA+UK
- kg_2: 0.000797517
  Mass in kg, for kraft paper // kraft paper // eu+efta+uk; Transoceanic ship, containers; GLO
- km_2: 18056
  Distance in km, for kraft paper // kraft paper // eu+efta+uk; Transoceanic ship, containers; GLO
- kg_km_2: 14.4; = kg_2*km_2
  Transport amount in km*km, for kraft paper // kraft paper // eu+efta+uk; Transoceanic ship, containers; GLO

## Reference product
- heat pressing // heat pressing // glo: 1

## Inputs
- Electricity from Electricity grid mix 1kV-60kV - AU: 0.001
- Electricity from Electricity grid mix 1kV-60kV - EU+EFTA+UK: 0.0148
- Electricity from Electricity grid mix 1kV-60kV - NZ: 0.0002
- Electricity from Electricity grid mix 1kV-60kV - RAF: 0.0032
- Electricity from Electricity grid mix 1kV-60kV - RNA: 0.0216
- Electricity from Electricity grid mix 1kV-60kV - RSA: 0.0073
- Electricity from Electricity grid mix 1kV-60kV - RU: 0.0043
- Transport of kraft paper // kraft paper // eu+efta+uk by Articulated lorry transport, Euro 4, Total weight >32 t - EU+EFTA+UK: 0.798; = kg_km_0
- Transport of paper and paperboard waste to landfill // landfill of paper and paperboard waste // eu+efta+uk by Articulated lorry transport, Euro 4, Total weight >32 t - EU+EFTA+UK: 0.0558262; = kg_km_1
- Transport of kraft paper // kraft paper // eu+efta+uk by Transoceanic ship, containers - GLO: 14.4; = kg_km_2
- Electricity from Electricity grid mix 1kV-60kV - CN: 0.0221889
- Electricity from Electricity grid mix 1kV-60kV - RAS w/o CN: 0.0243111
- heat pressing // heat pressing // glo, blackbox: 1
- heat pressing // heat pressing // glo, elementary: 1

## Impact indicators
- Eutrophication marine: 1.85102e-5
- Ecotoxicity, freshwater: 0.0916927
- Land use: 0.508299
- Water use: 0.00641652
- Resource use, minerals and metals: 6.00697e-9
- Resource use, fossils: 0.256154
- Climate change: 0.0202281
- Ozone depletion: 8.48218e-12
- Human toxicity, cancer: 9.99396e-12
- Human toxicity, non-cancer: 1.14852e-10
- EF-particulate Matter: 4.60464e-9
- Ionising radiation, human health: 0.00141185
- Photochemical ozone formation - human health: 5.6786e-5
- Acidification: 0.000126913
- Eutrophication, terrestrial: 0.000198299
- Eutrophication, freshwater: 5.6985e-8

## Deviations from the LCI method principle
The background data uses:
- the \xe2\x80\x9cRecycled content cut-off\xe2\x80\x9d approach to allocate end-of-life by-products and secondary materials. This allocation is explained in the description of the recycled content system model (http://www.ecoinvent.org/database/system-models-in-ecoinvent-3/cut-off-system-model/allocation-cut-off-by-classification.html).
OR
- EF compliant data

## Deviations from the LCI method approaches
Background data:
- the \xe2\x80\x9cRecycled content cut-off\xe2\x80\x9d approach to allocate end-of-life by-products and secondary materials. This allocation is explained in the description of the recycled content system model (http://www.ecoinvent.org/database/system-models-in-ecoinvent-3/cut-off-system-model/allocation-cut-off-by-classification.html). The ecoinvent database mostly relies on “Allocation – market values” apart for few exceptions particularly in the energy sector. ecoinvent energy data is replaced with EF3.0 core data as per the EF guidelines version 2.0.
OR
- EF compliant data

## Modelling constants
All modelling constants follow the requirements listed in the Tender Specifications 070201/2020/SER/ENV.B1. Completeness: There are no intentional cut-offs in the inventory no matter how small their contribution to all the EF impact categories is. Eventual cut-offs are in compliance with the Guide for EF compliant data sets (JRC 2020), i.e. only if below the 3% cut-off rule. Water use: water use is modelled at country level using separate flows for water withdrawal, water release and water evaporation. Handling multi-functional processes: the following PEF multi- functionality decision hierarchy is applied for resolving all multi- functionality problems: (1) subdivision or system expansion; (2) allocation based on a relevant underlying physical relationship (substitution may apply here); (3) allocation based on some other relationship. Direct land use change: GHG emissions from direct LUC allocated to good/service for 20 years after the LUC occurs, with IPCC default values. Carbon storage and delayed emissions: credits associated with temporary (carbon) storage or delayed emissions up to 300 years are not be considered. Emissions off-setting: are not included. Capital goods (including infrastructures) and their End of life: they are included. System boundaries: system boundaries include all processes linked to the product supply chain (e.g. maintenance). Time period: emissions and removals are modelled as if released or removed at the beginning of the assessment method. Fossil and biogenic carbon emissions and removals: removals and emissions are modelled as follows: All GHG emissions from fossil fuels (including peat and limestone) are modelled consistently with the most updated ILCD list of elementary flows. The non-fossil (biogenic) carbon flows are modelled consistently with the most updated ILCD list of elementary flows.

## Cut-off and completeness
There are no intentional cut-offs in the inventory no matter how small their contribution to all the EF impact categories is. Eventual cut-offs are in compliance with the Guide for EF compliant data sets (JRC 2020), i.e. only if below the 3% cut-off rule. The dataset dry mass and water balance has been checked to ensure the inventory is complete. Capital goods (e.g. infrastructure) and their end-of-life are included.

## Data selection and combination
These datasets include, in both their foreground and background data, links to EF3.0 compliant data.
The relevant background data on energy, transport, and End of Life are from the LCDN data node (http://lcdn.thinkstep.com/Node/).
All other background data in the supply of this product for which no EF3.0 process was available are from ecoinvent v3.7 database (www.ecoinvent.org) or other data sources.

## Data treatment and extrapolations
Several data sources have been used to model the inventory.

## Review details
Internal reviews have been asked to review the plausibility of the unit process, LCIA scores, and DQRs. Internal reviewers have also been asked to review the data for EF compliancy. The consortium is therefore responsible for aspects such as compliancy with the ILCD format, including validation in Look@LCI, and nomenclature.
Internal reviwers have been asked to judge based on the process name, that the unit process models in a complete and representative way the process in the requested location. The review encompassed the plausability of:
- exchanges with nature (elementary flows) as well as exchanges such as product and waste flows.
- meta information (general comment, technology comment, system boundaries, allocation, cut-off rules, etc.). Reviewers were asked to judge if the provided information is enough to understand the content of the process.
- LCIA scores
- DQRs including precision, technology, time and geography. As well as the overall DQR.
External reviewers have been asked to provide their expertise in the field of interest. External reviewers have been asked to review the unit process, including eventual methodological choices, the LCIA scores (provided with contribution scores as well), and DQRs. External reviewers have been provided all the information in a tool developed by the consortium for the purpose of this project.
External reviewers have been asked to judge based on the process name, that the unit process models in a complete and representative way the process in the requested location. The review encompassed:
- Plausability and completeness of exchanges with nature (elementary flows) as well as exchanges such as product and waste flows.
- Review of meta information (general comment, technology comment, system boundaries, allocation, cut-off rules, etc.). Reviewers were asked to judge if the provided information is enough to understand the content of the process.
- Review of properties (biogenic carbon and water content).
- Review of allocation keys.
- Plausability of LCIA scores calculated by the consortium.
- Plausability of DQRs including precision, technology, time and geography. As well as the overall DQR.

## Data sources
- Background Data for Representative products and organisations. EF 3.0 compliant (data stock)
- UN Data (2018) Statistics Data for Lubricants Productions, http://data.un.org/Data.aspx?q=Lubricants&d=EDATA&f=cmID%3aLU, United Nations Statistics Division, Global.
- MPC (2021) Silicone Paper, http://www.mpcpaper.com/products8.html, Montreal Paper Cutting Inc, Montreal, Canada
- Microtec (2021) Shoe Heat Press DCH-100-S,https://www.heatpress.cn/products/DCH-100-S-Shoe-Heat-Press.html, MICROTEC TECHNOLOGY COMPANY LTD., Shenzhen, China
- Microtec (2013) Shoe Heat Press, Manual Shoe Personlization Heat Press, https://youtu.be/H3vZzrHrypI, MICROTEC TECHNOLOGY COMPANY LTD., Shenzhen, China

## Intended applications
Implementation of regular Product Environmental Footprint (PEF) studies and Organisation Environmental Footprint (OEF) studies exclusively under the specified Product groups and sectors as defined in the Product Environmental Footprint Category Rules (PEFCR) and Organisation Environmental Footprint Sectorial Rules (OEFSR) listed in http://ec.europa.eu/environment/eussd/smgp/PEFCR_OEFSR.htm
