# compacting, mechanical; compacting process; production mix, at plant; service

Dataset: ILCD process, Partly terminated system
Geography: GLO
Reference year: 2021
Valid until: 2024
Classification: Systems / Textiles, furnitures and other interiors
LCI method principle: Attributional
LCI method approaches: Allocation - market value
Completeness: All relevant flows quantified
Project: Provision of process-based 3.0 Environmental Footprint-compliant life cycle inventory datasets - Apparel 1 - contract number 070201/2020/840291/SER/ENV.B.1
Generated by: Life Cycle Indonesia
Owner: PRé Sustainability B.V.
Compliance: ILCD Data Network - Entry-level; Suggestions for updating the PEF method 2019; ISO 14040 Environmental Management – Life Cycle Assessment – Principles and Framework, 2006; ISO 14044:2006. Environmental Management – Life Cycle Assessment – Requirements and guidelines.; Environmental Footprint 3.1
Review: Dependent internal review by Avraam Symeonidis, Emilia Moreno Ruiz; Independent review panel by Subramanian Senthilkannan Muthu
Data quality: Overall quality: Good; Time representativeness: Very good; Geographical representativeness: Fair; Technological representativeness: Very good; Precision: Good; Methodological appropriateness and consistency: Not applicable
Amounts: no units in this file; such an amount is in the reference unit of its flow, which a separate flow dataset defines
copyright: true
licenseType: Free of charge for some user types or use types
accessRestrictions: Free of charge for all final users implementing a regular Product Environmental Footprint (PEF) studies and Organisation Environmental Footprint (OEF) studies exclusively under the specified Product groups and sectors as defined in the Product Environmental Footprint Category Rules (PEFCR) and Organisation Environmental Footprint Sectorial Rules (OEFSR) listed in http://ec.europa.eu/environment/eussd/smgp/PEFCR_OEFSR.htm and in accordance with the terms and conditions of the EULA (available at https://ecoinvent.lca-data.com/) exclusively until 31st December 2024. Any use of this dataset or any derivative data not within the specific context of one of the PEF/OEF projects or after the end of 2024 is not permitted.

## General comment
Notice: this data set supersedes the EF3.0-compliant version (see link under "preceding data set version" below calculated with the EF3.0). The life cycle inventory is not changed from the original EF3.0 data set. The LCIA results are calculated based on the EF3.1 methods which provide updated characterisation factors in the following impact categories: Climate Change, Ecotoxicity freshwater, Photochemical Ozone Formation, Acidification, Human Toxicity non-cancer, and Human Toxicity cancer. The review report and the data quality ratings refer to the original results. The data set has been updated by the European Commission on the basis of the original EF3.0 data set delivered by the data provider.The compactor machine used in Textile Factory is a compaction machine used in textile finishing of apparel fabric. The compactor is textile machinery that is used for knitted fabric like jersey, pique, interlock, plush, rib, etc. as well as cotton blended fabric in rope form. The compactor is used for controlling shrinkage of the fabric, GSM control and make compaction the fabric in a lengthwise direction to provide overfeed to the fabric while processing in presence of steam and able to control the shrinkage. The text compactor is used as a finishing machine after dyeing.

Mashiur Rahman (2014) An Overview of Compactor Machine for Textile Factory, https://autogarment.com/compactor-machine-used-in-textile-factory/, Autogarment

## Technology and included processes
The compacting machine is a knitted fabric shrinkage control machine, which can compact the fabric in the lengthwise direction, to provide overfeed to the fabric while processing in presence of steam and able to control the shrinkage. In other words, this is a process of compacting the fabric in a lengthwise direction.

The fabric passes between two metal cylinders, one cylinder rotates faster than the other. The fabric is restrained by shoes that are positioned against the cylinders. The fabric delivery cylinder rotates faster than the take-off cylinder and the action is similar to stuffing a string into a straw. The friction causes filling yarns to move closer together and a loss of fabric length. The degree of compaction can be controlled by the differential speeds of the two calendar rolls.

The activity starts when the material enters the process. The materials entering the process are energy uses and infrastructure. There is no direct emission to soil and air since the emission comes from electricity usage, while the hazardous waste comes from the waste lube oil. Steam consumption is assumed to be ideal, hence there is no loss of steam as emission during the process. Oil consumption for the operation of the machine is not accounted for because the oil circulated. The amount of makeup oil is not significant hence included in the cut-off. In the model, the energy sources of machines are used solely from electricity. The consumption of lubricating oil using a thermobonding oven as a proxy.

Textile Comitee (Ministry of Textiles Government of India). 2021. http://textilescommittee.nic.in/sites/default/files/Pro1.pdf

## Parameters
- kg_0: 2.83694e-7
  Mass in kg, for lubricating oil // lubricants at refinery // rsa; Articulated lorry transport, Euro 4, Total weight >32 t; EU+EFTA+UK
- km_0: 1000
  Distance in km, for lubricating oil // lubricants at refinery // rsa; Articulated lorry transport, Euro 4, Total weight >32 t; EU+EFTA+UK
- kg_km_0: 0.000283694; = kg_0*km_0
  Transport amount in km*km, for lubricating oil // lubricants at refinery // rsa; Articulated lorry transport, Euro 4, Total weight >32 t; EU+EFTA+UK
- kg_1: 1.16387e-7
  Mass in kg, for lubricating oil // lubricants at refinery // raf; Articulated lorry transport, Euro 4, Total weight >32 t; EU+EFTA+UK
- km_1: 1000
  Distance in km, for lubricating oil // lubricants at refinery // raf; Articulated lorry transport, Euro 4, Total weight >32 t; EU+EFTA+UK
- kg_km_1: 0.000116387; = kg_1*km_1
  Transport amount in km*km, for lubricating oil // lubricants at refinery // raf; Articulated lorry transport, Euro 4, Total weight >32 t; EU+EFTA+UK
- kg_2: 3.04998e-6
  Mass in kg, for lubricating oil // lubricants at refinery // ras w/o cn; Articulated lorry transport, Euro 4, Total weight >32 t; EU+EFTA+UK
- km_2: 1000
  Distance in km, for lubricating oil // lubricants at refinery // ras w/o cn; Articulated lorry transport, Euro 4, Total weight >32 t; EU+EFTA+UK
- kg_km_2: 0.00304998; = kg_2*km_2
  Transport amount in km*km, for lubricating oil // lubricants at refinery // ras w/o cn; Articulated lorry transport, Euro 4, Total weight >32 t; EU+EFTA+UK
- kg_3: 2.52207e-6
  Mass in kg, for lubricating oil // lubricants at refinery // ru; Articulated lorry transport, Euro 4, Total weight >32 t; EU+EFTA+UK
- km_3: 1000
  Distance in km, for lubricating oil // lubricants at refinery // ru; Articulated lorry transport, Euro 4, Total weight >32 t; EU+EFTA+UK
- kg_km_3: 0.00252207; = kg_3*km_3
  Transport amount in km*km, for lubricating oil // lubricants at refinery // ru; Articulated lorry transport, Euro 4, Total weight >32 t; EU+EFTA+UK
- kg_4: 2.38075e-6
  Mass in kg, for lubricating oil // lubricants at refinery // rna; Articulated lorry transport, Euro 4, Total weight >32 t; EU+EFTA+UK
- km_4: 1000
  Distance in km, for lubricating oil // lubricants at refinery // rna; Articulated lorry transport, Euro 4, Total weight >32 t; EU+EFTA+UK
- kg_km_4: 0.00238075; = kg_4*km_4
  Transport amount in km*km, for lubricating oil // lubricants at refinery // rna; Articulated lorry transport, Euro 4, Total weight >32 t; EU+EFTA+UK
- kg_5: 4.84255e-7
  Mass in kg, for lubricating oil // lubricants at refinery // cn; Articulated lorry transport, Euro 4, Total weight >32 t; EU+EFTA+UK
- km_5: 1000
  Distance in km, for lubricating oil // lubricants at refinery // cn; Articulated lorry transport, Euro 4, Total weight >32 t; EU+EFTA+UK
- kg_km_5: 0.000484255; = kg_5*km_5
  Transport amount in km*km, for lubricating oil // lubricants at refinery // cn; Articulated lorry transport, Euro 4, Total weight >32 t; EU+EFTA+UK
- kg_6: 1.55356e-6
  Mass in kg, for lubricating oil // lubricants at refinery // eu+efta+uk; Articulated lorry transport, Euro 4, Total weight >32 t; EU+EFTA+UK
- km_6: 997.705
  Distance in km, for lubricating oil // lubricants at refinery // eu+efta+uk; Articulated lorry transport, Euro 4, Total weight >32 t; EU+EFTA+UK
- kg_km_6: 0.00155; = kg_6*km_6
  Transport amount in km*km, for lubricating oil // lubricants at refinery // eu+efta+uk; Articulated lorry transport, Euro 4, Total weight >32 t; EU+EFTA+UK
- kg_7: 1.55356e-6
  Mass in kg, for lubricating oil // lubricants at refinery // eu+efta+uk; Transoceanic ship, containers; GLO
- km_7: 18023.1
  Distance in km, for lubricating oil // lubricants at refinery // eu+efta+uk; Transoceanic ship, containers; GLO
- kg_km_7: 0.028; = kg_7*km_7
  Transport amount in km*km, for lubricating oil // lubricants at refinery // eu+efta+uk; Transoceanic ship, containers; GLO
- kg_8: 2.83694e-7
  Mass in kg, for lubricating oil // lubricants at refinery // rsa; Transoceanic ship, containers; GLO
- km_8: 18000
  Distance in km, for lubricating oil // lubricants at refinery // rsa; Transoceanic ship, containers; GLO
- kg_km_8: 0.0051065; = kg_8*km_8
  Transport amount in km*km, for lubricating oil // lubricants at refinery // rsa; Transoceanic ship, containers; GLO
- kg_9: 1.16387e-7
  Mass in kg, for lubricating oil // lubricants at refinery // raf; Transoceanic ship, containers; GLO
- km_9: 18000
  Distance in km, for lubricating oil // lubricants at refinery // raf; Transoceanic ship, containers; GLO
- kg_km_9: 0.00209497; = kg_9*km_9
  Transport amount in km*km, for lubricating oil // lubricants at refinery // raf; Transoceanic ship, containers; GLO
- kg_10: 3.04998e-6
  Mass in kg, for lubricating oil // lubricants at refinery // ras w/o cn; Transoceanic ship, containers; GLO
- km_10: 18000
  Distance in km, for lubricating oil // lubricants at refinery // ras w/o cn; Transoceanic ship, containers; GLO
- kg_km_10: 0.0548996; = kg_10*km_10
  Transport amount in km*km, for lubricating oil // lubricants at refinery // ras w/o cn; Transoceanic ship, containers; GLO
- kg_11: 2.52207e-6
  Mass in kg, for lubricating oil // lubricants at refinery // ru; Transoceanic ship, containers; GLO
- km_11: 18000
  Distance in km, for lubricating oil // lubricants at refinery // ru; Transoceanic ship, containers; GLO
- kg_km_11: 0.0453973; = kg_11*km_11
  Transport amount in km*km, for lubricating oil // lubricants at refinery // ru; Transoceanic ship, containers; GLO
- kg_12: 2.38075e-6
  Mass in kg, for lubricating oil // lubricants at refinery // rna; Transoceanic ship, containers; GLO
- km_12: 18000
  Distance in km, for lubricating oil // lubricants at refinery // rna; Transoceanic ship, containers; GLO
- kg_km_12: 0.0428534; = kg_12*km_12
  Transport amount in km*km, for lubricating oil // lubricants at refinery // rna; Transoceanic ship, containers; GLO
- kg_13: 4.84255e-7
  Mass in kg, for lubricating oil // lubricants at refinery // cn; Transoceanic ship, containers; GLO
- km_13: 18000
  Distance in km, for lubricating oil // lubricants at refinery // cn; Transoceanic ship, containers; GLO
- kg_km_13: 0.00871659; = kg_13*km_13
  Transport amount in km*km, for lubricating oil // lubricants at refinery // cn; Transoceanic ship, containers; GLO

## Reference product
- compacting, mechanical // compacting, mechanical // glo: 1

## Inputs
- Electricity from Electricity grid mix 1kV-60kV - AU: 0.0039
- Electricity from Electricity grid mix 1kV-60kV - EU+EFTA+UK: 0.0569
- Electricity from Electricity grid mix 1kV-60kV - NZ: 0.0007
- Electricity from Electricity grid mix 1kV-60kV - RAF: 0.0124
- Electricity from Electricity grid mix 1kV-60kV - RNA: 0.0832
- Electricity from Electricity grid mix 1kV-60kV - RSA: 0.0282
- Electricity from Electricity grid mix 1kV-60kV - RU: 0.0166
- Transport of lubricating oil // lubricants at refinery // rsa by Articulated lorry transport, Euro 4, Total weight >32 t - EU+EFTA+UK: 0.000283694; = kg_km_0
- Transport of lubricating oil // lubricants at refinery // raf by Articulated lorry transport, Euro 4, Total weight >32 t - EU+EFTA+UK: 0.000116387; = kg_km_1
- Transport of lubricating oil // lubricants at refinery // ras w/o cn by Articulated lorry transport, Euro 4, Total weight >32 t - EU+EFTA+UK: 0.00304998; = kg_km_2
- Transport of lubricating oil // lubricants at refinery // ru by Articulated lorry transport, Euro 4, Total weight >32 t - EU+EFTA+UK: 0.00252207; = kg_km_3
- Transport of lubricating oil // lubricants at refinery // rna by Articulated lorry transport, Euro 4, Total weight >32 t - EU+EFTA+UK: 0.00238075; = kg_km_4
- Transport of lubricating oil // lubricants at refinery // cn by Articulated lorry transport, Euro 4, Total weight >32 t - EU+EFTA+UK: 0.000484255; = kg_km_5
- Transport of lubricating oil // lubricants at refinery // eu+efta+uk by Articulated lorry transport, Euro 4, Total weight >32 t - EU+EFTA+UK: 0.00155; = kg_km_6
- Transport of lubricating oil // lubricants at refinery // eu+efta+uk by Transoceanic ship, containers - GLO: 0.028; = kg_km_7
- Transport of lubricating oil // lubricants at refinery // rsa by Transoceanic ship, containers - GLO: 0.0051065; = kg_km_8
- Transport of lubricating oil // lubricants at refinery // raf by Transoceanic ship, containers - GLO: 0.00209497; = kg_km_9
- Transport of lubricating oil // lubricants at refinery // ras w/o cn by Transoceanic ship, containers - GLO: 0.0548996; = kg_km_10
- Transport of lubricating oil // lubricants at refinery // ru by Transoceanic ship, containers - GLO: 0.0453973; = kg_km_11
- Transport of lubricating oil // lubricants at refinery // rna by Transoceanic ship, containers - GLO: 0.0428534; = kg_km_12
- Transport of lubricating oil // lubricants at refinery // cn by Transoceanic ship, containers - GLO: 0.00871659; = kg_km_13
- Electricity from Electricity grid mix 1kV-60kV - CN: 0.0852724
- Electricity from Electricity grid mix 1kV-60kV - RAS w/o CN: 0.0934276
- compacting, mechanical // compacting, mechanical // glo, blackbox: 1
- compacting, mechanical // compacting, mechanical // glo, elementary: 1

## Impact indicators
- Eutrophication marine: 0.000112778
- Ecotoxicity, freshwater: 0.446501
- Land use: 0.225958
- Water use: 0.024473
- Resource use, minerals and metals: 7.64369e-8
- Resource use, fossils: 1.52411
- Climate change: 0.126611
- Ozone depletion: 1.47063e-11
- Human toxicity, cancer: 7.58775e-11
- Human toxicity, non-cancer: 8.77098e-10
- EF-particulate Matter: 4.16433e-8
- Ionising radiation, human health: 0.0053314
- Photochemical ozone formation - human health: 0.000339825
- Acidification: 0.000753664
- Eutrophication, terrestrial: 0.00122447
- Eutrophication, freshwater: 4.06092e-7

## Deviations from the LCI method principle
The background data uses:
- the \xe2\x80\x9cRecycled content cut-off\xe2\x80\x9d approach to allocate end-of-life by-products and secondary materials. This allocation is explained in the description of the recycled content system model (http://www.ecoinvent.org/database/system-models-in-ecoinvent-3/cut-off-system-model/allocation-cut-off-by-classification.html).
OR
- EF compliant data

## Deviations from the LCI method approaches
Background data:
- the \xe2\x80\x9cRecycled content cut-off\xe2\x80\x9d approach to allocate end-of-life by-products and secondary materials. This allocation is explained in the description of the recycled content system model (http://www.ecoinvent.org/database/system-models-in-ecoinvent-3/cut-off-system-model/allocation-cut-off-by-classification.html). The ecoinvent database mostly relies on “Allocation – market values” apart for few exceptions particularly in the energy sector. ecoinvent energy data is replaced with EF3.0 core data as per the EF guidelines version 2.0.
OR
- EF compliant data

## Modelling constants
All modelling constants follow the requirements listed in the Tender Specifications 070201/2020/SER/ENV.B1. Completeness: There are no intentional cut-offs in the inventory no matter how small their contribution to all the EF impact categories is. Eventual cut-offs are in compliance with the Guide for EF compliant data sets (JRC 2020), i.e. only if below the 3% cut-off rule. Water use: water use is modelled at country level using separate flows for water withdrawal, water release and water evaporation. Handling multi-functional processes: the following PEF multi- functionality decision hierarchy is applied for resolving all multi- functionality problems: (1) subdivision or system expansion; (2) allocation based on a relevant underlying physical relationship (substitution may apply here); (3) allocation based on some other relationship. Direct land use change: GHG emissions from direct LUC allocated to good/service for 20 years after the LUC occurs, with IPCC default values. Carbon storage and delayed emissions: credits associated with temporary (carbon) storage or delayed emissions up to 300 years are not be considered. Emissions off-setting: are not included. Capital goods (including infrastructures) and their End of life: they are included. System boundaries: system boundaries include all processes linked to the product supply chain (e.g. maintenance). Time period: emissions and removals are modelled as if released or removed at the beginning of the assessment method. Fossil and biogenic carbon emissions and removals: removals and emissions are modelled as follows: All GHG emissions from fossil fuels (including peat and limestone) are modelled consistently with the most updated ILCD list of elementary flows. The non-fossil (biogenic) carbon flows are modelled consistently with the most updated ILCD list of elementary flows.

## Cut-off and completeness
There are no intentional cut-offs in the inventory no matter how small their contribution to all the EF impact categories is. Eventual cut-offs are in compliance with the Guide for EF compliant data sets (JRC 2020), i.e. only if below the 3% cut-off rule. The dataset dry mass and water balance has been checked to ensure the inventory is complete. Capital goods (e.g. infrastructure) and their end-of-life are included.

## Data selection and combination
These datasets include, in both their foreground and background data, links to EF3.0 compliant data.
The relevant background data on energy, transport, and End of Life are from the LCDN data node (http://lcdn.thinkstep.com/Node/).
All other background data in the supply of this product for which no EF3.0 process was available are from ecoinvent v3.7 database (www.ecoinvent.org) or other data sources.

## Data treatment and extrapolations
Several data sources have been used to model the inventory.

## Review details
Internal reviews have been asked to review the plausibility of the unit process, LCIA scores, and DQRs. Internal reviewers have also been asked to review the data for EF compliancy. The consortium is therefore responsible for aspects such as compliancy with the ILCD format, including validation in Look@LCI, and nomenclature.
Internal reviwers have been asked to judge based on the process name, that the unit process models in a complete and representative way the process in the requested location. The review encompassed the plausability of:
- exchanges with nature (elementary flows) as well as exchanges such as product and waste flows.
- meta information (general comment, technology comment, system boundaries, allocation, cut-off rules, etc.). Reviewers were asked to judge if the provided information is enough to understand the content of the process.
- LCIA scores
- DQRs including precision, technology, time and geography. As well as the overall DQR.
External reviewers have been asked to provide their expertise in the field of interest. External reviewers have been asked to review the unit process, including eventual methodological choices, the LCIA scores (provided with contribution scores as well), and DQRs. External reviewers have been provided all the information in a tool developed by the consortium for the purpose of this project.
External reviewers have been asked to judge based on the process name, that the unit process models in a complete and representative way the process in the requested location. The review encompassed:
- Plausability and completeness of exchanges with nature (elementary flows) as well as exchanges such as product and waste flows.
- Review of meta information (general comment, technology comment, system boundaries, allocation, cut-off rules, etc.). Reviewers were asked to judge if the provided information is enough to understand the content of the process.
- Review of properties (biogenic carbon and water content).
- Review of allocation keys.
- Plausability of LCIA scores calculated by the consortium.
- Plausability of DQRs including precision, technology, time and geography. As well as the overall DQR.

## Data sources
- Background Data for Representative products and organisations. EF 3.0 compliant (data stock)
- UN Data (2018) Statistics Data for Lubricants Productions, http://data.un.org/Data.aspx?q=Lubricants&d=EDATA&f=cmID%3aLU, United Nations Statistics Division, Global.
- Dezhou Taiping Yang (2021) ,https://www.dzgdmachinery.com/tpyls2400-open-compactor-machine-3411663.html, Dezhou Taiping Yang Textile Machinery Co.,Ltd, Shandong, China
- F2F (2021)180 GSM(Brushed), 200-250 GSM(Unbrushed), Polyester / Cotton, Dyed and Printed, Interlock Buyer, https://www.fibre2fashion.com/fabrics/blended-knitted-fabric-buyers-1491179 , Fibre2Fashion, Wuhan Jundor Trading Co., Ltd., China

## Intended applications
Implementation of regular Product Environmental Footprint (PEF) studies and Organisation Environmental Footprint (OEF) studies exclusively under the specified Product groups and sectors as defined in the Product Environmental Footprint Category Rules (PEFCR) and Organisation Environmental Footprint Sectorial Rules (OEFSR) listed in http://ec.europa.eu/environment/eussd/smgp/PEFCR_OEFSR.htm
