# bark chips, elementary; composted in close system, for growing media; production mix, at plant; 440 kg/m3

Dataset: ILCD process, Unit process, single operation
Geography: EU+EFTA+UK
Reference year: 2020
Valid until: 2024
Classification: Other Services / Other services
LCI method principle: Attributional
LCI method approaches: Allocation - market value
Completeness: All relevant flows quantified
Project: Provision of process-based 3.0 Environmental Footprint-compliant life cycle inventory datasets - Renewable materials - contract number 070201/2020/840085/SER/ENV.B.1
Generated by: Blonk Sustainability Tools
Owner: Blonk Sustainability Tools
Compliance: Environmental Footprint non-primary supporting data set; Environmental Footprint 3.1
Amounts: no units in this file; such an amount is in the reference unit of its flow, which a separate flow dataset defines
copyright: true
licenseType: Free of charge for some user types or use types
accessRestrictions: Free of charge for all final users implementing a regular Product Environmental Footprint (PEF) studies and Organisation Environmental Footprint (OEF) studies exclusively under the specified Product groups and sectors as defined in the Product Environmental Footprint Category Rules (PEFCR) and Organisation Environmental Footprint Sectorial Rules (OEFSR) listed in http://ec.europa.eu/environment/eussd/smgp/PEFCR_OEFSR.htm and in accordance with the terms and conditions of the EULA (available at https://ecoinvent.lca-data.com/) exclusively until 31st December 2024. Any use of this dataset or any derivative data not within the specific context of one of the PEF/OEF projects or after the end of 2024 is not permitted.

## General comment
Notice: this data set supersedes the EF3.0-compliant version (see link under "preceding data set version" below calculated with the EF3.0). The life cycle inventory is not changed from the original EF3.0 data set. The LCIA results are calculated based on the EF3.1 methods which provide updated characterisation factors in the following impact categories: Climate Change, Ecotoxicity freshwater, Photochemical Ozone Formation, Acidification, Human Toxicity non-cancer, and Human Toxicity cancer. The review report and the data quality ratings refer to the original results. The data set has been updated by the European Commission on the basis of the original EF3.0 data set delivered by the data provider.This sub-process has limited documentation only. For all detailed documentation of the full model to which this data set belongs (such as DQRs, review reports and other technical documentation), please see this process: bark chips - EU+EFTA+UK []

## Technology and included processes
The process of composting can occur either in open air or in closed systems. Closed systems refer to anaerobic digestion processes of compost. Direct emissions from composting differ within the two systems. During the composting of bark, nitrogen is added to the bark pile to maintain the ideal C/N ratio. Nitrogen is added as urea in closed systems. Density is 440 kg/m3.

## Reference product
- bark chips, composted in close system, for growing media, production mix, at plant // bark chips // eu+efta+uk, elementary: 1

## Outputs
- nitrous oxide, Emissions to air, unspecified: 0.02772
- ammonia, Emissions to air, unspecified [AL]: 0.000102003
- ammonia, Emissions to air, unspecified [AT]: 0.00131424
- ammonia, Emissions to air, unspecified [BA]: 0.000127161
- ammonia, Emissions to air, unspecified [BE]: 0.00158189
- ammonia, Emissions to air, unspecified [BG]: 0.000405073
- ammonia, Emissions to air, unspecified [BY]: 0.00052598
- ammonia, Emissions to air, unspecified [CH]: 0.00156745
- ammonia, Emissions to air, unspecified [CZ]: 0.00109093
- ammonia, Emissions to air, unspecified [DE]: 0.0118729
- ammonia, Emissions to air, unspecified [DK]: 0.000860917
- ammonia, Emissions to air, unspecified [EE]: 0.000117559
- ammonia, Emissions to air, unspecified [ES]: 0.00509497
- ammonia, Emissions to air, unspecified [FI]: 0.000734345
- ammonia, Emissions to air, unspecified [FR]: 0.00837509
- ammonia, Emissions to air, unspecified [GB]: 0.00832281
- ammonia, Emissions to air, unspecified: 0.000518818
- ammonia, Emissions to air, unspecified [GR]: 0.000946772
- ammonia, Emissions to air, unspecified [HR]: 0.000304419
- ammonia, Emissions to air, unspecified [HU]: 0.000798033
- ammonia, Emissions to air, unspecified [IE]: 0.000859638
- ammonia, Emissions to air, unspecified [IT]: 0.00716556
- ammonia, Emissions to air, unspecified [LT]: 0.00025101
- ammonia, Emissions to air, unspecified [LU]: 0.000174252
- ammonia, Emissions to air, unspecified [LV]: 0.000148011
- ammonia, Emissions to air, unspecified [MD]: 7.83154e-5
- ammonia, Emissions to air, unspecified [MK]: 8.71371e-5
- ammonia, Emissions to air, unspecified [NL]: 0.00265617
- ammonia, Emissions to air, unspecified [NO]: 0.00100544
- ammonia, Emissions to air, unspecified [PL]: 0.00305695
- ammonia, Emissions to air, unspecified [PT]: 0.000964577
- ammonia, Emissions to air, unspecified [RO]: 0.00133914
- ammonia, Emissions to air, unspecified [SE]: 0.00145084
- ammonia, Emissions to air, unspecified [SI]: 0.000205459
- ammonia, Emissions to air, unspecified [SK]: 0.000482244
- ammonia, Emissions to air, unspecified [UA]: 0.00141394
- methane (biogenic), Emissions to air, unspecified: 0.264
- carbon monoxide (biogenic), Emissions to air, unspecified: 0.1254

## Impact indicators
- Eutrophication marine: 0.006072
- Ecotoxicity, freshwater: 8.95899
- Climate change: 14.6956
- Human toxicity, non-cancer: 1.41367e-8
- EF-particulate Matter: 1.386e-6
- Photochemical ozone formation - human health: 0.0026664
- Acidification: 0.133313
- Eutrophication, terrestrial: 0.530897
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
## Deviations from the LCI method principle
The background data uses:
- theRecycled content cut-off approach to allocate end-of-life by-products and secondary materials. This allocation is explained in the description of the recycled content system model (http://www.ecoinvent.org/database/system-models-in-ecoinvent-3/cut-off-system-model/allocation-cut-off-by-classification.html).
OR
- EF compliant data

## Deviations from the LCI method approaches
Background data:
- the \xe2\x80\x9cRecycled content cut-off\xe2\x80\x9d approach to allocate end-of-life by-products and secondary materials. This allocation is explained in the description of the recycled content system model (http://www.ecoinvent.org/database/system-models-in-ecoinvent-3/cut-off-system-model/allocation-cut-off-by-classification.html). The ecoinvent database mostly relies on “Allocation – market values” apart for few exceptions particularly in the energy sector. ecoinvent energy data is replaced with EF3.0 core data as per the EF guidelines version 2.0.
OR
- EF compliant data

## Modelling constants
All modelling constants follow the requirements listed in the Tender Specifications 070201/2020/SER/ENV.B1. Completeness: There are no intentional cut-offs in the inventory no matter how small their contribution to all the EF impact categories is. Eventual cut-offs are in compliance with the Guide for EF compliant data sets (JRC 2020), i.e. only if below the 3% cut-off rule. Water use: water use is modelled at country level using separate flows for water withdrawal, water release and water evaporation. Handling multi-functional processes: the following PEF multi- functionality decision hierarchy is applied for resolving all multi- functionality problems: (1) subdivision or system expansion; (2) allocation based on a relevant underlying physical relationship (substitution may apply here); (3) allocation based on some other relationship. Direct land use change: GHG emissions from direct LUC allocated to good/service for 20 years after the LUC occurs, with IPCC default values. Carbon storage and delayed emissions: credits associated with temporary (carbon) storage or delayed emissions up to 300 years are not be considered. Emissions off-setting: are not included. Capital goods (including infrastructures) and their End of life: they are included. System boundaries: system boundaries include all processes linked to the product supply chain (e.g. maintenance). Time period: emissions and removals are modelled as if released or removed at the beginning of the assessment method. Fossil and biogenic carbon emissions and removals: removals and emissions are modelled as follows: All GHG emissions from fossil fuels (including peat and limestone) are modelled consistently with the most updated ILCD list of elementary flows. The non-fossil (biogenic) carbon flows are modelled consistently with the most updated ILCD list of elementary flows.

## Cut-off and completeness
There are no intentional cut-offs in the inventory no matter how small their contribution to all the EF impact categories is. Eventual cut-offs are in compliance with the Guide for EF compliant data sets (JRC 2020), i.e. only if below the 3% cut-off rule. The dataset dry mass and water balance has been checked to ensure the inventory is complete. Capital goods (e.g. infrastructure) and their end-of-life are included.

## Data selection and combination
These datasets include, in both their foreground and background data, links to EF3.0 compliant data.
The relevant background data on energy, transport, and End of Life are from the LCDN data node (http://lcdn.thinkstep.com/Node/).
All other background data in the supply of this product for which no EF3.0 process was available are from ecoinvent v3.7 database (www.ecoinvent.org) or other data sources.

## Data treatment and extrapolations
Several data sources have been used to model the inventory.

## Use advice
This data set is a supporting sub-data set and must be used exclusively as sub-data set of its corresponding level-1 partly disaggregated data set (see “General comment” field for exact name and UUID).

## Data sources
- Background Data for Representative products and organisations. EF 3.0 compliant (data stock)
- Hoitink, H. A. (1980). Composted bark, a lightweight growth medium. Plant disease, 64, 142-147.
- Peek, C. J., Montfoort, J. A., Dröge, R., Guis, B., Baas, K., van Huet, B., ... & van den Berghe, A. C. W. M. (2019). Methodology report on the calculation of emissions to air from the sectors Energy, Industry and Waste: as used by the Dutch Pollutant Release and Transfer Register.
- Andersen, Jacob K., Alessio Boldrin, Jerker Samuelsson, Thomas H. Christensen, and Charlotte Scheutz. 2010. “Quantification of Greenhouse Gas Emissions from Windrow Composting of Garden Waste.” Journal of Environmental Quality 39 (2): 713–24. https://doi.org/10.2134/jeq2009.0329.
- Sullivan, D. M., Bary, A. I., Miller, R. O., & Brewer, L. J. (2018). Interpreting compost analyses. Oregon State University Extension Service.
- Confidential primary data from the industry, 2020

## Intended applications
Implementation of regular Product Environmental Footprint (PEF) studies and Organisation Environmental Footprint (OEF) studies exclusively under the specified Product groups and sectors as defined in the Product Environmental Footprint Category Rules (PEFCR) and Organisation Environmental Footprint Sectorial Rules (OEFSR) listed in http://ec.europa.eu/environment/eussd/smgp/PEFCR_OEFSR.htm
