# rubber, foamed, fossil fuel-based, elementary; technology mix; production mix, at plant; 1 kg

Dataset: ILCD process, Unit process, single operation
Geography: GLO
Reference year: 2021
Valid until: 2024
Classification: Other Services / Other services
LCI method principle: Attributional
LCI method approaches: Allocation - market value
Completeness: All relevant flows quantified
Project: Provision of process-based 3.0 Environmental Footprint-compliant life cycle inventory datasets - Apparel 1 - contract number 070201/2020/840291/SER/ENV.B.1
Generated by: Life Cycle Indonesia
Owner: PRé Sustainability B.V.
Compliance: Environmental Footprint non-primary supporting data set; Environmental Footprint 3.1
Amounts: no units in this file; such an amount is in the reference unit of its flow, which a separate flow dataset defines
copyright: true
licenseType: Free of charge for some user types or use types
accessRestrictions: Free of charge for all final users implementing a regular Product Environmental Footprint (PEF) studies and Organisation Environmental Footprint (OEF) studies exclusively under the specified Product groups and sectors as defined in the Product Environmental Footprint Category Rules (PEFCR) and Organisation Environmental Footprint Sectorial Rules (OEFSR) listed in http://ec.europa.eu/environment/eussd/smgp/PEFCR_OEFSR.htm and in accordance with the terms and conditions of the EULA (available at https://ecoinvent.lca-data.com/) exclusively until 31st December 2024. Any use of this dataset or any derivative data not within the specific context of one of the PEF/OEF projects or after the end of 2024 is not permitted.

## General comment
Notice: this data set supersedes the EF3.0-compliant version (see link under "preceding data set version" below calculated with the EF3.0). The life cycle inventory is not changed from the original EF3.0 data set. The LCIA results are calculated based on the EF3.1 methods which provide updated characterisation factors in the following impact categories: Climate Change, Ecotoxicity freshwater, Photochemical Ozone Formation, Acidification, Human Toxicity non-cancer, and Human Toxicity cancer. The review report and the data quality ratings refer to the original results. The data set has been updated by the European Commission on the basis of the original EF3.0 data set delivered by the data provider.This sub-process has limited documentation only. For all detailed documentation of the full model to which this data set belongs (such as DQRs, review reports and other technical documentation), please see this process: rubber, foamed, fossil fuel-based - GLO []

## Technology and included processes
The model is based on Flexible rubber Foam (Polyurethane) production, the energy and infrastructure modelled based on a continuous production line.
The process begins when the liquid chemicals are delivered either by railroad tanker cars or tank trucks and pumped into large holding tanks. From there, the chemicals are pumped into smaller heated mixing tanks, and are kept separate if they react with each other. For continuous manufacture of foam such as slabstock, more than two monomer streams are typically used. Continuous dispensing (also called open pouring or free-rise) is used in the production of rigid and flexible low-density foams. A specific amount of each chemical, measured by metered pumps, is fed from the mixing tanks into a mixing head, where the blending of the chemicals take place. The reactive components are poured onto a moving surface or conveyor belt, where the foam rises and cures to form slabstock. As the foam moves toward the end of the conveyor belt, it is automatically cut by a horizontal bandsaw into smaller pieces, usually 12 ft (3.66 m) long sections. After cutting, the foam sections are cured at room temperature for 12 hours or more. They are not stacked since they are not firm enough to withstand any weight. After curing, a second automatic bandsaw cuts the sections into the desired thickness. Other shapes can also be cut.

The activity starts when the material enter the process. Raw materials, auxiliary chemicals, energy uses, and infrastructure are included in the model. There is no direct emission to soil, water, and air as the the energy used solely from the electricity. While the hazardous waste comes from waste lube oil. The consumption of lubricating oil using a thermalbonding machine as a proxy.

Melito, Steve (2020) Foam Rubber vs. Sponge Rubber: What’s the Difference?. Elasto Proxy. https://www.elastoproxy.com/foam-rubber-vs-sponge-rubber/
Sheppard, Laurel (1999) Foam Rubber. How Product Are Made Volume 5. http://www.madehow.com/Volume-5/Foam-Rubber.html

## Reference product
- rubber, foamed, fossil fuel-based // rubber, foamed, fossil fuel-based // glo, elementary: 1

## Impact indicators
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
## Deviations from the LCI method principle
The background data use the \xe2\x80\x9cRecycled content cut-off\xe2\x80\x9d approach to allocate end-of-life by-products and secondary materials. This allocation is explained in the description of the recycled content system model (http://www.ecoinvent.org/database/system-models-in-ecoinvent-3/cut-off-system-model/allocation-cut-off-by-classification.html).

## Deviations from the LCI method approaches
Background data:
- the \xe2\x80\x9cRecycled content cut-off\xe2\x80\x9d approach to allocate end-of-life by-products and secondary materials. This allocation is explained in the description of the recycled content system model (http://www.ecoinvent.org/database/system-models-in-ecoinvent-3/cut-off-system-model/allocation-cut-off-by-classification.html). The ecoinvent database mostly relies on “Allocation – market values” apart for few exceptions particularly in the energy sector. ecoinvent energy data is replaced with EF3.0 core data as per the EF guidelines version 2.0.
OR
- EF compliant data

## Modelling constants
All modelling constants follow the requirements listed in the Tender Specifications ENV.B.1/SER/2016/0038vl. Completeness: All known environmental flows are included. All known resource uses and emissions are listed in the inventory. Water use: water use is modelled at country level using separate flows for water withdrawal, water release and water evaporation. Cut-off: All known environmental flows are included. All known resource uses and emissions are listed in the inventory. Handling multi-functional processes: the following PEF multi- functionality decision hierarchy is applied for resolving all multi- functionality problems: (1) subdivision or system expansion; (2) allocation based on a relevant underlying physical relationship (substitution may apply here); (3) allocation based on some other relationship. Direct land use change: GHG emissions from direct LUC allocated to good/service for 20 years after the LUC occurs, with IPCC default values. Carbon storage and delayed emissions: credits associated with temporary (carbon) storage or delayed emissions up to 300 years are not be considered. Emissions off-setting: are not included. Capital goods (including infrastructures) and their End of life: they are included. System boundaries: system boundaries include all processes linked to the product supply chain (e.g. maintenance). Time period: emissions and removals are modelled as if released or removed at the beginning of the assessment method. Fossil and biogenic carbon emissions and removals: removals and emissions are modelled as follows: All GHG emissions from fossil fuels (including peat and limestone) are modelled consistently with the most updated ILCD list of elementary flows. The non-fossil (biogenic) carbon flows are modelled consistently with the most updated ILCD list of elementary flows.

## Cut-off and completeness
All known environmental flows are included. All known resource uses and emissions are listed in the inventory. The dataset dry mass balance has been checked to ensure the inventory is complete. Capital goods (e.g. infrastructure) and their end-of-life are included.

## Data selection and combination
These datasets include, in both their foreground and background data, links to EF3.0 compliant data.
The relevant background data on energy, transport, and End of Life are from the LCDN data node (http://lcdn.thinkstep.com/Node/).
All other background data in the supply of this product for which no EF3.0 process was available are from ecoinvent v3.7 database (www.ecoinvent.org) or other data sources.

## Data treatment and extrapolations
Several data sources have been used to model the inventory.

## Use advice
This data set is a supporting sub-data set and must be used exclusively as sub-data set of its corresponding level-1 partly disaggregated data set (see “General comment” field for exact name and UUID).

## Data sources
- Background Data for Representative products and organisations. EF 3.0 compliant (data stock)
- UN Data (2018) Statistics Data for Lubricants Productions, http://data.un.org/Data.aspx?q=Lubricants&d=EDATA&f=cmID%3aLU, United Nations Statistics Division, Global.
- Shuming Chen, Yang Jiang, Jing Chen, and Dengfeng Wang (2015). The Effects of Various Additive Components on the Sound Absorption Performances of Polyurethane Foams, doi:10.1155/2015/317561, Hindawi : Advances in Materials Science and Engineering, Changchun, China
- D&T Industry (2021) Horizontal Automatic Continuously Foaming Produced-Line, Hangzhou Fuyang D&T Industry Co., Ltd.http://en.dtfirm.com/product/64.html, Hangzhou Fuyang D&T Industry Co., Ltd., Hangzhou, China
- Lebon (2021) Nonwoven Oven Machine, Catalog and Company Messages, Qingdao Lebon Industry Co., Ltd., China

## Intended applications
Implementation of regular Product Environmental Footprint (PEF) studies and Organisation Environmental Footprint (OEF) studies exclusively under the specified Product groups and sectors as defined in the Product Environmental Footprint Category Rules (PEFCR) and Organisation Environmental Footprint Sectorial Rules (OEFSR) listed in http://ec.europa.eu/environment/eussd/smgp/PEFCR_OEFSR.htm
