# heat sealing, textiles; heat sealing process; production mix, at plant; service

Dataset: ILCD process, Partly terminated system
Geography: GLO
Reference year: 2021
Valid until: 2024
Classification: Systems / Textiles, furnitures and other interiors
LCI method principle: Attributional
LCI method approaches: Allocation - market value
Completeness: All relevant flows quantified
Project: Provision of process-based 3.0 Environmental Footprint-compliant life cycle inventory datasets - Apparel 1 - contract number 070201/2020/840291/SER/ENV.B.1
Generated by: Life Cycle Indonesia
Owner: PRé Sustainability B.V.
Compliance: ILCD Data Network - Entry-level; Suggestions for updating the PEF method 2019; ISO 14040 Environmental Management – Life Cycle Assessment – Principles and Framework, 2006; ISO 14044:2006. Environmental Management – Life Cycle Assessment – Requirements and guidelines.; Environmental Footprint 3.1
Review: Dependent internal review by Avraam Symeonidis, Emilia Moreno Ruiz; Independent review panel by Fábio Valebona
Data quality: Overall quality: Good; Time representativeness: Very good; Geographical representativeness: Good; Technological representativeness: Good; Precision: Good; Methodological appropriateness and consistency: Not applicable
Amounts: no units in this file; such an amount is in the reference unit of its flow, which a separate flow dataset defines
copyright: true
licenseType: Free of charge for some user types or use types
accessRestrictions: Free of charge for all final users implementing a regular Product Environmental Footprint (PEF) studies and Organisation Environmental Footprint (OEF) studies exclusively under the specified Product groups and sectors as defined in the Product Environmental Footprint Category Rules (PEFCR) and Organisation Environmental Footprint Sectorial Rules (OEFSR) listed in http://ec.europa.eu/environment/eussd/smgp/PEFCR_OEFSR.htm and in accordance with the terms and conditions of the EULA (available at https://ecoinvent.lca-data.com/) exclusively until 31st December 2024. Any use of this dataset or any derivative data not within the specific context of one of the PEF/OEF projects or after the end of 2024 is not permitted.

## General comment
Notice: this data set supersedes the EF3.0-compliant version (see link under "preceding data set version" below calculated with the EF3.0). The life cycle inventory is not changed from the original EF3.0 data set. The LCIA results are calculated based on the EF3.1 methods which provide updated characterisation factors in the following impact categories: Climate Change, Ecotoxicity freshwater, Photochemical Ozone Formation, Acidification, Human Toxicity non-cancer, and Human Toxicity cancer. The review report and the data quality ratings refer to the original results. The data set has been updated by the European Commission on the basis of the original EF3.0 data set delivered by the data provider.Heat sealing is one of the textile finishing process. Heat sealing refers to the marking, finishing and repairing of textiles using a thermal process by way of heat-seal machines and transfer presses. In garments manufacturing it’s called heat seal or heat transfer label which shows the company’s brand logo or other important messages. Label attach by pressure and heat. There are two types of films commonly used, e.g. PU and PVC. Polyurethane films are the desired medium for t-shirt transfer graphics. These PU products tend to be thinner and more stretchable so they feel like part of the garment. This soft “hand” is what makes them so perfect for apparel graphics. PVC T-shirt films are generally thicker and less expensive. Being thicker means they’re less flexible and don’t quite have as soft a hand as PU. And they’re not considered to be as safe for young children.

Thermotex (2021) Heat Seals Machines https://www.thermo-tex.co.uk/products/heat-seal-machines/, THERMOTEX NAGEL GmbH, Schutterwald, Germany
Ordnur (2021) Heat Transfer Operation and Guidelines of Garments Manufacturing https://ordnur.com/apparel/heat-transfer-operation-guidelines-garments-manufacturing/, Ordnur
Jerry (2021) A Basic Guide to Heat Transfer Vinyl & Heat Transfer Film https://blog.signwarehouse.com/basic-guide-to-t-shirt-vinyl-and-heat-transfer-film/, SignWarehouse

## Technology and included processes
A heat-seal machine is a device used for the thermal transfer (heat sealing) of labels, emblems and repair patches to garments and textiles of all kinds. The heat-seal machine functions by way of electronic control, a heating element, a heat-seal plate with silicone rubber and pressure technology. In the case of hand-operated heat-seal machines, patching is done via a pressure lever mechanism and with pneumatic machines via a pneumatic cylinder. (Thermotex, 2021)

First, cut the graphic and then weed it like the normal vinyl. Place the weeded graphic on the garment on the heat press. Cover the film with a Teflon sheet or silicone kraft paper to provide even heat distribution and prevent anything from sticking to the platen. Set the press for the recommended time, temperature, and pressure for the material and close it. After pressing the film, wait the recommended amount of time and remove the liner. (Jerry, 2021)

This process includes a heat transfer using heat sealing machines. The activity starts when the raw materials enter the process. Materials entering the process are included as well as energy uses and infrastructure. There is no direct emission to air since the emission comes from electricity usage, while non-hazardous waste comes from waste silicone kraft paper. However, since the machine used is a hand held machine and the size is relatively small compare to other industrial machine, the lube oil consumption is assumed to be very little and therefor are not significant in this process. The filmed area is assumed to be 50% area of the heat sealing machine upper plate using PU and PVC film equal usage probability. Machine capacity is determined based on 130 to 150 GSM t-shirts.

Thermotex (2021) Heat Seals Machines https://www.thermo-tex.co.uk/products/heat-seal-machines/, THERMOTEX NAGEL GmbH, Schutterwald, Germany
Jerry (2021) A Basic Guide to Heat Transfer Vinyl & Heat Transfer Film https://blog.signwarehouse.com/basic-guide-to-t-shirt-vinyl-and-heat-transfer-film/, SignWarehouse

## Parameters
- kg_0: 0.00229359
  Mass in kg, for polyurethane foam // polyurethane foam production // glo; Articulated lorry transport, Euro 4, Total weight >32 t; EU+EFTA+UK
- km_0: 998.433
  Distance in km, for polyurethane foam // polyurethane foam production // glo; Articulated lorry transport, Euro 4, Total weight >32 t; EU+EFTA+UK
- kg_km_0: 2.29; = kg_0*km_0
  Transport amount in km*km, for polyurethane foam // polyurethane foam production // glo; Articulated lorry transport, Euro 4, Total weight >32 t; EU+EFTA+UK
- kg_1: 0.00574179
  Mass in kg, for polyvinyl chloride, petrochemical // polyvinyl chloride (pvc) production, fossil fuel-based // glo; Articulated lorry transport, Euro 4, Total weight >32 t; EU+EFTA+UK
- km_1: 999.689
  Distance in km, for polyvinyl chloride, petrochemical // polyvinyl chloride (pvc) production, fossil fuel-based // glo; Articulated lorry transport, Euro 4, Total weight >32 t; EU+EFTA+UK
- kg_km_1: 5.74; = kg_1*km_1
  Transport amount in km*km, for polyvinyl chloride, petrochemical // polyvinyl chloride (pvc) production, fossil fuel-based // glo; Articulated lorry transport, Euro 4, Total weight >32 t; EU+EFTA+UK
- kg_2: 0.0084649
  Mass in kg, for kraft paper // kraft paper // eu+efta+uk; Articulated lorry transport, Euro 4, Total weight >32 t; EU+EFTA+UK
- km_2: 999.421
  Distance in km, for kraft paper // kraft paper // eu+efta+uk; Articulated lorry transport, Euro 4, Total weight >32 t; EU+EFTA+UK
- kg_km_2: 8.46; = kg_2*km_2
  Transport amount in km*km, for kraft paper // kraft paper // eu+efta+uk; Articulated lorry transport, Euro 4, Total weight >32 t; EU+EFTA+UK
- kg_3: 0.00229359
  Mass in kg, for polyurethane foam // polyurethane foam production // glo; Transoceanic ship, containers; GLO
- km_3: 18006.7
  Distance in km, for polyurethane foam // polyurethane foam production // glo; Transoceanic ship, containers; GLO
- kg_km_3: 41.3; = kg_3*km_3
  Transport amount in km*km, for polyurethane foam // polyurethane foam production // glo; Transoceanic ship, containers; GLO
- kg_4: 0.00574179
  Mass in kg, for polyvinyl chloride, petrochemical // polyvinyl chloride (pvc) production, fossil fuel-based // glo; Transoceanic ship, containers; GLO
- km_4: 17938.7
  Distance in km, for polyvinyl chloride, petrochemical // polyvinyl chloride (pvc) production, fossil fuel-based // glo; Transoceanic ship, containers; GLO
- kg_km_4: 103; = kg_4*km_4
  Transport amount in km*km, for polyvinyl chloride, petrochemical // polyvinyl chloride (pvc) production, fossil fuel-based // glo; Transoceanic ship, containers; GLO
- kg_5: 0.0084649
  Mass in kg, for kraft paper // kraft paper // eu+efta+uk; Transoceanic ship, containers; GLO
- km_5: 17956.5
  Distance in km, for kraft paper // kraft paper // eu+efta+uk; Transoceanic ship, containers; GLO
- kg_km_5: 152; = kg_5*km_5
  Transport amount in km*km, for kraft paper // kraft paper // eu+efta+uk; Transoceanic ship, containers; GLO

## Reference product
- heat sealing, textiles // heat sealing, textiles // glo: 1

## Inputs
- Electricity from Electricity grid mix 1kV-60kV - AU: 0.0004
- Electricity from Electricity grid mix 1kV-60kV - EU+EFTA+UK: 0.0055
- Electricity from Electricity grid mix 1kV-60kV - NZ: 0.0001
- Electricity from Electricity grid mix 1kV-60kV - RAF: 0.0012
- Electricity from Electricity grid mix 1kV-60kV - RNA: 0.0081
- Electricity from Electricity grid mix 1kV-60kV - RSA: 0.0028
- Electricity from Electricity grid mix 1kV-60kV - RU: 0.0016
- Transport of polyurethane foam // polyurethane foam production // glo by Articulated lorry transport, Euro 4, Total weight >32 t - EU+EFTA+UK: 2.29; = kg_km_0
- Transport of polyvinyl chloride, petrochemical // polyvinyl chloride (pvc) production, fossil fuel-based // glo by Articulated lorry transport, Euro 4, Total weight >32 t - EU+EFTA+UK: 5.74; = kg_km_1
- Transport of kraft paper // kraft paper // eu+efta+uk by Articulated lorry transport, Euro 4, Total weight >32 t - EU+EFTA+UK: 8.46; = kg_km_2
- Transport of polyurethane foam // polyurethane foam production // glo by Transoceanic ship, containers - GLO: 41.3; = kg_km_3
- Transport of polyvinyl chloride, petrochemical // polyvinyl chloride (pvc) production, fossil fuel-based // glo by Transoceanic ship, containers - GLO: 103; = kg_km_4
- Transport of kraft paper // kraft paper // eu+efta+uk by Transoceanic ship, containers - GLO: 152; = kg_km_5
- Electricity from Electricity grid mix 1kV-60kV - CN: 0.00830296
- Electricity from Electricity grid mix 1kV-60kV - RAS w/o CN: 0.00909704
- heat sealing, textiles // heat sealing, textiles // glo, blackbox: 1
- heat sealing, textiles // heat sealing, textiles // glo, elementary: 1

## Impact indicators
- Eutrophication marine: 7.67342e-5
- Ecotoxicity, freshwater: 0.328374
- Land use: 5.20446
- Water use: 0.0248332
- Resource use, minerals and metals: 3.25664e-7
- Resource use, fossils: 0.488062
- Climate change: 0.0364178
- Ozone depletion: 6.38504e-9
- Human toxicity, cancer: 2.41717e-11
- Human toxicity, non-cancer: 2.58197e-10
- EF-particulate Matter: 6.68308e-9
- Ionising radiation, human health: 0.00134229
- Photochemical ozone formation - human health: 0.000209617
- Acidification: 0.000297641
- Eutrophication, terrestrial: 0.000713754
- Eutrophication, freshwater: 1.82222e-6

## Deviations from the LCI method principle
The background data uses:
- the \xe2\x80\x9cRecycled content cut-off\xe2\x80\x9d approach to allocate end-of-life by-products and secondary materials. This allocation is explained in the description of the recycled content system model (http://www.ecoinvent.org/database/system-models-in-ecoinvent-3/cut-off-system-model/allocation-cut-off-by-classification.html).
OR
- EF compliant data

## Deviations from the LCI method approaches
Background data:
- the \xe2\x80\x9cRecycled content cut-off\xe2\x80\x9d approach to allocate end-of-life by-products and secondary materials. This allocation is explained in the description of the recycled content system model (http://www.ecoinvent.org/database/system-models-in-ecoinvent-3/cut-off-system-model/allocation-cut-off-by-classification.html). The ecoinvent database mostly relies on “Allocation – market values” apart for few exceptions particularly in the energy sector. ecoinvent energy data is replaced with EF3.0 core data as per the EF guidelines version 2.0.
OR
- EF compliant data

## Modelling constants
All modelling constants follow the requirements listed in the Tender Specifications 070201/2020/SER/ENV.B1. Completeness: There are no intentional cut-offs in the inventory no matter how small their contribution to all the EF impact categories is. Eventual cut-offs are in compliance with the Guide for EF compliant data sets (JRC 2020), i.e. only if below the 3% cut-off rule. Water use: water use is modelled at country level using separate flows for water withdrawal, water release and water evaporation. Handling multi-functional processes: the following PEF multi- functionality decision hierarchy is applied for resolving all multi- functionality problems: (1) subdivision or system expansion; (2) allocation based on a relevant underlying physical relationship (substitution may apply here); (3) allocation based on some other relationship. Direct land use change: GHG emissions from direct LUC allocated to good/service for 20 years after the LUC occurs, with IPCC default values. Carbon storage and delayed emissions: credits associated with temporary (carbon) storage or delayed emissions up to 300 years are not be considered. Emissions off-setting: are not included. Capital goods (including infrastructures) and their End of life: they are included. System boundaries: system boundaries include all processes linked to the product supply chain (e.g. maintenance). Time period: emissions and removals are modelled as if released or removed at the beginning of the assessment method. Fossil and biogenic carbon emissions and removals: removals and emissions are modelled as follows: All GHG emissions from fossil fuels (including peat and limestone) are modelled consistently with the most updated ILCD list of elementary flows. The non-fossil (biogenic) carbon flows are modelled consistently with the most updated ILCD list of elementary flows.

## Cut-off and completeness
There are no intentional cut-offs in the inventory no matter how small their contribution to all the EF impact categories is. Eventual cut-offs are in compliance with the Guide for EF compliant data sets (JRC 2020), i.e. only if below the 3% cut-off rule. The dataset dry mass and water balance has been checked to ensure the inventory is complete. Capital goods (e.g. infrastructure) and their end-of-life are included.

## Data selection and combination
These datasets include, in both their foreground and background data, links to EF3.0 compliant data.
The relevant background data on energy, transport, and End of Life are from the LCDN data node (http://lcdn.thinkstep.com/Node/).
All other background data in the supply of this product for which no EF3.0 process was available are from ecoinvent v3.7 database (www.ecoinvent.org) or other data sources.

## Data treatment and extrapolations
Several data sources have been used to model the inventory.

## Review details
Internal reviews have been asked to review the plausibility of the unit process, LCIA scores, and DQRs. Internal reviewers have also been asked to review the data for EF compliancy. The consortium is therefore responsible for aspects such as compliancy with the ILCD format, including validation in Look@LCI, and nomenclature.
Internal reviwers have been asked to judge based on the process name, that the unit process models in a complete and representative way the process in the requested location. The review encompassed the plausability of:
- exchanges with nature (elementary flows) as well as exchanges such as product and waste flows.
- meta information (general comment, technology comment, system boundaries, allocation, cut-off rules, etc.). Reviewers were asked to judge if the provided information is enough to understand the content of the process.
- LCIA scores
- DQRs including precision, technology, time and geography. As well as the overall DQR.
External reviewers have been asked to provide their expertise in the field of interest. External reviewers have been asked to review the unit process, including eventual methodological choices, the LCIA scores (provided with contribution scores as well), and DQRs. External reviewers have been provided all the information in a tool developed by the consortium for the purpose of this project.
External reviewers have been asked to judge based on the process name, that the unit process models in a complete and representative way the process in the requested location. The review encompassed:
- Plausability and completeness of exchanges with nature (elementary flows) as well as exchanges such as product and waste flows.
- Review of meta information (general comment, technology comment, system boundaries, allocation, cut-off rules, etc.). Reviewers were asked to judge if the provided information is enough to understand the content of the process.
- Review of properties (biogenic carbon and water content).
- Review of allocation keys.
- Plausability of LCIA scores calculated by the consortium.
- Plausability of DQRs including precision, technology, time and geography. As well as the overall DQR.

## Data sources
- Background Data for Representative products and organisations. EF 3.0 compliant (data stock)
- Griffiths, Dafydd (2017) How much does a t shirt weigh?, https://ramptshirts.com/blog/2017/06/13/how-much-does-a-t-shirt-weigh/, Ramp, South Wales
- Gio-Lite (2021) GIO-FLEX SOFT-PU SOFT STRETCHABILITY HEAT TRANSFER VINYL, https://giolite.com/GIO-FLEX-SOFT-PU, Giolite Lumian Co., Ltd, Seoul, Korea
- Prospector (2021) Polyurethane (PUR) Typical Properties Generic PUR, Unspecified https://plastics.ulprospector.com/generics/45/c/t/polyurethane-pur-properties-processing, The Prospector, United States
- Gio-Lite (2021) GIO-FLEX VC PVC CAD CUT Heat Transfer Film https://giolite.com/GIO-FLEX-VC, Giolite Lumian Co., Ltd, Seoul, Korea
- BPF (2021) Polyvinyl Chloride PVC, https://www.bpf.co.uk/plastipedia/polymers/pvc.aspx, British Plastic Federation, London, England
- MPC (2021) Silicone Paper, http://www.mpcpaper.com/products8.html, Montreal Paper Cutting Inc, Montreal, Canada
- Thermotex (2021) https://www.thermo-tex.co.uk/assets/Uploads/module/pdf/Flyer-Patchmaschinen-v4-GB-Web.pdf, THERMOTEX NAGEL GmbH, Schutterwald, Germany

## Intended applications
Implementation of regular Product Environmental Footprint (PEF) studies and Organisation Environmental Footprint (OEF) studies exclusively under the specified Product groups and sectors as defined in the Product Environmental Footprint Category Rules (PEFCR) and Organisation Environmental Footprint Sectorial Rules (OEFSR) listed in http://ec.europa.eu/environment/eussd/smgp/PEFCR_OEFSR.htm
