# leather, high environmental practice tannery; technology mix; production mix, at tannery; m2

Dataset: ILCD process, Partly terminated system
Geography: EU+EFTA+UK
Reference year: 2021
Valid until: 2024
Classification: Materials production / Other materials
LCI method principle: Attributional
LCI method approaches: Allocation - market value
Completeness: All relevant flows quantified
Project: Provision of process-based 3.0 Environmental Footprint-compliant life cycle inventory datasets - Apparel 3 - contract number 070201/2020/840294/SER/ENV.B.1
Generated by: PRé Sustainability B.V.
Owner: PRé Sustainability B.V.
Compliance: ILCD Data Network - Entry-level; Suggestions for updating the PEF method 2019; ISO 14040 Environmental Management – Life Cycle Assessment – Principles and Framework, 2006; ISO 14044:2006. Environmental Management – Life Cycle Assessment – Requirements and guidelines.; Environmental Footprint 3.1
Review: Dependent internal review by Avraam Symeonidis, Marisa Vieira; Independent review panel by Madhuri Nigam
Data quality: Overall quality: Good; Time representativeness: Very good; Geographical representativeness: Good; Technological representativeness: Very good; Precision: Fair; Methodological appropriateness and consistency: Not applicable
Amounts: no units in this file; such an amount is in the reference unit of its flow, which a separate flow dataset defines
copyright: true
licenseType: Free of charge for some user types or use types
accessRestrictions: Free of charge for all final users implementing a regular Product Environmental Footprint (PEF) studies and Organisation Environmental Footprint (OEF) studies exclusively under the specified Product groups and sectors as defined in the Product Environmental Footprint Category Rules (PEFCR) and Organisation Environmental Footprint Sectorial Rules (OEFSR) listed in http://ec.europa.eu/environment/eussd/smgp/PEFCR_OEFSR.htm and in accordance with the terms and conditions of the EULA (available at https://ecoinvent.lca-data.com/) exclusively until 31st December 2024. Any use of this dataset or any derivative data not within the specific context of one of the PEF/OEF projects or after the end of 2024 is not permitted.

## General comment
Notice: this data set supersedes the EF3.0-compliant version (see link under "preceding data set version" below calculated with the EF3.0). The life cycle inventory is not changed from the original EF3.0 data set. The LCIA results are calculated based on the EF3.1 methods which provide updated characterisation factors in the following impact categories: Climate Change, Ecotoxicity freshwater, Photochemical Ozone Formation, Acidification, Human Toxicity non-cancer, and Human Toxicity cancer. The review report and the data quality ratings refer to the original results. The data set has been updated by the European Commission on the basis of the original EF3.0 data set delivered by the data provider.This dataset represents the production of 1 m2 of finished leather in Europe by high environmental practice tanneries, with a density of 1.5 kg/m2 finished leather. It is an adjustment of the base model used for the leather datasets using information shared by COTANCE, the Best Available Techniques (BAT) Reference Document for the Tanning of Hides and Skins, and from the 2020 EU Leather Industry Social & Environmental Report. Veal and reptile leathers are not considered.

EU Leather Industry Social & Environmental Report 2020 is based on data collected annually from 79 companies (5% of the EU total) from Italy, Germany, Austria, Denmark, Sweden, UK, Spain, France, Portugal, Hungary and Romania), covering 43% of total EU leather production. Reference period: 2016 - 2018 (inclusive), with some data from 2012 and 2020.

# Differences from typical production and best practice tanneries in the EU:
1. Water usage: 120 m3 / m2 leather, compared with 148 m3 /m2 finished leather. Former value based on EU Leather Industry Social & Environmental Report 2020, average 2016-18
2. Water treatment: Values of treatment efficiency are replaced with those from EU Leather Industry Social & Environmental Report 2020 (COTANCE and industriAll-Europe, 2020), and compared with water emissions measured after treatment from two treatment plant reports from Italy (Cuiodepur and Acque del Chiampo)
3. Total Primary Energy = 73.7 MJ/m2, and shares of each energy source updated, also from the the EU Leather SER 2020.

# Weighting of different leather types:
1. Market shares for each animal leather type based on Table 4, UNIDO. ‘Future Trends in the World Leather and Leather Products Industry and Trade’, 2010. https://leatherpanel.org/sites/default/files/publications-attachments/future_trends_in_the_world_leather_and_leather_products_industry_and_trade.pdf. This data originally comes from the FAO. Market shares for each animal leather type are as follows:
market_share_cattle: 66%
market_share_sheep: 15%
market_share_pig: 11%
market_share_goat: 7%
market_share_other (reptile, etc): 1%
Bovine leather is predominantly (approx. 90%, Leather PEFCR) from adult cattle, so veal leather is not modelled. Reptile leather is also not included as it has a market share of less than 1%, and the models has a low data quality. Input of the pig hide is not included as there is zero allocation of the environmental impact of slaughter to the pig hide

2. Proportion of leather tanned by each technique based on Table 7, p.8 and Annex 5, De Rosa-Giglio, Fontanella, Gonzalez-Quijano, Ioannidis, Nucci, and Brugnoli. ‘PRODUCT ENVIRONMENTAL FOOTPRINT CATEGORY RULES Leather’, 25 April 2018. It is assumed that chrome-free (12% market share) refers to wet-white (and not vegetable, which is a separate category), and wet-white metal-free and wet-white metal tanning each contribute 50% of this tanning technique

# Energy
Total primary energy = 1.76 tonnes oil equivalent / m2 finished leather = 73.7 MJ/m2
Share for each energy fraction based on p.26 of EU Leather Social and Environmental Report 2020. total_primary_energy_per_m2 * proportion_energy_type

Source: p.25 COTANCE and IndustriAll-Europe, 2020, SER 2020.

# Conversion factors
Sources reporting values per tonne raw hide, are converted from mass per tonne raw hide to per m2 using conversion factor of kg_hide_per_m2_leather = 6.3 (default) based on Table 7, p.8 and Annex 5, Leather PEFCR, 2018. Average weighted by end-use and proportion of animal type in each end use. This is a parameter that can be adjusted if the value is known

Density of 1.50 kg/m2 averaged across different leather types is based on
Thanikaivelan, Shelly, and Ramkumar, ‘Gauge Length Effect on the Tensile Properties of Leather’.; Pati, Chaudhary, and Subramani, ‘Biochemical Method for Extraction and Reuse of Protein and Chromium from Chrome Leather Shavings’.; Clarke, ‘Some Density Data on Leather’.; Dilek et al., ‘Evaluation of Collagen Hydrolysate on the Performance Properties of DifferentWet-White Tanned Leathers’.; BASF, 2003; COTANCE, 2021, personal communications; De Rosa-Giglio et al., ‘PRODUCT ENVIRONMENTAL FOOTPRINT CATEGORY RULES Leather’.; Andrea Fontanella et al., ‘Leather PEF Screening Report in the Context of the EU Product Environmental Footprint Category Rules (PEFCR) Pilots’.

Note that density depends on whether full-grain (with the more dense corium layer) or split-grain (without) leathers are used.

# Waste Water and Emissions
Waste water is used to balance the mass in the model. Emissions are averaged from a mix of tanning techniques and regions, see comments on the exchanges for the sources used for each emission.

Mass waste water = Mass of inputs – mass of leather out – mass of emissions (to water and air) – mass of textile machinery
where Mass of leather = density of leather (kg/m3) × thickness of leather (m) × area leather (m2)
The proportion of tanning agents and other synthetic compounds being absorbed into the final leather or being emitted into the water stream cannot be determined in general from the data used, and varies strongly based on the tannery parameters.

## Technology and included processes
System boundaries: The dataset describes the tanning and finishing of cattle leather. The inventory includes the following flows:
- Electricity and heat use
- Chemicals: chromium tanning agent, wetting agents, liming agents, fatliquors and other agents used in the processing of leather
- Water
- Emissions to water
- Transport of chemicals, and raw materials

It does not include:
- Packaging materials
- Certain chemicals have been replaced with proxies where there is no exact match
- Animal leathers for which market share is less than 1% (reptile)

## Parameters
- kg_0: 0.0161027
  Mass in kg, for beef, fresh hides // beef, fresh hides // br; Articulated lorry transport, Euro 4, Total weight >32 t; EU+EFTA+UK
- km_0: 130
  Distance in km, for beef, fresh hides // beef, fresh hides // br; Articulated lorry transport, Euro 4, Total weight >32 t; EU+EFTA+UK
- kg_km_0: 2.09335; = kg_0*km_0
  Transport amount in km*km, for beef, fresh hides // beef, fresh hides // br; Articulated lorry transport, Euro 4, Total weight >32 t; EU+EFTA+UK
- kg_1: 1.99576
  Mass in kg, for beef, fresh hides // beef, fresh hides // eu+efta+uk; Articulated lorry transport, Euro 4, Total weight >32 t; EU+EFTA+UK
- km_1: 130
  Distance in km, for beef, fresh hides // beef, fresh hides // eu+efta+uk; Articulated lorry transport, Euro 4, Total weight >32 t; EU+EFTA+UK
- kg_km_1: 259.448; = kg_1*km_1
  Transport amount in km*km, for beef, fresh hides // beef, fresh hides // eu+efta+uk; Articulated lorry transport, Euro 4, Total weight >32 t; EU+EFTA+UK
- kg_2: 1.24918
  Mass in kg, for beef, fresh hides // beef, fresh hides // glo; Articulated lorry transport, Euro 4, Total weight >32 t; EU+EFTA+UK
- km_2: 130
  Distance in km, for beef, fresh hides // beef, fresh hides // glo; Articulated lorry transport, Euro 4, Total weight >32 t; EU+EFTA+UK
- kg_km_2: 162.393; = kg_2*km_2
  Transport amount in km*km, for beef, fresh hides // beef, fresh hides // glo; Articulated lorry transport, Euro 4, Total weight >32 t; EU+EFTA+UK
- kg_3: 1.59075
  Mass in kg, for beef, fresh hides // beef, fresh hides // us; Articulated lorry transport, Euro 4, Total weight >32 t; EU+EFTA+UK
- km_3: 130
  Distance in km, for beef, fresh hides // beef, fresh hides // us; Articulated lorry transport, Euro 4, Total weight >32 t; EU+EFTA+UK
- kg_km_3: 206.797; = kg_3*km_3
  Transport amount in km*km, for beef, fresh hides // beef, fresh hides // us; Articulated lorry transport, Euro 4, Total weight >32 t; EU+EFTA+UK
- kg_4: 0.51375
  Mass in kg, for raw sheep pelt // sheep slaughtering and skinning // glo; Articulated lorry transport, Euro 4, Total weight >32 t; EU+EFTA+UK
- km_4: 130
  Distance in km, for raw sheep pelt // sheep slaughtering and skinning // glo; Articulated lorry transport, Euro 4, Total weight >32 t; EU+EFTA+UK
- kg_km_4: 66.7875; = kg_4*km_4
  Transport amount in km*km, for raw sheep pelt // sheep slaughtering and skinning // glo; Articulated lorry transport, Euro 4, Total weight >32 t; EU+EFTA+UK
- kg_5: 0.1694
  Mass in kg, for raw goat pelt // goat slaughtering and skinning // glo; Articulated lorry transport, Euro 4, Total weight >32 t; EU+EFTA+UK
- km_5: 130
  Distance in km, for raw goat pelt // goat slaughtering and skinning // glo; Articulated lorry transport, Euro 4, Total weight >32 t; EU+EFTA+UK
- kg_km_5: 22.022; = kg_5*km_5
  Transport amount in km*km, for raw goat pelt // goat slaughtering and skinning // glo; Articulated lorry transport, Euro 4, Total weight >32 t; EU+EFTA+UK
- kg_6: 0.2662
  Mass in kg, for raw pig pelt // pig slaughtering and skinning // glo; Articulated lorry transport, Euro 4, Total weight >32 t; EU+EFTA+UK
- km_6: 130
  Distance in km, for raw pig pelt // pig slaughtering and skinning // glo; Articulated lorry transport, Euro 4, Total weight >32 t; EU+EFTA+UK
- kg_km_6: 34.606; = kg_6*km_6
  Transport amount in km*km, for raw pig pelt // pig slaughtering and skinning // glo; Articulated lorry transport, Euro 4, Total weight >32 t; EU+EFTA+UK
- kg_7: 1.134
  Mass in kg, for sodium chloride powder // sodium chloride powder production // eu+efta+uk; Articulated lorry transport, Euro 4, Total weight >32 t; EU+EFTA+UK
- km_7: 55.5
  Distance in km, for sodium chloride powder // sodium chloride powder production // eu+efta+uk; Articulated lorry transport, Euro 4, Total weight >32 t; EU+EFTA+UK
- kg_km_7: 62.937; = kg_7*km_7
  Transport amount in km*km, for sodium chloride powder // sodium chloride powder production // eu+efta+uk; Articulated lorry transport, Euro 4, Total weight >32 t; EU+EFTA+UK
- kg_8: 0.225634
  Mass in kg, for basic chrome sulfate // basic chrome sulfate production // za; Articulated lorry transport, Euro 4, Total weight >32 t; EU+EFTA+UK
- km_8: 130
  Distance in km, for basic chrome sulfate // basic chrome sulfate production // za; Articulated lorry transport, Euro 4, Total weight >32 t; EU+EFTA+UK
- kg_km_8: 29.3325; = kg_8*km_8
  Transport amount in km*km, for basic chrome sulfate // basic chrome sulfate production // za; Articulated lorry transport, Euro 4, Total weight >32 t; EU+EFTA+UK
- kg_9: 0.0378
  Mass in kg, for wet-white metal-free tanning agent mix // wet-white metal-free tanning agent production // glo; Articulated lorry transport, Euro 4, Total weight >32 t; EU+EFTA+UK
- km_9: 130
  Distance in km, for wet-white metal-free tanning agent mix // wet-white metal-free tanning agent production // glo; Articulated lorry transport, Euro 4, Total weight >32 t; EU+EFTA+UK
- kg_km_9: 4.914; = kg_9*km_9
  Transport amount in km*km, for wet-white metal-free tanning agent mix // wet-white metal-free tanning agent production // glo; Articulated lorry transport, Euro 4, Total weight >32 t; EU+EFTA+UK
- kg_10: 0.0378
  Mass in kg, for wet-white metal tanning agent mix // wet-white metal tanning agent production // glo; Articulated lorry transport, Euro 4, Total weight >32 t; EU+EFTA+UK
- km_10: 130
  Distance in km, for wet-white metal tanning agent mix // wet-white metal tanning agent production // glo; Articulated lorry transport, Euro 4, Total weight >32 t; EU+EFTA+UK
- kg_km_10: 4.914; = kg_10*km_10
  Transport amount in km*km, for wet-white metal tanning agent mix // wet-white metal tanning agent production // glo; Articulated lorry transport, Euro 4, Total weight >32 t; EU+EFTA+UK
- kg_11: 0.316386
  Mass in kg, for natural tannins extracted from chestnut // natural tannins extracted from chestnut production // eu+efta+uk; Articulated lorry transport, Euro 4, Total weight >32 t; EU+EFTA+UK
- km_11: 130
  Distance in km, for natural tannins extracted from chestnut // natural tannins extracted from chestnut production // eu+efta+uk; Articulated lorry transport, Euro 4, Total weight >32 t; EU+EFTA+UK
- kg_km_11: 41.1302; = kg_11*km_11
  Transport amount in km*km, for natural tannins extracted from chestnut // natural tannins extracted from chestnut production // eu+efta+uk; Articulated lorry transport, Euro 4, Total weight >32 t; EU+EFTA+UK
- kg_12: 0.0161027
  Mass in kg, for beef, fresh hides // beef, fresh hides // br; Barge; EU+EFTA+UK
- km_12: 270
  Distance in km, for beef, fresh hides // beef, fresh hides // br; Barge; EU+EFTA+UK
- kg_km_12: 4.34772; = kg_12*km_12
  Transport amount in km*km, for beef, fresh hides // beef, fresh hides // br; Barge; EU+EFTA+UK
- kg_13: 1.99576
  Mass in kg, for beef, fresh hides // beef, fresh hides // eu+efta+uk; Barge; EU+EFTA+UK
- km_13: 270
  Distance in km, for beef, fresh hides // beef, fresh hides // eu+efta+uk; Barge; EU+EFTA+UK
- kg_km_13: 538.854; = kg_13*km_13
  Transport amount in km*km, for beef, fresh hides // beef, fresh hides // eu+efta+uk; Barge; EU+EFTA+UK
- kg_14: 1.24918
  Mass in kg, for beef, fresh hides // beef, fresh hides // glo; Barge; EU+EFTA+UK
- km_14: 270
  Distance in km, for beef, fresh hides // beef, fresh hides // glo; Barge; EU+EFTA+UK
- kg_km_14: 337.278; = kg_14*km_14
  Transport amount in km*km, for beef, fresh hides // beef, fresh hides // glo; Barge; EU+EFTA+UK
- kg_15: 1.59075
  Mass in kg, for beef, fresh hides // beef, fresh hides // us; Barge; EU+EFTA+UK
- km_15: 270
  Distance in km, for beef, fresh hides // beef, fresh hides // us; Barge; EU+EFTA+UK
- kg_km_15: 429.502; = kg_15*km_15
  Transport amount in km*km, for beef, fresh hides // beef, fresh hides // us; Barge; EU+EFTA+UK
- kg_16: 0.51375
  Mass in kg, for raw sheep pelt // sheep slaughtering and skinning // glo; Barge; EU+EFTA+UK
- km_16: 270
  Distance in km, for raw sheep pelt // sheep slaughtering and skinning // glo; Barge; EU+EFTA+UK
- kg_km_16: 138.712; = kg_16*km_16
  Transport amount in km*km, for raw sheep pelt // sheep slaughtering and skinning // glo; Barge; EU+EFTA+UK
- kg_17: 0.1694
  Mass in kg, for raw goat pelt // goat slaughtering and skinning // glo; Barge; EU+EFTA+UK
- km_17: 270
  Distance in km, for raw goat pelt // goat slaughtering and skinning // glo; Barge; EU+EFTA+UK
- kg_km_17: 45.738; = kg_17*km_17
  Transport amount in km*km, for raw goat pelt // goat slaughtering and skinning // glo; Barge; EU+EFTA+UK
- kg_18: 0.2662
  Mass in kg, for raw pig pelt // pig slaughtering and skinning // glo; Barge; EU+EFTA+UK
- km_18: 270
  Distance in km, for raw pig pelt // pig slaughtering and skinning // glo; Barge; EU+EFTA+UK
- kg_km_18: 71.874; = kg_18*km_18
  Transport amount in km*km, for raw pig pelt // pig slaughtering and skinning // glo; Barge; EU+EFTA+UK
- kg_19: 1.134
  Mass in kg, for sodium chloride powder // sodium chloride powder production // eu+efta+uk; Barge; EU+EFTA+UK
- km_19: 115
  Distance in km, for sodium chloride powder // sodium chloride powder production // eu+efta+uk; Barge; EU+EFTA+UK
- kg_km_19: 130.41; = kg_19*km_19
  Transport amount in km*km, for sodium chloride powder // sodium chloride powder production // eu+efta+uk; Barge; EU+EFTA+UK
- kg_20: 0.225634
  Mass in kg, for basic chrome sulfate // basic chrome sulfate production // za; Barge; EU+EFTA+UK
- km_20: 270
  Distance in km, for basic chrome sulfate // basic chrome sulfate production // za; Barge; EU+EFTA+UK
- kg_km_20: 60.9213; = kg_20*km_20
  Transport amount in km*km, for basic chrome sulfate // basic chrome sulfate production // za; Barge; EU+EFTA+UK
- kg_21: 0.0378
  Mass in kg, for wet-white metal-free tanning agent mix // wet-white metal-free tanning agent production // glo; Barge; EU+EFTA+UK
- km_21: 270
  Distance in km, for wet-white metal-free tanning agent mix // wet-white metal-free tanning agent production // glo; Barge; EU+EFTA+UK
- kg_km_21: 10.206; = kg_21*km_21
  Transport amount in km*km, for wet-white metal-free tanning agent mix // wet-white metal-free tanning agent production // glo; Barge; EU+EFTA+UK
- kg_22: 0.0378
  Mass in kg, for wet-white metal tanning agent mix // wet-white metal tanning agent production // glo; Barge; EU+EFTA+UK
- km_22: 270
  Distance in km, for wet-white metal tanning agent mix // wet-white metal tanning agent production // glo; Barge; EU+EFTA+UK
- kg_km_22: 10.206; = kg_22*km_22
  Transport amount in km*km, for wet-white metal tanning agent mix // wet-white metal tanning agent production // glo; Barge; EU+EFTA+UK
- kg_23: 0.316386
  Mass in kg, for natural tannins extracted from chestnut // natural tannins extracted from chestnut production // eu+efta+uk; Barge; EU+EFTA+UK
- km_23: 270
  Distance in km, for natural tannins extracted from chestnut // natural tannins extracted from chestnut production // eu+efta+uk; Barge; EU+EFTA+UK
- kg_km_23: 85.4242; = kg_23*km_23
  Transport amount in km*km, for natural tannins extracted from chestnut // natural tannins extracted from chestnut production // eu+efta+uk; Barge; EU+EFTA+UK
- kg_24: 0.0161027
  Mass in kg, for beef, fresh hides // beef, fresh hides // br; Freight train, average; EU+EFTA+UK
- km_24: 240
  Distance in km, for beef, fresh hides // beef, fresh hides // br; Freight train, average; EU+EFTA+UK
- kg_km_24: 3.86464; = kg_24*km_24
  Transport amount in km*km, for beef, fresh hides // beef, fresh hides // br; Freight train, average; EU+EFTA+UK
- kg_25: 1.99576
  Mass in kg, for beef, fresh hides // beef, fresh hides // eu+efta+uk; Freight train, average; EU+EFTA+UK
- km_25: 240
  Distance in km, for beef, fresh hides // beef, fresh hides // eu+efta+uk; Freight train, average; EU+EFTA+UK
- kg_km_25: 478.982; = kg_25*km_25
  Transport amount in km*km, for beef, fresh hides // beef, fresh hides // eu+efta+uk; Freight train, average; EU+EFTA+UK
- kg_26: 1.24918
  Mass in kg, for beef, fresh hides // beef, fresh hides // glo; Freight train, average; EU+EFTA+UK
- km_26: 240
  Distance in km, for beef, fresh hides // beef, fresh hides // glo; Freight train, average; EU+EFTA+UK
- kg_km_26: 299.803; = kg_26*km_26
  Transport amount in km*km, for beef, fresh hides // beef, fresh hides // glo; Freight train, average; EU+EFTA+UK
- kg_27: 1.59075
  Mass in kg, for beef, fresh hides // beef, fresh hides // us; Freight train, average; EU+EFTA+UK
- km_27: 240
  Distance in km, for beef, fresh hides // beef, fresh hides // us; Freight train, average; EU+EFTA+UK
- kg_km_27: 381.78; = kg_27*km_27
  Transport amount in km*km, for beef, fresh hides // beef, fresh hides // us; Freight train, average; EU+EFTA+UK
- kg_28: 0.51375
  Mass in kg, for raw sheep pelt // sheep slaughtering and skinning // glo; Freight train, average; EU+EFTA+UK
- km_28: 240
  Distance in km, for raw sheep pelt // sheep slaughtering and skinning // glo; Freight train, average; EU+EFTA+UK
- kg_km_28: 123.3; = kg_28*km_28
  Transport amount in km*km, for raw sheep pelt // sheep slaughtering and skinning // glo; Freight train, average; EU+EFTA+UK
- kg_29: 0.1694
  Mass in kg, for raw goat pelt // goat slaughtering and skinning // glo; Freight train, average; EU+EFTA+UK
- km_29: 240
  Distance in km, for raw goat pelt // goat slaughtering and skinning // glo; Freight train, average; EU+EFTA+UK
- kg_km_29: 40.656; = kg_29*km_29
  Transport amount in km*km, for raw goat pelt // goat slaughtering and skinning // glo; Freight train, average; EU+EFTA+UK
- kg_30: 0.2662
  Mass in kg, for raw pig pelt // pig slaughtering and skinning // glo; Freight train, average; EU+EFTA+UK
- km_30: 240
  Distance in km, for raw pig pelt // pig slaughtering and skinning // glo; Freight train, average; EU+EFTA+UK
- kg_km_30: 63.888; = kg_30*km_30
  Transport amount in km*km, for raw pig pelt // pig slaughtering and skinning // glo; Freight train, average; EU+EFTA+UK
- kg_31: 1.134
  Mass in kg, for sodium chloride powder // sodium chloride powder production // eu+efta+uk; Freight train, average; EU+EFTA+UK
- km_31: 102
  Distance in km, for sodium chloride powder // sodium chloride powder production // eu+efta+uk; Freight train, average; EU+EFTA+UK
- kg_km_31: 115.668; = kg_31*km_31
  Transport amount in km*km, for sodium chloride powder // sodium chloride powder production // eu+efta+uk; Freight train, average; EU+EFTA+UK
- kg_32: 0.225634
  Mass in kg, for basic chrome sulfate // basic chrome sulfate production // za; Freight train, average; EU+EFTA+UK
- km_32: 240
  Distance in km, for basic chrome sulfate // basic chrome sulfate production // za; Freight train, average; EU+EFTA+UK
- kg_km_32: 54.1523; = kg_32*km_32
  Transport amount in km*km, for basic chrome sulfate // basic chrome sulfate production // za; Freight train, average; EU+EFTA+UK
- kg_33: 0.0378
  Mass in kg, for wet-white metal-free tanning agent mix // wet-white metal-free tanning agent production // glo; Freight train, average; EU+EFTA+UK
- km_33: 240
  Distance in km, for wet-white metal-free tanning agent mix // wet-white metal-free tanning agent production // glo; Freight train, average; EU+EFTA+UK
- kg_km_33: 9.072; = kg_33*km_33
  Transport amount in km*km, for wet-white metal-free tanning agent mix // wet-white metal-free tanning agent production // glo; Freight train, average; EU+EFTA+UK
- kg_34: 0.0378
  Mass in kg, for wet-white metal tanning agent mix // wet-white metal tanning agent production // glo; Freight train, average; EU+EFTA+UK
- km_34: 240
  Distance in km, for wet-white metal tanning agent mix // wet-white metal tanning agent production // glo; Freight train, average; EU+EFTA+UK
- kg_km_34: 9.072; = kg_34*km_34
  Transport amount in km*km, for wet-white metal tanning agent mix // wet-white metal tanning agent production // glo; Freight train, average; EU+EFTA+UK
- kg_35: 0.316386
  Mass in kg, for natural tannins extracted from chestnut // natural tannins extracted from chestnut production // eu+efta+uk; Freight train, average; EU+EFTA+UK
- km_35: 240
  Distance in km, for natural tannins extracted from chestnut // natural tannins extracted from chestnut production // eu+efta+uk; Freight train, average; EU+EFTA+UK
- kg_km_35: 75.9326; = kg_35*km_35
  Transport amount in km*km, for natural tannins extracted from chestnut // natural tannins extracted from chestnut production // eu+efta+uk; Freight train, average; EU+EFTA+UK

## Reference product
- leather, high environmental practice tannery // leather, high environmental practice tannery // eu+efta+uk: 1

## Inputs
- Electricity from Electricity grid mix 1kV-60kV - EU+EFTA+UK: 20.1765
- Thermal energy (MJ) from Thermal energy from heavy fuel oil (HFO) - EU+EFTA+UK: 4.12702
- Thermal energy (MJ) from Thermal energy from natural gas - EU+EFTA+UK: 52.1227
- Transport of beef, fresh hides // beef, fresh hides // br by Articulated lorry transport, Euro 4, Total weight >32 t - EU+EFTA+UK: 2.09335; = kg_km_0
- Transport of beef, fresh hides // beef, fresh hides // eu+efta+uk by Articulated lorry transport, Euro 4, Total weight >32 t - EU+EFTA+UK: 259.448; = kg_km_1
- Transport of beef, fresh hides // beef, fresh hides // glo by Articulated lorry transport, Euro 4, Total weight >32 t - EU+EFTA+UK: 162.393; = kg_km_2
- Transport of beef, fresh hides // beef, fresh hides // us by Articulated lorry transport, Euro 4, Total weight >32 t - EU+EFTA+UK: 206.797; = kg_km_3
- Transport of raw sheep pelt // sheep slaughtering and skinning // glo by Articulated lorry transport, Euro 4, Total weight >32 t - EU+EFTA+UK: 66.7875; = kg_km_4
- Transport of raw goat pelt // goat slaughtering and skinning // glo by Articulated lorry transport, Euro 4, Total weight >32 t - EU+EFTA+UK: 22.022; = kg_km_5
- Transport of raw pig pelt // pig slaughtering and skinning // glo by Articulated lorry transport, Euro 4, Total weight >32 t - EU+EFTA+UK: 34.606; = kg_km_6
- Transport of sodium chloride powder // sodium chloride powder production // eu+efta+uk by Articulated lorry transport, Euro 4, Total weight >32 t - EU+EFTA+UK: 62.937; = kg_km_7
- Transport of basic chrome sulfate // basic chrome sulfate production // za by Articulated lorry transport, Euro 4, Total weight >32 t - EU+EFTA+UK: 29.3325; = kg_km_8
- Transport of wet-white metal-free tanning agent mix // wet-white metal-free tanning agent production // glo by Articulated lorry transport, Euro 4, Total weight >32 t - EU+EFTA+UK: 4.914; = kg_km_9
- Transport of wet-white metal tanning agent mix // wet-white metal tanning agent production // glo by Articulated lorry transport, Euro 4, Total weight >32 t - EU+EFTA+UK: 4.914; = kg_km_10
- Transport of natural tannins extracted from chestnut // natural tannins extracted from chestnut production // eu+efta+uk by Articulated lorry transport, Euro 4, Total weight >32 t - EU+EFTA+UK: 41.1302; = kg_km_11
- Transport of beef, fresh hides // beef, fresh hides // br by Barge - EU+EFTA+UK: 4.34772; = kg_km_12
- Transport of beef, fresh hides // beef, fresh hides // eu+efta+uk by Barge - EU+EFTA+UK: 538.854; = kg_km_13
- Transport of beef, fresh hides // beef, fresh hides // glo by Barge - EU+EFTA+UK: 337.278; = kg_km_14
- Transport of beef, fresh hides // beef, fresh hides // us by Barge - EU+EFTA+UK: 429.502; = kg_km_15
- Transport of raw sheep pelt // sheep slaughtering and skinning // glo by Barge - EU+EFTA+UK: 138.712; = kg_km_16
- Transport of raw goat pelt // goat slaughtering and skinning // glo by Barge - EU+EFTA+UK: 45.738; = kg_km_17
- Transport of raw pig pelt // pig slaughtering and skinning // glo by Barge - EU+EFTA+UK: 71.874; = kg_km_18
- Transport of sodium chloride powder // sodium chloride powder production // eu+efta+uk by Barge - EU+EFTA+UK: 130.41; = kg_km_19
- Transport of basic chrome sulfate // basic chrome sulfate production // za by Barge - EU+EFTA+UK: 60.9213; = kg_km_20
- Transport of wet-white metal-free tanning agent mix // wet-white metal-free tanning agent production // glo by Barge - EU+EFTA+UK: 10.206; = kg_km_21
- Transport of wet-white metal tanning agent mix // wet-white metal tanning agent production // glo by Barge - EU+EFTA+UK: 10.206; = kg_km_22
- Transport of natural tannins extracted from chestnut // natural tannins extracted from chestnut production // eu+efta+uk by Barge - EU+EFTA+UK: 85.4242; = kg_km_23
- Transport of beef, fresh hides // beef, fresh hides // br by Freight train, average - EU+EFTA+UK: 3.86464; = kg_km_24
- Transport of beef, fresh hides // beef, fresh hides // eu+efta+uk by Freight train, average - EU+EFTA+UK: 478.982; = kg_km_25
- Transport of beef, fresh hides // beef, fresh hides // glo by Freight train, average - EU+EFTA+UK: 299.803; = kg_km_26
- Transport of beef, fresh hides // beef, fresh hides // us by Freight train, average - EU+EFTA+UK: 381.78; = kg_km_27
- Transport of raw sheep pelt // sheep slaughtering and skinning // glo by Freight train, average - EU+EFTA+UK: 123.3; = kg_km_28
- Transport of raw goat pelt // goat slaughtering and skinning // glo by Freight train, average - EU+EFTA+UK: 40.656; = kg_km_29
- Transport of raw pig pelt // pig slaughtering and skinning // glo by Freight train, average - EU+EFTA+UK: 63.888; = kg_km_30
- Transport of sodium chloride powder // sodium chloride powder production // eu+efta+uk by Freight train, average - EU+EFTA+UK: 115.668; = kg_km_31
- Transport of basic chrome sulfate // basic chrome sulfate production // za by Freight train, average - EU+EFTA+UK: 54.1523; = kg_km_32
- Transport of wet-white metal-free tanning agent mix // wet-white metal-free tanning agent production // glo by Freight train, average - EU+EFTA+UK: 9.072; = kg_km_33
- Transport of wet-white metal tanning agent mix // wet-white metal tanning agent production // glo by Freight train, average - EU+EFTA+UK: 9.072; = kg_km_34
- Transport of natural tannins extracted from chestnut // natural tannins extracted from chestnut production // eu+efta+uk by Freight train, average - EU+EFTA+UK: 75.9326; = kg_km_35
- leather, high environmental practice tannery // leather, high environmental practice tannery // eu+efta+uk, blackbox: 1
- leather, high environmental practice tannery // leather, high environmental practice tannery // eu+efta+uk, elementary: 1

## Impact indicators
- Eutrophication marine: 0.458663
- Ecotoxicity, freshwater: 1821.28
- Land use: 4568.58
- Water use: 28.7325
- Resource use, minerals and metals: 0.00017771
- Resource use, fossils: 497.171
- Climate change: 62.0936
- Ozone depletion: 5.28708e-6
- Human toxicity, cancer: 1.13244e-7
- Human toxicity, non-cancer: 7.91918e-6
- EF-particulate Matter: 1.23433e-5
- Ionising radiation, human health: 2.54414
- Photochemical ozone formation - human health: 0.316995
- Acidification: 1.23989
- Eutrophication, terrestrial: 4.83913
- Eutrophication, freshwater: 0.00708392

## Deviations from the LCI method principle
The background data uses:
- the \xe2\x80\x9cRecycled content cut-off\xe2\x80\x9d approach to allocate end-of-life by-products and secondary materials. This allocation is explained in the description of the recycled content system model (http://www.ecoinvent.org/database/system-models-in-ecoinvent-3/cut-off-system-model/allocation-cut-off-by-classification.html).
OR
- EF compliant data

## Deviations from the LCI method approaches
Background data:
- the \xe2\x80\x9cRecycled content cut-off\xe2\x80\x9d approach to allocate end-of-life by-products and secondary materials. This allocation is explained in the description of the recycled content system model (http://www.ecoinvent.org/database/system-models-in-ecoinvent-3/cut-off-system-model/allocation-cut-off-by-classification.html). The ecoinvent database mostly relies on “Allocation – market values” apart for few exceptions particularly in the energy sector. ecoinvent energy data is replaced with EF3.0 core data as per the EF guidelines version 2.0.
OR
- EF compliant data

## Modelling constants
All modelling constants follow the requirements listed in the Tender Specifications 070201/2020/SER/ENV.B1. Completeness: There are no intentional cut-offs in the inventory no matter how small their contribution to all the EF impact categories is. Eventual cut-offs are in compliance with the Guide for EF compliant data sets (JRC 2020), i.e. only if below the 3% cut-off rule. Water use: water use is modelled at country level using separate flows for water withdrawal, water release and water evaporation. Handling multi-functional processes: the following PEF multi- functionality decision hierarchy is applied for resolving all multi- functionality problems: (1) subdivision or system expansion; (2) allocation based on a relevant underlying physical relationship (substitution may apply here); (3) allocation based on some other relationship. Direct land use change: GHG emissions from direct LUC allocated to good/service for 20 years after the LUC occurs, with IPCC default values. Carbon storage and delayed emissions: credits associated with temporary (carbon) storage or delayed emissions up to 300 years are not be considered. Emissions off-setting: are not included. Capital goods (including infrastructures) and their End of life: they are included. System boundaries: system boundaries include all processes linked to the product supply chain (e.g. maintenance). Time period: emissions and removals are modelled as if released or removed at the beginning of the assessment method. Fossil and biogenic carbon emissions and removals: removals and emissions are modelled as follows: All GHG emissions from fossil fuels (including peat and limestone) are modelled consistently with the most updated ILCD list of elementary flows. The non-fossil (biogenic) carbon flows are modelled consistently with the most updated ILCD list of elementary flows.

## Cut-off and completeness
There are no intentional cut-offs in the inventory no matter how small their contribution to all the EF impact categories is. Eventual cut-offs are in compliance with the Guide for EF compliant data sets (JRC 2020), i.e. only if below the 3% cut-off rule. The dataset dry mass and water balance has been checked to ensure the inventory is complete. Capital goods (e.g. infrastructure) and their end-of-life are included.

## Data selection and combination
These datasets include, in both their foreground and background data, links to EF3.0 compliant data.
The relevant background data on energy, transport, and End of Life are from the LCDN data node (http://lcdn.thinkstep.com/Node/).
All other background data in the supply of this product for which no EF3.0 process was available are from ecoinvent v3.7 database (www.ecoinvent.org) or other data sources.

## Data treatment and extrapolations
Several data sources have been used to model the inventory.

## Review details
Internal reviews have been asked to review the plausibility of the unit process, LCIA scores, and DQRs. Internal reviewers have also been asked to review the data for EF compliancy. The consortium is therefore responsible for aspects such as compliancy with the ILCD format, including validation in Look@LCI, and nomenclature.
Internal reviwers have been asked to judge based on the process name, that the unit process models in a complete and representative way the process in the requested location. The review encompassed the plausability of:
- exchanges with nature (elementary flows) as well as exchanges such as product and waste flows.
- meta information (general comment, technology comment, system boundaries, allocation, cut-off rules, etc.). Reviewers were asked to judge if the provided information is enough to understand the content of the process.
- LCIA scores
- DQRs including precision, technology, time and geography. As well as the overall DQR.
External reviewers have been asked to provide their expertise in the field of interest. External reviewers have been asked to review the unit process, including eventual methodological choices, the LCIA scores (provided with contribution scores as well), and DQRs. External reviewers have been provided all the information in a tool developed by the consortium for the purpose of this project.
External reviewers have been asked to judge based on the process name, that the unit process models in a complete and representative way the process in the requested location. The review encompassed:
- Plausability and completeness of exchanges with nature (elementary flows) as well as exchanges such as product and waste flows.
- Review of meta information (general comment, technology comment, system boundaries, allocation, cut-off rules, etc.). Reviewers were asked to judge if the provided information is enough to understand the content of the process.
- Review of properties (biogenic carbon and water content).
- Review of allocation keys.
- Plausability of LCIA scores calculated by the consortium.
- Plausability of DQRs including precision, technology, time and geography. As well as the overall DQR.

## Data sources
- Background Data for Representative products and organisations. EF 3.0 compliant (data stock)
- Andrea Fontanella, Benedetta Nucci, Primiano De Rosa-Giglio, and Ioannis Ioannidis. ‘Leather PEF Screening Report in the Context of the EU Product Environmental Footprint Category Rules (PEFCR) Pilots’, 11 November 2015.
- COTANCE and industriAll-Europe. ‘European Leather Industry - SOCIAL & ENVIRONMENTAL REPORT 2020’, 2020. https://www.euroleather.com/doc/SER/European%20Leather%20Industry%20-%20Social%20and%20Environmental%20Report%202020%20-%20EN%20web.pdf.
- COTANCE. ‘COTANCE, Personal Communications’, June 2021.
- Cuiodepur. ‘Description of the Consorzio Cuoiodepur Plant’, 2004. https://web.archive.org/web/20210707082819/http://www.cuoiodepur.it/wp-content/uploads/2016/06/relazione.pdf.
- De Rosa-Giglio, Fontanella, Gonzalez-Quijano, Ioannidis, Nucci, and Brugnoli. ‘PRODUCT ENVIRONMENTAL FOOTPRINT CATEGORY RULES Leather’, 25 April 2018.
- Acque del Chiampo. ‘Acque del Chiampo Wastewater Treatment 2019 Sustainability Report (Italian)’, 2019. https://web.archive.org/web/20210707082948/https://www.acquedelchiampospa.it/FILES/files/Trasparenza/2020/bilanciosolidale2018_compresso.pdf.

## Intended applications
Implementation of regular Product Environmental Footprint (PEF) studies and Organisation Environmental Footprint (OEF) studies exclusively under the specified Product groups and sectors as defined in the Product Environmental Footprint Category Rules (PEFCR) and Organisation Environmental Footprint Sectorial Rules (OEFSR) listed in http://ec.europa.eu/environment/eussd/smgp/PEFCR_OEFSR.htm
