# grinding of cork; technology mix; production mix, at plant; service

Dataset: ILCD process, Partly terminated system
Geography: EU+EFTA+UK
Reference year: 2018
Valid until: 2024
Classification: Materials production / Food and renewable raw materials
LCI method principle: Attributional
LCI method approaches: Allocation - market value
Completeness: All relevant flows quantified
Project: Provision of process-based 3.0 Environmental Footprint-compliant life cycle inventory datasets - Renewable materials - contract number 070201/2020/840085/SER/ENV.B.1
Generated by: ACV Brasil
Owner: ecoinvent
Compliance: ILCD Data Network - Entry-level; Suggestions for updating the PEF method 2019; ISO 14040 Environmental Management – Life Cycle Assessment – Principles and Framework, 2006; ISO 14044:2006. Environmental Management – Life Cycle Assessment – Requirements and guidelines.; Environmental Footprint 3.1
Review: Dependent internal review by Hans Blonk, Lucia Valsasina; Independent review panel by Laura Batlle Bayer
Data quality: Overall quality: Very good; Time representativeness: Very good; Geographical representativeness: Very good; Technological representativeness: Very good; Precision: Very good; Methodological appropriateness and consistency: Not applicable
Amounts: no units in this file; such an amount is in the reference unit of its flow, which a separate flow dataset defines
copyright: true
licenseType: Free of charge for some user types or use types
accessRestrictions: Free of charge for all final users implementing a regular Product Environmental Footprint (PEF) studies and Organisation Environmental Footprint (OEF) studies exclusively under the specified Product groups and sectors as defined in the Product Environmental Footprint Category Rules (PEFCR) and Organisation Environmental Footprint Sectorial Rules (OEFSR) listed in http://ec.europa.eu/environment/eussd/smgp/PEFCR_OEFSR.htm and in accordance with the terms and conditions of the EULA (available at https://ecoinvent.lca-data.com/) exclusively until 31st December 2024. Any use of this dataset or any derivative data not within the specific context of one of the PEF/OEF projects or after the end of 2024 is not permitted.

## General comment
Notice: this data set supersedes the EF3.0-compliant version (see link under "preceding data set version" below calculated with the EF3.0). The life cycle inventory is not changed from the original EF3.0 data set. The LCIA results are calculated based on the EF3.1 methods which provide updated characterisation factors in the following impact categories: Climate Change, Ecotoxicity freshwater, Photochemical Ozone Formation, Acidification, Human Toxicity non-cancer, and Human Toxicity cancer. The review report and the data quality ratings refer to the original results. The data set has been updated by the European Commission on the basis of the original EF3.0 data set delivered by the data provider.This dataset represents the service of cork grinding. The cork used in the production of construction and decoration materials comes from the first and second bark stripped from the cork oak, which is not used for stoppers, and cork leftovers, shavings, pieces and waste from other industries. The cork is ground, with the granules taking on a range of sizes (usually above 0.25 mm and below 22.4 mm) and densities (usually 70-90kg/m3) (APCOR, 2021).

## Technology and included processes
The granules are obtained using several different types of mill, according to the material to be ground and the type of granulate required. This dataset is modeled to produce 1 kg of cork granules according to the design project of a cork granulating factory (Martins, 2018). The system consists of a first grinding step followed by drying using forced circulation of hot air by means of rotating driers, giving the granulate the required moisture content. The dried granules are sieved and ground in a second step to obtain the desired size. The process also considers recirculation of not compliant granules. Cork powder is collected during the process and is sold as combustion biomass. Half of the production losses (12% of raw cork input) is considered as cork powder by-product while the other half is assumed as process waste.
The input of raw material for processing and the output of the processed material and losses are excluded from the system boundaries.
Production process efficiency: 60%
Moisture content of cork raw material: 25%
Moisture content of cork granule product: 9%
Amount of raw cork input to produce 1 kg og grided cork: 1.67 kg
Amount of cork powder byproduct to produce 1 kg of grided cork: 0.2 kg
Amount of biomass waste to produce 1 kg of grided cork: 0.2 kg
References:
APCOR (2021). Portuguese Cork Association, Santa Maria de Lamas.
Martins, D.F.M. (2018). Contributos para a conceção de uma unidade fabril de granulado de cortiça. Master thesis. Faculdade de Ciências e Tecnologia. Universidade Nova de Lisboa. Available at: core.ac.uk/download/pdf/303762413.pdf. Accessed in: 25/05/2021.

## Reference product
- grinding of cork // grinding of cork // eu+efta+uk: 1

## Inputs
- Electricity from Electricity grid mix 1kV-60kV - RNA: 2.12141
- Thermal energy (MJ) from Thermal energy from natural gas - EU+EFTA+UK: 0.0898613
- grinding of cork // grinding of cork // eu+efta+uk, blackbox: 1
- grinding of cork // grinding of cork // eu+efta+uk, elementary: 1

## Impact indicators
- Eutrophication marine: 0.000144039
- Ecotoxicity, freshwater: 1.65399
- Land use: 0.47907
- Water use: 0.098588
- Resource use, minerals and metals: 5.65072e-8
- Resource use, fossils: 5.07304
- Climate change: 0.326985
- Ozone depletion: 6.30137e-11
- Human toxicity, cancer: 4.01832e-10
- Human toxicity, non-cancer: 6.46114e-10
- EF-particulate Matter: 9.69768e-9
- Ionising radiation, human health: 0.0354846
- Photochemical ozone formation - human health: 0.000443552
- Acidification: 0.00117831
- Eutrophication, terrestrial: 0.00155494
- Eutrophication, freshwater: 1.66149e-7

## Deviations from the LCI method principle
The background data uses:
- the \xe2\x80\x9cRecycled content cut-off\xe2\x80\x9d approach to allocate end-of-life by-products and secondary materials. This allocation is explained in the description of the recycled content system model (http://www.ecoinvent.org/database/system-models-in-ecoinvent-3/cut-off-system-model/allocation-cut-off-by-classification.html).
OR
- EF compliant data

## Deviations from the LCI method approaches
Background data:
- the \xe2\x80\x9cRecycled content cut-off\xe2\x80\x9d approach to allocate end-of-life by-products and secondary materials. This allocation is explained in the description of the recycled content system model (http://www.ecoinvent.org/database/system-models-in-ecoinvent-3/cut-off-system-model/allocation-cut-off-by-classification.html). The ecoinvent database mostly relies on “Allocation – market values” apart for few exceptions particularly in the energy sector. ecoinvent energy data is replaced with EF3.0 core data as per the EF guidelines version 2.0.
OR
- EF compliant data

## Modelling constants
All modelling constants follow the requirements listed in the Tender Specifications 070201/2020/SER/ENV.B1. Completeness: There are no intentional cut-offs in the inventory no matter how small their contribution to all the EF impact categories is. Eventual cut-offs are in compliance with the Guide for EF compliant data sets (JRC 2020), i.e. only if below the 3% cut-off rule. Water use: water use is modelled at country level using separate flows for water withdrawal, water release and water evaporation. Handling multi-functional processes: the following PEF multi- functionality decision hierarchy is applied for resolving all multi- functionality problems: (1) subdivision or system expansion; (2) allocation based on a relevant underlying physical relationship (substitution may apply here); (3) allocation based on some other relationship. Direct land use change: GHG emissions from direct LUC allocated to good/service for 20 years after the LUC occurs, with IPCC default values. Carbon storage and delayed emissions: credits associated with temporary (carbon) storage or delayed emissions up to 300 years are not be considered. Emissions off-setting: are not included. Capital goods (including infrastructures) and their End of life: they are included. System boundaries: system boundaries include all processes linked to the product supply chain (e.g. maintenance). Time period: emissions and removals are modelled as if released or removed at the beginning of the assessment method. Fossil and biogenic carbon emissions and removals: removals and emissions are modelled as follows: All GHG emissions from fossil fuels (including peat and limestone) are modelled consistently with the most updated ILCD list of elementary flows. The non-fossil (biogenic) carbon flows are modelled consistently with the most updated ILCD list of elementary flows.

## Cut-off and completeness
There are no intentional cut-offs in the inventory no matter how small their contribution to all the EF impact categories is. Eventual cut-offs are in compliance with the Guide for EF compliant data sets (JRC 2020), i.e. only if below the 3% cut-off rule. The dataset dry mass and water balance has been checked to ensure the inventory is complete. Capital goods (e.g. infrastructure) and their end-of-life are included.

## Data selection and combination
These datasets include, in both their foreground and background data, links to EF3.0 compliant data.
The relevant background data on energy, transport, and End of Life are from the LCDN data node (http://lcdn.thinkstep.com/Node/).
All other background data in the supply of this product for which no EF3.0 process was available are from ecoinvent v3.7 database (www.ecoinvent.org) or other data sources.

## Data treatment and extrapolations
Several data sources have been used to model the inventory.

## Review details
Internal reviews have been asked to review the plausibility of the unit process, LCIA scores, and DQRs. Internal reviewers have also been asked to review the data for EF compliancy. The consortium is therefore responsible for aspects such as compliancy with the ILCD format, including validation in Look@LCI, and nomenclature.
Internal reviwers have been asked to judge based on the process name, that the unit process models in a complete and representative way the process in the requested location. The review encompassed the plausability of:
- exchanges with nature (elementary flows) as well as exchanges such as product and waste flows.
- meta information (general comment, technology comment, system boundaries, allocation, cut-off rules, etc.). Reviewers were asked to judge if the provided information is enough to understand the content of the process.
- LCIA scores
- DQRs including precision, technology, time and geography. As well as the overall DQR.
External reviewers have been asked to provide their expertise in the field of interest. External reviewers have been asked to review the unit process, including eventual methodological choices, the LCIA scores (provided with contribution scores as well), and DQRs. External reviewers have been provided all the information in a tool developed by the consortium for the purpose of this project.
External reviewers have been asked to judge based on the process name, that the unit process models in a complete and representative way the process in the requested location. The review encompassed:
- Plausability and completeness of exchanges with nature (elementary flows) as well as exchanges such as product and waste flows.
- Review of meta information (general comment, technology comment, system boundaries, allocation, cut-off rules, etc.). Reviewers were asked to judge if the provided information is enough to understand the content of the process.
- Review of properties (biogenic carbon and water content).
- Review of allocation keys.
- Plausability of LCIA scores calculated by the consortium.
- Plausability of DQRs including precision, technology, time and geography. As well as the overall DQR.

## Data sources
- Background Data for Representative products and organisations. EF 3.0 compliant (data stock)
- Martins, D.F.M. (2018). Contributos para a conceção de uma unidade fabril de granulado de cortiça. Master thesis. Faculdade de Ciências e Tecnologia. Universidade Nova de Lisboa. Available at: core.ac.uk/download/pdf/303762413.pdf. Accessed in: 25/05/2021.

## Intended applications
Implementation of regular Product Environmental Footprint (PEF) studies and Organisation Environmental Footprint (OEF) studies exclusively under the specified Product groups and sectors as defined in the Product Environmental Footprint Category Rules (PEFCR) and Organisation Environmental Footprint Sectorial Rules (OEFSR) listed in http://ec.europa.eu/environment/eussd/smgp/PEFCR_OEFSR.htm
