# coating, water based emulsion, 3 times (for 4 layers); Finishing; technology mix; textile service for 1 kg of fabric

Dataset: ILCD process, Partly terminated system
Geography: GLO
Reference year: 2008
Valid until: 2024
Classification: Systems / Textiles, furnitures and other interiors
LCI method principle: Attributional
LCI method approaches: Allocation - market value
Completeness: All relevant flows quantified
Project: Provision of process-based 3.0 Environmental Footprint-compliant life cycle inventory datasets - Apparel 2 - contract number 070201/2020/840292/SER/ENV.B.1
Generated by: CADIS
Owner: PRé Sustainability B.V.
Compliance: ILCD Data Network - Entry-level; Suggestions for updating the PEF method 2019; ISO 14040 Environmental Management – Life Cycle Assessment – Principles and Framework, 2006; ISO 14044:2006. Environmental Management – Life Cycle Assessment – Requirements and guidelines.; Environmental Footprint 3.1
Review: Dependent internal review by Avraam Symeonidis, Emilia Moreno Ruiz; Independent review panel by Madhuri Nigam
Data quality: Overall quality: Good; Time representativeness: Very good; Geographical representativeness: Good; Technological representativeness: Good; Precision: Good; Methodological appropriateness and consistency: Not applicable
Amounts: no units in this file; such an amount is in the reference unit of its flow, which a separate flow dataset defines
copyright: true
licenseType: Free of charge for some user types or use types
accessRestrictions: Free of charge for all final users implementing a regular Product Environmental Footprint (PEF) studies and Organisation Environmental Footprint (OEF) studies exclusively under the specified Product groups and sectors as defined in the Product Environmental Footprint Category Rules (PEFCR) and Organisation Environmental Footprint Sectorial Rules (OEFSR) listed in http://ec.europa.eu/environment/eussd/smgp/PEFCR_OEFSR.htm and in accordance with the terms and conditions of the EULA (available at https://ecoinvent.lca-data.com/) exclusively until 31st December 2024. Any use of this dataset or any derivative data not within the specific context of one of the PEF/OEF projects or after the end of 2024 is not permitted.

## General comment
Notice: this data set supersedes the EF3.0-compliant version (see link under "preceding data set version" below calculated with the EF3.0). The life cycle inventory is not changed from the original EF3.0 data set. The LCIA results are calculated based on the EF3.1 methods which provide updated characterisation factors in the following impact categories: Climate Change, Ecotoxicity freshwater, Photochemical Ozone Formation, Acidification, Human Toxicity non-cancer, and Human Toxicity cancer. The review report and the data quality ratings refer to the original results. The data set has been updated by the European Commission on the basis of the original EF3.0 data set delivered by the data provider.This activity is modeled as a service, so no input of textile is considered. A user employing this service within their models should use it along with 1 kg of fabric. Four layer process (application of three coating process). It is assumed that the complete coating process shall be repeated completely for each layer. Paraffin (10.5%), stearic acid (4.5%) and triethanolamine (2.4%) concentration (wt/wt fabric) values were obtained from Abo-Shosha et al. (2008). Deactivation agent (aluminum chloride) is included considering a 1:1 molar ratio regarding stearic acid (0.47 kg/kg) according to Abo-Shosha et al. (2008). Water used for emulsion preparation (50 g of fabric per liter of emulsion) was obtained from Abo-Shosha et al. (2008). Steam (1.2 kg/kg) and electricity (0.39 kWh/kg) values for padding fabric into emulsion were obtained from Ka & Geberehiwot, 2020). Heat use (4 MJ/kg) for drying and curing in stenter was obtained from Mazo-Restrepo et al. (2021). Wastewater generation (60% of input water) and evaporated water (40% of input water) values were obtained as average finishing process parameters from Thinkstep (2017). A user employing this service within their models should use it along with 1 kg of fabric. Life expectancy of coating machine is assumed to be 25 years (UNFCCC, 2012) with an average coating capacity of 25 m/min and a machine weight of 11500 kg (XiNLiLONG 2021), assuming 12 h/d operating time, 30 days per month and a fabric weight of 300 grams per square meter. Land use from factory building was calculated based on (EUREKA, 2021) from a total area of 325 thousand square meters, divided into five sub-productive areas: knitting, dyeing, finishing, and home textiles. The respective area (1/5) of total building area (65,000 m2) is divided by the total production capacity of the building in 60 years (assumed life span of the building), with a daily production of 100,000 meters of finished fabric and a fabric weight of 300 grams per square meter (EUREKA, 2021).

## Technology and included processes
Coating is the application of polymer onto a textile as a paste, foam or viscous liquid. The application of polymer is made such that coating cannot be detached. Paraffin wax emulsion is the most economical water repellent for textiles. This element is applied to fabrics that are not subject to laundering, such as tent fabrics, upholstery and fabrics covering goods in transport and storage. Paraffin wax is emulsified in water using stearic acid and triethanolamine in a pad batch machine containing aluminum chloride as deactivation agent. Coating curing is performed in a stenter.

## Parameters
- kg_0: 0.135
  Mass in kg, for stearic acid; Transoceanic ship, containers; GLO
- km_0: 599
  Distance in km, for stearic acid; Transoceanic ship, containers; GLO
- kg_km_0: 80.865; = kg_0*km_0
  Transport amount in km*km, for stearic acid; Transoceanic ship, containers; GLO
- kg_1: 0.135
  Mass in kg, for stearic acid; Freight train, diesel traction; EU+EFTA+UK
- km_1: 229.272
  Distance in km, for stearic acid; Freight train, diesel traction; EU+EFTA+UK
- kg_km_1: 30.9517; = kg_1*km_1
  Transport amount in km*km, for stearic acid; Freight train, diesel traction; EU+EFTA+UK
- kg_2: 0.135
  Mass in kg, for stearic acid; Freight train, electricity traction; EU+EFTA+UK
- km_2: 77.9889
  Distance in km, for stearic acid; Freight train, electricity traction; EU+EFTA+UK
- kg_km_2: 10.5285; = kg_2*km_2
  Transport amount in km*km, for stearic acid; Freight train, electricity traction; EU+EFTA+UK
- kg_3: 0.135
  Mass in kg, for stearic acid; Freight train, average; EU+EFTA+UK
- km_3: 1.8394
  Distance in km, for stearic acid; Freight train, average; EU+EFTA+UK
- kg_km_3: 0.24832; = kg_3*km_3
  Transport amount in km*km, for stearic acid; Freight train, average; EU+EFTA+UK
- kg_4: 0.135
  Mass in kg, for stearic acid; Barge; EU+EFTA+UK
- km_4: 8.08691
  Distance in km, for stearic acid; Barge; EU+EFTA+UK
- kg_km_4: 1.09173; = kg_4*km_4
  Transport amount in km*km, for stearic acid; Barge; EU+EFTA+UK
- kg_5: 0.135
  Mass in kg, for stearic acid; Barge; ROW w/o EU+EFTA
- km_5: 16.5131
  Distance in km, for stearic acid; Barge; ROW w/o EU+EFTA
- kg_km_5: 2.22927; = kg_5*km_5
  Transport amount in km*km, for stearic acid; Barge; ROW w/o EU+EFTA
- kg_6: 0.135
  Mass in kg, for stearic acid; Articulated lorry transport, Euro 4, Total weight >32 t; EU+EFTA+UK
- km_6: 57.3754
  Distance in km, for stearic acid; Articulated lorry transport, Euro 4, Total weight >32 t; EU+EFTA+UK
- kg_km_6: 7.74567; = kg_6*km_6
  Transport amount in km*km, for stearic acid; Articulated lorry transport, Euro 4, Total weight >32 t; EU+EFTA+UK
- kg_7: 0.135
  Mass in kg, for stearic acid; Articulated lorry transport, Total weight >32 t, mix Euro 0-5; ROW w/o EU+EFTA
- km_7: 151.425
  Distance in km, for stearic acid; Articulated lorry transport, Total weight >32 t, mix Euro 0-5; ROW w/o EU+EFTA
- kg_km_7: 20.4423; = kg_7*km_7
  Transport amount in km*km, for stearic acid; Articulated lorry transport, Total weight >32 t, mix Euro 0-5; ROW w/o EU+EFTA
- kg_8: 0.315
  Mass in kg, for wax // wax production // eu+efta+uk; Articulated lorry transport, Euro 4, Total weight >32 t; EU+EFTA+UK
- km_8: 1000
  Distance in km, for wax // wax production // eu+efta+uk; Articulated lorry transport, Euro 4, Total weight >32 t; EU+EFTA+UK
- kg_km_8: 315; = kg_8*km_8
  Transport amount in km*km, for wax // wax production // eu+efta+uk; Articulated lorry transport, Euro 4, Total weight >32 t; EU+EFTA+UK
- kg_9: 0.072
  Mass in kg, for triethanolamine // triethanolamine production // glo; Articulated lorry transport, Euro 4, Total weight >32 t; EU+EFTA+UK
- km_9: 1000
  Distance in km, for triethanolamine // triethanolamine production // glo; Articulated lorry transport, Euro 4, Total weight >32 t; EU+EFTA+UK
- kg_km_9: 72; = kg_9*km_9
  Transport amount in km*km, for triethanolamine // triethanolamine production // glo; Articulated lorry transport, Euro 4, Total weight >32 t; EU+EFTA+UK
- kg_10: 0.0337437
  Mass in kg, for aluminium chloride // aluminium chloride production // glo; Articulated lorry transport, Euro 4, Total weight >32 t; EU+EFTA+UK
- km_10: 1000
  Distance in km, for aluminium chloride // aluminium chloride production // glo; Articulated lorry transport, Euro 4, Total weight >32 t; EU+EFTA+UK
- kg_km_10: 33.7437; = kg_10*km_10
  Transport amount in km*km, for aluminium chloride // aluminium chloride production // glo; Articulated lorry transport, Euro 4, Total weight >32 t; EU+EFTA+UK
- kg_11: 0.315
  Mass in kg, for wax // wax production // eu+efta+uk; Transoceanic ship, containers; GLO
- km_11: 18000
  Distance in km, for wax // wax production // eu+efta+uk; Transoceanic ship, containers; GLO
- kg_km_11: 5670; = kg_11*km_11
  Transport amount in km*km, for wax // wax production // eu+efta+uk; Transoceanic ship, containers; GLO
- kg_12: 0.072
  Mass in kg, for triethanolamine // triethanolamine production // glo; Transoceanic ship, containers; GLO
- km_12: 18000
  Distance in km, for triethanolamine // triethanolamine production // glo; Transoceanic ship, containers; GLO
- kg_km_12: 1296; = kg_12*km_12
  Transport amount in km*km, for triethanolamine // triethanolamine production // glo; Transoceanic ship, containers; GLO
- kg_13: 0.0337437
  Mass in kg, for aluminium chloride // aluminium chloride production // glo; Transoceanic ship, containers; GLO
- km_13: 18000
  Distance in km, for aluminium chloride // aluminium chloride production // glo; Transoceanic ship, containers; GLO
- kg_km_13: 607.386; = kg_13*km_13
  Transport amount in km*km, for aluminium chloride // aluminium chloride production // glo; Transoceanic ship, containers; GLO

## Reference product
- coating, water based emulsion, 3 times (for 4 layers) // coating, water based emulsion, 3 times (for 4 layers) // glo: 1

## Inputs
- Electricity from Electricity grid mix 1kV-60kV - AU: 0.04612
- Electricity from Electricity grid mix 1kV-60kV - EU+EFTA+UK: 0.678117
- Electricity from Electricity grid mix 1kV-60kV - NZ: 0.00865636
- Electricity from Electricity grid mix 1kV-60kV - RAF: 0.1483
- Electricity from Electricity grid mix 1kV-60kV - RNA: 0.992653
- Electricity from Electricity grid mix 1kV-60kV - RSA: 0.336661
- Electricity from Electricity grid mix 1kV-60kV - RU: 0.198588
- Transport of stearic acid by Transoceanic ship, containers - GLO: 80.865; = kg_km_0
- Transport of stearic acid by Freight train, diesel traction - EU+EFTA+UK: 30.9517; = kg_km_1
- Transport of stearic acid by Freight train, electricity traction - EU+EFTA+UK: 10.5285; = kg_km_2
- Transport of stearic acid by Freight train, average - EU+EFTA+UK: 0.24832; = kg_km_3
- Transport of stearic acid by Barge - EU+EFTA+UK: 1.09173; = kg_km_4
- Transport of stearic acid by Barge - ROW w/o EU+EFTA: 2.22927; = kg_km_5
- Transport of stearic acid by Articulated lorry transport, Euro 4, Total weight >32 t - EU+EFTA+UK: 7.74567; = kg_km_6
- Transport of stearic acid by Articulated lorry transport, Total weight >32 t, mix Euro 0-5 - ROW w/o EU+EFTA: 20.4423; = kg_km_7
- Thermal energy (MJ) from Thermal energy from hard coal - EU+EFTA+UK: 1.16665
- Thermal energy (MJ) from Thermal energy from hard coal - ROW: 1.36955
- Thermal energy (MJ) from Thermal energy from light fuel oil (LFO) - EU+EFTA+UK: 1.74998
- Thermal energy (MJ) from Thermal energy from light fuel oil (LFO) - ROW: 2.05433
- Thermal energy (MJ) from Thermal energy from LPG - ROW: 12
- Thermal energy (MJ) from Thermal energy from natural gas - EU+EFTA+UK: 2.91664
- Thermal energy (MJ) from Thermal energy from natural gas - ROW: 3.42388
- Transport of wax // wax production // eu+efta+uk by Articulated lorry transport, Euro 4, Total weight >32 t - EU+EFTA+UK: 315; = kg_km_8
- Transport of triethanolamine // triethanolamine production // glo by Articulated lorry transport, Euro 4, Total weight >32 t - EU+EFTA+UK: 72; = kg_km_9
- Transport of aluminium chloride // aluminium chloride production // glo by Articulated lorry transport, Euro 4, Total weight >32 t - EU+EFTA+UK: 33.7437; = kg_km_10
- Transport of wax // wax production // eu+efta+uk by Transoceanic ship, containers - GLO: 5670; = kg_km_11
- Transport of triethanolamine // triethanolamine production // glo by Transoceanic ship, containers - GLO: 1296; = kg_km_12
- Transport of aluminium chloride // aluminium chloride production // glo by Transoceanic ship, containers - GLO: 607.386; = kg_km_13
- Electricity from Electricity grid mix 1kV-60kV - CN: 1.01705
- Electricity from Electricity grid mix 1kV-60kV - RAS w/o CN: 1.11432
- coating, water based emulsion, 3 times (for 4 layers) // coating, water based emulsion, 3 times (for 4 layers) // glo, blackbox: 1
- coating, water based emulsion, 3 times (for 4 layers) // coating, water based emulsion, 3 times (for 4 layers) // glo, elementary: 1

## Impact indicators
- Eutrophication marine: 0.00509272
- Ecotoxicity, freshwater: 582.682
- Land use: 8.71259
- Water use: 3.11956
- Resource use, minerals and metals: 1.57267e-5
- Resource use, fossils: 80.4399
- Climate change: 4.97159
- Ozone depletion: 4.47216e-8
- Human toxicity, cancer: 6.745e-8
- Human toxicity, non-cancer: 4.52198e-7
- EF-particulate Matter: 6.35749e-7
- Ionising radiation, human health: 0.114799
- Photochemical ozone formation - human health: 0.014794
- Acidification: 0.0220015
- Eutrophication, terrestrial: 0.0540361
- Eutrophication, freshwater: 0.00010994

## Deviations from the LCI method principle
The background data uses:
- the \xe2\x80\x9cRecycled content cut-off\xe2\x80\x9d approach to allocate end-of-life by-products and secondary materials. This allocation is explained in the description of the recycled content system model (http://www.ecoinvent.org/database/system-models-in-ecoinvent-3/cut-off-system-model/allocation-cut-off-by-classification.html).
OR
- EF compliant data

## Deviations from the LCI method approaches
Background data:
- the \xe2\x80\x9cRecycled content cut-off\xe2\x80\x9d approach to allocate end-of-life by-products and secondary materials. This allocation is explained in the description of the recycled content system model (http://www.ecoinvent.org/database/system-models-in-ecoinvent-3/cut-off-system-model/allocation-cut-off-by-classification.html). The ecoinvent database mostly relies on “Allocation – market values” apart for few exceptions particularly in the energy sector. ecoinvent energy data is replaced with EF3.0 core data as per the EF guidelines version 2.0.
OR
- EF compliant data

## Modelling constants
All modelling constants follow the requirements listed in the Tender Specifications 070201/2020/SER/ENV.B1. Completeness: There are no intentional cut-offs in the inventory no matter how small their contribution to all the EF impact categories is. Eventual cut-offs are in compliance with the Guide for EF compliant data sets (JRC 2020), i.e. only if below the 3% cut-off rule. Water use: water use is modelled at country level using separate flows for water withdrawal, water release and water evaporation. Handling multi-functional processes: the following PEF multi- functionality decision hierarchy is applied for resolving all multi- functionality problems: (1) subdivision or system expansion; (2) allocation based on a relevant underlying physical relationship (substitution may apply here); (3) allocation based on some other relationship. Direct land use change: GHG emissions from direct LUC allocated to good/service for 20 years after the LUC occurs, with IPCC default values. Carbon storage and delayed emissions: credits associated with temporary (carbon) storage or delayed emissions up to 300 years are not be considered. Emissions off-setting: are not included. Capital goods (including infrastructures) and their End of life: they are included. System boundaries: system boundaries include all processes linked to the product supply chain (e.g. maintenance). Time period: emissions and removals are modelled as if released or removed at the beginning of the assessment method. Fossil and biogenic carbon emissions and removals: removals and emissions are modelled as follows: All GHG emissions from fossil fuels (including peat and limestone) are modelled consistently with the most updated ILCD list of elementary flows. The non-fossil (biogenic) carbon flows are modelled consistently with the most updated ILCD list of elementary flows.

## Cut-off and completeness
There are no intentional cut-offs in the inventory no matter how small their contribution to all the EF impact categories is. Eventual cut-offs are in compliance with the Guide for EF compliant data sets (JRC 2020), i.e. only if below the 3% cut-off rule. The dataset dry mass and water balance has been checked to ensure the inventory is complete. Capital goods (e.g. infrastructure) and their end-of-life are included.

## Data selection and combination
These datasets include, in both their foreground and background data, links to EF3.0 compliant data.
The relevant background data on energy, transport, and End of Life are from the LCDN data node (http://lcdn.thinkstep.com/Node/).
All other background data in the supply of this product for which no EF3.0 process was available are from ecoinvent v3.7 database (www.ecoinvent.org) or other data sources.

## Data treatment and extrapolations
Several data sources have been used to model the inventory.

## Review details
Internal reviews have been asked to review the plausibility of the unit process, LCIA scores, and DQRs. Internal reviewers have also been asked to review the data for EF compliancy. The consortium is therefore responsible for aspects such as compliancy with the ILCD format, including validation in Look@LCI, and nomenclature.
Internal reviwers have been asked to judge based on the process name, that the unit process models in a complete and representative way the process in the requested location. The review encompassed the plausability of:
- exchanges with nature (elementary flows) as well as exchanges such as product and waste flows.
- meta information (general comment, technology comment, system boundaries, allocation, cut-off rules, etc.). Reviewers were asked to judge if the provided information is enough to understand the content of the process.
- LCIA scores
- DQRs including precision, technology, time and geography. As well as the overall DQR.
External reviewers have been asked to provide their expertise in the field of interest. External reviewers have been asked to review the unit process, including eventual methodological choices, the LCIA scores (provided with contribution scores as well), and DQRs. External reviewers have been provided all the information in a tool developed by the consortium for the purpose of this project.
External reviewers have been asked to judge based on the process name, that the unit process models in a complete and representative way the process in the requested location. The review encompassed:
- Plausability and completeness of exchanges with nature (elementary flows) as well as exchanges such as product and waste flows.
- Review of meta information (general comment, technology comment, system boundaries, allocation, cut-off rules, etc.). Reviewers were asked to judge if the provided information is enough to understand the content of the process.
- Review of properties (biogenic carbon and water content).
- Review of allocation keys.
- Plausability of LCIA scores calculated by the consortium.
- Plausability of DQRs including precision, technology, time and geography. As well as the overall DQR.

## Data sources
- Background Data for Representative products and organisations. EF 3.0 compliant (data stock)
- M.H. Abo-Shosha, Z.H. El-Hilw, A.A. Aly, A. Amr and Al Said I. El. Nagdy (2008) Paraffin Wax Emulsion as Water Repellent for Cotton/Polyester Blended fabric. Journal of Industrial Textiles 2008 37: 315 DOI: 10.1177/1528083707083793
- Ka T, Geberehiwot Z (2020) Economy and Ecology in Dyeing-Cold Pad batch Dyeing Method for Cotton Knitted Fabric. Journal of Textile Science & Engineering. Volume 10:4, 2020 DOI: 10.37421/jtese.2020.10.411
- Parish G.J., Reed C.M. (1980) Energy Consumption and Energy Saving in the Heat-Setting and Dye-Fixation of Textile Fabrics on Stenters. In: Strub A.S., Ehringer H. (eds) New Ways to Save Energy. Springer, Dordrecht. https://doi.org/10.1007/978-94-009-8990-0_75
- thinkstep AG. 2017. LCA Update of Cotton Fiber and Fabric Life Cycle Inventory.
- Mazo-Restrepo R, Alvarado P, Cacua K (2021) Analysis of potential waste heat recovery from a stenter in a textile plant.. DYNA, 88(217), pp. 292-302, April - June, 2021.
- UNFCCC (2012) COMPONENT PROJECT ACTIVITIES DESIGN DOCUMENT (CPA-DD). Accessed online August 8th 2021: http://gec.jp/gec/jp/Activities/cdm-fs/2012/2012_cdmfs01_jPear_bangladesh_cpa-dd.pdf
- XiNLiLONG (2021) Solvent based adhesive coating leather fabric bonding machine upholstery making machine. Accessed online August 10th, 2021: https://www.alibaba.com/product-detail/solvent-based-adhesive-coating-leather-fabric_62269930388.html?spm=a2700.7724857.normal_offer.d_title.2e1623ce0I6uFC
- EUREKA (2021) Production activities in line with the “green factory” approach in the textile sector. Accessed online August 8th 2021: https://eureka-eurogia-green.eu/offering_expertise/production-activities-in-line-with-the-green-factory-approach-in-the-textile-sector-13-04-2021/

## Intended applications
Implementation of regular Product Environmental Footprint (PEF) studies and Organisation Environmental Footprint (OEF) studies exclusively under the specified Product groups and sectors as defined in the Product Environmental Footprint Category Rules (PEFCR) and Organisation Environmental Footprint Sectorial Rules (OEFSR) listed in http://ec.europa.eu/environment/eussd/smgp/PEFCR_OEFSR.htm
