# cashmere fiber, elementary; raw; at rangelands; extensive farming

Dataset: ILCD process, Unit process, single operation
Geography: MN
Reference year: 2005
Valid until: 2024
Classification: Other Services / Other services
LCI method principle: Attributional
LCI method approaches: Allocation - market value
Completeness: All relevant flows quantified
Project: Provision of process-based 3.0 Environmental Footprint-compliant life cycle inventory datasets - Renewable materials - contract number 070201/2020/840085/SER/ENV.B.1
Generated by: ACV Brasil
Owner: Blonk Sustainability Tools
Compliance: Environmental Footprint non-primary supporting data set; Environmental Footprint 3.1
Amounts: no units in this file; such an amount is in the reference unit of its flow, which a separate flow dataset defines
copyright: true
licenseType: Free of charge for some user types or use types
accessRestrictions: Free of charge for all final users implementing a regular Product Environmental Footprint (PEF) studies and Organisation Environmental Footprint (OEF) studies exclusively under the specified Product groups and sectors as defined in the Product Environmental Footprint Category Rules (PEFCR) and Organisation Environmental Footprint Sectorial Rules (OEFSR) listed in http://ec.europa.eu/environment/eussd/smgp/PEFCR_OEFSR.htm and in accordance with the terms and conditions of the EULA (available at https://ecoinvent.lca-data.com/) exclusively until 31st December 2024. Any use of this dataset or any derivative data not within the specific context of one of the PEF/OEF projects or after the end of 2024 is not permitted.

## General comment
Notice: this data set supersedes the EF3.0-compliant version (see link under "preceding data set version" below calculated with the EF3.0). The life cycle inventory is not changed from the original EF3.0 data set. The LCIA results are calculated based on the EF3.1 methods which provide updated characterisation factors in the following impact categories: Climate Change, Ecotoxicity freshwater, Photochemical Ozone Formation, Acidification, Human Toxicity non-cancer, and Human Toxicity cancer. The review report and the data quality ratings refer to the original results. The data set has been updated by the European Commission on the basis of the original EF3.0 data set delivered by the data provider.This sub-process has limited documentation only. For all detailed documentation of the full model to which this data set belongs (such as DQRs, review reports and other technical documentation), please see this process: cashmere fiber - MN []

## Technology and included processes
This dataset aims at representing the production of herded (raw) cashmere fibre produced in Mongolia. The activity starts with grazing herds by semi-nomadic herders on open, communally owned rangelands. Grazing herds include inputs as feeds, straw, water, as well as the transport of these inputs to the farm; land use; simple housing facilities; the enteric emissions. As far as the herding is extensive, energy, heat and water consumption for the housing facilities and emissions due to the effluent management are not considered. The activity ends with the hair harvested by hand using combs after the spring moult.
The allocation of upstream burdens at the rangeland level among goat outputs leaving the rangeland is retrieved from the Product Envirionmental Footprint Category Rules Guidance – PEFCR Guidance (EC, 2018). The allocation factors have been calculated according to the biophysical approach: Goat milk (73.9%), meat (2.51%) and hair (23.64%).

## Reference product
- cashmere fiber (raw), at rangeland // cashmere fiber // mn, elementary: 1

## Inputs
- pasture/meadow, extensive, Land occupation [MN]: 324812
- from pasture/meadow, extensive, Land transformation [MN]: 324812
- to pasture/meadow, extensive, Land transformation [MN]: 324812

## Outputs
- methane (biogenic), Emissions to non-urban air or from high stacks: 468.072

## Impact indicators
- Ecotoxicity, freshwater: 149.483
- Land use: 9.38154e6
- Climate change: 12637.9
- Human toxicity, non-cancer: 2.19999e-5
- Photochemical ozone formation - human health: 4.72753
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
## Deviations from the LCI method principle
The background data uses:
- the \xe2\x80\x9cRecycled content cut-off\xe2\x80\x9d approach to allocate end-of-life by-products and secondary materials. This allocation is explained in the description of the recycled content system model (http://www.ecoinvent.org/database/system-models-in-ecoinvent-3/cut-off-system-model/allocation-cut-off-by-classification.html).
OR
- EF compliant data

## Deviations from the LCI method approaches
0.0132384524637917 from biophysical allocation: factor calculated based on IPCC (2019) formulas of net energy, considering lowland cashmere goats from Asia, and following the animal class allocation metodology from Koch and Salou (2020)

Background data:
- the \xe2\x80\x9cRecycled content cut-off\xe2\x80\x9d approach to allocate end-of-life by-products and secondary materials. This allocation is explained in the description of the recycled content system model (http://www.ecoinvent.org/database/system-models-in-ecoinvent-3/cut-off-system-model/allocation-cut-off-by-classification.html). The ecoinvent database mostly relies on “Allocation – market values” apart for few exceptions particularly in the energy sector. ecoinvent energy data is replaced with EF3.0 core data as per the EF guidelines version 2.0.
OR
- EF compliant data

## Modelling constants
All modelling constants follow the requirements listed in the Tender Specifications 070201/2020/SER/ENV.B1. Completeness: There are no intentional cut-offs in the inventory no matter how small their contribution to all the EF impact categories is. Eventual cut-offs are in compliance with the Guide for EF compliant data sets (JRC 2020), i.e. only if below the 3% cut-off rule. Water use: water use is modelled at country level using separate flows for water withdrawal, water release and water evaporation. Handling multi-functional processes: the following PEF multi- functionality decision hierarchy is applied for resolving all multi- functionality problems: (1) subdivision or system expansion; (2) allocation based on a relevant underlying physical relationship (substitution may apply here); (3) allocation based on some other relationship. Direct land use change: GHG emissions from direct LUC allocated to good/service for 20 years after the LUC occurs, with IPCC default values. Carbon storage and delayed emissions: credits associated with temporary (carbon) storage or delayed emissions up to 300 years are not be considered. Emissions off-setting: are not included. Capital goods (including infrastructures) and their End of life: they are included. System boundaries: system boundaries include all processes linked to the product supply chain (e.g. maintenance). Time period: emissions and removals are modelled as if released or removed at the beginning of the assessment method. Fossil and biogenic carbon emissions and removals: removals and emissions are modelled as follows: All GHG emissions from fossil fuels (including peat and limestone) are modelled consistently with the most updated ILCD list of elementary flows. The non-fossil (biogenic) carbon flows are modelled consistently with the most updated ILCD list of elementary flows.

## Cut-off and completeness
There are no intentional cut-offs in the inventory no matter how small their contribution to all the EF impact categories is. Eventual cut-offs are in compliance with the Guide for EF compliant data sets (JRC 2020), i.e. only if below the 3% cut-off rule. The dataset dry mass and water balance has been checked to ensure the inventory is complete. Capital goods (e.g. infrastructure) and their end-of-life are included.

## Data selection and combination
These datasets include, in both their foreground and background data, links to EF3.0 compliant data.
The relevant background data on energy, transport, and End of Life are from the LCDN data node (http://lcdn.thinkstep.com/Node/).
All other background data in the supply of this product for which no EF3.0 process was available are from ecoinvent v3.7 database (www.ecoinvent.org) or other data sources.

## Data treatment and extrapolations
Several data sources have been used to model the inventory.

## Use advice
This data set is a supporting sub-data set and must be used exclusively as sub-data set of its corresponding level-1 partly disaggregated data set (see “General comment” field for exact name and UUID).

## Data sources
- Background Data for Representative products and organisations. EF 3.0 compliant (data stock)
- Bynie, B. MONGOLIA: THE COUNTRY REFORT ON ANIMAL GENETIC RESOURCES. National Consultative Committee on Animal genetic resources of Mongolia Ulaanbaatar, September 2002.
- Hunter, L. Mohair, Cashmere and other animal hair fibers. In: Kozlowski et al. Handbook of Natural Fibres: Vol. 1: Types, Properties and Factors Affecting Breeding and Cultivation. Ensevier, 2020.
- IPCC (2019). Chapter 10: Emissions from Livestoch and Manure Management. Refinement to the 2006 IPCC Guidelines for National Greenhouse Gas Inventories.
- Jordan et al. Spatio-temporal patterns of herbage availability and livestock movements: A cross-border analysis in the Chinese-Mongolian Altay. Pastoralism volume 6, Article number: 12 (2016).
- Koch, P., Salou, T. AGRIBALYSE® : METHODOLOGY, AGRICULTURAL STAGE. Version 3.0. April 2020.
- SFA. Sustainable Fiber Alliance. https://sustainablefibre.org/about-cashmere/. 2021.
- Product Environmental Footprint Category Rules Guidance – PEFCR Guidance (EC, 2018). Version 6.3. Available in: https://ec.europa.eu/environment/eussd/smgp/pdf/PEFCR_guidance_v6.3.pdf

## Intended applications
Implementation of regular Product Environmental Footprint (PEF) studies and Organisation Environmental Footprint (OEF) studies exclusively under the specified Product groups and sectors as defined in the Product Environmental Footprint Category Rules (PEFCR) and Organisation Environmental Footprint Sectorial Rules (OEFSR) listed in http://ec.europa.eu/environment/eussd/smgp/PEFCR_OEFSR.htm
