# ironing, average, 1 minute; technology mix; production mix, at plant; service

Dataset: ILCD process, Partly terminated system
Geography: EU+EFTA+UK
Reference year: 2021
Valid until: 2024
Classification: Systems / Textiles, furnitures and other interiors
LCI method principle: Attributional
LCI method approaches: Allocation - market value
Completeness: All relevant flows quantified
Project: Provision of process-based 3.0 Environmental Footprint-compliant life cycle inventory datasets - Others - contract number 070201/2020/840235/SER/ENV.B.1
Generated by: Life Cycle Indonesia
Owner: PRé Sustainability B.V.
Compliance: ILCD Data Network - Entry-level; Suggestions for updating the PEF method 2019; ISO 14040 Environmental Management – Life Cycle Assessment – Principles and Framework, 2006; ISO 14044:2006. Environmental Management – Life Cycle Assessment – Requirements and guidelines.; Environmental Footprint 3.1
Review: Dependent internal review by Avraam Symeonidis, Emilia Moreno Ruiz; Independent review panel by Fábio Valebona
Data quality: Overall quality: Very good; Time representativeness: Very good; Geographical representativeness: Very good; Technological representativeness: Very good; Precision: Good; Methodological appropriateness and consistency: Not applicable
Amounts: no units in this file; such an amount is in the reference unit of its flow, which a separate flow dataset defines
copyright: true
licenseType: Free of charge for some user types or use types
accessRestrictions: Free of charge for all final users implementing a regular Product Environmental Footprint (PEF) studies and Organisation Environmental Footprint (OEF) studies exclusively under the specified Product groups and sectors as defined in the Product Environmental Footprint Category Rules (PEFCR) and Organisation Environmental Footprint Sectorial Rules (OEFSR) listed in http://ec.europa.eu/environment/eussd/smgp/PEFCR_OEFSR.htm and in accordance with the terms and conditions of the EULA (available at https://ecoinvent.lca-data.com/) exclusively until 31st December 2024. Any use of this dataset or any derivative data not within the specific context of one of the PEF/OEF projects or after the end of 2024 is not permitted.

## General comment
Notice: this data set supersedes the EF3.0-compliant version (see link under "preceding data set version" below calculated with the EF3.0). The life cycle inventory is not changed from the original EF3.0 data set. The LCIA results are calculated based on the EF3.1 methods which provide updated characterisation factors in the following impact categories: Climate Change, Ecotoxicity freshwater, Photochemical Ozone Formation, Acidification, Human Toxicity non-cancer, and Human Toxicity cancer. The review report and the data quality ratings refer to the original results. The data set has been updated by the European Commission on the basis of the original EF3.0 data set delivered by the data provider.The main purpose of ironing is to reduce creases on fabric. Creases consists of fibres that have gotten fixed in a tangled position and the iron needs to unravel them. An iron reduces creases by adding heat. There are several method that can be used to iron such as steam iron, dry iron, steamers and smart ironing boards. When ironing, the pressure is mostly created by the users when pressing the iron against the fabric, but some irons are heavier than others which help the pressing procedure.

Fredriksson, Kristin and Österlind, Emilia. (2018). Product development of an ergonomic and sustainable iron designed for its context. Stockholm: KTH Royal Institute of Technology.

## Technology and included processes
Most commonly used iron are dry irons and steam irons. Steam irons can also be used for dry ironing. In operating dry iron, the temperature can be set to suit the instructions on garment labels. Setting point 1 (one dot) meaning the temperature is more on mininum side, usually used for acrylic, acetate, nylon, polyester, rayon, viscose, and silk. Setting point 2 (two dots) meaning the temperature is on the between and used for wool, cotton blends and wool blends. Meanwhile, setting point 3 (three dots) meaning the temperature is on the maximum side and used for corduroy, cotton, linen, and denim (RVM Australia, 2016). In general, the maximum possible heating on the iron is 205 celcius degrees and the minimum level is 110.

This data represents avarage of 3 setting points, i.e.:
Setting point 1: 110 celcius degrees
Setting point 2: 150 celcius degrees
Setting point 3: 205 celcius degrees

The activity starts when the material enter the process. Materials entering the process are included as well as energy uses. There is no direct emission to soil, water, or air.

Kidness-shop. (2019). To what temperature does the iron heat up. Recommendations for choosing the temperature of ironing. About optimal temperature conditions, https://kidness-shop.ru/en/rody/do-kakoi-temperatury-razogrevaetsya-utyug-rekomendacii-po-vyboru.html
RVM Australia. (2016). Steam Iron Instruction Manual, https://www.appliancesonline.com.au/public/manuals/Westinghouse-WHIR05WB-Steam-Iron-User-Manual.pdf

## Reference product
- ironing, average, 1 minute // ironing, average, 1 minute // eu+efta+uk: 1

## Inputs
- Electricity from Electricity grid mix 1kV-60kV - EU+EFTA+UK: 0.108878
- ironing, average, 1 minute // ironing, average, 1 minute // eu+efta+uk, blackbox: 1
- ironing, average, 1 minute // ironing, average, 1 minute // eu+efta+uk, elementary: 1

## Impact indicators
- Eutrophication marine: 7.57787e-6
- Ecotoxicity, freshwater: 0.0593652
- Land use: 0.0551062
- Water use: 0.00479822
- Resource use, minerals and metals: 6.88313e-9
- Resource use, fossils: 0.222866
- Climate change: 0.012862
- Ozone depletion: 6.47761e-12
- Human toxicity, cancer: 4.28621e-12
- Human toxicity, non-cancer: 4.67025e-11
- EF-particulate Matter: 4.3913e-10
- Ionising radiation, human health: 0.00539205
- Photochemical ozone formation - human health: 2.15649e-5
- Acidification: 3.97512e-5
- Eutrophication, terrestrial: 8.01861e-5
- Eutrophication, freshwater: 4.62036e-8

## Deviations from the LCI method principle
The background data uses:
- the \xe2\x80\x9cRecycled content cut-off\xe2\x80\x9d approach to allocate end-of-life by-products and secondary materials. This allocation is explained in the description of the recycled content system model (http://www.ecoinvent.org/database/system-models-in-ecoinvent-3/cut-off-system-model/allocation-cut-off-by-classification.html).
OR
- EF compliant data

## Deviations from the LCI method approaches
Background data:
- the \xe2\x80\x9cRecycled content cut-off\xe2\x80\x9d approach to allocate end-of-life by-products and secondary materials. This allocation is explained in the description of the recycled content system model (http://www.ecoinvent.org/database/system-models-in-ecoinvent-3/cut-off-system-model/allocation-cut-off-by-classification.html). The ecoinvent database mostly relies on “Allocation – market values” apart for few exceptions particularly in the energy sector. ecoinvent energy data is replaced with EF3.0 core data as per the EF guidelines version 2.0.
OR
- EF compliant data

## Modelling constants
All modelling constants follow the requirements listed in the Tender Specifications 070201/2020/SER/ENV.B1. Completeness: There are no intentional cut-offs in the inventory no matter how small their contribution to all the EF impact categories is. Eventual cut-offs are in compliance with the Guide for EF compliant data sets (JRC 2020), i.e. only if below the 3% cut-off rule. Water use: water use is modelled at country level using separate flows for water withdrawal, water release and water evaporation. Handling multi-functional processes: the following PEF multi- functionality decision hierarchy is applied for resolving all multi- functionality problems: (1) subdivision or system expansion; (2) allocation based on a relevant underlying physical relationship (substitution may apply here); (3) allocation based on some other relationship. Direct land use change: GHG emissions from direct LUC allocated to good/service for 20 years after the LUC occurs, with IPCC default values. Carbon storage and delayed emissions: credits associated with temporary (carbon) storage or delayed emissions up to 300 years are not be considered. Emissions off-setting: are not included. Capital goods (including infrastructures) and their End of life: they are included. System boundaries: system boundaries include all processes linked to the product supply chain (e.g. maintenance). Time period: emissions and removals are modelled as if released or removed at the beginning of the assessment method. Fossil and biogenic carbon emissions and removals: removals and emissions are modelled as follows: All GHG emissions from fossil fuels (including peat and limestone) are modelled consistently with the most updated ILCD list of elementary flows. The non-fossil (biogenic) carbon flows are modelled consistently with the most updated ILCD list of elementary flows.

## Cut-off and completeness
There are no intentional cut-offs in the inventory no matter how small their contribution to all the EF impact categories is. Eventual cut-offs are in compliance with the Guide for EF compliant data sets (JRC 2020), i.e. only if below the 3% cut-off rule. The dataset dry mass and water balance has been checked to ensure the inventory is complete. Capital goods (e.g. infrastructure) and their end-of-life are included.

## Data selection and combination
These datasets include, in both their foreground and background data, links to EF3.0 compliant data.
The relevant background data on energy, transport, and End of Life are from the LCDN data node (http://lcdn.thinkstep.com/Node/).
All other background data in the supply of this product for which no EF3.0 process was available are from ecoinvent v3.7 database (www.ecoinvent.org) or other data sources.

## Data treatment and extrapolations
Several data sources have been used to model the inventory.

## Review details
Internal reviews have been asked to review the plausibility of the unit process, LCIA scores, and DQRs. Internal reviewers have also been asked to review the data for EF compliancy. The consortium is therefore responsible for aspects such as compliancy with the ILCD format, including validation in Look@LCI, and nomenclature.
Internal reviwers have been asked to judge based on the process name, that the unit process models in a complete and representative way the process in the requested location. The review encompassed the plausability of:
- exchanges with nature (elementary flows) as well as exchanges such as product and waste flows.
- meta information (general comment, technology comment, system boundaries, allocation, cut-off rules, etc.). Reviewers were asked to judge if the provided information is enough to understand the content of the process.
- LCIA scores
- DQRs including precision, technology, time and geography. As well as the overall DQR.
External reviewers have been asked to provide their expertise in the field of interest. External reviewers have been asked to review the unit process, including eventual methodological choices, the LCIA scores (provided with contribution scores as well), and DQRs. External reviewers have been provided all the information in a tool developed by the consortium for the purpose of this project.
External reviewers have been asked to judge based on the process name, that the unit process models in a complete and representative way the process in the requested location. The review encompassed:
- Plausability and completeness of exchanges with nature (elementary flows) as well as exchanges such as product and waste flows.
- Review of meta information (general comment, technology comment, system boundaries, allocation, cut-off rules, etc.). Reviewers were asked to judge if the provided information is enough to understand the content of the process.
- Review of properties (biogenic carbon and water content).
- Review of allocation keys.
- Plausability of LCIA scores calculated by the consortium.
- Plausability of DQRs including precision, technology, time and geography. As well as the overall DQR.

## Data sources
- Background Data for Representative products and organisations. EF 3.0 compliant (data stock)
- Polaris (2021) Electric iron Polaris PIR 2410K, https://polaris.company/en/catalog/irons/polaris-pir-2410k/, Polaris Int LLC, Moscow, Rusia
- UNCLUTTERER (2021) How To Properly Use A Steam Iron, https://unclutterer.com/how-to-properly-use-a-steam-iron/, Unclutterer, Los Angeles, California
- V. Braun and Rainer Stamminger (2011). Using Fabric Softeners, Drying and Ironing in Germany A non-representative Census of Consumer Behaviour, Tenside Surfactants Detergents Journal, Germany
- Kidness-shop (2019). To what temperature does the iron heat up. Recommendations for choosing the temperature of ironing. About optimal temperature conditions, https://kidness-shop.ru/en/rody/do-kakoi-temperatury-razogrevaetsya-utyug-rekomendacii-po-vyboru.html, kidness-shop.ru, Russia
- Woltu (2020) Ironing Board Ironing Table with Steam Iron Rest Height Adjustable White with Flower Cover, https://www.woltu.eu/it/p/ironing-board-ironing-table-with-steam-iron-rest-height-adjustable-white-with-flower-cover, WOLTU GmbH, Germany.

## Intended applications
Implementation of regular Product Environmental Footprint (PEF) studies and Organisation Environmental Footprint (OEF) studies exclusively under the specified Product groups and sectors as defined in the Product Environmental Footprint Category Rules (PEFCR) and Organisation Environmental Footprint Sectorial Rules (OEFSR) listed in http://ec.europa.eu/environment/eussd/smgp/PEFCR_OEFSR.htm
