# bonding, thermal, calendering, non-woven fabric; technology mix; production mix, at plant; service (raw materials excluded)

Dataset: ILCD process, Partly terminated system
Geography: GLO
Reference year: 2021
Valid until: 2024
Classification: Systems / Textiles, furnitures and other interiors
LCI method principle: Attributional
LCI method approaches: Allocation - market value
Completeness: All relevant flows quantified
Project: Provision of process-based 3.0 Environmental Footprint-compliant life cycle inventory datasets - Apparel 1 - contract number 070201/2020/840291/SER/ENV.B.1
Generated by: Life Cycle Indonesia
Owner: PRé Sustainability B.V.
Compliance: ILCD Data Network - Entry-level; Suggestions for updating the PEF method 2019; ISO 14040 Environmental Management – Life Cycle Assessment – Principles and Framework, 2006; ISO 14044:2006. Environmental Management – Life Cycle Assessment – Requirements and guidelines.; Environmental Footprint 3.1
Review: Dependent internal review by Avraam Symeonidis, Emilia Moreno Ruiz; Independent review panel by Fábio Valebona
Data quality: Overall quality: Good; Time representativeness: Very good; Geographical representativeness: Good; Technological representativeness: Good; Precision: Good; Methodological appropriateness and consistency: Not applicable
Amounts: no units in this file; such an amount is in the reference unit of its flow, which a separate flow dataset defines
copyright: true
licenseType: Free of charge for some user types or use types
accessRestrictions: Free of charge for all final users implementing a regular Product Environmental Footprint (PEF) studies and Organisation Environmental Footprint (OEF) studies exclusively under the specified Product groups and sectors as defined in the Product Environmental Footprint Category Rules (PEFCR) and Organisation Environmental Footprint Sectorial Rules (OEFSR) listed in http://ec.europa.eu/environment/eussd/smgp/PEFCR_OEFSR.htm and in accordance with the terms and conditions of the EULA (available at https://ecoinvent.lca-data.com/) exclusively until 31st December 2024. Any use of this dataset or any derivative data not within the specific context of one of the PEF/OEF projects or after the end of 2024 is not permitted.

## General comment
Notice: this data set supersedes the EF3.0-compliant version (see link under "preceding data set version" below calculated with the EF3.0). The life cycle inventory is not changed from the original EF3.0 data set. The LCIA results are calculated based on the EF3.1 methods which provide updated characterisation factors in the following impact categories: Climate Change, Ecotoxicity freshwater, Photochemical Ozone Formation, Acidification, Human Toxicity non-cancer, and Human Toxicity cancer. The review report and the data quality ratings refer to the original results. The data set has been updated by the European Commission on the basis of the original EF3.0 data set delivered by the data provider.Non-woven fabric can be produced from thermal bonding process. Thermal bonding requires a thermoplastic component to be present in the form of a homofil fibre, powder, film, web, hot melt ores a sheath as part of a bicomponent fibre. The base fibre contributes to key physical, chemical and mechanical properties of the fabric derived from the polymer from which it is constituted. This influences dyeing characteristics, flame resistance, tensile and attritional properties, hydrolytic resistance, and biodegradability amongst many other properties. The base fibers that are commonly used for the thermal bonding process include natural fibres (regenerated cellulosic fibres, bast, vegetable and protein fibres such as wool), synthetic fibres (polyester, polypropylene, acrylic, nylon, aramid and many others), mineral fibres (e.g., glass and silica) and metallic fibres. Sometimes the base fibre (carrier fibre) is the core of a bicomponent fibre, with the sheath component being the binder portion. (Roy, et al., 2011).

Binder components are produced in many different forms including fibre or filament (homogeneous or bicomponent sheath/core or side-by-side type melt-bonding fibres), powder, film, low melt webs, and hot melts. The most widely used thermoplastic binder polymers are polyvinyl chloride (PVC), polyamide (PA), polyester (PET), polypropylene (PP), polyethylene (PE). The physical form of the binder affects its distribution throughout tile fibre matrix which has significant impact oil fabric properties. The amount of binder also plays an important role in determining the properties of the resultant nonwoven fabric. If the binder content is more than 50% of the total blend the fabric behaves like a reinforced plastic. At a binder content of 10 % the fabric is a bulky, porous and flexible structure with relatively low strength (Roy, et al., 2011).

There are different methods of applying heat energy to the web and the heal transfer mechanism can take different forms; conduction, convection and heat radiation. The widely used methods is the thermal calendering process. There are three main types of hot calendaring: area bonding, point bonding, embossing (novonette system). In practice, area bonding (100%) or point bonding (embossing) is possible (<100%). The final products have thin and stiff characterstics. This products are used for the resultant and interlining products (e.g. electrical insulation and coating substrates), filtration applications, diaper, sanitary products, and medical products. (Roy, et al., 2011).

References:
Roy P. K. 2011. Thermal Bonded Nonwoven – An Overview. pp 1-8

## Technology and included processes
Thermal calendar bonding is a process in which a fibrous web containing thermoplastic components (fibres, powders or webs) is passed continuously through a heated calendar nip that is created by two rolls pressed against each other. Multi-nip calendars are also employed depending on the web weight and degree of bonding required. Both rolls are internally heated to a temperature that usually exceeds the melting point of the binder components in the web to ensure there is sufficient heat transfer to induce softening at the prevailing line speed. As the web passes between the at lender nip, fibres are both heated and compressed. This causes the binder components of the web to become soft and tacky and induces polymer flow in and around the base fibres. The fluid polymer tends to collect at fibre crossover or contact points and bonding sites are formed. Cooling leads to solidification of the polymer and bonding (Roy, et al., 2011).

Various methods have been devised to heat the calender rollers. The commonly used heating systems are hot water/liquid or steam, electrical or cal-rod system, gas heating system, and hot oil heating system. In hot water/liquid or steam methods, the electro-hot liquid roller is centre bored and sealed to produce an enclosed chamber. This chamber is partially filled with liquid. An electrical heating coil within the chamber heats the liquid producing pressurised steam. The steam condenses on the inner boring’s surface and the heat is transferred into the steel and through the steel to the roller surface. In electrical or cal-rod system, the electrically heated rollers are heated internally and controlled by measuring the roller shell temperature near the surface, therefore they are much more easily and quickly controlled compared to the liquid heated systems. Gas heating system normally uses a ribbon type burner in a bored steel roll. This system employs a live flame and the burner pipe length inside the roll is difficult to manufacture to remain straight the temperatures. In hot oil heating system, a straight turbulator is fitted to a bore steel roller. Hot oil is passed through the spiral and the bore using a closed-loop system. Small peripherical drillings are made close to the roller surface where the hot oil flows through the holes. (Russel, 2007)

The model represents the process of bonding, hence the input raw materials are not included in the model. The user will use this dataset along with the input raw materials. Other supporting materials entering the process (e.g. binder) are included as well as energy uses and infrastructure. There is no direct emission to soil and air since the emission comes from electricity usage, while the emission to water comes from waste lube oil. The binder is part of the final product. Hence, there is no waste or emission resulted from the usage of binders. In the model, the heating system is thermal oil with closed-loop system and the finishng process is not included in the scope of this dataset and enegy sources of machines used solely from electricity.

References:
Roy P. K. 2011. Thermal Bonded Nonwoven – An Overview. pp 1-8
Russel, S.J. 2007. Handbook of Nonwovens. England: Woodhead Publishing Limited. pp 316

## Parameters
- kg_0: 0.06
  Mass in kg, for low density polyethylene, petrochemical // low density polyethylene (ldpe) production, fossil fuel-based // glo; Articulated lorry transport, Euro 4, Total weight >32 t; EU+EFTA+UK
- km_0: 1000
  Distance in km, for low density polyethylene, petrochemical // low density polyethylene (ldpe) production, fossil fuel-based // glo; Articulated lorry transport, Euro 4, Total weight >32 t; EU+EFTA+UK
- kg_km_0: 60; = kg_0*km_0
  Transport amount in km*km, for low density polyethylene, petrochemical // low density polyethylene (ldpe) production, fossil fuel-based // glo; Articulated lorry transport, Euro 4, Total weight >32 t; EU+EFTA+UK
- kg_1: 4.48077e-6
  Mass in kg, for lubricating oil // lubricants at refinery // cn; Articulated lorry transport, Euro 4, Total weight >32 t; EU+EFTA+UK
- km_1: 1000
  Distance in km, for lubricating oil // lubricants at refinery // cn; Articulated lorry transport, Euro 4, Total weight >32 t; EU+EFTA+UK
- kg_km_1: 0.00448077; = kg_1*km_1
  Transport amount in km*km, for lubricating oil // lubricants at refinery // cn; Articulated lorry transport, Euro 4, Total weight >32 t; EU+EFTA+UK
- kg_2: 1.4375e-5
  Mass in kg, for lubricating oil // lubricants at refinery // eu+efta+uk; Articulated lorry transport, Euro 4, Total weight >32 t; EU+EFTA+UK
- km_2: 1001.74
  Distance in km, for lubricating oil // lubricants at refinery // eu+efta+uk; Articulated lorry transport, Euro 4, Total weight >32 t; EU+EFTA+UK
- kg_km_2: 0.0144; = kg_2*km_2
  Transport amount in km*km, for lubricating oil // lubricants at refinery // eu+efta+uk; Articulated lorry transport, Euro 4, Total weight >32 t; EU+EFTA+UK
- kg_3: 1.07692e-6
  Mass in kg, for lubricating oil // lubricants at refinery // raf; Articulated lorry transport, Euro 4, Total weight >32 t; EU+EFTA+UK
- km_3: 1000
  Distance in km, for lubricating oil // lubricants at refinery // raf; Articulated lorry transport, Euro 4, Total weight >32 t; EU+EFTA+UK
- kg_km_3: 0.00107692; = kg_3*km_3
  Transport amount in km*km, for lubricating oil // lubricants at refinery // raf; Articulated lorry transport, Euro 4, Total weight >32 t; EU+EFTA+UK
- kg_4: 2.82212e-5
  Mass in kg, for lubricating oil // lubricants at refinery // ras w/o cn; Articulated lorry transport, Euro 4, Total weight >32 t; EU+EFTA+UK
- km_4: 1000
  Distance in km, for lubricating oil // lubricants at refinery // ras w/o cn; Articulated lorry transport, Euro 4, Total weight >32 t; EU+EFTA+UK
- kg_km_4: 0.0282212; = kg_4*km_4
  Transport amount in km*km, for lubricating oil // lubricants at refinery // ras w/o cn; Articulated lorry transport, Euro 4, Total weight >32 t; EU+EFTA+UK
- kg_5: 2.20288e-5
  Mass in kg, for lubricating oil // lubricants at refinery // rna; Articulated lorry transport, Euro 4, Total weight >32 t; EU+EFTA+UK
- km_5: 1000
  Distance in km, for lubricating oil // lubricants at refinery // rna; Articulated lorry transport, Euro 4, Total weight >32 t; EU+EFTA+UK
- kg_km_5: 0.0220288; = kg_5*km_5
  Transport amount in km*km, for lubricating oil // lubricants at refinery // rna; Articulated lorry transport, Euro 4, Total weight >32 t; EU+EFTA+UK
- kg_6: 2.625e-6
  Mass in kg, for lubricating oil // lubricants at refinery // rsa; Articulated lorry transport, Euro 4, Total weight >32 t; EU+EFTA+UK
- km_6: 1000
  Distance in km, for lubricating oil // lubricants at refinery // rsa; Articulated lorry transport, Euro 4, Total weight >32 t; EU+EFTA+UK
- kg_km_6: 0.002625; = kg_6*km_6
  Transport amount in km*km, for lubricating oil // lubricants at refinery // rsa; Articulated lorry transport, Euro 4, Total weight >32 t; EU+EFTA+UK
- kg_7: 2.33365e-5
  Mass in kg, for lubricating oil // lubricants at refinery // ru; Articulated lorry transport, Euro 4, Total weight >32 t; EU+EFTA+UK
- km_7: 1000
  Distance in km, for lubricating oil // lubricants at refinery // ru; Articulated lorry transport, Euro 4, Total weight >32 t; EU+EFTA+UK
- kg_km_7: 0.0233365; = kg_7*km_7
  Transport amount in km*km, for lubricating oil // lubricants at refinery // ru; Articulated lorry transport, Euro 4, Total weight >32 t; EU+EFTA+UK
- kg_8: 0.06
  Mass in kg, for polyamide, mix // polyamide (pa) production, blend of bio-based and fossil // glo; Articulated lorry transport, Euro 4, Total weight >32 t; EU+EFTA+UK
- km_8: 1000
  Distance in km, for polyamide, mix // polyamide (pa) production, blend of bio-based and fossil // glo; Articulated lorry transport, Euro 4, Total weight >32 t; EU+EFTA+UK
- kg_km_8: 60; = kg_8*km_8
  Transport amount in km*km, for polyamide, mix // polyamide (pa) production, blend of bio-based and fossil // glo; Articulated lorry transport, Euro 4, Total weight >32 t; EU+EFTA+UK
- kg_9: 0.06
  Mass in kg, for polyethylene terephthalate, mix // polyethylene terephthalate (pet) production, blend of bio- based and fossil // glo; Articulated lorry transport, Euro 4, Total weight >32 t; EU+EFTA+UK
- km_9: 1000
  Distance in km, for polyethylene terephthalate, mix // polyethylene terephthalate (pet) production, blend of bio- based and fossil // glo; Articulated lorry transport, Euro 4, Total weight >32 t; EU+EFTA+UK
- kg_km_9: 60; = kg_9*km_9
  Transport amount in km*km, for polyethylene terephthalate, mix // polyethylene terephthalate (pet) production, blend of bio- based and fossil // glo; Articulated lorry transport, Euro 4, Total weight >32 t; EU+EFTA+UK
- kg_10: 0.06
  Mass in kg, for polypropylene, petrochemical // polypropylene (pp) production, petrochemical based // glo; Articulated lorry transport, Euro 4, Total weight >32 t; EU+EFTA+UK
- km_10: 1000
  Distance in km, for polypropylene, petrochemical // polypropylene (pp) production, petrochemical based // glo; Articulated lorry transport, Euro 4, Total weight >32 t; EU+EFTA+UK
- kg_km_10: 60; = kg_10*km_10
  Transport amount in km*km, for polypropylene, petrochemical // polypropylene (pp) production, petrochemical based // glo; Articulated lorry transport, Euro 4, Total weight >32 t; EU+EFTA+UK
- kg_11: 9.61538e-5
  Mass in kg, for heat transfer fluid oil // heat transfer fluid oil production // eu+efta+uk; Articulated lorry transport, Euro 4, Total weight >32 t; EU+EFTA+UK
- km_11: 1000.48
  Distance in km, for heat transfer fluid oil // heat transfer fluid oil production // eu+efta+uk; Articulated lorry transport, Euro 4, Total weight >32 t; EU+EFTA+UK
- kg_km_11: 0.0962; = kg_11*km_11
  Transport amount in km*km, for heat transfer fluid oil // heat transfer fluid oil production // eu+efta+uk; Articulated lorry transport, Euro 4, Total weight >32 t; EU+EFTA+UK
- kg_12: 0.06
  Mass in kg, for polyvinyl chloride, petrochemical // polyvinyl chloride (pvc) production, fossil fuel-based // glo; Articulated lorry transport, Euro 4, Total weight >32 t; EU+EFTA+UK
- km_12: 1000
  Distance in km, for polyvinyl chloride, petrochemical // polyvinyl chloride (pvc) production, fossil fuel-based // glo; Articulated lorry transport, Euro 4, Total weight >32 t; EU+EFTA+UK
- kg_km_12: 60; = kg_12*km_12
  Transport amount in km*km, for polyvinyl chloride, petrochemical // polyvinyl chloride (pvc) production, fossil fuel-based // glo; Articulated lorry transport, Euro 4, Total weight >32 t; EU+EFTA+UK
- kg_13: 0.06
  Mass in kg, for low density polyethylene, petrochemical // low density polyethylene (ldpe) production, fossil fuel-based // glo; Transoceanic ship, containers; GLO
- km_13: 18000
  Distance in km, for low density polyethylene, petrochemical // low density polyethylene (ldpe) production, fossil fuel-based // glo; Transoceanic ship, containers; GLO
- kg_km_13: 1080; = kg_13*km_13
  Transport amount in km*km, for low density polyethylene, petrochemical // low density polyethylene (ldpe) production, fossil fuel-based // glo; Transoceanic ship, containers; GLO
- kg_14: 4.48077e-6
  Mass in kg, for lubricating oil // lubricants at refinery // cn; Transoceanic ship, containers; GLO
- km_14: 18000
  Distance in km, for lubricating oil // lubricants at refinery // cn; Transoceanic ship, containers; GLO
- kg_km_14: 0.0806538; = kg_14*km_14
  Transport amount in km*km, for lubricating oil // lubricants at refinery // cn; Transoceanic ship, containers; GLO
- kg_15: 1.07692e-6
  Mass in kg, for lubricating oil // lubricants at refinery // raf; Transoceanic ship, containers; GLO
- km_15: 18000
  Distance in km, for lubricating oil // lubricants at refinery // raf; Transoceanic ship, containers; GLO
- kg_km_15: 0.0193846; = kg_15*km_15
  Transport amount in km*km, for lubricating oil // lubricants at refinery // raf; Transoceanic ship, containers; GLO
- kg_16: 2.82212e-5
  Mass in kg, for lubricating oil // lubricants at refinery // ras w/o cn; Transoceanic ship, containers; GLO
- km_16: 18000
  Distance in km, for lubricating oil // lubricants at refinery // ras w/o cn; Transoceanic ship, containers; GLO
- kg_km_16: 0.507981; = kg_16*km_16
  Transport amount in km*km, for lubricating oil // lubricants at refinery // ras w/o cn; Transoceanic ship, containers; GLO
- kg_17: 2.20288e-5
  Mass in kg, for lubricating oil // lubricants at refinery // rna; Transoceanic ship, containers; GLO
- km_17: 18000
  Distance in km, for lubricating oil // lubricants at refinery // rna; Transoceanic ship, containers; GLO
- kg_km_17: 0.396519; = kg_17*km_17
  Transport amount in km*km, for lubricating oil // lubricants at refinery // rna; Transoceanic ship, containers; GLO
- kg_18: 9.61538e-5
  Mass in kg, for heat transfer fluid oil // heat transfer fluid oil production // eu+efta+uk; Transoceanic ship, containers; GLO
- km_18: 17992
  Distance in km, for heat transfer fluid oil // heat transfer fluid oil production // eu+efta+uk; Transoceanic ship, containers; GLO
- kg_km_18: 1.73; = kg_18*km_18
  Transport amount in km*km, for heat transfer fluid oil // heat transfer fluid oil production // eu+efta+uk; Transoceanic ship, containers; GLO
- kg_19: 1.4375e-5
  Mass in kg, for lubricating oil // lubricants at refinery // eu+efta+uk; Transoceanic ship, containers; GLO
- km_19: 18017.4
  Distance in km, for lubricating oil // lubricants at refinery // eu+efta+uk; Transoceanic ship, containers; GLO
- kg_km_19: 0.259; = kg_19*km_19
  Transport amount in km*km, for lubricating oil // lubricants at refinery // eu+efta+uk; Transoceanic ship, containers; GLO
- kg_20: 2.625e-6
  Mass in kg, for lubricating oil // lubricants at refinery // rsa; Transoceanic ship, containers; GLO
- km_20: 18000
  Distance in km, for lubricating oil // lubricants at refinery // rsa; Transoceanic ship, containers; GLO
- kg_km_20: 0.04725; = kg_20*km_20
  Transport amount in km*km, for lubricating oil // lubricants at refinery // rsa; Transoceanic ship, containers; GLO
- kg_21: 2.33365e-5
  Mass in kg, for lubricating oil // lubricants at refinery // ru; Transoceanic ship, containers; GLO
- km_21: 18000
  Distance in km, for lubricating oil // lubricants at refinery // ru; Transoceanic ship, containers; GLO
- kg_km_21: 0.420058; = kg_21*km_21
  Transport amount in km*km, for lubricating oil // lubricants at refinery // ru; Transoceanic ship, containers; GLO
- kg_22: 0.06
  Mass in kg, for polyamide, mix // polyamide (pa) production, blend of bio-based and fossil // glo; Transoceanic ship, containers; GLO
- km_22: 18000
  Distance in km, for polyamide, mix // polyamide (pa) production, blend of bio-based and fossil // glo; Transoceanic ship, containers; GLO
- kg_km_22: 1080; = kg_22*km_22
  Transport amount in km*km, for polyamide, mix // polyamide (pa) production, blend of bio-based and fossil // glo; Transoceanic ship, containers; GLO
- kg_23: 0.06
  Mass in kg, for polyethylene terephthalate, mix // polyethylene terephthalate (pet) production, blend of bio- based and fossil // glo; Transoceanic ship, containers; GLO
- km_23: 18000
  Distance in km, for polyethylene terephthalate, mix // polyethylene terephthalate (pet) production, blend of bio- based and fossil // glo; Transoceanic ship, containers; GLO
- kg_km_23: 1080; = kg_23*km_23
  Transport amount in km*km, for polyethylene terephthalate, mix // polyethylene terephthalate (pet) production, blend of bio- based and fossil // glo; Transoceanic ship, containers; GLO
- kg_24: 0.06
  Mass in kg, for polypropylene, petrochemical // polypropylene (pp) production, petrochemical based // glo; Transoceanic ship, containers; GLO
- km_24: 18000
  Distance in km, for polypropylene, petrochemical // polypropylene (pp) production, petrochemical based // glo; Transoceanic ship, containers; GLO
- kg_km_24: 1080; = kg_24*km_24
  Transport amount in km*km, for polypropylene, petrochemical // polypropylene (pp) production, petrochemical based // glo; Transoceanic ship, containers; GLO
- kg_25: 0.06
  Mass in kg, for polyvinyl chloride, petrochemical // polyvinyl chloride (pvc) production, fossil fuel-based // glo; Transoceanic ship, containers; GLO
- km_25: 18000
  Distance in km, for polyvinyl chloride, petrochemical // polyvinyl chloride (pvc) production, fossil fuel-based // glo; Transoceanic ship, containers; GLO
- kg_km_25: 1080; = kg_25*km_25
  Transport amount in km*km, for polyvinyl chloride, petrochemical // polyvinyl chloride (pvc) production, fossil fuel-based // glo; Transoceanic ship, containers; GLO

## Reference product
- non-woven fabric // bonding, thermal, calendering, non-woven fabric // glo: 1

## Inputs
- Electricity from Electricity grid mix 1kV-60kV - AU: 0.0074
- Electricity from Electricity grid mix 1kV-60kV - EU+EFTA+UK: 0.1085
- Electricity from Electricity grid mix 1kV-60kV - NZ: 0.0014
- Electricity from Electricity grid mix 1kV-60kV - RAF: 0.0237
- Electricity from Electricity grid mix 1kV-60kV - RNA: 0.1589
- Electricity from Electricity grid mix 1kV-60kV - RSA: 0.0539
- Electricity from Electricity grid mix 1kV-60kV - RU: 0.0318
- Transport of low density polyethylene, petrochemical // low density polyethylene (ldpe) production, fossil fuel-based // glo by Articulated lorry transport, Euro 4, Total weight >32 t - EU+EFTA+UK: 60; = kg_km_0
- Transport of lubricating oil // lubricants at refinery // cn by Articulated lorry transport, Euro 4, Total weight >32 t - EU+EFTA+UK: 0.00448077; = kg_km_1
- Transport of lubricating oil // lubricants at refinery // eu+efta+uk by Articulated lorry transport, Euro 4, Total weight >32 t - EU+EFTA+UK: 0.0144; = kg_km_2
- Transport of lubricating oil // lubricants at refinery // raf by Articulated lorry transport, Euro 4, Total weight >32 t - EU+EFTA+UK: 0.00107692; = kg_km_3
- Transport of lubricating oil // lubricants at refinery // ras w/o cn by Articulated lorry transport, Euro 4, Total weight >32 t - EU+EFTA+UK: 0.0282212; = kg_km_4
- Transport of lubricating oil // lubricants at refinery // rna by Articulated lorry transport, Euro 4, Total weight >32 t - EU+EFTA+UK: 0.0220288; = kg_km_5
- Transport of lubricating oil // lubricants at refinery // rsa by Articulated lorry transport, Euro 4, Total weight >32 t - EU+EFTA+UK: 0.002625; = kg_km_6
- Transport of lubricating oil // lubricants at refinery // ru by Articulated lorry transport, Euro 4, Total weight >32 t - EU+EFTA+UK: 0.0233365; = kg_km_7
- Transport of polyamide, mix // polyamide (pa) production, blend of bio-based and fossil // glo by Articulated lorry transport, Euro 4, Total weight >32 t - EU+EFTA+UK: 60; = kg_km_8
- Transport of polyethylene terephthalate, mix // polyethylene terephthalate (pet) production, blend of bio- based and fossil // glo by Articulated lorry transport, Euro 4, Total weight >32 t - EU+EFTA+UK: 60; = kg_km_9
- Transport of polypropylene, petrochemical // polypropylene (pp) production, petrochemical based // glo by Articulated lorry transport, Euro 4, Total weight >32 t - EU+EFTA+UK: 60; = kg_km_10
- Transport of heat transfer fluid oil // heat transfer fluid oil production // eu+efta+uk by Articulated lorry transport, Euro 4, Total weight >32 t - EU+EFTA+UK: 0.0962; = kg_km_11
- Transport of polyvinyl chloride, petrochemical // polyvinyl chloride (pvc) production, fossil fuel-based // glo by Articulated lorry transport, Euro 4, Total weight >32 t - EU+EFTA+UK: 60; = kg_km_12
- Transport of low density polyethylene, petrochemical // low density polyethylene (ldpe) production, fossil fuel-based // glo by Transoceanic ship, containers - GLO: 1080; = kg_km_13
- Transport of lubricating oil // lubricants at refinery // cn by Transoceanic ship, containers - GLO: 0.0806538; = kg_km_14
- Transport of lubricating oil // lubricants at refinery // raf by Transoceanic ship, containers - GLO: 0.0193846; = kg_km_15
- Transport of lubricating oil // lubricants at refinery // ras w/o cn by Transoceanic ship, containers - GLO: 0.507981; = kg_km_16
- Transport of lubricating oil // lubricants at refinery // rna by Transoceanic ship, containers - GLO: 0.396519; = kg_km_17
- Transport of heat transfer fluid oil // heat transfer fluid oil production // eu+efta+uk by Transoceanic ship, containers - GLO: 1.73; = kg_km_18
- Transport of lubricating oil // lubricants at refinery // eu+efta+uk by Transoceanic ship, containers - GLO: 0.259; = kg_km_19
- Transport of lubricating oil // lubricants at refinery // rsa by Transoceanic ship, containers - GLO: 0.04725; = kg_km_20
- Transport of lubricating oil // lubricants at refinery // ru by Transoceanic ship, containers - GLO: 0.420058; = kg_km_21
- Transport of polyamide, mix // polyamide (pa) production, blend of bio-based and fossil // glo by Transoceanic ship, containers - GLO: 1080; = kg_km_22
- Transport of polyethylene terephthalate, mix // polyethylene terephthalate (pet) production, blend of bio- based and fossil // glo by Transoceanic ship, containers - GLO: 1080; = kg_km_23
- Transport of polypropylene, petrochemical // polypropylene (pp) production, petrochemical based // glo by Transoceanic ship, containers - GLO: 1080; = kg_km_24
- Transport of polyvinyl chloride, petrochemical // polyvinyl chloride (pvc) production, fossil fuel-based // glo by Transoceanic ship, containers - GLO: 1080; = kg_km_25
- Electricity from Electricity grid mix 1kV-60kV - CN: 0.162767
- Electricity from Electricity grid mix 1kV-60kV - RAS w/o CN: 0.178333
- non-woven fabric // bonding, thermal, calendering, non-woven fabric // glo, blackbox: 1
- non-woven fabric // bonding, thermal, calendering, non-woven fabric // glo, elementary: 1

## Impact indicators
- Eutrophication marine: 0.00598031
- Ecotoxicity, freshwater: 28.1965
- Land use: 23.4591
- Water use: 0.705019
- Resource use, minerals and metals: 1.00971e-5
- Resource use, fossils: 23.0922
- Climate change: 1.40121
- Ozone depletion: 7.46738e-8
- Human toxicity, cancer: 1.19556e-9
- Human toxicity, non-cancer: 2.34184e-8
- EF-particulate Matter: 2.4891e-7
- Ionising radiation, human health: 0.0420809
- Photochemical ozone formation - human health: 0.0072685
- Acidification: 0.0138852
- Eutrophication, terrestrial: 0.035696
- Eutrophication, freshwater: 7.54372e-5

## Deviations from the LCI method principle
The background data uses:
- the \xe2\x80\x9cRecycled content cut-off\xe2\x80\x9d approach to allocate end-of-life by-products and secondary materials. This allocation is explained in the description of the recycled content system model (http://www.ecoinvent.org/database/system-models-in-ecoinvent-3/cut-off-system-model/allocation-cut-off-by-classification.html).
OR
- EF compliant data

## Deviations from the LCI method approaches
Background data:
- the \xe2\x80\x9cRecycled content cut-off\xe2\x80\x9d approach to allocate end-of-life by-products and secondary materials. This allocation is explained in the description of the recycled content system model (http://www.ecoinvent.org/database/system-models-in-ecoinvent-3/cut-off-system-model/allocation-cut-off-by-classification.html). The ecoinvent database mostly relies on “Allocation – market values” apart for few exceptions particularly in the energy sector. ecoinvent energy data is replaced with EF3.0 core data as per the EF guidelines version 2.0.
OR
- EF compliant data

## Modelling constants
All modelling constants follow the requirements listed in the Tender Specifications 070201/2020/SER/ENV.B1. Completeness: There are no intentional cut-offs in the inventory no matter how small their contribution to all the EF impact categories is. Eventual cut-offs are in compliance with the Guide for EF compliant data sets (JRC 2020), i.e. only if below the 3% cut-off rule. Water use: water use is modelled at country level using separate flows for water withdrawal, water release and water evaporation. Handling multi-functional processes: the following PEF multi- functionality decision hierarchy is applied for resolving all multi- functionality problems: (1) subdivision or system expansion; (2) allocation based on a relevant underlying physical relationship (substitution may apply here); (3) allocation based on some other relationship. Direct land use change: GHG emissions from direct LUC allocated to good/service for 20 years after the LUC occurs, with IPCC default values. Carbon storage and delayed emissions: credits associated with temporary (carbon) storage or delayed emissions up to 300 years are not be considered. Emissions off-setting: are not included. Capital goods (including infrastructures) and their End of life: they are included. System boundaries: system boundaries include all processes linked to the product supply chain (e.g. maintenance). Time period: emissions and removals are modelled as if released or removed at the beginning of the assessment method. Fossil and biogenic carbon emissions and removals: removals and emissions are modelled as follows: All GHG emissions from fossil fuels (including peat and limestone) are modelled consistently with the most updated ILCD list of elementary flows. The non-fossil (biogenic) carbon flows are modelled consistently with the most updated ILCD list of elementary flows.

## Cut-off and completeness
There are no intentional cut-offs in the inventory no matter how small their contribution to all the EF impact categories is. Eventual cut-offs are in compliance with the Guide for EF compliant data sets (JRC 2020), i.e. only if below the 3% cut-off rule. The dataset dry mass and water balance has been checked to ensure the inventory is complete. Capital goods (e.g. infrastructure) and their end-of-life are included.

## Data selection and combination
These datasets include, in both their foreground and background data, links to EF3.0 compliant data.
The relevant background data on energy, transport, and End of Life are from the LCDN data node (http://lcdn.thinkstep.com/Node/).
All other background data in the supply of this product for which no EF3.0 process was available are from ecoinvent v3.7 database (www.ecoinvent.org) or other data sources.

## Data treatment and extrapolations
Several data sources have been used to model the inventory.

## Review details
Internal reviews have been asked to review the plausibility of the unit process, LCIA scores, and DQRs. Internal reviewers have also been asked to review the data for EF compliancy. The consortium is therefore responsible for aspects such as compliancy with the ILCD format, including validation in Look@LCI, and nomenclature.
Internal reviwers have been asked to judge based on the process name, that the unit process models in a complete and representative way the process in the requested location. The review encompassed the plausability of:
- exchanges with nature (elementary flows) as well as exchanges such as product and waste flows.
- meta information (general comment, technology comment, system boundaries, allocation, cut-off rules, etc.). Reviewers were asked to judge if the provided information is enough to understand the content of the process.
- LCIA scores
- DQRs including precision, technology, time and geography. As well as the overall DQR.
External reviewers have been asked to provide their expertise in the field of interest. External reviewers have been asked to review the unit process, including eventual methodological choices, the LCIA scores (provided with contribution scores as well), and DQRs. External reviewers have been provided all the information in a tool developed by the consortium for the purpose of this project.
External reviewers have been asked to judge based on the process name, that the unit process models in a complete and representative way the process in the requested location. The review encompassed:
- Plausability and completeness of exchanges with nature (elementary flows) as well as exchanges such as product and waste flows.
- Review of meta information (general comment, technology comment, system boundaries, allocation, cut-off rules, etc.). Reviewers were asked to judge if the provided information is enough to understand the content of the process.
- Review of properties (biogenic carbon and water content).
- Review of allocation keys.
- Plausability of LCIA scores calculated by the consortium.
- Plausability of DQRs including precision, technology, time and geography. As well as the overall DQR.

## Data sources
- Background Data for Representative products and organisations. EF 3.0 compliant (data stock)
- Lebon Machinery (2021), Nonwoven Ironing Machine, Catalog and Company Massages, Qingdao Lebon Industry Co., Ltd., China
- UN Data (2018) Statistics Data for Lubricants Productions, http://data.un.org/Data.aspx?q=Lubricants&d=EDATA&f=cmID%3aLU, United Nations Statistics Division, Global
- P.K.Roy, Tanveer Malik, T.K.Sinha (2011). Thermal Bonded Nonwoven - An Overview. www.technicaltextile.net, Technical Textile, India
- Lebon (2021) Nonwoven Ironing Machine, https://www.china-lebon.com/128.html, Qingdao Lebon Industry Co., Ltd., China Alibaba (2021) Nonwoven machinery calender ironing machine, https://www.alibaba.com/product-detail/Nonwoven-machinery-calender-ironing-machine-felt_62016069669.html?spm=a2700.galleryofferlist.normal_offer.d_title.54c95cb4TlzyTj, Alibaba Group, China

## Intended applications
Implementation of regular Product Environmental Footprint (PEF) studies and Organisation Environmental Footprint (OEF) studies exclusively under the specified Product groups and sectors as defined in the Product Environmental Footprint Category Rules (PEFCR) and Organisation Environmental Footprint Sectorial Rules (OEFSR) listed in http://ec.europa.eu/environment/eussd/smgp/PEFCR_OEFSR.htm
