# softwood forestry, elementary; technology mix; production mix, at forest; measured as solid wood under bark

Dataset: ILCD process, Unit process, single operation
Geography: EU+EFTA+UK
Reference year: 2018
Valid until: 2024
Classification: Other Services / Other services
LCI method principle: Attributional
LCI method approaches: Allocation - market value
Completeness: All relevant flows quantified
Project: Provision of process-based 3.0 Environmental Footprint-compliant life cycle inventory datasets - Renewable materials - contract number 070201/2020/840085/SER/ENV.B.1
Generated by: ACV Brasil
Owner: ecoinvent
Compliance: Environmental Footprint non-primary supporting data set; Environmental Footprint 3.1
Amounts: no units in this file; such an amount is in the reference unit of its flow, which a separate flow dataset defines
copyright: true
licenseType: Free of charge for some user types or use types
accessRestrictions: Free of charge for all final users implementing a regular Product Environmental Footprint (PEF) studies and Organisation Environmental Footprint (OEF) studies exclusively under the specified Product groups and sectors as defined in the Product Environmental Footprint Category Rules (PEFCR) and Organisation Environmental Footprint Sectorial Rules (OEFSR) listed in http://ec.europa.eu/environment/eussd/smgp/PEFCR_OEFSR.htm and in accordance with the terms and conditions of the EULA (available at https://ecoinvent.lca-data.com/) exclusively until 31st December 2024. Any use of this dataset or any derivative data not within the specific context of one of the PEF/OEF projects or after the end of 2024 is not permitted.

## General comment
Notice: this data set supersedes the EF3.0-compliant version (see link under "preceding data set version" below calculated with the EF3.0). The life cycle inventory is not changed from the original EF3.0 data set. The LCIA results are calculated based on the EF3.1 methods which provide updated characterisation factors in the following impact categories: Climate Change, Ecotoxicity freshwater, Photochemical Ozone Formation, Acidification, Human Toxicity non-cancer, and Human Toxicity cancer. The review report and the data quality ratings refer to the original results. The data set has been updated by the European Commission on the basis of the original EF3.0 data set delivered by the data provider.This sub-process has limited documentation only. For all detailed documentation of the full model to which this data set belongs (such as DQRs, review reports and other technical documentation), please see this process: softwood forestry - EU+EFTA+UK []

## Technology and included processes
The activity of pine cultivation starts with site preparation, including seedling and/or natural regeneration, thinnings, and the final felling. This dataset is modelled as the average of the activities in Sweeden, Germany and Finland, weighted by their production volumes. These regions represent 49% of the total removals of softwood (roundwood) in Europe during 2019 (eurostat, 2021).
Softwood removals during 2019:
Sweeden: 66,048,000 m³
Germany: 56,052,860 m³
Finland: 50,152,21 m³
European Union – 28 countries: 352,966,200 m³
Average dry wood density (kg dry matter/ dry volume): 434.9 kg/m³
References:
Eurostat (2021). Roundwood removals by type of wood and assortment. Tree species: Coniferous. Wood products: Roundwood under bark. Available at: ec.europa.eu/eurostat/databrowser/bookmark/2fe47d27-a1ea-4028-a4cc-06c1f8725af0?lang=en [Accessed on 25/06/2021]

## Reference product
- softwood under bark // softwood forestry // eu+efta+uk, elementary: 1

## Inputs
- to traffic area, rail/road embankment, Land transformation: 1.90663e-7
- from traffic area, rail/road embankment, Land transformation: 1.90663e-7
- traffic area, rail/road embankment, Land occupation: 1.92007e-5
- carbon dioxide (biogenic), Renewable material resources from air: 1.06549
- forest, intensive, Land occupation: 0.00267291
- to forest, intensive, Land transformation: 2.94724e-5
- Energy, gross calorific value, in biomass, primary forest, Renewable energy resources from biosphere: 12
- Wood, soft, standing, Renewable material resources from biosphere: 0.00142185
- to traffic area, rail/road embankment, Land transformation [DE]: 4.37889e-5
- from traffic area, rail/road embankment, Land transformation [DE]: 4.37889e-5
- traffic area, rail/road embankment, Land occupation [DE]: 0.00440976
- forest, intensive, Land occupation [DE]: 0.613877
- to forest, intensive, Land transformation [DE]: 0.00676881
- from forest, intensive, Land transformation [DE]: 0.00676881
- from forest, intensive, Land transformation: 2.94724e-5
- to traffic area, rail/road embankment, Land transformation [SE]: 5.35091e-6
- from traffic area, rail/road embankment, Land transformation [SE]: 5.35091e-6
- traffic area, rail/road embankment, Land occupation [SE]: 0.000538863
- forest, intensive, Land occupation [SE]: 0.0750145
- to forest, intensive, Land transformation [SE]: 0.000827134
- from forest, intensive, Land transformation [SE]: 0.000827134
- to traffic area, rail/road embankment, Land transformation [FI]: 2.70838e-6
- from traffic area, rail/road embankment, Land transformation [FI]: 2.70838e-6
- traffic area, rail/road embankment, Land occupation [FI]: 0.000272747
- forest, intensive, Land occupation [FI]: 0.0379688
- to forest, intensive, Land transformation [FI]: 0.000418656
- from forest, intensive, Land transformation [FI]: 0.000418656
- to traffic area, rail/road embankment, Land transformation [CH]: 5.781e-6
- from traffic area, rail/road embankment, Land transformation [CH]: 5.781e-6
- traffic area, rail/road embankment, Land occupation [CH]: 0.000582175
- forest, intensive, Land occupation [AL]: 0.00527398
- forest, intensive, Land occupation [AT]: 0.0679519
- forest, intensive, Land occupation [BA]: 0.00657477
- forest, intensive, Land occupation [BE]: 0.0817907
- forest, intensive, Land occupation [BG]: 0.020944
- forest, intensive, Land occupation [BY]: 0.0271954
- forest, intensive, Land occupation [CH]: 0.081044
- forest, intensive, Land occupation [CZ]: 0.056406
- forest, intensive, Land occupation [DK]: 0.0445131
- forest, intensive, Land occupation [EE]: 0.00607833
- forest, intensive, Land occupation [ES]: 0.263432
- forest, intensive, Land occupation [FR]: 0.433028
- forest, intensive, Land occupation [GB]: 0.430325
- forest, intensive, Land occupation [GR]: 0.0489522
- forest, intensive, Land occupation [HR]: 0.0157398
- forest, intensive, Land occupation [HU]: 0.0412617
- forest, intensive, Land occupation [IE]: 0.044447
- forest, intensive, Land occupation [IS]: 0.00253627
- forest, intensive, Land occupation [IT]: 0.37049
- forest, intensive, Land occupation [LT]: 0.0129783
- forest, intensive, Land occupation [LU]: 0.00900956
- forest, intensive, Land occupation [LV]: 0.00765282
- forest, intensive, Land occupation [MD]: 0.00404924
- forest, intensive, Land occupation [ME]: 0.00163126
- forest, intensive, Land occupation [MK]: 0.00450536
- forest, intensive, Land occupation [MT]: 0.0024923
- forest, intensive, Land occupation [NL]: 0.137335
- forest, intensive, Land occupation [NO]: 0.0519855
- forest, intensive, Land occupation [PL]: 0.158057
- forest, intensive, Land occupation [PT]: 0.0498728
- forest, intensive, Land occupation [RO]: 0.0692394
- forest, intensive, Land occupation [RS]: 0.017182
- forest, intensive, Land occupation [SI]: 0.0106231
- forest, intensive, Land occupation [SK]: 0.0249341
- forest, intensive, Land occupation [SM]: 0.000310329
- forest, intensive, Land occupation [UA]: 0.0731069
- to forest, intensive, Land transformation [AL]: 5.81526e-5
- to forest, intensive, Land transformation [AT]: 0.00074926
- to forest, intensive, Land transformation [BA]: 7.24955e-5
- to forest, intensive, Land transformation [BE]: 0.000901851
- to forest, intensive, Land transformation [BG]: 0.000230935
- to forest, intensive, Land transformation [BY]: 0.000299866
- to forest, intensive, Land transformation [CH]: 0.000893617
- to forest, intensive, Land transformation [CZ]: 0.000621951
- to forest, intensive, Land transformation [DK]: 0.000490816
- to forest, intensive, Land transformation [EE]: 6.70216e-5
- to forest, intensive, Land transformation [ES]: 0.00290469
- to forest, intensive, Land transformation [FR]: 0.00477471
- to forest, intensive, Land transformation [GB]: 0.0047449
- to forest, intensive, Land transformation [GR]: 0.000539763
- to forest, intensive, Land transformation [HR]: 0.000173552
- to forest, intensive, Land transformation [HU]: 0.000454965
- to forest, intensive, Land transformation [IE]: 0.000490087
- to forest, intensive, Land transformation [IS]: 2.79658e-5
- to forest, intensive, Land transformation [IT]: 0.00408514
- to forest, intensive, Land transformation [LT]: 0.000143103
- to forest, intensive, Land transformation [LU]: 9.93423e-5
- to forest, intensive, Land transformation [LV]: 8.43824e-5
- to forest, intensive, Land transformation [MD]: 4.46483e-5
- to forest, intensive, Land transformation [ME]: 1.79868e-5
- to forest, intensive, Land transformation [MK]: 4.96776e-5
- to forest, intensive, Land transformation [MT]: 2.7481e-5
- to forest, intensive, Land transformation [NL]: 0.0015143
- to forest, intensive, Land transformation [NO]: 0.000573209
- to forest, intensive, Land transformation [PL]: 0.00174279
- to forest, intensive, Land transformation [PT]: 0.000549914
- to forest, intensive, Land transformation [RO]: 0.000763456
- to forest, intensive, Land transformation [RS]: 0.000189455
- to forest, intensive, Land transformation [SI]: 0.000117134
- to forest, intensive, Land transformation [SK]: 0.000274931
- to forest, intensive, Land transformation [SM]: 3.42179e-6
- to forest, intensive, Land transformation [UA]: 0.000806101
- from forest, intensive, Land transformation [AL]: 5.81526e-5
- from forest, intensive, Land transformation [AT]: 0.00074926
- from forest, intensive, Land transformation [BA]: 7.24955e-5
- from forest, intensive, Land transformation [BE]: 0.000901851
- from forest, intensive, Land transformation [BG]: 0.000230935
- from forest, intensive, Land transformation [BY]: 0.000299866
- from forest, intensive, Land transformation [CH]: 0.000893617
- from forest, intensive, Land transformation [CZ]: 0.000621951
- from forest, intensive, Land transformation [DK]: 0.000490816
- from forest, intensive, Land transformation [EE]: 6.70216e-5
- from forest, intensive, Land transformation [ES]: 0.00290469
- from forest, intensive, Land transformation [FR]: 0.00477471
- from forest, intensive, Land transformation [GB]: 0.0047449
- from forest, intensive, Land transformation [GR]: 0.000539763
- from forest, intensive, Land transformation [HR]: 0.000173552
- from forest, intensive, Land transformation [HU]: 0.000454965
- from forest, intensive, Land transformation [IE]: 0.000490087
- from forest, intensive, Land transformation [IS]: 2.79658e-5
- from forest, intensive, Land transformation [IT]: 0.00408514
- from forest, intensive, Land transformation [LT]: 0.000143103
- from forest, intensive, Land transformation [LU]: 9.93423e-5
- from forest, intensive, Land transformation [LV]: 8.43824e-5
- from forest, intensive, Land transformation [MD]: 4.46483e-5
- from forest, intensive, Land transformation [ME]: 1.79868e-5
- from forest, intensive, Land transformation [MK]: 4.96776e-5
- from forest, intensive, Land transformation [MT]: 2.7481e-5
- from forest, intensive, Land transformation [NL]: 0.0015143
- from forest, intensive, Land transformation [NO]: 0.000573209
- from forest, intensive, Land transformation [PL]: 0.00174279
- from forest, intensive, Land transformation [PT]: 0.000549914
- from forest, intensive, Land transformation [RO]: 0.000763456
- from forest, intensive, Land transformation [RS]: 0.000189455
- from forest, intensive, Land transformation [SI]: 0.000117134
- from forest, intensive, Land transformation [SK]: 0.000274931
- from forest, intensive, Land transformation [SM]: 3.42179e-6
- from forest, intensive, Land transformation [UA]: 0.000806101
- to traffic area, rail/road embankment, Land transformation [AL]: 3.76202e-7
- to traffic area, rail/road embankment, Land transformation [AT]: 4.84712e-6
- to traffic area, rail/road embankment, Land transformation [BA]: 4.68989e-7
- to traffic area, rail/road embankment, Land transformation [BE]: 5.83426e-6
- to traffic area, rail/road embankment, Land transformation [BG]: 1.49397e-6
- to traffic area, rail/road embankment, Land transformation [BY]: 1.9399e-6
- to traffic area, rail/road embankment, Land transformation [CZ]: 4.02353e-6
- to traffic area, rail/road embankment, Land transformation [DK]: 3.1752e-6
- to traffic area, rail/road embankment, Land transformation [EE]: 4.33577e-7
- to traffic area, rail/road embankment, Land transformation [ES]: 1.8791e-5
- to traffic area, rail/road embankment, Land transformation [FR]: 3.08886e-5
- to traffic area, rail/road embankment, Land transformation [GB]: 3.06958e-5
- to traffic area, rail/road embankment, Land transformation [GR]: 3.49184e-6
- to traffic area, rail/road embankment, Land transformation [HR]: 1.12274e-6
- to traffic area, rail/road embankment, Land transformation [HU]: 2.94327e-6
- to traffic area, rail/road embankment, Land transformation [IE]: 3.17048e-6
- to traffic area, rail/road embankment, Land transformation [IS]: 1.80917e-7
- to traffic area, rail/road embankment, Land transformation [IT]: 2.64277e-5
- to traffic area, rail/road embankment, Land transformation [LT]: 9.25762e-7
- to traffic area, rail/road embankment, Land transformation [LU]: 6.42667e-7
- to traffic area, rail/road embankment, Land transformation [LV]: 5.45888e-7
- to traffic area, rail/road embankment, Land transformation [MD]: 2.88839e-7
- to traffic area, rail/road embankment, Land transformation [ME]: 1.16361e-7
- to traffic area, rail/road embankment, Land transformation [MK]: 3.21375e-7
- to traffic area, rail/road embankment, Land transformation [MT]: 1.7778e-7
- to traffic area, rail/road embankment, Land transformation [NL]: 9.79635e-6
- to traffic area, rail/road embankment, Land transformation [NO]: 3.70821e-6
- to traffic area, rail/road embankment, Land transformation [PL]: 1.12745e-5
- to traffic area, rail/road embankment, Land transformation [PT]: 3.55751e-6
- to traffic area, rail/road embankment, Land transformation [RO]: 4.93896e-6
- to traffic area, rail/road embankment, Land transformation [RS]: 1.22562e-6
- to traffic area, rail/road embankment, Land transformation [SI]: 7.57766e-7
- to traffic area, rail/road embankment, Land transformation [SK]: 1.77859e-6
- to traffic area, rail/road embankment, Land transformation [SM]: 2.21363e-8
- to traffic area, rail/road embankment, Land transformation [UA]: 5.21484e-6
- from traffic area, rail/road embankment, Land transformation [AL]: 3.76202e-7
- from traffic area, rail/road embankment, Land transformation [AT]: 4.84712e-6
- from traffic area, rail/road embankment, Land transformation [BA]: 4.68989e-7
- from traffic area, rail/road embankment, Land transformation [BE]: 5.83426e-6
- from traffic area, rail/road embankment, Land transformation [BG]: 1.49397e-6
- from traffic area, rail/road embankment, Land transformation [BY]: 1.9399e-6
- from traffic area, rail/road embankment, Land transformation [CZ]: 4.02353e-6
- from traffic area, rail/road embankment, Land transformation [DK]: 3.1752e-6
- from traffic area, rail/road embankment, Land transformation [EE]: 4.33577e-7
- from traffic area, rail/road embankment, Land transformation [ES]: 1.8791e-5
- from traffic area, rail/road embankment, Land transformation [FR]: 3.08886e-5
- from traffic area, rail/road embankment, Land transformation [GB]: 3.06958e-5
- from traffic area, rail/road embankment, Land transformation [GR]: 3.49184e-6
- from traffic area, rail/road embankment, Land transformation [HR]: 1.12274e-6
- from traffic area, rail/road embankment, Land transformation [HU]: 2.94327e-6
- from traffic area, rail/road embankment, Land transformation [IE]: 3.17048e-6
- from traffic area, rail/road embankment, Land transformation [IS]: 1.80917e-7
- from traffic area, rail/road embankment, Land transformation [IT]: 2.64277e-5
- from traffic area, rail/road embankment, Land transformation [LT]: 9.25762e-7
- from traffic area, rail/road embankment, Land transformation [LU]: 6.42667e-7
- from traffic area, rail/road embankment, Land transformation [LV]: 5.45888e-7
- from traffic area, rail/road embankment, Land transformation [MD]: 2.88839e-7
- from traffic area, rail/road embankment, Land transformation [ME]: 1.16361e-7
- from traffic area, rail/road embankment, Land transformation [MK]: 3.21375e-7
- from traffic area, rail/road embankment, Land transformation [MT]: 1.7778e-7
- from traffic area, rail/road embankment, Land transformation [NL]: 9.79635e-6
- from traffic area, rail/road embankment, Land transformation [NO]: 3.70821e-6
- from traffic area, rail/road embankment, Land transformation [PL]: 1.12745e-5
- from traffic area, rail/road embankment, Land transformation [PT]: 3.55751e-6
- from traffic area, rail/road embankment, Land transformation [RO]: 4.93896e-6
- from traffic area, rail/road embankment, Land transformation [RS]: 1.22562e-6
- from traffic area, rail/road embankment, Land transformation [SI]: 7.57766e-7
- from traffic area, rail/road embankment, Land transformation [SK]: 1.77859e-6
- from traffic area, rail/road embankment, Land transformation [SM]: 2.21363e-8
- from traffic area, rail/road embankment, Land transformation [UA]: 5.21484e-6
- traffic area, rail/road embankment, Land occupation [AL]: 3.78854e-5
- traffic area, rail/road embankment, Land occupation [AT]: 0.000488129
- traffic area, rail/road embankment, Land occupation [BA]: 4.72295e-5
- traffic area, rail/road embankment, Land occupation [BE]: 0.000587539
- traffic area, rail/road embankment, Land occupation [BG]: 0.00015045
- traffic area, rail/road embankment, Land occupation [BY]: 0.000195357
- traffic area, rail/road embankment, Land occupation [CZ]: 0.00040519
- traffic area, rail/road embankment, Land occupation [DK]: 0.000319758
- traffic area, rail/road embankment, Land occupation [EE]: 4.36634e-5
- traffic area, rail/road embankment, Land occupation [ES]: 0.00189235
- traffic area, rail/road embankment, Land occupation [FR]: 0.00311064
- traffic area, rail/road embankment, Land occupation [GB]: 0.00309122
- traffic area, rail/road embankment, Land occupation [GR]: 0.000351646
- traffic area, rail/road embankment, Land occupation [HR]: 0.000113066
- traffic area, rail/road embankment, Land occupation [HU]: 0.000296402
- traffic area, rail/road embankment, Land occupation [IE]: 0.000319283
- traffic area, rail/road embankment, Land occupation [IS]: 1.82192e-5
- traffic area, rail/road embankment, Land occupation [IT]: 0.0026614
- traffic area, rail/road embankment, Land occupation [LT]: 9.32288e-5
- traffic area, rail/road embankment, Land occupation [LU]: 6.47197e-5
- traffic area, rail/road embankment, Land occupation [LV]: 5.49736e-5
- traffic area, rail/road embankment, Land occupation [MD]: 2.90876e-5
- traffic area, rail/road embankment, Land occupation [ME]: 1.17181e-5
- traffic area, rail/road embankment, Land occupation [MK]: 3.2364e-5
- traffic area, rail/road embankment, Land occupation [MT]: 1.79033e-5
- traffic area, rail/road embankment, Land occupation [NL]: 0.000986542
- traffic area, rail/road embankment, Land occupation [NO]: 0.000373436
- traffic area, rail/road embankment, Land occupation [PL]: 0.0011354
- traffic area, rail/road embankment, Land occupation [PT]: 0.000358259
- traffic area, rail/road embankment, Land occupation [RO]: 0.000497378
- traffic area, rail/road embankment, Land occupation [RS]: 0.000123426
- traffic area, rail/road embankment, Land occupation [SI]: 7.63108e-5
- traffic area, rail/road embankment, Land occupation [SK]: 0.000179113
- traffic area, rail/road embankment, Land occupation [SM]: 2.22923e-6
- traffic area, rail/road embankment, Land occupation [UA]: 0.00052516

## Impact indicators
- Land use: 202.612
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
## Deviations from the LCI method principle
The background data uses:
- the \xe2\x80\x9cRecycled content cut-off\xe2\x80\x9d approach to allocate end-of-life by-products and secondary materials. This allocation is explained in the description of the recycled content system model (http://www.ecoinvent.org/database/system-models-in-ecoinvent-3/cut-off-system-model/allocation-cut-off-by-classification.html).
OR
- EF compliant data

## Deviations from the LCI method approaches
Background data:
- the \xe2\x80\x9cRecycled content cut-off\xe2\x80\x9d approach to allocate end-of-life by-products and secondary materials. This allocation is explained in the description of the recycled content system model (http://www.ecoinvent.org/database/system-models-in-ecoinvent-3/cut-off-system-model/allocation-cut-off-by-classification.html). The ecoinvent database mostly relies on “Allocation – market values” apart for few exceptions particularly in the energy sector. ecoinvent energy data is replaced with EF3.0 core data as per the EF guidelines version 2.0.
OR
- EF compliant data

## Modelling constants
All modelling constants follow the requirements listed in the Tender Specifications 070201/2020/SER/ENV.B1. Completeness: There are no intentional cut-offs in the inventory no matter how small their contribution to all the EF impact categories is. Eventual cut-offs are in compliance with the Guide for EF compliant data sets (JRC 2020), i.e. only if below the 3% cut-off rule. Water use: water use is modelled at country level using separate flows for water withdrawal, water release and water evaporation. Handling multi-functional processes: the following PEF multi- functionality decision hierarchy is applied for resolving all multi- functionality problems: (1) subdivision or system expansion; (2) allocation based on a relevant underlying physical relationship (substitution may apply here); (3) allocation based on some other relationship. Direct land use change: GHG emissions from direct LUC allocated to good/service for 20 years after the LUC occurs, with IPCC default values. Carbon storage and delayed emissions: credits associated with temporary (carbon) storage or delayed emissions up to 300 years are not be considered. Emissions off-setting: are not included. Capital goods (including infrastructures) and their End of life: they are included. System boundaries: system boundaries include all processes linked to the product supply chain (e.g. maintenance). Time period: emissions and removals are modelled as if released or removed at the beginning of the assessment method. Fossil and biogenic carbon emissions and removals: removals and emissions are modelled as follows: All GHG emissions from fossil fuels (including peat and limestone) are modelled consistently with the most updated ILCD list of elementary flows. The non-fossil (biogenic) carbon flows are modelled consistently with the most updated ILCD list of elementary flows.

## Cut-off and completeness
There are no intentional cut-offs in the inventory no matter how small their contribution to all the EF impact categories is. Eventual cut-offs are in compliance with the Guide for EF compliant data sets (JRC 2020), i.e. only if below the 3% cut-off rule. The dataset dry mass and water balance has been checked to ensure the inventory is complete. Capital goods (e.g. infrastructure) and their end-of-life are included.

## Data selection and combination
These datasets include, in both their foreground and background data, links to EF3.0 compliant data.
The relevant background data on energy, transport, and End of Life are from the LCDN data node (http://lcdn.thinkstep.com/Node/).
All other background data in the supply of this product for which no EF3.0 process was available are from ecoinvent v3.7 database (www.ecoinvent.org) or other data sources.

## Data treatment and extrapolations
Several data sources have been used to model the inventory.

## Use advice
This data set is a supporting sub-data set and must be used exclusively as sub-data set of its corresponding level-1 partly disaggregated data set (see “General comment” field for exact name and UUID).

## Data sources
- Background Data for Representative products and organisations. EF 3.0 compliant (data stock)
- Eurostat (2021). Roundwood removals by type of wood and assortment. Tree species: Coniferous. Wood products: Roundwood under bark. Available at: ec.europa.eu/eurostat/databrowser/bookmark/2fe47d27-a1ea-4028-a4cc-06c1f8725af0?lang=en [Accessed on 25/06/2021]

## Intended applications
Implementation of regular Product Environmental Footprint (PEF) studies and Organisation Environmental Footprint (OEF) studies exclusively under the specified Product groups and sectors as defined in the Product Environmental Footprint Category Rules (PEFCR) and Organisation Environmental Footprint Sectorial Rules (OEFSR) listed in http://ec.europa.eu/environment/eussd/smgp/PEFCR_OEFSR.htm
