# down, elementary; goose, RDS; production mix, at plant; renewable

Dataset: ILCD process, Unit process, single operation
Geography: GLO
Reference year: 2008
Valid until: 2024
Classification: Other Services / Other services
LCI method principle: Attributional
LCI method approaches: Allocation - mass
Completeness: All relevant flows quantified
Project: Provision of process-based 3.0 Environmental Footprint-compliant life cycle inventory datasets - Renewable materials - contract number 070201/2020/840085/SER/ENV.B.1
Generated by: CADIS
Owner: Blonk Sustainability Tools
Compliance: Environmental Footprint non-primary supporting data set; Environmental Footprint 3.1
Amounts: no units in this file; such an amount is in the reference unit of its flow, which a separate flow dataset defines
copyright: true
licenseType: Free of charge for some user types or use types
accessRestrictions: Free of charge for all final users implementing a regular Product Environmental Footprint (PEF) studies and Organisation Environmental Footprint (OEF) studies exclusively under the specified Product groups and sectors as defined in the Product Environmental Footprint Category Rules (PEFCR) and Organisation Environmental Footprint Sectorial Rules (OEFSR) listed in http://ec.europa.eu/environment/eussd/smgp/PEFCR_OEFSR.htm and in accordance with the terms and conditions of the EULA (available at https://ecoinvent.lca-data.com/) exclusively until 31st December 2024. Any use of this dataset or any derivative data not within the specific context of one of the PEF/OEF projects or after the end of 2024 is not permitted.

## General comment
Notice: this data set supersedes the EF3.0-compliant version (see link under "preceding data set version" below calculated with the EF3.0). The life cycle inventory is not changed from the original EF3.0 data set. The LCIA results are calculated based on the EF3.1 methods which provide updated characterisation factors in the following impact categories: Climate Change, Ecotoxicity freshwater, Photochemical Ozone Formation, Acidification, Human Toxicity non-cancer, and Human Toxicity cancer. The review report and the data quality ratings refer to the original results. The data set has been updated by the European Commission on the basis of the original EF3.0 data set delivered by the data provider.This sub-process has limited documentation only. For all detailed documentation of the full model to which this data set belongs (such as DQRs, review reports and other technical documentation), please see this process: down - GLO []

## Technology and included processes
This dataset was modelled for 1 goose, then multiplied times 13.33 in order to obtain 1 kg of down. Mass allocation was used, therefore the result was multiplied times 0.0096, which is the fraction on the goose that corresponds to down (in weight); finally, as 10% of loss is considered, the result was divided by 0.9. Data for down processing (cleaning and drying) was modeled for 1 kg of down. Data for goose was extrapolated form ducks, (Societat Orgánica, 2008).

## Reference product
- down, goose, rds // down // glo, elementary: 1

## Outputs
- Water, Emissions to air, unspecified: 0.000861952
- Water, Emissions to water, unspecified [AL]: 9.88777e-6
- Water, Emissions to water, unspecified [AT]: 0.000127398
- Water, Emissions to water, unspecified [BA]: 1.23265e-5
- Water, Emissions to water, unspecified [BE]: 0.000153343
- Water, Emissions to water, unspecified [BG]: 3.92663e-5
- Water, Emissions to water, unspecified [BY]: 5.09866e-5
- Water, Emissions to water, unspecified [CH]: 0.000151943
- Water, Emissions to water, unspecified [CZ]: 0.000105751
- Water, Emissions to water, unspecified [DE]: 0.00115091
- Water, Emissions to water, unspecified [DK]: 8.34542e-5
- Water, Emissions to water, unspecified [EE]: 1.13958e-5
- Water, Emissions to water, unspecified [ES]: 0.000493888
- Water, Emissions to water, unspecified [FI]: 7.11847e-5
- Water, Emissions to water, unspecified [FR]: 0.00081185
- Water, Emissions to water, unspecified [GB]: 0.000806782
- Water, Emissions to water, unspecified: 0.000161182
- Water, Emissions to water, unspecified [GR]: 9.17766e-5
- Water, Emissions to water, unspecified [HR]: 2.95092e-5
- Water, Emissions to water, unspecified [HU]: 7.73584e-5
- Water, Emissions to water, unspecified [IE]: 8.33301e-5
- Water, Emissions to water, unspecified [IS]: 4.75506e-6
- Water, Emissions to water, unspecified [IT]: 0.000694603
- Water, Emissions to water, unspecified [LT]: 2.4332e-5
- Water, Emissions to water, unspecified [LU]: 1.68913e-5
- Water, Emissions to water, unspecified [LV]: 1.43477e-5
- Water, Emissions to water, unspecified [MD]: 7.59161e-6
- Water, Emissions to water, unspecified [ME]: 3.05833e-6
- Water, Emissions to water, unspecified [MK]: 8.44675e-6
- Water, Emissions to water, unspecified [MT]: 4.67263e-6
- Water, Emissions to water, unspecified [NL]: 0.000257479
- Water, Emissions to water, unspecified [NO]: 9.74636e-5
- Water, Emissions to water, unspecified [PL]: 0.000296329
- Water, Emissions to water, unspecified [PT]: 9.35026e-5
- Water, Emissions to water, unspecified [RO]: 0.000129812
- Water, Emissions to water, unspecified [RS]: 3.22132e-5
- Water, Emissions to water, unspecified [SE]: 0.000140639
- Water, Emissions to water, unspecified [SI]: 1.99165e-5
- Water, Emissions to water, unspecified [SK]: 4.67469e-5
- Water, Emissions to water, unspecified [SM]: 5.81812e-7
- Water, Emissions to water, unspecified [UA]: 0.000137062
- nitrous oxide, Emissions to air, unspecified: 0.00121737
- ammonia, Emissions to air, unspecified [AL]: 5.28926e-6
- ammonia, Emissions to air, unspecified [AT]: 6.81488e-5
- ammonia, Emissions to air, unspecified [BA]: 6.59382e-6
- ammonia, Emissions to air, unspecified [BE]: 8.20277e-5
- ammonia, Emissions to air, unspecified [BG]: 2.10047e-5
- ammonia, Emissions to air, unspecified [BY]: 2.72742e-5
- ammonia, Emissions to air, unspecified [CH]: 8.12788e-5
- ammonia, Emissions to air, unspecified [CZ]: 5.65695e-5
- ammonia, Emissions to air, unspecified [DE]: 0.000615656
- ammonia, Emissions to air, unspecified [DK]: 4.46421e-5
- ammonia, Emissions to air, unspecified [EE]: 6.09594e-6
- ammonia, Emissions to air, unspecified [ES]: 0.000264195
- ammonia, Emissions to air, unspecified [FI]: 3.80788e-5
- ammonia, Emissions to air, unspecified [FR]: 0.000434283
- ammonia, Emissions to air, unspecified [GB]: 0.000431572
- ammonia, Emissions to air, unspecified: 0.0132018
- ammonia, Emissions to air, unspecified [GR]: 4.9094e-5
- ammonia, Emissions to air, unspecified [HR]: 1.57854e-5
- ammonia, Emissions to air, unspecified [HU]: 4.13813e-5
- ammonia, Emissions to air, unspecified [IE]: 4.45758e-5
- ammonia, Emissions to air, unspecified [IT]: 0.000371564
- ammonia, Emissions to air, unspecified [LT]: 1.30159e-5
- ammonia, Emissions to air, unspecified [LU]: 9.03566e-6
- ammonia, Emissions to air, unspecified [LV]: 7.67499e-6
- ammonia, Emissions to air, unspecified [MD]: 4.06098e-6
- ammonia, Emissions to air, unspecified [MK]: 4.51842e-6
- ammonia, Emissions to air, unspecified [NL]: 0.000137733
- ammonia, Emissions to air, unspecified [NO]: 5.21362e-5
- ammonia, Emissions to air, unspecified [PL]: 0.000158515
- ammonia, Emissions to air, unspecified [PT]: 5.00173e-5
- ammonia, Emissions to air, unspecified [RO]: 6.944e-5
- ammonia, Emissions to air, unspecified [RU]: 0.000574909
- ammonia, Emissions to air, unspecified [SE]: 7.52318e-5
- ammonia, Emissions to air, unspecified [SI]: 1.06539e-5
- ammonia, Emissions to air, unspecified [SK]: 2.50063e-5
- ammonia, Emissions to air, unspecified [UA]: 7.33188e-5
- methane (biogenic), Emissions to air, unspecified: 0.000679423
- particles (PM10), Emissions to air, unspecified: 5.70427e-5
- Water, Emissions to water, unspecified [AE]: 0.000188757
- Water, Emissions to water, unspecified [AF]: 1.93837e-5
- Water, Emissions to water, unspecified [AG]: 5.66055e-7
- Water, Emissions to water, unspecified [AM]: 8.74058e-6
- Water, Emissions to water, unspecified [AO]: 5.87158e-5
- Water, Emissions to water, unspecified [AR]: 0.000261683
- Water, Emissions to water, unspecified [AU]: 0.00032313
- Water, Emissions to water, unspecified [AW]: 1.13666e-6
- Water, Emissions to water, unspecified [AZ]: 4.42556e-5
- Water, Emissions to water, unspecified [BB]: 1.37683e-6
- Water, Emissions to water, unspecified [BD]: 0.000156226
- Water, Emissions to water, unspecified [BF]: 9.32728e-6
- Water, Emissions to water, unspecified [BH]: 1.98602e-5
- Water, Emissions to water, unspecified [BI]: 2.21949e-6
- Water, Emissions to water, unspecified [BJ]: 8.59344e-6
- Water, Emissions to water, unspecified [BN]: 9.16125e-6
- Water, Emissions to water, unspecified [BO]: 2.20499e-5
- Water, Emissions to water, unspecified [BR]: 0.000912751
- Water, Emissions to water, unspecified [BS]: 3.76302e-6
- Water, Emissions to water, unspecified [BT]: 1.92737e-6
- Water, Emissions to water, unspecified [BW]: 9.82916e-6
- Water, Emissions to water, unspecified [BZ]: 7.8295e-7
- Water, Emissions to water, unspecified [CA]: 0.000479692
- Water, Emissions to water, unspecified [CD]: 1.87292e-5
- Water, Emissions to water, unspecified [CF]: 1.22962e-6
- Water, Emissions to water, unspecified [CG]: 7.25631e-6
- Water, Emissions to water, unspecified [CI]: 2.48512e-5
- Water, Emissions to water, unspecified [CL]: 0.000117407
- Water, Emissions to water, unspecified [CM]: 2.15396e-5
- Water, Emissions to water, unspecified [CN]: 0.00502469
- Water, Emissions to water, unspecified [CO]: 0.000183699
- Water, Emissions to water, unspecified [CR]: 2.29433e-5
- Water, Emissions to water, unspecified [CV]: 9.59653e-7
- Water, Emissions to water, unspecified [CY]: 8.82149e-6
- Water, Emissions to water, unspecified [DJ]: 1.23441e-6
- Water, Emissions to water, unspecified [DM]: 2.34026e-7
- Water, Emissions to water, unspecified [DO]: 4.28219e-5
- Water, Emissions to water, unspecified [DZ]: 0.000148886
- Water, Emissions to water, unspecified [EC]: 5.20462e-5
- Water, Emissions to water, unspecified [EG]: 0.000294792
- Water, Emissions to water, unspecified [ER]: 1.5657e-6
- Water, Emissions to water, unspecified [ET]: 4.4993e-5
- Water, Emissions to water, unspecified [FJ]: 2.83108e-6
- Water, Emissions to water, unspecified [GA]: 8.47231e-6
- Water, Emissions to water, unspecified [GD]: 4.3905e-7
- Water, Emissions to water, unspecified [GE]: 1.23855e-5
- Water, Emissions to water, unspecified [GH]: 3.67809e-5
- Water, Emissions to water, unspecified [GM]: 1.33032e-6
- Water, Emissions to water, unspecified [GN]: 6.62421e-6
- Water, Emissions to water, unspecified [GQ]: 9.85571e-6
- Water, Emissions to water, unspecified [GT]: 3.56366e-5
- Water, Emissions to water, unspecified [GW]: 8.01023e-7
- Water, Emissions to water, unspecified [GY]: 2.52561e-6
- Water, Emissions to water, unspecified [HN]: 1.24403e-5
- Water, Emissions to water, unspecified [HT]: 9.224e-6
- Water, Emissions to water, unspecified [ID]: 0.000772027
- Water, Emissions to water, unspecified [IL]: 8.54697e-5
- Water, Emissions to water, unspecified [IN]: 0.00206074
- Water, Emissions to water, unspecified [IQ]: 0.000128675
- Water, Emissions to water, unspecified [IR]: 0.00036373
- Water, Emissions to water, unspecified [JM]: 7.6341e-6
- Water, Emissions to water, unspecified [JO]: 2.51707e-5
- Water, Emissions to water, unspecified [JP]: 0.00149118
- Water, Emissions to water, unspecified [KE]: 4.39775e-5
- Water, Emissions to water, unspecified [KG]: 7.30386e-6
- Water, Emissions to water, unspecified [KH]: 1.48605e-5
- Water, Emissions to water, unspecified [KM]: 6.12953e-7
- Water, Emissions to water, unspecified [KN]: 3.65269e-7
- Water, Emissions to water, unspecified [KR]: 0.000555349
- Water, Emissions to water, unspecified [KW]: 6.99788e-5
- Water, Emissions to water, unspecified [KZ]: 0.0001202
- Water, Emissions to water, unspecified [LA]: 1.1365e-5
- Water, Emissions to water, unspecified [LB]: 2.77185e-5
- Water, Emissions to water, unspecified [LC]: 7.45083e-7
- Water, Emissions to water, unspecified [LK]: 6.82809e-5
- Water, Emissions to water, unspecified [LR]: 1.69475e-6
- Water, Emissions to water, unspecified [LS]: 1.64572e-6
- Water, Emissions to water, unspecified [LY]: 3.49902e-5
- Water, Emissions to water, unspecified [MA]: 7.25394e-5
- Water, Emissions to water, unspecified [MG]: 1.12109e-5
- Water, Emissions to water, unspecified [ML]: 1.01783e-5
- Water, Emissions to water, unspecified [MM]: 6.47486e-5
- Water, Emissions to water, unspecified [MN]: 9.05577e-6
- Water, Emissions to water, unspecified [MR]: 5.33936e-6
- Water, Emissions to water, unspecified [MU]: 7.12908e-6
- Water, Emissions to water, unspecified [MW]: 5.15066e-6
- Water, Emissions to water, unspecified [MX]: 0.00065023
- Water, Emissions to water, unspecified [MY]: 0.00021716
- Water, Emissions to water, unspecified [MZ]: 9.2084e-6
- Water, Emissions to water, unspecified [NA]: 6.65948e-6
- Water, Emissions to water, unspecified [NE]: 6.58396e-6
- Water, Emissions to water, unspecified [NG]: 0.000273315
- Water, Emissions to water, unspecified [NI]: 9.19927e-6
- Water, Emissions to water, unspecified [NP]: 2.04313e-5
- Water, Emissions to water, unspecified [NZ]: 5.06739e-5
- Water, Emissions to water, unspecified [OM]: 4.34206e-5
- Water, Emissions to water, unspecified [PA]: 2.69795e-5
- Water, Emissions to water, unspecified [PE]: 0.000103753
- Water, Emissions to water, unspecified [PG]: 8.73867e-6
- Water, Emissions to water, unspecified [PH]: 0.000210328
- Water, Emissions to water, unspecified [PK]: 0.000252234
- Water, Emissions to water, unspecified [PR]: 3.56973e-5
- Water, Emissions to water, unspecified [PS]: 6.75581e-6
- Water, Emissions to water, unspecified [PY]: 2.24676e-5
- Water, Emissions to water, unspecified [QA]: 8.12986e-5
- Water, Emissions to water, unspecified [RW]: 5.66738e-6
- Water, Emissions to water, unspecified [SA]: 0.000479342
- Water, Emissions to water, unspecified [SB]: 4.34208e-7
- Water, Emissions to water, unspecified [SD]: 5.02922e-5
- Water, Emissions to water, unspecified [SG]: 0.00013962
- Water, Emissions to water, unspecified [SL]: 3.20094e-6
- Water, Emissions to water, unspecified [SN]: 1.25325e-5
- Water, Emissions to water, unspecified [SR]: 2.61014e-6
- Water, Emissions to water, unspecified [ST]: 2.06429e-7
- Water, Emissions to water, unspecified [SV]: 1.39213e-5
- Water, Emissions to water, unspecified [SZ]: 2.80942e-6
- Water, Emissions to water, unspecified [TC]: 2.51009e-7
- Water, Emissions to water, unspecified [TD]: 6.97437e-6
- Water, Emissions to water, unspecified [TG]: 2.88913e-6
- Water, Emissions to water, unspecified [TH]: 0.000320705
- Water, Emissions to water, unspecified [TJ]: 7.23844e-6
- Water, Emissions to water, unspecified [TL]: 9.28313e-7
- Water, Emissions to water, unspecified [TM]: 2.09941e-5
- Water, Emissions to water, unspecified [TN]: 3.48897e-5
- Water, Emissions to water, unspecified [TO]: 1.74044e-7
- Water, Emissions to water, unspecified [TR]: 0.000543113
- Water, Emissions to water, unspecified [TT]: 1.19621e-5
- Water, Emissions to water, unspecified [TZ]: 3.38788e-5
- Water, Emissions to water, unspecified [UG]: 2.34717e-5
- Water, Emissions to water, unspecified [US]: 0.00529072
- Water, Emissions to water, unspecified [UY]: 2.00218e-5
- Water, Emissions to water, unspecified [UZ]: 5.59436e-5
- Water, Emissions to water, unspecified [VC]: 3.76351e-7
- Water, Emissions to water, unspecified [VE]: 0.000153465
- Water, Emissions to water, unspecified [VN]: 0.00015895
- Water, Emissions to water, unspecified [VU]: 2.39069e-7
- Water, Emissions to water, unspecified [WS]: 3.40082e-7
- Water, Emissions to water, unspecified [YE]: 2.79873e-5
- Water, Emissions to water, unspecified [ZA]: 0.00020461
- Water, Emissions to water, unspecified [ZM]: 1.58715e-5
- Water, Emissions to water, unspecified [ZW]: 1.03094e-5
- Water, Emissions to water, unspecified [RU]: 0.00107474
- phosphate, Emissions to soil, unspecified: 0.000250826

## Impact indicators
- Eutrophication marine: 0.00157984
- Ecotoxicity, freshwater: 2.30851
- Water use: -0.886754
- Climate change: 0.350686
- Human toxicity, non-cancer: 2.80255e-10
- EF-particulate Matter: 3.63746e-7
- Photochemical ozone formation - human health: 6.86218e-6
- Acidification: 0.0467213
- Eutrophication, terrestrial: 0.206512
- Eutrophication, freshwater: 4.01321e-6
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
## Deviations from the LCI method principle
The background data use the \xe2\x80\x9cRecycled content cut-off\xe2\x80\x9d approach to allocate end-of-life by-products and secondary materials. This allocation is explained in the description of the recycled content system model (http://www.ecoinvent.org/database/system-models-in-ecoinvent-3/cut-off-system-model/allocation-cut-off-by-classification.html).

## Deviations from the LCI method approaches
Background data:
- the \xe2\x80\x9cRecycled content cut-off\xe2\x80\x9d approach to allocate end-of-life by-products and secondary materials. This allocation is explained in the description of the recycled content system model (http://www.ecoinvent.org/database/system-models-in-ecoinvent-3/cut-off-system-model/allocation-cut-off-by-classification.html). The ecoinvent database mostly relies on “Allocation – market values” apart for few exceptions particularly in the energy sector. ecoinvent energy data is replaced with EF3.0 core data as per the EF guidelines version 2.0.
OR
- EF compliant data

## Modelling constants
All modelling constants follow the requirements listed in the Tender Specifications ENV.B.1/SER/2016/0038vl. Completeness: All known environmental flows are included. All known resource uses and emissions are listed in the inventory. Water use: water use is modelled at country level using separate flows for water withdrawal, water release and water evaporation. Cut-off: All known environmental flows are included. All known resource uses and emissions are listed in the inventory. Handling multi-functional processes: the following PEF multi- functionality decision hierarchy is applied for resolving all multi- functionality problems: (1) subdivision or system expansion; (2) allocation based on a relevant underlying physical relationship (substitution may apply here); (3) allocation based on some other relationship. Direct land use change: GHG emissions from direct LUC allocated to good/service for 20 years after the LUC occurs, with IPCC default values. Carbon storage and delayed emissions: credits associated with temporary (carbon) storage or delayed emissions up to 300 years are not be considered. Emissions off-setting: are not included. Capital goods (including infrastructures) and their End of life: they are included. System boundaries: system boundaries include all processes linked to the product supply chain (e.g. maintenance). Time period: emissions and removals are modelled as if released or removed at the beginning of the assessment method. Fossil and biogenic carbon emissions and removals: removals and emissions are modelled as follows: All GHG emissions from fossil fuels (including peat and limestone) are modelled consistently with the most updated ILCD list of elementary flows. The non-fossil (biogenic) carbon flows are modelled consistently with the most updated ILCD list of elementary flows.

## Cut-off and completeness
All known environmental flows are included. All known resource uses and emissions are listed in the inventory. The dataset dry mass balance has been checked to ensure the inventory is complete. Capital goods (e.g. infrastructure) and their end-of-life are included.

## Data selection and combination
These datasets include, in both their foreground and background data, links to EF3.0 compliant data.
The relevant background data on energy, transport, and End of Life are from the LCDN data node (http://lcdn.thinkstep.com/Node/).
All other background data in the supply of this product for which no EF3.0 process was available are from ecoinvent v3.7 database (www.ecoinvent.org) or other data sources.

## Data treatment and extrapolations
Several data sources have been used to model the inventory.

## Use advice
This data set is a supporting sub-data set and must be used exclusively as sub-data set of its corresponding level-1 partly disaggregated data set (see “General comment” field for exact name and UUID).

## Data sources
- Background Data for Representative products and organisations. EF 3.0 compliant (data stock)
- Galeano A., Gómez G., Ortiz S., Rodríguez, A. (1998). Obtención y manejo del plumón y plumas finas en patos Pekin. Acta Agronómica.
- Yan X., (2004) The changing face of the world of duck production. Cherry Valley Farms Ltd, International Hatchery Practice.
- Castelló, J. (2013) Un “rara avis”; una explotación de patos para carne. Selecciones avícolas.
- Pingel, Heinz (2004) Duck and geese production around the world. World Poultry
- Buckland R., Guy G. (2002) Goose Production. FAO ANIMAL PRODUCTION AND HEALTH PAPER - 154
- Sánchez Tambi, M. R. (2017). Diseño de una máquina escaldadora para el procesamiento de pollos en la industria artesanal [Tesis de pregrado, Universidad Técnica del Norte]. Recuperado de http://repositorio.utn.edu.ec/handle/123456789/7540 procesamiento de pollos en la industria artesanal
- feather drying machine. https://spanish.alibaba.com/product-detail/100kg-feather-drying-machine-60797624807.html?spm=a2700.8699010.29.31.53128faeKgKi2o
- Chicken Plucking Machine 1500W/2200w 275R/MIN Poultry Plucker with 20 inch Stainless Steel Feather Plucking Machine. https://www.amazon.com.mx/Poultry-Plucking-Diameter-Stainless-Depilation/dp/B07SNT7VQ1?th=1
- Saatci, Mustafa. (2008) Effects of Age, Sex, Feather Colour, Body Measurements, and Body Weight on Down and Feather Yield in Native Turkish Geese. Turk. J. Vet. Anim. Sci. 2008; 32(4): 293-297
- Kozák, J. (2011)An Overview of Feathers Formation, Moults and Down Production in Geese. Asian-Aust. J. Anim. Sci. Vol. 24, No. 6 : 881 - 887
- FAO (2016) Greenhouse gas emissions and fossil energy use from poultry supply chains

## Intended applications
Implementation of regular Product Environmental Footprint (PEF) studies and Organisation Environmental Footprint (OEF) studies exclusively under the specified Product groups and sectors as defined in the Product Environmental Footprint Category Rules (PEFCR) and Organisation Environmental Footprint Sectorial Rules (OEFSR) listed in http://ec.europa.eu/environment/eussd/smgp/PEFCR_OEFSR.htm
