# bamboo fibre, elementary; technology mix; production mix, at farm

Dataset: ILCD process, Unit process, single operation
Geography: GLO
Reference year: 2016
Valid until: 2024
Classification: Other Services / Other services
LCI method principle: Attributional
LCI method approaches: Allocation - market value
Completeness: All relevant flows quantified
Project: Provision of process-based 3.0 Environmental Footprint-compliant life cycle inventory datasets - Renewable materials - contract number 070201/2020/840085/SER/ENV.B.1
Generated by: Blonk Sustainability Tools
Owner: Blonk Sustainability Tools
Compliance: Environmental Footprint non-primary supporting data set; Environmental Footprint 3.1
Amounts: no units in this file; such an amount is in the reference unit of its flow, which a separate flow dataset defines
copyright: true
licenseType: Free of charge for some user types or use types
accessRestrictions: Free of charge for all final users implementing a regular Product Environmental Footprint (PEF) studies and Organisation Environmental Footprint (OEF) studies exclusively under the specified Product groups and sectors as defined in the Product Environmental Footprint Category Rules (PEFCR) and Organisation Environmental Footprint Sectorial Rules (OEFSR) listed in http://ec.europa.eu/environment/eussd/smgp/PEFCR_OEFSR.htm and in accordance with the terms and conditions of the EULA (available at https://ecoinvent.lca-data.com/) exclusively until 31st December 2024. Any use of this dataset or any derivative data not within the specific context of one of the PEF/OEF projects or after the end of 2024 is not permitted.

## General comment
Notice: this data set supersedes the EF3.0-compliant version (see link under "preceding data set version" below calculated with the EF3.0). The life cycle inventory is not changed from the original EF3.0 data set. The LCIA results are calculated based on the EF3.1 methods which provide updated characterisation factors in the following impact categories: Climate Change, Ecotoxicity freshwater, Photochemical Ozone Formation, Acidification, Human Toxicity non-cancer, and Human Toxicity cancer. The review report and the data quality ratings refer to the original results. The data set has been updated by the European Commission on the basis of the original EF3.0 data set delivered by the data provider.This sub-process has limited documentation only. For all detailed documentation of the full model to which this data set belongs (such as DQRs, review reports and other technical documentation), please see this process: bamboo fibre - GLO []

## Technology and included processes
This process takes into account the cultivation and the processing of bamboo using Alkali extraction process based on a viscose fibre processing proxy. This model is for bamboo produced and processed globally (India, Brazil and China with respective percentages of 59, 18 and 23%)

## Reference product
- bamboo fibre // bamboo fibre // glo, elementary: 1

## Inputs
- river water, Renewable material resources from water [AL]: 4.5955e-5
- river water, Renewable material resources from water [AT]: 0.000592101
- river water, Renewable material resources from water [BA]: 5.72894e-5
- river water, Renewable material resources from water [BE]: 0.000712685
- river water, Renewable material resources from water [BG]: 0.000182496
- river water, Renewable material resources from water [BY]: 0.000236968
- river water, Renewable material resources from water [CH]: 0.000706179
- river water, Renewable material resources from water [CZ]: 0.000491495
- river water, Renewable material resources from water [DE]: 0.00534904
- river water, Renewable material resources from water [DK]: 0.000387866
- river water, Renewable material resources from water [EE]: 5.29637e-5
- river water, Renewable material resources from water [ES]: 0.00229542
- river water, Renewable material resources from water [FI]: 0.000330842
- river water, Renewable material resources from water [FR]: 0.0037732
- river water, Renewable material resources from water [GB]: 0.00374965
- river water, Renewable material resources from water: 0.000749118
- river water, Renewable material resources from water [GR]: 0.000426546
- river water, Renewable material resources from water [HR]: 0.000137149
- river water, Renewable material resources from water [HU]: 0.000359535
- river water, Renewable material resources from water [IE]: 0.00038729
- river water, Renewable material resources from water [IS]: 2.20999e-5
- river water, Renewable material resources from water [IT]: 0.00322828
- river water, Renewable material resources from water [LT]: 0.000113087
- river water, Renewable material resources from water [LU]: 7.8505e-5
- river water, Renewable material resources from water [LV]: 6.6683e-5
- river water, Renewable material resources from water [MD]: 3.52832e-5
- river water, Renewable material resources from water [ME]: 1.42141e-5
- river water, Renewable material resources from water [MK]: 3.92576e-5
- river water, Renewable material resources from water [MT]: 2.17168e-5
- river water, Renewable material resources from water [NL]: 0.00119667
- river water, Renewable material resources from water [NO]: 0.000452977
- river water, Renewable material resources from water [PL]: 0.00137724
- river water, Renewable material resources from water [PT]: 0.000434568
- river water, Renewable material resources from water [RO]: 0.00060332
- river water, Renewable material resources from water [RS]: 0.000149716
- river water, Renewable material resources from water [SE]: 0.000653641
- river water, Renewable material resources from water [SI]: 9.2565e-5
- river water, Renewable material resources from water [SK]: 0.000217264
- river water, Renewable material resources from water [SM]: 2.70406e-6
- river water, Renewable material resources from water [UA]: 0.000637019
- river water, Renewable material resources from water [AR]: 0.00121621
- river water, Renewable material resources from water [AU]: 0.0015018
- river water, Renewable material resources from water [BR]: 0.00424215
- river water, Renewable material resources from water [CA]: 0.00222944
- river water, Renewable material resources from water [CI]: 0.0001155
- river water, Renewable material resources from water [CL]: 0.000545667
- river water, Renewable material resources from water [CN]: 0.023353
- river water, Renewable material resources from water [CO]: 0.00085377
- river water, Renewable material resources from water [ID]: 0.00358812
- river water, Renewable material resources from water [IN]: 0.0095776
- river water, Renewable material resources from water [JP]: 0.0069305
- river water, Renewable material resources from water [KR]: 0.00258107
- river water, Renewable material resources from water [KZ]: 0.00055865
- river water, Renewable material resources from water [MX]: 0.00302205
- river water, Renewable material resources from water [MY]: 0.00100928
- river water, Renewable material resources from water [NG]: 0.00127027
- river water, Renewable material resources from water [NZ]: 0.000235515
- river water, Renewable material resources from water [PH]: 0.000977534
- river water, Renewable material resources from water [RU]: 0.00499502
- river water, Renewable material resources from water [SG]: 0.000648906
- river water, Renewable material resources from water [TH]: 0.00149053
- river water, Renewable material resources from water [TR]: 0.0025242
- river water, Renewable material resources from water [US]: 0.0245895
- river water, Renewable material resources from water [VE]: 0.000713253
- river water, Renewable material resources from water [VN]: 0.000738744
- river water, Renewable material resources from water [ZA]: 0.000950955
- river water, Renewable material resources from water [AE]: 0.000877277
- river water, Renewable material resources from water [AF]: 9.00889e-5
- river water, Renewable material resources from water [AG]: 2.63083e-6
- river water, Renewable material resources from water [AM]: 4.06232e-5
- river water, Renewable material resources from water [AO]: 0.000272891
- river water, Renewable material resources from water [AW]: 5.28281e-6
- river water, Renewable material resources from water [AZ]: 0.000205685
- river water, Renewable material resources from water [BB]: 6.39905e-6
- river water, Renewable material resources from water [BD]: 0.000726083
- river water, Renewable material resources from water [BF]: 4.335e-5
- river water, Renewable material resources from water [BH]: 9.23033e-5
- river water, Renewable material resources from water [BI]: 1.03154e-5
- river water, Renewable material resources from water [BJ]: 3.99394e-5
- river water, Renewable material resources from water [BN]: 4.25783e-5
- river water, Renewable material resources from water [BO]: 0.00010248
- river water, Renewable material resources from water [BS]: 1.74892e-5
- river water, Renewable material resources from water [BT]: 8.95774e-6
- river water, Renewable material resources from water [BW]: 4.56826e-5
- river water, Renewable material resources from water [BZ]: 3.63888e-6
- river water, Renewable material resources from water [CD]: 8.70469e-5
- river water, Renewable material resources from water [CF]: 5.71486e-6
- river water, Renewable material resources from water [CG]: 3.37249e-5
- river water, Renewable material resources from water [CM]: 0.000100109
- river water, Renewable material resources from water [CR]: 0.000106633
- river water, Renewable material resources from water [CV]: 4.46014e-6
- river water, Renewable material resources from water [CY]: 4.09993e-5
- river water, Renewable material resources from water [DJ]: 5.7371e-6
- river water, Renewable material resources from water [DM]: 1.08767e-6
- river water, Renewable material resources from water [DO]: 0.000199021
- river water, Renewable material resources from water [DZ]: 0.000691971
- river water, Renewable material resources from water [EC]: 0.000241893
- river water, Renewable material resources from water [EG]: 0.00137009
- river water, Renewable material resources from water [ER]: 7.27684e-6
- river water, Renewable material resources from water [ET]: 0.000209112
- river water, Renewable material resources from water [FJ]: 1.31579e-5
- river water, Renewable material resources from water [GA]: 3.93764e-5
- river water, Renewable material resources from water [GD]: 2.04055e-6
- river water, Renewable material resources from water [GE]: 5.75633e-5
- river water, Renewable material resources from water [GH]: 0.000170945
- river water, Renewable material resources from water [GM]: 6.18288e-6
- river water, Renewable material resources from water [GN]: 3.0787e-5
- river water, Renewable material resources from water [GQ]: 4.5806e-5
- river water, Renewable material resources from water [GT]: 0.000165627
- river water, Renewable material resources from water [GW]: 3.72288e-6
- river water, Renewable material resources from water [GY]: 1.17382e-5
- river water, Renewable material resources from water [HN]: 5.78182e-5
- river water, Renewable material resources from water [HT]: 4.287e-5
- river water, Renewable material resources from water [IL]: 0.000397234
- river water, Renewable material resources from water [IQ]: 0.000598036
- river water, Renewable material resources from water [IR]: 0.00169049
- river water, Renewable material resources from water [JM]: 3.54807e-5
- river water, Renewable material resources from water [JO]: 0.000116985
- river water, Renewable material resources from water [KE]: 0.000204392
- river water, Renewable material resources from water [KG]: 3.39459e-5
- river water, Renewable material resources from water [KH]: 6.90663e-5
- river water, Renewable material resources from water [KM]: 2.8488e-6
- river water, Renewable material resources from water [KN]: 1.69764e-6
- river water, Renewable material resources from water [KW]: 0.000325238
- river water, Renewable material resources from water [LA]: 5.28206e-5
- river water, Renewable material resources from water [LB]: 0.000128826
- river water, Renewable material resources from water [LC]: 3.46289e-6
- river water, Renewable material resources from water [LK]: 0.000317346
- river water, Renewable material resources from water [LR]: 7.87662e-6
- river water, Renewable material resources from water [LS]: 7.64876e-6
- river water, Renewable material resources from water [LY]: 0.000162623
- river water, Renewable material resources from water [MA]: 0.000337138
- river water, Renewable material resources from water [MG]: 5.21043e-5
- river water, Renewable material resources from water [ML]: 4.73055e-5
- river water, Renewable material resources from water [MM]: 0.000300929
- river water, Renewable material resources from water [MN]: 4.20881e-5
- river water, Renewable material resources from water [MR]: 2.48155e-5
- river water, Renewable material resources from water [MU]: 3.31335e-5
- river water, Renewable material resources from water [MW]: 2.39385e-5
- river water, Renewable material resources from water [MZ]: 4.27975e-5
- river water, Renewable material resources from water [NA]: 3.0951e-5
- river water, Renewable material resources from water [NE]: 3.06e-5
- river water, Renewable material resources from water [NI]: 4.27551e-5
- river water, Renewable material resources from water [NP]: 9.49576e-5
- river water, Renewable material resources from water [OM]: 0.000201804
- river water, Renewable material resources from water [PA]: 0.000125392
- river water, Renewable material resources from water [PE]: 0.000482211
- river water, Renewable material resources from water [PG]: 4.06144e-5
- river water, Renewable material resources from water [PK]: 0.0011723
- river water, Renewable material resources from water [PR]: 0.000165909
- river water, Renewable material resources from water [PS]: 3.13987e-5
- river water, Renewable material resources from water [PY]: 0.000104422
- river water, Renewable material resources from water [QA]: 0.000377848
- river water, Renewable material resources from water [RW]: 2.634e-5
- river water, Renewable material resources from water [SA]: 0.00222782
- river water, Renewable material resources from water [SB]: 2.01805e-6
- river water, Renewable material resources from water [SD]: 0.000233741
- river water, Renewable material resources from water [SL]: 1.48769e-5
- river water, Renewable material resources from water [SN]: 5.82466e-5
- river water, Renewable material resources from water [SR]: 1.2131e-5
- river water, Renewable material resources from water [ST]: 9.59413e-7
- river water, Renewable material resources from water [SV]: 6.47016e-5
- river water, Renewable material resources from water [SZ]: 1.30572e-5
- river water, Renewable material resources from water [TC]: 1.1666e-6
- river water, Renewable material resources from water [TD]: 3.24145e-5
- river water, Renewable material resources from water [TG]: 1.34277e-5
- river water, Renewable material resources from water [TJ]: 3.36418e-5
- river water, Renewable material resources from water [TL]: 4.31448e-6
- river water, Renewable material resources from water [TM]: 9.75735e-5
- river water, Renewable material resources from water [TN]: 0.000162155
- river water, Renewable material resources from water [TO]: 8.08896e-7
- river water, Renewable material resources from water [TT]: 5.55959e-5
- river water, Renewable material resources from water [TZ]: 0.000157457
- river water, Renewable material resources from water [UG]: 0.000109088
- river water, Renewable material resources from water [UY]: 9.30543e-5
- river water, Renewable material resources from water [UZ]: 0.000260006
- river water, Renewable material resources from water [VC]: 1.74915e-6
- river water, Renewable material resources from water [VU]: 1.11111e-6
- river water, Renewable material resources from water [WS]: 1.58059e-6
- river water, Renewable material resources from water [YE]: 0.000130075
- river water, Renewable material resources from water [ZM]: 7.37654e-5
- river water, Renewable material resources from water [ZW]: 4.79147e-5

## Outputs
- Water, Emissions to air, unspecified: 0.0305856
- Water, Emissions to water, unspecified [AL]: 3.65342e-5
- Water, Emissions to water, unspecified [AT]: 0.00047072
- Water, Emissions to water, unspecified [BA]: 4.55451e-5
- Water, Emissions to water, unspecified [BE]: 0.000566585
- Water, Emissions to water, unspecified [BG]: 0.000145084
- Water, Emissions to water, unspecified [BY]: 0.00018839
- Water, Emissions to water, unspecified [CH]: 0.000561412
- Water, Emissions to water, unspecified [CZ]: 0.000390739
- Water, Emissions to water, unspecified [DE]: 0.00425249
- Water, Emissions to water, unspecified [DK]: 0.000308354
- Water, Emissions to water, unspecified [EE]: 4.21061e-5
- Water, Emissions to water, unspecified [ES]: 0.00182486
- Water, Emissions to water, unspecified [FI]: 0.000263019
- Water, Emissions to water, unspecified [FR]: 0.0029997
- Water, Emissions to water, unspecified [GB]: 0.00298097
- Water, Emissions to water, unspecified: 0.000595549
- Water, Emissions to water, unspecified [GR]: 0.000339104
- Water, Emissions to water, unspecified [HR]: 0.000109033
- Water, Emissions to water, unspecified [HU]: 0.000285831
- Water, Emissions to water, unspecified [IE]: 0.000307895
- Water, Emissions to water, unspecified [IS]: 1.75694e-5
- Water, Emissions to water, unspecified [IT]: 0.00256648
- Water, Emissions to water, unspecified [LT]: 8.99038e-5
- Water, Emissions to water, unspecified [LU]: 6.24115e-5
- Water, Emissions to water, unspecified [LV]: 5.3013e-5
- Water, Emissions to water, unspecified [MD]: 2.80502e-5
- Water, Emissions to water, unspecified [ME]: 1.13002e-5
- Water, Emissions to water, unspecified [MK]: 3.12098e-5
- Water, Emissions to water, unspecified [MT]: 1.72648e-5
- Water, Emissions to water, unspecified [NL]: 0.000951357
- Water, Emissions to water, unspecified [NO]: 0.000360117
- Water, Emissions to water, unspecified [PL]: 0.0010949
- Water, Emissions to water, unspecified [PT]: 0.000345482
- Water, Emissions to water, unspecified [RO]: 0.000479639
- Water, Emissions to water, unspecified [RS]: 0.000119024
- Water, Emissions to water, unspecified [SE]: 0.000519644
- Water, Emissions to water, unspecified [SI]: 7.35891e-5
- Water, Emissions to water, unspecified [SK]: 0.000172725
- Water, Emissions to water, unspecified [SM]: 2.14973e-6
- Water, Emissions to water, unspecified [UA]: 0.00050643
- Water, Emissions to water, unspecified [AE]: 0.000697436
- Water, Emissions to water, unspecified [AF]: 7.16207e-5
- Water, Emissions to water, unspecified [AG]: 2.09151e-6
- Water, Emissions to water, unspecified [AM]: 3.22955e-5
- Water, Emissions to water, unspecified [AO]: 0.000216948
- Water, Emissions to water, unspecified [AR]: 0.000966888
- Water, Emissions to water, unspecified [AU]: 0.00119393
- Water, Emissions to water, unspecified [AW]: 4.19983e-6
- Water, Emissions to water, unspecified [AZ]: 0.000163519
- Water, Emissions to water, unspecified [BB]: 5.08725e-6
- Water, Emissions to water, unspecified [BD]: 0.000577236
- Water, Emissions to water, unspecified [BF]: 3.44632e-5
- Water, Emissions to water, unspecified [BH]: 7.33812e-5
- Water, Emissions to water, unspecified [BI]: 8.20076e-6
- Water, Emissions to water, unspecified [BJ]: 3.17518e-5
- Water, Emissions to water, unspecified [BN]: 3.38498e-5
- Water, Emissions to water, unspecified [BO]: 8.14718e-5
- Water, Emissions to water, unspecified [BR]: 0.00337251
- Water, Emissions to water, unspecified [BS]: 1.39039e-5
- Water, Emissions to water, unspecified [BT]: 7.1214e-6
- Water, Emissions to water, unspecified [BW]: 3.63176e-5
- Water, Emissions to water, unspecified [BZ]: 2.89291e-6
- Water, Emissions to water, unspecified [CA]: 0.00177241
- Water, Emissions to water, unspecified [CD]: 6.92023e-5
- Water, Emissions to water, unspecified [CF]: 4.54331e-6
- Water, Emissions to water, unspecified [CG]: 2.68113e-5
- Water, Emissions to water, unspecified [CI]: 9.18224e-5
- Water, Emissions to water, unspecified [CL]: 0.000433805
- Water, Emissions to water, unspecified [CM]: 7.95865e-5
- Water, Emissions to water, unspecified [CN]: 0.0185657
- Water, Emissions to water, unspecified [CO]: 0.000678747
- Water, Emissions to water, unspecified [CR]: 8.47731e-5
- Water, Emissions to water, unspecified [CV]: 3.54581e-6
- Water, Emissions to water, unspecified [CY]: 3.25944e-5
- Water, Emissions to water, unspecified [DJ]: 4.561e-6
- Water, Emissions to water, unspecified [DM]: 8.64699e-7
- Water, Emissions to water, unspecified [DO]: 0.000158222
- Water, Emissions to water, unspecified [DZ]: 0.000550117
- Water, Emissions to water, unspecified [EC]: 0.000192305
- Water, Emissions to water, unspecified [EG]: 0.00108922
- Water, Emissions to water, unspecified [ER]: 5.78509e-6
- Water, Emissions to water, unspecified [ET]: 0.000166244
- Water, Emissions to water, unspecified [FJ]: 1.04605e-5
- Water, Emissions to water, unspecified [GA]: 3.13042e-5
- Water, Emissions to water, unspecified [GD]: 1.62224e-6
- Water, Emissions to water, unspecified [GE]: 4.57629e-5
- Water, Emissions to water, unspecified [GH]: 0.000135901
- Water, Emissions to water, unspecified [GM]: 4.91539e-6
- Water, Emissions to water, unspecified [GN]: 2.44757e-5
- Water, Emissions to water, unspecified [GQ]: 3.64157e-5
- Water, Emissions to water, unspecified [GT]: 0.000131673
- Water, Emissions to water, unspecified [GW]: 2.95969e-6
- Water, Emissions to water, unspecified [GY]: 9.33186e-6
- Water, Emissions to water, unspecified [HN]: 4.59654e-5
- Water, Emissions to water, unspecified [HT]: 3.40816e-5
- Water, Emissions to water, unspecified [ID]: 0.00285255
- Water, Emissions to water, unspecified [IL]: 0.000315801
- Water, Emissions to water, unspecified [IN]: 0.00761419
- Water, Emissions to water, unspecified [IQ]: 0.000475438
- Water, Emissions to water, unspecified [IR]: 0.00134394
- Water, Emissions to water, unspecified [JM]: 2.82071e-5
- Water, Emissions to water, unspecified [JO]: 9.30028e-5
- Water, Emissions to water, unspecified [JP]: 0.00550975
- Water, Emissions to water, unspecified [KE]: 0.000162492
- Water, Emissions to water, unspecified [KG]: 2.6987e-5
- Water, Emissions to water, unspecified [KH]: 5.49077e-5
- Water, Emissions to water, unspecified [KM]: 2.26479e-6
- Water, Emissions to water, unspecified [KN]: 1.34963e-6
- Water, Emissions to water, unspecified [KR]: 0.00205195
- Water, Emissions to water, unspecified [KW]: 0.000258564
- Water, Emissions to water, unspecified [KZ]: 0.000444127
- Water, Emissions to water, unspecified [LA]: 4.19924e-5
- Water, Emissions to water, unspecified [LB]: 0.000102417
- Water, Emissions to water, unspecified [LC]: 2.753e-6
- Water, Emissions to water, unspecified [LK]: 0.00025229
- Water, Emissions to water, unspecified [LR]: 6.26192e-6
- Water, Emissions to water, unspecified [LS]: 6.08077e-6
- Water, Emissions to water, unspecified [LY]: 0.000129285
- Water, Emissions to water, unspecified [MA]: 0.000268025
- Water, Emissions to water, unspecified [MG]: 4.14229e-5
- Water, Emissions to water, unspecified [ML]: 3.76079e-5
- Water, Emissions to water, unspecified [MM]: 0.000239239
- Water, Emissions to water, unspecified [MN]: 3.34601e-5
- Water, Emissions to water, unspecified [MR]: 1.97283e-5
- Water, Emissions to water, unspecified [MU]: 2.63411e-5
- Water, Emissions to water, unspecified [MW]: 1.90311e-5
- Water, Emissions to water, unspecified [MX]: 0.00240253
- Water, Emissions to water, unspecified [MY]: 0.000802381
- Water, Emissions to water, unspecified [MZ]: 3.4024e-5
- Water, Emissions to water, unspecified [NA]: 2.4606e-5
- Water, Emissions to water, unspecified [NE]: 2.4327e-5
- Water, Emissions to water, unspecified [NG]: 0.00100987
- Water, Emissions to water, unspecified [NI]: 3.39903e-5
- Water, Emissions to water, unspecified [NP]: 7.54913e-5
- Water, Emissions to water, unspecified [NZ]: 0.000187234
- Water, Emissions to water, unspecified [OM]: 0.000160434
- Water, Emissions to water, unspecified [PA]: 9.96863e-5
- Water, Emissions to water, unspecified [PE]: 0.000383357
- Water, Emissions to water, unspecified [PG]: 3.22884e-5
- Water, Emissions to water, unspecified [PH]: 0.000777139
- Water, Emissions to water, unspecified [PK]: 0.000931977
- Water, Emissions to water, unspecified [PR]: 0.000131898
- Water, Emissions to water, unspecified [PS]: 2.4962e-5
- Water, Emissions to water, unspecified [PY]: 8.30153e-5
- Water, Emissions to water, unspecified [QA]: 0.000300389
- Water, Emissions to water, unspecified [RW]: 2.09403e-5
- Water, Emissions to water, unspecified [SA]: 0.00177112
- Water, Emissions to water, unspecified [SB]: 1.60435e-6
- Water, Emissions to water, unspecified [SD]: 0.000185824
- Water, Emissions to water, unspecified [SG]: 0.00051588
- Water, Emissions to water, unspecified [SL]: 1.18271e-5
- Water, Emissions to water, unspecified [SN]: 4.6306e-5
- Water, Emissions to water, unspecified [SR]: 9.64417e-6
- Water, Emissions to water, unspecified [ST]: 7.62734e-7
- Water, Emissions to water, unspecified [SV]: 5.14378e-5
- Water, Emissions to water, unspecified [SZ]: 1.03805e-5
- Water, Emissions to water, unspecified [TC]: 9.27448e-7
- Water, Emissions to water, unspecified [TD]: 2.57695e-5
- Water, Emissions to water, unspecified [TG]: 1.0675e-5
- Water, Emissions to water, unspecified [TH]: 0.00118497
- Water, Emissions to water, unspecified [TJ]: 2.67452e-5
- Water, Emissions to water, unspecified [TL]: 3.43001e-6
- Water, Emissions to water, unspecified [TM]: 7.75709e-5
- Water, Emissions to water, unspecified [TN]: 0.000128913
- Water, Emissions to water, unspecified [TO]: 6.43072e-7
- Water, Emissions to water, unspecified [TR]: 0.00200674
- Water, Emissions to water, unspecified [TT]: 4.41987e-5
- Water, Emissions to water, unspecified [TZ]: 0.000125178
- Water, Emissions to water, unspecified [UG]: 8.67253e-5
- Water, Emissions to water, unspecified [US]: 0.0195486
- Water, Emissions to water, unspecified [UY]: 7.39781e-5
- Water, Emissions to water, unspecified [UZ]: 0.000206705
- Water, Emissions to water, unspecified [VC]: 1.39057e-6
- Water, Emissions to water, unspecified [VE]: 0.000567036
- Water, Emissions to water, unspecified [VN]: 0.000587302
- Water, Emissions to water, unspecified [VU]: 8.83332e-7
- Water, Emissions to water, unspecified [WS]: 1.25657e-6
- Water, Emissions to water, unspecified [YE]: 0.00010341
- Water, Emissions to water, unspecified [ZA]: 0.00075601
- Water, Emissions to water, unspecified [ZM]: 5.86435e-5
- Water, Emissions to water, unspecified [ZW]: 3.80922e-5
- Water, Emissions to water, unspecified [RU]: 0.00397104

## Impact indicators
- Water use: 0.844869
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
## Deviations from the LCI method principle
The background data uses: the Recycled content cut-off approach to allocate end-of-life by-products and secondary materials. This allocation is explained in the description of the recycled content system model (http://www.ecoinvent.org/database/system-models-in-ecoinvent-3/cut-off-system-model/allocation-cut-off-by-classification.html) or EF compliant data

## Deviations from the LCI method approaches
Background data:
- the Recycled content cut-off approach to allocate end-of-life by-products and secondary materials. This allocation is explained in the description of the recycled content system model (http://www.ecoinvent.org/database/system-models-in-ecoinvent-3/cut-off-system-model/allocation-cut-off-by-classification.html). The ecoinvent database mostly relies on “Allocation – market values” apart for few exceptions particularly in the energy sector. ecoinvent energy data is replaced with EF3.0 core data as per the EF guidelines version 2.0.
OR
- EF compliant data

## Modelling constants
All modelling constants follow the requirements listed in the Tender Specifications 070201/2020/SER/ENV.B1. Completeness: There are no intentional cut-offs in the inventory no matter how small their contribution to all the EF impact categories is. Eventual cut-offs are in compliance with the Guide for EF compliant data sets (JRC 2020), i.e. only if below the 3% cut-off rule. Water use: water use is modelled at country level using separate flows for water withdrawal, water release and water evaporation. Handling multi-functional processes: the following PEF multi- functionality decision hierarchy is applied for resolving all multi- functionality problems: (1) subdivision or system expansion; (2) allocation based on a relevant underlying physical relationship (substitution may apply here); (3) allocation based on some other relationship. Direct land use change: GHG emissions from direct LUC allocated to good/service for 20 years after the LUC occurs, with IPCC default values. Carbon storage and delayed emissions: credits associated with temporary (carbon) storage or delayed emissions up to 300 years are not be considered. Emissions off-setting: are not included. Capital goods (including infrastructures) and their End of life: they are included. System boundaries: system boundaries include all processes linked to the product supply chain (e.g. maintenance). Time period: emissions and removals are modelled as if released or removed at the beginning of the assessment method. Fossil and biogenic carbon emissions and removals: removals and emissions are modelled as follows: All GHG emissions from fossil fuels (including peat and limestone) are modelled consistently with the most updated ILCD list of elementary flows. The non-fossil (biogenic) carbon flows are modelled consistently with the most updated ILCD list of elementary flows.

## Cut-off and completeness
There are no intentional cut-offs in the inventory no matter how small their contribution to all the EF impact categories is. Eventual cut-offs are in compliance with the Guide for EF compliant data sets (JRC 2020), i.e. only if below the 3% cut-off rule. The dataset dry mass and water balance has been checked to ensure the inventory is complete. Capital goods (e.g. infrastructure) and their end-of-life are included.

## Data selection and combination
These datasets include, in both their foreground and background data, links to EF3.0 compliant data.
The relevant background data on energy, transport, and End of Life are from the LCDN data node (http://lcdn.thinkstep.com/Node/).
All other background data in the supply of this product for which no EF3.0 process was available are from ecoinvent v3.7 database (www.ecoinvent.org) or other data sources.

## Data treatment and extrapolations
Several data sources have been used to model the inventory.

## Use advice
This data set is a supporting sub-data set and must be used exclusively as sub-data set of its corresponding level-1 partly disaggregated data set (see “General comment” field for exact name and UUID).

## Data sources
- Background Data for Representative products and organisations. EF 3.0 compliant (data stock)
- JaingHua X., XiaoSheng Y., (2001). Medium and large scale Bamboo. International network for bamboo and rattan.China
- Marinussen M., Kernebeek H ., van Broekema R., Groen E., Kool A., van Zeist WJ., Dolman M., Blonk, H., (2012). LCI data for the calculation tool Feedprint for greenhouse gas emissions of feed production and utilization: Cultivation oil seeds and oil fruits. Blonk Consultants and WUR Livestock Research.
- Mekonnen M., Hoekstra A. (2010). The green, blue and grey water footprint of crops and derived crop products - Volume 1: Main Report volume 1.(41)
- Blonk Consultants., (2019). Agrifootprint database v5.0
- Blonk Consultants. (2018). The Direct Land Use Change Assessment Tool v.2018
- IPCC., (2006). IPCC Guidelines for National Greenhouse Gas Inventories. http://www.ipcc-nggip.iges.or.jp/public/2006gl/index.html
- European Environment Agency., (2013). EMEP/EEA Air Pollutant Emission Inventory Guidebook 2013. 12. http://www.eea.europa.eu/publications/emep-eea-guidebook-2013
- PRé consultants., Radboud University Nijmegen., Leiden University ., RIVM., (2013). ReCiPe 1.08: Characterisation factors spreadsheet.
- Nemecek T., Schnetzer J., (2012). Methods of assessment of direct field emissions for LCIs of agricultural production systems.
- Banik RL., (2016). Introduction to South Asian Bamboos (pp. 3–14). https://doi.org/10.1007/978-981-10-0569-5_1
- Bonilla SH., Guarnetti RL., Almeida CM., Giannetti, BF., (2010). Sustainability assessment of a giant bamboo plantation in Brazil: exploring the influence of labour, time and space. Journal of Cleaner Production, 18(1), 83–91. https://doi.org/10.1016/j.jclepro.2009.07.012
- FEA., (2004) Fibre production. Lenzing AG, Austria.

## Intended applications
Implementation of regular Product Environmental Footprint (PEF) studies and Organisation Environmental Footprint (OEF) studies exclusively under the specified Product groups and sectors as defined in the Product Environmental Footprint Category Rules (PEFCR) and Organisation Environmental Footprint Sectorial Rules (OEFSR) listed in http://ec.europa.eu/environment/eussd/smgp/PEFCR_OEFSR.htm
