# washing; technology mix; production mix, at plant; service

Dataset: ILCD process, Partly terminated system
Geography: GLO
Reference year: 2019
Valid until: 2024
Classification: Systems / Textiles, furnitures and other interiors
LCI method principle: Attributional
LCI method approaches: Allocation - market value
Completeness: All relevant flows quantified
Project: Provision of process-based 3.0 Environmental Footprint-compliant life cycle inventory datasets - Apparel 1 - contract number 070201/2020/840291/SER/ENV.B.1
Generated by: Life Cycle Indonesia
Owner: PRé Sustainability B.V.
Compliance: ILCD Data Network - Entry-level; Suggestions for updating the PEF method 2019; ISO 14040 Environmental Management – Life Cycle Assessment – Principles and Framework, 2006; ISO 14044:2006. Environmental Management – Life Cycle Assessment – Requirements and guidelines.; Environmental Footprint 3.1
Review: Dependent internal review by Avraam Symeonidis, Emilia Moreno Ruiz; Independent review panel by Fábio Valebona
Data quality: Overall quality: Good; Time representativeness: Very good; Geographical representativeness: Fair; Technological representativeness: Very good; Precision: Good; Methodological appropriateness and consistency: Not applicable
Amounts: no units in this file; such an amount is in the reference unit of its flow, which a separate flow dataset defines
copyright: true
licenseType: Free of charge for some user types or use types
accessRestrictions: Free of charge for all final users implementing a regular Product Environmental Footprint (PEF) studies and Organisation Environmental Footprint (OEF) studies exclusively under the specified Product groups and sectors as defined in the Product Environmental Footprint Category Rules (PEFCR) and Organisation Environmental Footprint Sectorial Rules (OEFSR) listed in http://ec.europa.eu/environment/eussd/smgp/PEFCR_OEFSR.htm and in accordance with the terms and conditions of the EULA (available at https://ecoinvent.lca-data.com/) exclusively until 31st December 2024. Any use of this dataset or any derivative data not within the specific context of one of the PEF/OEF projects or after the end of 2024 is not permitted.

## General comment
Notice: this data set supersedes the EF3.0-compliant version (see link under "preceding data set version" below calculated with the EF3.0). The life cycle inventory is not changed from the original EF3.0 data set. The LCIA results are calculated based on the EF3.1 methods which provide updated characterisation factors in the following impact categories: Climate Change, Ecotoxicity freshwater, Photochemical Ozone Formation, Acidification, Human Toxicity non-cancer, and Human Toxicity cancer. The review report and the data quality ratings refer to the original results. The data set has been updated by the European Commission on the basis of the original EF3.0 data set delivered by the data provider.Industrial garment wash processes main focus is to remove starch, dust and dirt from the garments. There are several type of washing methods in order to meet the requirements. Each washing techniques have its own advantes and limitations. Washing can be classified to mechanical and chemical washing. In mechanical washing. the fabric (usually denim) is rubber or worn with stones and othe abbrasive materials while in chemical washing, the fabric is treated with bleach and other kinds of colour altering subtances. Mechanical washing includes rinse washing, water jet fading, stone washing, and many more. Chemical washing includes acid/ice/snow washing, hydroge peroxide washing enzyme washing/fading, and many more. Aside from cleaning purpose as mentioned before, after washing, any dyes or pigment present in fabric are washed out locally or partially, resuliting in a fading or worn-out effects in the garments (Choudhury, 2017).

Choudhury, Asim Kumar Roy. 2017. Principle of textile finishing. United Kingdom: Elsevier. pp 390 - 391

## Technology and included processes
This data set is modelled as a mix of acid washing, enzyme washing, stone washing, and water-only washing.
All the material, energy and infrastructure flow are proportioned equally. Desizing process is not accounted in the model while steam and heat input for stone washing process is proxy to water-only washing. After the fabric washed and/or softened (for enzyme washing) and/or neutralized (for acid washing), it is dried in hydroextractor and drying machine. The cycle time used to calculate the infrastructure of other machine is based on approximation to industrial data and other process. The chemical used in this process is assumed to be generated as waste water. The hazardous waste comes from waste lube oil. The disintegrated stone in stone washing is considered as non hazardous waste and transported to landfill, while disintegrated stone from acid washing is considered hazardous waste since it soaked in bleach and acid. The consumption of lubricating oil using a thermobonding oven as a proxy.

## Parameters
- kg_0: 0.000625
  Mass in kg, for cement, Portland; Freight train, diesel traction; EU+EFTA+UK
- km_0: 17.425
  Distance in km, for cement, Portland; Freight train, diesel traction; EU+EFTA+UK
- kg_km_0: 0.0108906; = kg_0*km_0
  Transport amount in km*km, for cement, Portland; Freight train, diesel traction; EU+EFTA+UK
- kg_1: 0.000625
  Mass in kg, for cement, Portland; Freight train, electricity traction; EU+EFTA+UK
- km_1: 7.175
  Distance in km, for cement, Portland; Freight train, electricity traction; EU+EFTA+UK
- kg_km_1: 0.00448438; = kg_1*km_1
  Transport amount in km*km, for cement, Portland; Freight train, electricity traction; EU+EFTA+UK
- kg_2: 0.000625
  Mass in kg, for cement, Portland; Freight train, average; EU+EFTA+UK
- km_2: 0.4
  Distance in km, for cement, Portland; Freight train, average; EU+EFTA+UK
- kg_km_2: 0.00025; = kg_2*km_2
  Transport amount in km*km, for cement, Portland; Freight train, average; EU+EFTA+UK
- kg_3: 0.000625
  Mass in kg, for cement, Portland; Articulated lorry transport, Total weight <7.5 t, mix Euro 0-5; EU+EFTA+UK
- km_3: 0.135413
  Distance in km, for cement, Portland; Articulated lorry transport, Total weight <7.5 t, mix Euro 0-5; EU+EFTA+UK
- kg_km_3: 8.46328e-5; = kg_3*km_3
  Transport amount in km*km, for cement, Portland; Articulated lorry transport, Total weight <7.5 t, mix Euro 0-5; EU+EFTA+UK
- kg_4: 0.000625
  Mass in kg, for cement, Portland; Articulated lorry transport, Total weight >32 t, mix Euro 0-5; ROW w/o EU+EFTA
- km_4: 106.9
  Distance in km, for cement, Portland; Articulated lorry transport, Total weight >32 t, mix Euro 0-5; ROW w/o EU+EFTA
- kg_km_4: 0.0668125; = kg_4*km_4
  Transport amount in km*km, for cement, Portland; Articulated lorry transport, Total weight >32 t, mix Euro 0-5; ROW w/o EU+EFTA
- kg_5: 3.78216e-5
  Mass in kg, for perlite; Transoceanic ship, bulk; GLO
- km_5: 22308.7
  Distance in km, for perlite; Transoceanic ship, bulk; GLO
- kg_km_5: 0.84375; = kg_5*km_5
  Transport amount in km*km, for perlite; Transoceanic ship, bulk; GLO
- kg_6: 3.78216e-5
  Mass in kg, for perlite; Freight train, diesel traction; EU+EFTA+UK
- km_6: 6128.6
  Distance in km, for perlite; Freight train, diesel traction; EU+EFTA+UK
- kg_km_6: 0.231794; = kg_6*km_6
  Transport amount in km*km, for perlite; Freight train, diesel traction; EU+EFTA+UK
- kg_7: 3.78216e-5
  Mass in kg, for perlite; Freight train, electricity traction; EU+EFTA+UK
- km_7: 2084.7
  Distance in km, for perlite; Freight train, electricity traction; EU+EFTA+UK
- kg_km_7: 0.0788467; = kg_7*km_7
  Transport amount in km*km, for perlite; Freight train, electricity traction; EU+EFTA+UK
- kg_8: 3.78216e-5
  Mass in kg, for perlite; Freight train, average; EU+EFTA+UK
- km_8: 49.1686
  Distance in km, for perlite; Freight train, average; EU+EFTA+UK
- kg_km_8: 0.00185964; = kg_8*km_8
  Transport amount in km*km, for perlite; Freight train, average; EU+EFTA+UK
- kg_9: 3.78216e-5
  Mass in kg, for perlite; Articulated lorry transport, Euro 4, Total weight >32 t; EU+EFTA+UK
- km_9: 190.715
  Distance in km, for perlite; Articulated lorry transport, Euro 4, Total weight >32 t; EU+EFTA+UK
- kg_km_9: 0.00721314; = kg_9*km_9
  Transport amount in km*km, for perlite; Articulated lorry transport, Euro 4, Total weight >32 t; EU+EFTA+UK
- kg_10: 3.78216e-5
  Mass in kg, for perlite; Articulated lorry transport, Total weight >32 t, mix Euro 0-5; ROW w/o EU+EFTA
- km_10: 503.333
  Distance in km, for perlite; Articulated lorry transport, Total weight >32 t, mix Euro 0-5; ROW w/o EU+EFTA
- kg_km_10: 0.0190369; = kg_10*km_10
  Transport amount in km*km, for perlite; Articulated lorry transport, Total weight >32 t, mix Euro 0-5; ROW w/o EU+EFTA
- kg_11: 0.0110313
  Mass in kg, for pumice; Transoceanic ship, bulk; GLO
- km_11: 1201.36
  Distance in km, for pumice; Transoceanic ship, bulk; GLO
- kg_km_11: 13.2526; = kg_11*km_11
  Transport amount in km*km, for pumice; Transoceanic ship, bulk; GLO
- kg_12: 0.0110313
  Mass in kg, for pumice; Freight train, diesel traction; EU+EFTA+UK
- km_12: 148.312
  Distance in km, for pumice; Freight train, diesel traction; EU+EFTA+UK
- kg_km_12: 1.63608; = kg_12*km_12
  Transport amount in km*km, for pumice; Freight train, diesel traction; EU+EFTA+UK
- kg_13: 0.0110313
  Mass in kg, for pumice; Freight train, electricity traction; EU+EFTA+UK
- km_13: 50.4497
  Distance in km, for pumice; Freight train, electricity traction; EU+EFTA+UK
- kg_km_13: 0.556526; = kg_13*km_13
  Transport amount in km*km, for pumice; Freight train, electricity traction; EU+EFTA+UK
- kg_14: 0.0110313
  Mass in kg, for pumice; Freight train, average; EU+EFTA+UK
- km_14: 1.18988
  Distance in km, for pumice; Freight train, average; EU+EFTA+UK
- kg_km_14: 0.0131259; = kg_14*km_14
  Transport amount in km*km, for pumice; Freight train, average; EU+EFTA+UK
- kg_15: 0.0110313
  Mass in kg, for pumice; Barge; EU+EFTA+UK
- km_15: 11.4079
  Distance in km, for pumice; Barge; EU+EFTA+UK
- kg_km_15: 0.125844; = kg_15*km_15
  Transport amount in km*km, for pumice; Barge; EU+EFTA+UK
- kg_16: 0.0110313
  Mass in kg, for pumice; Barge; ROW w/o EU+EFTA
- km_16: 23.2944
  Distance in km, for pumice; Barge; ROW w/o EU+EFTA
- kg_km_16: 0.256968; = kg_16*km_16
  Transport amount in km*km, for pumice; Barge; ROW w/o EU+EFTA
- kg_17: 0.0110313
  Mass in kg, for pumice; Articulated lorry transport, Total weight <7.5 t, mix Euro 0-5; EU+EFTA+UK
- km_17: 15.7098
  Distance in km, for pumice; Articulated lorry transport, Total weight <7.5 t, mix Euro 0-5; EU+EFTA+UK
- kg_km_17: 0.1733; = kg_17*km_17
  Transport amount in km*km, for pumice; Articulated lorry transport, Total weight <7.5 t, mix Euro 0-5; EU+EFTA+UK
- kg_18: 0.0110313
  Mass in kg, for pumice; Articulated lorry transport, Euro 4, Total weight >32 t; EU+EFTA+UK
- km_18: 146.669
  Distance in km, for pumice; Articulated lorry transport, Euro 4, Total weight >32 t; EU+EFTA+UK
- kg_km_18: 1.61795; = kg_18*km_18
  Transport amount in km*km, for pumice; Articulated lorry transport, Euro 4, Total weight >32 t; EU+EFTA+UK
- kg_19: 0.0110313
  Mass in kg, for pumice; Articulated lorry transport, Total weight >32 t, mix Euro 0-5; ROW w/o EU+EFTA
- km_19: 387.087
  Distance in km, for pumice; Articulated lorry transport, Total weight >32 t, mix Euro 0-5; ROW w/o EU+EFTA
- kg_km_19: 4.27007; = kg_19*km_19
  Transport amount in km*km, for pumice; Articulated lorry transport, Total weight >32 t, mix Euro 0-5; ROW w/o EU+EFTA
- kg_20: 0.000206092
  Mass in kg, for synthetic rubber; Transoceanic ship, containers; GLO
- km_20: 1591.52
  Distance in km, for synthetic rubber; Transoceanic ship, containers; GLO
- kg_km_20: 0.328; = kg_20*km_20
  Transport amount in km*km, for synthetic rubber; Transoceanic ship, containers; GLO
- kg_21: 0.000206092
  Mass in kg, for synthetic rubber; Freight train, diesel traction; EU+EFTA+UK
- km_21: 649.406
  Distance in km, for synthetic rubber; Freight train, diesel traction; EU+EFTA+UK
- kg_km_21: 0.133838; = kg_21*km_21
  Transport amount in km*km, for synthetic rubber; Freight train, diesel traction; EU+EFTA+UK
- kg_22: 0.000206092
  Mass in kg, for synthetic rubber; Freight train, electricity traction; EU+EFTA+UK
- km_22: 220.901
  Distance in km, for synthetic rubber; Freight train, electricity traction; EU+EFTA+UK
- kg_km_22: 0.0455261; = kg_22*km_22
  Transport amount in km*km, for synthetic rubber; Freight train, electricity traction; EU+EFTA+UK
- kg_23: 0.000206092
  Mass in kg, for synthetic rubber; Freight train, average; EU+EFTA+UK
- km_23: 5.21006
  Distance in km, for synthetic rubber; Freight train, average; EU+EFTA+UK
- kg_km_23: 0.00107375; = kg_23*km_23
  Transport amount in km*km, for synthetic rubber; Freight train, average; EU+EFTA+UK
- kg_24: 0.000206092
  Mass in kg, for synthetic rubber; Articulated lorry transport, Euro 4, Total weight >32 t; EU+EFTA+UK
- km_24: 375.328
  Distance in km, for synthetic rubber; Articulated lorry transport, Euro 4, Total weight >32 t; EU+EFTA+UK
- kg_km_24: 0.0773523; = kg_24*km_24
  Transport amount in km*km, for synthetic rubber; Articulated lorry transport, Euro 4, Total weight >32 t; EU+EFTA+UK
- kg_25: 0.000206092
  Mass in kg, for synthetic rubber; Articulated lorry transport, Total weight >32 t, mix Euro 0-5; ROW w/o EU+EFTA
- km_25: 990.564
  Distance in km, for synthetic rubber; Articulated lorry transport, Total weight >32 t, mix Euro 0-5; ROW w/o EU+EFTA
- kg_km_25: 0.204148; = kg_25*km_25
  Transport amount in km*km, for synthetic rubber; Articulated lorry transport, Total weight >32 t, mix Euro 0-5; ROW w/o EU+EFTA
- kg_26: 0.00225
  Mass in kg, for acetic acid // acetic acid production, product in 98% solution state // glo; Articulated lorry transport, Euro 4, Total weight >32 t; EU+EFTA+UK
- km_26: 1000
  Distance in km, for acetic acid // acetic acid production, product in 98% solution state // glo; Articulated lorry transport, Euro 4, Total weight >32 t; EU+EFTA+UK
- kg_km_26: 2.25; = kg_26*km_26
  Transport amount in km*km, for acetic acid // acetic acid production, product in 98% solution state // glo; Articulated lorry transport, Euro 4, Total weight >32 t; EU+EFTA+UK
- kg_27: 0.00375
  Mass in kg, for enzymes // enzymes production // eu+efta+uk; Articulated lorry transport, Euro 4, Total weight >32 t; EU+EFTA+UK
- km_27: 1000
  Distance in km, for enzymes // enzymes production // eu+efta+uk; Articulated lorry transport, Euro 4, Total weight >32 t; EU+EFTA+UK
- kg_km_27: 3.75; = kg_27*km_27
  Transport amount in km*km, for enzymes // enzymes production // eu+efta+uk; Articulated lorry transport, Euro 4, Total weight >32 t; EU+EFTA+UK
- kg_28: 2.4997e-6
  Mass in kg, for lubricating oil // lubricants at refinery // cn; Articulated lorry transport, Euro 4, Total weight >32 t; EU+EFTA+UK
- km_28: 1000
  Distance in km, for lubricating oil // lubricants at refinery // cn; Articulated lorry transport, Euro 4, Total weight >32 t; EU+EFTA+UK
- kg_km_28: 0.0024997; = kg_28*km_28
  Transport amount in km*km, for lubricating oil // lubricants at refinery // cn; Articulated lorry transport, Euro 4, Total weight >32 t; EU+EFTA+UK
- kg_29: 8.01941e-6
  Mass in kg, for lubricating oil // lubricants at refinery // eu+efta+uk; Articulated lorry transport, Euro 4, Total weight >32 t; EU+EFTA+UK
- km_29: 1000
  Distance in km, for lubricating oil // lubricants at refinery // eu+efta+uk; Articulated lorry transport, Euro 4, Total weight >32 t; EU+EFTA+UK
- kg_km_29: 0.00801941; = kg_29*km_29
  Transport amount in km*km, for lubricating oil // lubricants at refinery // eu+efta+uk; Articulated lorry transport, Euro 4, Total weight >32 t; EU+EFTA+UK
- kg_30: 6.00785e-7
  Mass in kg, for lubricating oil // lubricants at refinery // raf; Articulated lorry transport, Euro 4, Total weight >32 t; EU+EFTA+UK
- km_30: 1000
  Distance in km, for lubricating oil // lubricants at refinery // raf; Articulated lorry transport, Euro 4, Total weight >32 t; EU+EFTA+UK
- kg_km_30: 0.000600785; = kg_30*km_30
  Transport amount in km*km, for lubricating oil // lubricants at refinery // raf; Articulated lorry transport, Euro 4, Total weight >32 t; EU+EFTA+UK
- kg_31: 1.57438e-5
  Mass in kg, for lubricating oil // lubricants at refinery // ras w/o cn; Articulated lorry transport, Euro 4, Total weight >32 t; EU+EFTA+UK
- km_31: 1000
  Distance in km, for lubricating oil // lubricants at refinery // ras w/o cn; Articulated lorry transport, Euro 4, Total weight >32 t; EU+EFTA+UK
- kg_km_31: 0.0157438; = kg_31*km_31
  Transport amount in km*km, for lubricating oil // lubricants at refinery // ras w/o cn; Articulated lorry transport, Euro 4, Total weight >32 t; EU+EFTA+UK
- kg_32: 1.22893e-5
  Mass in kg, for lubricating oil // lubricants at refinery // rna; Articulated lorry transport, Euro 4, Total weight >32 t; EU+EFTA+UK
- km_32: 1000
  Distance in km, for lubricating oil // lubricants at refinery // rna; Articulated lorry transport, Euro 4, Total weight >32 t; EU+EFTA+UK
- kg_km_32: 0.0122893; = kg_32*km_32
  Transport amount in km*km, for lubricating oil // lubricants at refinery // rna; Articulated lorry transport, Euro 4, Total weight >32 t; EU+EFTA+UK
- kg_33: 1.46441e-6
  Mass in kg, for lubricating oil // lubricants at refinery // rsa; Articulated lorry transport, Euro 4, Total weight >32 t; EU+EFTA+UK
- km_33: 1000
  Distance in km, for lubricating oil // lubricants at refinery // rsa; Articulated lorry transport, Euro 4, Total weight >32 t; EU+EFTA+UK
- kg_km_33: 0.00146441; = kg_33*km_33
  Transport amount in km*km, for lubricating oil // lubricants at refinery // rsa; Articulated lorry transport, Euro 4, Total weight >32 t; EU+EFTA+UK
- kg_34: 1.30188e-5
  Mass in kg, for lubricating oil // lubricants at refinery // ru; Articulated lorry transport, Euro 4, Total weight >32 t; EU+EFTA+UK
- km_34: 1000
  Distance in km, for lubricating oil // lubricants at refinery // ru; Articulated lorry transport, Euro 4, Total weight >32 t; EU+EFTA+UK
- kg_km_34: 0.0130188; = kg_34*km_34
  Transport amount in km*km, for lubricating oil // lubricants at refinery // ru; Articulated lorry transport, Euro 4, Total weight >32 t; EU+EFTA+UK
- kg_35: 0.0001785
  Mass in kg, for phosphoric acid // phosphoric acid production // glo; Articulated lorry transport, Euro 4, Total weight >32 t; EU+EFTA+UK
- km_35: 1000
  Distance in km, for phosphoric acid // phosphoric acid production // glo; Articulated lorry transport, Euro 4, Total weight >32 t; EU+EFTA+UK
- kg_km_35: 0.1785; = kg_35*km_35
  Transport amount in km*km, for phosphoric acid // phosphoric acid production // glo; Articulated lorry transport, Euro 4, Total weight >32 t; EU+EFTA+UK
- kg_36: 0.002
  Mass in kg, for polyethylene, petrochemical based // polyethylene (pe) production, petrochemical based // glo; Articulated lorry transport, Euro 4, Total weight >32 t; EU+EFTA+UK
- km_36: 1000
  Distance in km, for polyethylene, petrochemical based // polyethylene (pe) production, petrochemical based // glo; Articulated lorry transport, Euro 4, Total weight >32 t; EU+EFTA+UK
- kg_km_36: 2; = kg_36*km_36
  Transport amount in km*km, for polyethylene, petrochemical based // polyethylene (pe) production, petrochemical based // glo; Articulated lorry transport, Euro 4, Total weight >32 t; EU+EFTA+UK
- kg_37: 0.00071425
  Mass in kg, for potassium permanganate // potassium permanganate production // eu+efta+uk; Articulated lorry transport, Euro 4, Total weight >32 t; EU+EFTA+UK
- km_37: 1000
  Distance in km, for potassium permanganate // potassium permanganate production // eu+efta+uk; Articulated lorry transport, Euro 4, Total weight >32 t; EU+EFTA+UK
- kg_km_37: 0.71425; = kg_37*km_37
  Transport amount in km*km, for potassium permanganate // potassium permanganate production // eu+efta+uk; Articulated lorry transport, Euro 4, Total weight >32 t; EU+EFTA+UK
- kg_38: 0.002
  Mass in kg, for soap // soap production // glo; Articulated lorry transport, Euro 4, Total weight >32 t; EU+EFTA+UK
- km_38: 1000
  Distance in km, for soap // soap production // glo; Articulated lorry transport, Euro 4, Total weight >32 t; EU+EFTA+UK
- kg_km_38: 2; = kg_38*km_38
  Transport amount in km*km, for soap // soap production // glo; Articulated lorry transport, Euro 4, Total weight >32 t; EU+EFTA+UK
- kg_39: 0.001
  Mass in kg, for sodium sulphite // sodium sulphite production // eu+efta+uk; Articulated lorry transport, Euro 4, Total weight >32 t; EU+EFTA+UK
- km_39: 1000
  Distance in km, for sodium sulphite // sodium sulphite production // eu+efta+uk; Articulated lorry transport, Euro 4, Total weight >32 t; EU+EFTA+UK
- kg_km_39: 1; = kg_39*km_39
  Transport amount in km*km, for sodium sulphite // sodium sulphite production // eu+efta+uk; Articulated lorry transport, Euro 4, Total weight >32 t; EU+EFTA+UK
- kg_40: 0.00225
  Mass in kg, for acetic acid // acetic acid production, product in 98% solution state // glo; Transoceanic ship, containers; GLO
- km_40: 18000
  Distance in km, for acetic acid // acetic acid production, product in 98% solution state // glo; Transoceanic ship, containers; GLO
- kg_km_40: 40.5; = kg_40*km_40
  Transport amount in km*km, for acetic acid // acetic acid production, product in 98% solution state // glo; Transoceanic ship, containers; GLO
- kg_41: 0.00375
  Mass in kg, for enzymes // enzymes production // eu+efta+uk; Transoceanic ship, containers; GLO
- km_41: 18000
  Distance in km, for enzymes // enzymes production // eu+efta+uk; Transoceanic ship, containers; GLO
- kg_km_41: 67.5; = kg_41*km_41
  Transport amount in km*km, for enzymes // enzymes production // eu+efta+uk; Transoceanic ship, containers; GLO
- kg_42: 2.4997e-6
  Mass in kg, for lubricating oil // lubricants at refinery // cn; Transoceanic ship, containers; GLO
- km_42: 18000
  Distance in km, for lubricating oil // lubricants at refinery // cn; Transoceanic ship, containers; GLO
- kg_km_42: 0.0449946; = kg_42*km_42
  Transport amount in km*km, for lubricating oil // lubricants at refinery // cn; Transoceanic ship, containers; GLO
- kg_43: 8.01941e-6
  Mass in kg, for lubricating oil // lubricants at refinery // eu+efta+uk; Transoceanic ship, containers; GLO
- km_43: 18000
  Distance in km, for lubricating oil // lubricants at refinery // eu+efta+uk; Transoceanic ship, containers; GLO
- kg_km_43: 0.144349; = kg_43*km_43
  Transport amount in km*km, for lubricating oil // lubricants at refinery // eu+efta+uk; Transoceanic ship, containers; GLO
- kg_44: 6.00785e-7
  Mass in kg, for lubricating oil // lubricants at refinery // raf; Transoceanic ship, containers; GLO
- km_44: 18000
  Distance in km, for lubricating oil // lubricants at refinery // raf; Transoceanic ship, containers; GLO
- kg_km_44: 0.0108141; = kg_44*km_44
  Transport amount in km*km, for lubricating oil // lubricants at refinery // raf; Transoceanic ship, containers; GLO
- kg_45: 1.57438e-5
  Mass in kg, for lubricating oil // lubricants at refinery // ras w/o cn; Transoceanic ship, containers; GLO
- km_45: 18000
  Distance in km, for lubricating oil // lubricants at refinery // ras w/o cn; Transoceanic ship, containers; GLO
- kg_km_45: 0.283388; = kg_45*km_45
  Transport amount in km*km, for lubricating oil // lubricants at refinery // ras w/o cn; Transoceanic ship, containers; GLO
- kg_46: 1.22893e-5
  Mass in kg, for lubricating oil // lubricants at refinery // rna; Transoceanic ship, containers; GLO
- km_46: 18000
  Distance in km, for lubricating oil // lubricants at refinery // rna; Transoceanic ship, containers; GLO
- kg_km_46: 0.221207; = kg_46*km_46
  Transport amount in km*km, for lubricating oil // lubricants at refinery // rna; Transoceanic ship, containers; GLO
- kg_47: 1.46441e-6
  Mass in kg, for lubricating oil // lubricants at refinery // rsa; Transoceanic ship, containers; GLO
- km_47: 18000
  Distance in km, for lubricating oil // lubricants at refinery // rsa; Transoceanic ship, containers; GLO
- kg_km_47: 0.0263594; = kg_47*km_47
  Transport amount in km*km, for lubricating oil // lubricants at refinery // rsa; Transoceanic ship, containers; GLO
- kg_48: 1.30188e-5
  Mass in kg, for lubricating oil // lubricants at refinery // ru; Transoceanic ship, containers; GLO
- km_48: 18000
  Distance in km, for lubricating oil // lubricants at refinery // ru; Transoceanic ship, containers; GLO
- kg_km_48: 0.234338; = kg_48*km_48
  Transport amount in km*km, for lubricating oil // lubricants at refinery // ru; Transoceanic ship, containers; GLO
- kg_49: 0.0001785
  Mass in kg, for phosphoric acid // phosphoric acid production // glo; Transoceanic ship, containers; GLO
- km_49: 18000
  Distance in km, for phosphoric acid // phosphoric acid production // glo; Transoceanic ship, containers; GLO
- kg_km_49: 3.213; = kg_49*km_49
  Transport amount in km*km, for phosphoric acid // phosphoric acid production // glo; Transoceanic ship, containers; GLO
- kg_50: 0.002
  Mass in kg, for polyethylene, petrochemical based // polyethylene (pe) production, petrochemical based // glo; Transoceanic ship, containers; GLO
- km_50: 18000
  Distance in km, for polyethylene, petrochemical based // polyethylene (pe) production, petrochemical based // glo; Transoceanic ship, containers; GLO
- kg_km_50: 36; = kg_50*km_50
  Transport amount in km*km, for polyethylene, petrochemical based // polyethylene (pe) production, petrochemical based // glo; Transoceanic ship, containers; GLO
- kg_51: 0.00071425
  Mass in kg, for potassium permanganate // potassium permanganate production // eu+efta+uk; Transoceanic ship, containers; GLO
- km_51: 18000
  Distance in km, for potassium permanganate // potassium permanganate production // eu+efta+uk; Transoceanic ship, containers; GLO
- kg_km_51: 12.8565; = kg_51*km_51
  Transport amount in km*km, for potassium permanganate // potassium permanganate production // eu+efta+uk; Transoceanic ship, containers; GLO
- kg_52: 0.002
  Mass in kg, for soap // soap production // glo; Transoceanic ship, containers; GLO
- km_52: 18000
  Distance in km, for soap // soap production // glo; Transoceanic ship, containers; GLO
- kg_km_52: 36; = kg_52*km_52
  Transport amount in km*km, for soap // soap production // glo; Transoceanic ship, containers; GLO
- kg_53: 0.001
  Mass in kg, for sodium sulphite // sodium sulphite production // eu+efta+uk; Transoceanic ship, containers; GLO
- km_53: 18000
  Distance in km, for sodium sulphite // sodium sulphite production // eu+efta+uk; Transoceanic ship, containers; GLO
- kg_km_53: 18; = kg_53*km_53
  Transport amount in km*km, for sodium sulphite // sodium sulphite production // eu+efta+uk; Transoceanic ship, containers; GLO
- kg_54: 0.184167
  Mass in kg, for industrial waste, average, not hazardous, to residual landfill // industrial waste, average, not hazardous, to residual landfill // eu+efta+uk; Articulated lorry transport, Euro 4, Total weight >32 t; EU+EFTA+UK
- km_54: 70
  Distance in km, for industrial waste, average, not hazardous, to residual landfill // industrial waste, average, not hazardous, to residual landfill // eu+efta+uk; Articulated lorry transport, Euro 4, Total weight >32 t; EU+EFTA+UK
- kg_km_54: 12.8917; = kg_54*km_54
  Transport amount in km*km, for industrial waste, average, not hazardous, to residual landfill // industrial waste, average, not hazardous, to residual landfill // eu+efta+uk; Articulated lorry transport, Euro 4, Total weight >32 t; EU+EFTA+UK

## Reference product
- washing, apparel // washing // glo: 1

## Inputs
- Transport of cement, Portland by Freight train, diesel traction - EU+EFTA+UK: 0.0108906; = kg_km_0
- Transport of cement, Portland by Freight train, electricity traction - EU+EFTA+UK: 0.00448438; = kg_km_1
- Transport of cement, Portland by Freight train, average - EU+EFTA+UK: 0.00025; = kg_km_2
- Transport of cement, Portland by Articulated lorry transport, Total weight <7.5 t, mix Euro 0-5 - EU+EFTA+UK: 8.46328e-5; = kg_km_3
- Transport of cement, Portland by Articulated lorry transport, Total weight >32 t, mix Euro 0-5 - ROW w/o EU+EFTA: 0.0668125; = kg_km_4
- Electricity from Electricity grid mix 1kV-60kV - AU: 0.0084
- Electricity from Electricity grid mix 1kV-60kV - EU+EFTA+UK: 0.1235
- Electricity from Electricity grid mix 1kV-60kV - NZ: 0.0016
- Electricity from Electricity grid mix 1kV-60kV - RAF: 0.027
- Electricity from Electricity grid mix 1kV-60kV - RNA: 0.1808
- Electricity from Electricity grid mix 1kV-60kV - RSA: 0.0613
- Electricity from Electricity grid mix 1kV-60kV - RU: 0.0361
- Transport of perlite by Transoceanic ship, bulk - GLO: 0.84375; = kg_km_5
- Transport of perlite by Freight train, diesel traction - EU+EFTA+UK: 0.231794; = kg_km_6
- Transport of perlite by Freight train, electricity traction - EU+EFTA+UK: 0.0788467; = kg_km_7
- Transport of perlite by Freight train, average - EU+EFTA+UK: 0.00185964; = kg_km_8
- Transport of perlite by Articulated lorry transport, Euro 4, Total weight >32 t - EU+EFTA+UK: 0.00721314; = kg_km_9
- Transport of perlite by Articulated lorry transport, Total weight >32 t, mix Euro 0-5 - ROW w/o EU+EFTA: 0.0190369; = kg_km_10
- Transport of pumice by Transoceanic ship, bulk - GLO: 13.2526; = kg_km_11
- Transport of pumice by Freight train, diesel traction - EU+EFTA+UK: 1.63608; = kg_km_12
- Transport of pumice by Freight train, electricity traction - EU+EFTA+UK: 0.556526; = kg_km_13
- Transport of pumice by Freight train, average - EU+EFTA+UK: 0.0131259; = kg_km_14
- Transport of pumice by Barge - EU+EFTA+UK: 0.125844; = kg_km_15
- Transport of pumice by Barge - ROW w/o EU+EFTA: 0.256968; = kg_km_16
- Transport of pumice by Articulated lorry transport, Total weight <7.5 t, mix Euro 0-5 - EU+EFTA+UK: 0.1733; = kg_km_17
- Transport of pumice by Articulated lorry transport, Euro 4, Total weight >32 t - EU+EFTA+UK: 1.61795; = kg_km_18
- Transport of pumice by Articulated lorry transport, Total weight >32 t, mix Euro 0-5 - ROW w/o EU+EFTA: 4.27007; = kg_km_19
- Transport of synthetic rubber by Transoceanic ship, containers - GLO: 0.328; = kg_km_20
- Transport of synthetic rubber by Freight train, diesel traction - EU+EFTA+UK: 0.133838; = kg_km_21
- Transport of synthetic rubber by Freight train, electricity traction - EU+EFTA+UK: 0.0455261; = kg_km_22
- Transport of synthetic rubber by Freight train, average - EU+EFTA+UK: 0.00107375; = kg_km_23
- Transport of synthetic rubber by Articulated lorry transport, Euro 4, Total weight >32 t - EU+EFTA+UK: 0.0773523; = kg_km_24
- Transport of synthetic rubber by Articulated lorry transport, Total weight >32 t, mix Euro 0-5 - ROW w/o EU+EFTA: 0.204148; = kg_km_25
- Thermal energy (MJ) from Thermal energy from hard coal - ROW: 1.07508
- Thermal energy (MJ) from Thermal energy from heavy fuel oil (HFO) - ROW: 0.0238906
- Thermal energy (MJ) from Thermal energy from light fuel oil (LFO) - ROW: 0.334469
- Thermal energy (MJ) from Thermal energy from natural gas - ROW: 0.955625
- Transport of acetic acid // acetic acid production, product in 98% solution state // glo by Articulated lorry transport, Euro 4, Total weight >32 t - EU+EFTA+UK: 2.25; = kg_km_26
- Transport of enzymes // enzymes production // eu+efta+uk by Articulated lorry transport, Euro 4, Total weight >32 t - EU+EFTA+UK: 3.75; = kg_km_27
- Transport of lubricating oil // lubricants at refinery // cn by Articulated lorry transport, Euro 4, Total weight >32 t - EU+EFTA+UK: 0.0024997; = kg_km_28
- Transport of lubricating oil // lubricants at refinery // eu+efta+uk by Articulated lorry transport, Euro 4, Total weight >32 t - EU+EFTA+UK: 0.00801941; = kg_km_29
- Transport of lubricating oil // lubricants at refinery // raf by Articulated lorry transport, Euro 4, Total weight >32 t - EU+EFTA+UK: 0.000600785; = kg_km_30
- Transport of lubricating oil // lubricants at refinery // ras w/o cn by Articulated lorry transport, Euro 4, Total weight >32 t - EU+EFTA+UK: 0.0157438; = kg_km_31
- Transport of lubricating oil // lubricants at refinery // rna by Articulated lorry transport, Euro 4, Total weight >32 t - EU+EFTA+UK: 0.0122893; = kg_km_32
- Transport of lubricating oil // lubricants at refinery // rsa by Articulated lorry transport, Euro 4, Total weight >32 t - EU+EFTA+UK: 0.00146441; = kg_km_33
- Transport of lubricating oil // lubricants at refinery // ru by Articulated lorry transport, Euro 4, Total weight >32 t - EU+EFTA+UK: 0.0130188; = kg_km_34
- Transport of phosphoric acid // phosphoric acid production // glo by Articulated lorry transport, Euro 4, Total weight >32 t - EU+EFTA+UK: 0.1785; = kg_km_35
- Transport of polyethylene, petrochemical based // polyethylene (pe) production, petrochemical based // glo by Articulated lorry transport, Euro 4, Total weight >32 t - EU+EFTA+UK: 2; = kg_km_36
- Transport of potassium permanganate // potassium permanganate production // eu+efta+uk by Articulated lorry transport, Euro 4, Total weight >32 t - EU+EFTA+UK: 0.71425; = kg_km_37
- Transport of soap // soap production // glo by Articulated lorry transport, Euro 4, Total weight >32 t - EU+EFTA+UK: 2; = kg_km_38
- Transport of sodium sulphite // sodium sulphite production // eu+efta+uk by Articulated lorry transport, Euro 4, Total weight >32 t - EU+EFTA+UK: 1; = kg_km_39
- Transport of acetic acid // acetic acid production, product in 98% solution state // glo by Transoceanic ship, containers - GLO: 40.5; = kg_km_40
- Transport of enzymes // enzymes production // eu+efta+uk by Transoceanic ship, containers - GLO: 67.5; = kg_km_41
- Transport of lubricating oil // lubricants at refinery // cn by Transoceanic ship, containers - GLO: 0.0449946; = kg_km_42
- Transport of lubricating oil // lubricants at refinery // eu+efta+uk by Transoceanic ship, containers - GLO: 0.144349; = kg_km_43
- Transport of lubricating oil // lubricants at refinery // raf by Transoceanic ship, containers - GLO: 0.0108141; = kg_km_44
- Transport of lubricating oil // lubricants at refinery // ras w/o cn by Transoceanic ship, containers - GLO: 0.283388; = kg_km_45
- Transport of lubricating oil // lubricants at refinery // rna by Transoceanic ship, containers - GLO: 0.221207; = kg_km_46
- Transport of lubricating oil // lubricants at refinery // rsa by Transoceanic ship, containers - GLO: 0.0263594; = kg_km_47
- Transport of lubricating oil // lubricants at refinery // ru by Transoceanic ship, containers - GLO: 0.234338; = kg_km_48
- Transport of phosphoric acid // phosphoric acid production // glo by Transoceanic ship, containers - GLO: 3.213; = kg_km_49
- Transport of polyethylene, petrochemical based // polyethylene (pe) production, petrochemical based // glo by Transoceanic ship, containers - GLO: 36; = kg_km_50
- Transport of potassium permanganate // potassium permanganate production // eu+efta+uk by Transoceanic ship, containers - GLO: 12.8565; = kg_km_51
- Transport of soap // soap production // glo by Transoceanic ship, containers - GLO: 36; = kg_km_52
- Transport of sodium sulphite // sodium sulphite production // eu+efta+uk by Transoceanic ship, containers - GLO: 18; = kg_km_53
- Transport of industrial waste, average, not hazardous, to residual landfill // industrial waste, average, not hazardous, to residual landfill // eu+efta+uk by Articulated lorry transport, Euro 4, Total weight >32 t - EU+EFTA+UK: 12.8917; = kg_km_54
- Electricity from Electricity grid mix 1kV-60kV - CN: 0.185242
- Electricity from Electricity grid mix 1kV-60kV - RAS w/o CN: 0.202958
- washing, apparel // washing // glo, blackbox: 1
- washing, apparel // washing // glo, elementary: 1

## Impact indicators
- Eutrophication marine: 0.000655021
- Ecotoxicity, freshwater: 3.25595
- Land use: 1.33808
- Water use: 0.409337
- Resource use, minerals and metals: 3.77039e-7
- Resource use, fossils: 7.01298
- Climate change: 0.754232
- Ozone depletion: 1.29714e-9
- Human toxicity, cancer: 4.74823e-10
- Human toxicity, non-cancer: 5.68819e-9
- EF-particulate Matter: 1.6063e-7
- Ionising radiation, human health: 0.0143032
- Photochemical ozone formation - human health: 0.00166046
- Acidification: 0.00305915
- Eutrophication, terrestrial: 0.00560828
- Eutrophication, freshwater: 3.21432e-5

## Deviations from the LCI method principle
The background data uses:
- the \xe2\x80\x9cRecycled content cut-off\xe2\x80\x9d approach to allocate end-of-life by-products and secondary materials. This allocation is explained in the description of the recycled content system model (http://www.ecoinvent.org/database/system-models-in-ecoinvent-3/cut-off-system-model/allocation-cut-off-by-classification.html).
OR
- EF compliant data

## Deviations from the LCI method approaches
Background data:
- the \xe2\x80\x9cRecycled content cut-off\xe2\x80\x9d approach to allocate end-of-life by-products and secondary materials. This allocation is explained in the description of the recycled content system model (http://www.ecoinvent.org/database/system-models-in-ecoinvent-3/cut-off-system-model/allocation-cut-off-by-classification.html). The ecoinvent database mostly relies on “Allocation – market values” apart for few exceptions particularly in the energy sector. ecoinvent energy data is replaced with EF3.0 core data as per the EF guidelines version 2.0.
OR
- EF compliant data

## Modelling constants
All modelling constants follow the requirements listed in the Tender Specifications 070201/2020/SER/ENV.B1. Completeness: There are no intentional cut-offs in the inventory no matter how small their contribution to all the EF impact categories is. Eventual cut-offs are in compliance with the Guide for EF compliant data sets (JRC 2020), i.e. only if below the 3% cut-off rule. Water use: water use is modelled at country level using separate flows for water withdrawal, water release and water evaporation. Handling multi-functional processes: the following PEF multi- functionality decision hierarchy is applied for resolving all multi- functionality problems: (1) subdivision or system expansion; (2) allocation based on a relevant underlying physical relationship (substitution may apply here); (3) allocation based on some other relationship. Direct land use change: GHG emissions from direct LUC allocated to good/service for 20 years after the LUC occurs, with IPCC default values. Carbon storage and delayed emissions: credits associated with temporary (carbon) storage or delayed emissions up to 300 years are not be considered. Emissions off-setting: are not included. Capital goods (including infrastructures) and their End of life: they are included. System boundaries: system boundaries include all processes linked to the product supply chain (e.g. maintenance). Time period: emissions and removals are modelled as if released or removed at the beginning of the assessment method. Fossil and biogenic carbon emissions and removals: removals and emissions are modelled as follows: All GHG emissions from fossil fuels (including peat and limestone) are modelled consistently with the most updated ILCD list of elementary flows. The non-fossil (biogenic) carbon flows are modelled consistently with the most updated ILCD list of elementary flows.

## Cut-off and completeness
There are no intentional cut-offs in the inventory no matter how small their contribution to all the EF impact categories is. Eventual cut-offs are in compliance with the Guide for EF compliant data sets (JRC 2020), i.e. only if below the 3% cut-off rule. The dataset dry mass and water balance has been checked to ensure the inventory is complete. Capital goods (e.g. infrastructure) and their end-of-life are included.

## Data selection and combination
These datasets include, in both their foreground and background data, links to EF3.0 compliant data.
The relevant background data on energy, transport, and End of Life are from the LCDN data node (http://lcdn.thinkstep.com/Node/).
All other background data in the supply of this product for which no EF3.0 process was available are from ecoinvent v3.7 database (www.ecoinvent.org) or other data sources.

## Data treatment and extrapolations
Several data sources have been used to model the inventory.

## Review details
Internal reviews have been asked to review the plausibility of the unit process, LCIA scores, and DQRs. Internal reviewers have also been asked to review the data for EF compliancy. The consortium is therefore responsible for aspects such as compliancy with the ILCD format, including validation in Look@LCI, and nomenclature.
Internal reviwers have been asked to judge based on the process name, that the unit process models in a complete and representative way the process in the requested location. The review encompassed the plausability of:
- exchanges with nature (elementary flows) as well as exchanges such as product and waste flows.
- meta information (general comment, technology comment, system boundaries, allocation, cut-off rules, etc.). Reviewers were asked to judge if the provided information is enough to understand the content of the process.
- LCIA scores
- DQRs including precision, technology, time and geography. As well as the overall DQR.
External reviewers have been asked to provide their expertise in the field of interest. External reviewers have been asked to review the unit process, including eventual methodological choices, the LCIA scores (provided with contribution scores as well), and DQRs. External reviewers have been provided all the information in a tool developed by the consortium for the purpose of this project.
External reviewers have been asked to judge based on the process name, that the unit process models in a complete and representative way the process in the requested location. The review encompassed:
- Plausability and completeness of exchanges with nature (elementary flows) as well as exchanges such as product and waste flows.
- Review of meta information (general comment, technology comment, system boundaries, allocation, cut-off rules, etc.). Reviewers were asked to judge if the provided information is enough to understand the content of the process.
- Review of properties (biogenic carbon and water content).
- Review of allocation keys.
- Plausability of LCIA scores calculated by the consortium.
- Plausability of DQRs including precision, technology, time and geography. As well as the overall DQR.

## Data sources
- Background Data for Representative products and organisations. EF 3.0 compliant (data stock)
- Quantis Data (2021)
- Asim Kumar Roy Choudhury, (2017). Principle of textile finishing. Elsevier, Duxfod, United Kingdom.
- Westex (2021) Benefits of Westex Synthetic Stones, https://westexstones.com/, Westex Synthetic Stones, Şişli-Istanbul, Turkey
- Tupesa (2021) Stone Washers, https://www.tupesa.com/index.php?route=product/product&product_id=50, Tupesa Maquinaria Textil, Girona, Spain.
- Tupesa (2021) Eco Washers, https://www.tupesa.com/index.php?route=product/product&path=72_59&product_id=51, Tupesa Maquinaria Textil, Girona, Spain.
- Tupesa (2021) EXTRACTOR Hidroextractors, https://www.tupesa.com/index.php?route=product/product&path=72_62&product_id=63, Tupesa Maquinaria Textil, Girona, Spain.
- Tupesa (2021) SC -2 Dryers, https://www.tupesa.com/index.php?route=product/product&path=72_63&product_id=70, Tupesa Maquinaria Textil, Girona, Spain.
- Bhuvenesh C. Goswami, Rajesh D. Anandjiwala, David M. Hall, (2004). Textile Sizing. Marcel Dekker, Inc., New York, USA.
- Lebon (2021) Nonwoven Oven Machine, Catalog and Company Messages, Qingdao Lebon Industry Co., Ltd., China
- Monoroma Hossain, Md. Shakhawat Hossain Rony, K. M. Faridul Hasan, Md. Kawsar Hossain, Md. Azharul Hossain, and Yang Zhou, (2017). Effective Mechanical and Chemical Washing Process in Garment Industries. American Journal of Applied Physics Vol 2, Wuhan, China.

## Intended applications
Implementation of regular Product Environmental Footprint (PEF) studies and Organisation Environmental Footprint (OEF) studies exclusively under the specified Product groups and sectors as defined in the Product Environmental Footprint Category Rules (PEFCR) and Organisation Environmental Footprint Sectorial Rules (OEFSR) listed in http://ec.europa.eu/environment/eussd/smgp/PEFCR_OEFSR.htm
