# heat sealing, textiles, elementary; heat sealing process; production mix, at plant; service

Dataset: ILCD process, Unit process, single operation
Geography: GLO
Reference year: 2021
Valid until: 2024
Classification: Other Services / Other services
LCI method principle: Attributional
LCI method approaches: Allocation - market value
Completeness: All relevant flows quantified
Project: Provision of process-based 3.0 Environmental Footprint-compliant life cycle inventory datasets - Apparel 1 - contract number 070201/2020/840291/SER/ENV.B.1
Generated by: Life Cycle Indonesia
Owner: PRé Sustainability B.V.
Compliance: Environmental Footprint non-primary supporting data set; Environmental Footprint 3.1
Amounts: no units in this file; such an amount is in the reference unit of its flow, which a separate flow dataset defines
copyright: true
licenseType: Free of charge for some user types or use types
accessRestrictions: Free of charge for all final users implementing a regular Product Environmental Footprint (PEF) studies and Organisation Environmental Footprint (OEF) studies exclusively under the specified Product groups and sectors as defined in the Product Environmental Footprint Category Rules (PEFCR) and Organisation Environmental Footprint Sectorial Rules (OEFSR) listed in http://ec.europa.eu/environment/eussd/smgp/PEFCR_OEFSR.htm and in accordance with the terms and conditions of the EULA (available at https://ecoinvent.lca-data.com/) exclusively until 31st December 2024. Any use of this dataset or any derivative data not within the specific context of one of the PEF/OEF projects or after the end of 2024 is not permitted.

## General comment
Notice: this data set supersedes the EF3.0-compliant version (see link under "preceding data set version" below calculated with the EF3.0). The life cycle inventory is not changed from the original EF3.0 data set. The LCIA results are calculated based on the EF3.1 methods which provide updated characterisation factors in the following impact categories: Climate Change, Ecotoxicity freshwater, Photochemical Ozone Formation, Acidification, Human Toxicity non-cancer, and Human Toxicity cancer. The review report and the data quality ratings refer to the original results. The data set has been updated by the European Commission on the basis of the original EF3.0 data set delivered by the data provider.This sub-process has limited documentation only. For all detailed documentation of the full model to which this data set belongs (such as DQRs, review reports and other technical documentation), please see this process: heat sealing, textiles - GLO []

## Technology and included processes
A heat-seal machine is a device used for the thermal transfer (heat sealing) of labels, emblems and repair patches to garments and textiles of all kinds. The heat-seal machine functions by way of electronic control, a heating element, a heat-seal plate with silicone rubber and pressure technology. In the case of hand-operated heat-seal machines, patching is done via a pressure lever mechanism and with pneumatic machines via a pneumatic cylinder. (Thermotex, 2021)

First, cut the graphic and then weed it like the normal vinyl. Place the weeded graphic on the garment on the heat press. Cover the film with a Teflon sheet or silicone kraft paper to provide even heat distribution and prevent anything from sticking to the platen. Set the press for the recommended time, temperature, and pressure for the material and close it. After pressing the film, wait the recommended amount of time and remove the liner. (Jerry, 2021)

This process includes a heat transfer using heat sealing machines. The activity starts when the raw materials enter the process. Materials entering the process are included as well as energy uses and infrastructure. There is no direct emission to air since the emission comes from electricity usage, while non-hazardous waste comes from waste silicone kraft paper. However, since the machine used is a hand held machine and the size is relatively small compare to other industrial machine, the lube oil consumption is assumed to be very little and therefor are not significant in this process. The filmed area is assumed to be 50% area of the heat sealing machine upper plate using PU and PVC film equal usage probability. Machine capacity is determined based on 130 to 150 GSM t-shirts.

Thermotex (2021) Heat Seals Machines https://www.thermo-tex.co.uk/products/heat-seal-machines/, THERMOTEX NAGEL GmbH, Schutterwald, Germany
Jerry (2021) A Basic Guide to Heat Transfer Vinyl & Heat Transfer Film https://blog.signwarehouse.com/basic-guide-to-t-shirt-vinyl-and-heat-transfer-film/, SignWarehouse

## Reference product
- heat sealing, textiles // heat sealing, textiles // glo, elementary: 1

## Impact indicators
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
## Deviations from the LCI method principle
The background data uses:
- the \xe2\x80\x9cRecycled content cut-off\xe2\x80\x9d approach to allocate end-of-life by-products and secondary materials. This allocation is explained in the description of the recycled content system model (http://www.ecoinvent.org/database/system-models-in-ecoinvent-3/cut-off-system-model/allocation-cut-off-by-classification.html).
OR
- EF compliant data

## Deviations from the LCI method approaches
Background data:
- the \xe2\x80\x9cRecycled content cut-off\xe2\x80\x9d approach to allocate end-of-life by-products and secondary materials. This allocation is explained in the description of the recycled content system model (http://www.ecoinvent.org/database/system-models-in-ecoinvent-3/cut-off-system-model/allocation-cut-off-by-classification.html). The ecoinvent database mostly relies on “Allocation – market values” apart for few exceptions particularly in the energy sector. ecoinvent energy data is replaced with EF3.0 core data as per the EF guidelines version 2.0.
OR
- EF compliant data

## Modelling constants
All modelling constants follow the requirements listed in the Tender Specifications 070201/2020/SER/ENV.B1. Completeness: There are no intentional cut-offs in the inventory no matter how small their contribution to all the EF impact categories is. Eventual cut-offs are in compliance with the Guide for EF compliant data sets (JRC 2020), i.e. only if below the 3% cut-off rule. Water use: water use is modelled at country level using separate flows for water withdrawal, water release and water evaporation. Handling multi-functional processes: the following PEF multi- functionality decision hierarchy is applied for resolving all multi- functionality problems: (1) subdivision or system expansion; (2) allocation based on a relevant underlying physical relationship (substitution may apply here); (3) allocation based on some other relationship. Direct land use change: GHG emissions from direct LUC allocated to good/service for 20 years after the LUC occurs, with IPCC default values. Carbon storage and delayed emissions: credits associated with temporary (carbon) storage or delayed emissions up to 300 years are not be considered. Emissions off-setting: are not included. Capital goods (including infrastructures) and their End of life: they are included. System boundaries: system boundaries include all processes linked to the product supply chain (e.g. maintenance). Time period: emissions and removals are modelled as if released or removed at the beginning of the assessment method. Fossil and biogenic carbon emissions and removals: removals and emissions are modelled as follows: All GHG emissions from fossil fuels (including peat and limestone) are modelled consistently with the most updated ILCD list of elementary flows. The non-fossil (biogenic) carbon flows are modelled consistently with the most updated ILCD list of elementary flows.

## Cut-off and completeness
There are no intentional cut-offs in the inventory no matter how small their contribution to all the EF impact categories is. Eventual cut-offs are in compliance with the Guide for EF compliant data sets (JRC 2020), i.e. only if below the 3% cut-off rule. The dataset dry mass and water balance has been checked to ensure the inventory is complete. Capital goods (e.g. infrastructure) and their end-of-life are included.

## Data selection and combination
These datasets include, in both their foreground and background data, links to EF3.0 compliant data.
The relevant background data on energy, transport, and End of Life are from the LCDN data node (http://lcdn.thinkstep.com/Node/).
All other background data in the supply of this product for which no EF3.0 process was available are from ecoinvent v3.7 database (www.ecoinvent.org) or other data sources.

## Data treatment and extrapolations
Several data sources have been used to model the inventory.

## Use advice
This data set is a supporting sub-data set and must be used exclusively as sub-data set of its corresponding level-1 partly disaggregated data set (see “General comment” field for exact name and UUID).

## Data sources
- Background Data for Representative products and organisations. EF 3.0 compliant (data stock)
- Griffiths, Dafydd (2017) How much does a t shirt weigh?, https://ramptshirts.com/blog/2017/06/13/how-much-does-a-t-shirt-weigh/, Ramp, South Wales
- Gio-Lite (2021) GIO-FLEX SOFT-PU SOFT STRETCHABILITY HEAT TRANSFER VINYL, https://giolite.com/GIO-FLEX-SOFT-PU, Giolite Lumian Co., Ltd, Seoul, Korea
- Prospector (2021) Polyurethane (PUR) Typical Properties Generic PUR, Unspecified https://plastics.ulprospector.com/generics/45/c/t/polyurethane-pur-properties-processing, The Prospector, United States
- Gio-Lite (2021) GIO-FLEX VC PVC CAD CUT Heat Transfer Film https://giolite.com/GIO-FLEX-VC, Giolite Lumian Co., Ltd, Seoul, Korea
- BPF (2021) Polyvinyl Chloride PVC, https://www.bpf.co.uk/plastipedia/polymers/pvc.aspx, British Plastic Federation, London, England
- MPC (2021) Silicone Paper, http://www.mpcpaper.com/products8.html, Montreal Paper Cutting Inc, Montreal, Canada
- Thermotex (2021) https://www.thermo-tex.co.uk/assets/Uploads/module/pdf/Flyer-Patchmaschinen-v4-GB-Web.pdf, THERMOTEX NAGEL GmbH, Schutterwald, Germany

## Intended applications
Implementation of regular Product Environmental Footprint (PEF) studies and Organisation Environmental Footprint (OEF) studies exclusively under the specified Product groups and sectors as defined in the Product Environmental Footprint Category Rules (PEFCR) and Organisation Environmental Footprint Sectorial Rules (OEFSR) listed in http://ec.europa.eu/environment/eussd/smgp/PEFCR_OEFSR.htm
