# care label; spinning, weaving, printing; Production mix, at plant; PET/PE label

Dataset: ILCD process, Partly terminated system
Geography: GLO
Reference year: 2021
Valid until: 2024
Classification: Systems / Textiles, furnitures and other interiors
LCI method principle: Attributional
LCI method approaches: Allocation - market value
Completeness: All relevant flows quantified
Project: Provision of process-based 3.0 Environmental Footprint-compliant life cycle inventory datasets - Others - contract number 070201/2020/840235/SER/ENV.B.1
Generated by: Metsims Sustainability Consulting
Owner: PRé Sustainability B.V.
Compliance: ILCD Data Network - Entry-level; Suggestions for updating the PEF method 2019; ISO 14040 Environmental Management – Life Cycle Assessment – Principles and Framework, 2006; ISO 14044:2006. Environmental Management – Life Cycle Assessment – Requirements and guidelines.; Environmental Footprint 3.1
Review: Dependent internal review by Avraam Symeonidis, Emilia Moreno Ruiz; Independent review panel by Madhuri Nigam
Data quality: Overall quality: Good; Time representativeness: Very good; Geographical representativeness: Fair; Technological representativeness: Good; Precision: Good; Methodological appropriateness and consistency: Not applicable
Amounts: no units in this file; such an amount is in the reference unit of its flow, which a separate flow dataset defines
copyright: true
licenseType: Free of charge for some user types or use types
accessRestrictions: Free of charge for all final users implementing a regular Product Environmental Footprint (PEF) studies and Organisation Environmental Footprint (OEF) studies exclusively under the specified Product groups and sectors as defined in the Product Environmental Footprint Category Rules (PEFCR) and Organisation Environmental Footprint Sectorial Rules (OEFSR) listed in http://ec.europa.eu/environment/eussd/smgp/PEFCR_OEFSR.htm and in accordance with the terms and conditions of the EULA (available at https://ecoinvent.lca-data.com/) exclusively until 31st December 2024. Any use of this dataset or any derivative data not within the specific context of one of the PEF/OEF projects or after the end of 2024 is not permitted.

## General comment
Notice: this data set supersedes the EF3.0-compliant version (see link under "preceding data set version" below calculated with the EF3.0). The life cycle inventory is not changed from the original EF3.0 data set. The LCIA results are calculated based on the EF3.1 methods which provide updated characterisation factors in the following impact categories: Climate Change, Ecotoxicity freshwater, Photochemical Ozone Formation, Acidification, Human Toxicity non-cancer, and Human Toxicity cancer. The review report and the data quality ratings refer to the original results. The data set has been updated by the European Commission on the basis of the original EF3.0 data set delivered by the data provider.Care labels provide guidelines to consumers about apparel care, and the best cleaning procedures to be used for a particular combination of fabric. Care label is a printed fabric label made of PET or PE, and is durable to washing.

This dataset covers yarns spining, waving and printing of care details on the label.

## Technology and included processes
Care labels provide guidelines to consumers about apparel care, and the best cleaning procedures to be used for a particular combination of fabric.

Raw materials and production processes were included to model as following:
- Spinning of synthetic yarn from PET and PE (production mix)
- Weaving of synthetic yarns
- Printing of care label (printing of care info on label)

Waste processing model was generated from global waste collection rate. Global waste collection rate is 65%. 75% of waste collected are delivered to recycle facility and, 25% of collected waste are delivered to landfill areas. Uncollected part of waste (35%) was assumed that it is dropped to landfill areas. From production facility to landfill transport was assumed as 70 km.

## Parameters
- A_HDPE: 0.5
  The amount of waste HDPE produced is 0.021195652173913kg. The assumed percentage of losses of the recycling process is 0.0892531876138434. R2 has been calculated as the original amount of waste minues losses, i.e. 0.019303872653837kg. The value for A has been taken from the default values for the CFF. The default value for plastics is 0.5. Being pre-consumer waste, Qsout/Qp is assumed to be 1. The E*v part of the formula is modelled as a negative input of the relevant virgin material.
- A_PET: 0.5
  The amount of waste PET produced is 0.021195652173913kg. The assumed percentage of losses of the recycling process is 0.0999999999999999. R2 has been calculated as the original amount of waste minues losses, i.e. 0.0190760869565217kg. The value for A has been taken from the default values for the CFF. The default value for plastics is 0.5. Being pre-consumer waste, Qsout/Qp is assumed to be 1. The E*v part of the formula is modelled as a negative input of the relevant virgin material.
- Qsout/Qp_HDPE: 1
  (same comment as for A_HDPE)
- Qsout/Qp_PET: 1
  (same comment as for A_PET)
- CFF_HDPE: 0.0211957; = (1-A_HDPE)*R2_HDPE
  (same comment as for A_HDPE)
- CFF_PET: 0.0211957; = (1-A_PET)*R2_PET
  (same comment as for A_PET)
- avoid_HDPE: 0.0892532; = CFF_HDPE*Qsout/Qp_HDPE
  (same comment as for A_HDPE)
- avoid_PET: 0.1; = CFF_PET*Qsout/Qp_PET
  (same comment as for A_PET)
- R2_PET: 0.0190761
  The amount of waste produced is 0.021195652173913kg. The assumed percentage of losses of the recycling process is 0.0999999999999999. R2 has been calculated as the original amount of waste minues losses, i.e. 0.0190760869565217kg. The value for A has been taken from the default values for the CFF. The default value for plastics is 0.5. Being pre-consumer waste, Qsout/Qp is assumed to be 1. The E*v part of the formula is modelled as a negative input of the relevant virgin material.
- R2_HDPE: 0.0193039
  The amount of waste produced is 0.021195652173913kg. The assumed percentage of losses of the recycling process is 0.0892531876138434. R2 has been calculated as the original amount of waste minues losses, i.e. 0.019303872653837kg. The value for A has been taken from the default values for the CFF. The default value for plastics is 0.5. Being pre-consumer waste, Qsout/Qp is assumed to be 1. The E*v part of the formula is modelled as a negative input of the relevant virgin material.
- kg_0: 0.543478
  Mass in kg, for high density polyethylene, petrochemical // high density polyethylene (hdpe) production, fossil fuel-based // glo; Articulated lorry transport, Euro 4, Total weight >32 t; EU+EFTA+UK
- km_0: 999.12
  Distance in km, for high density polyethylene, petrochemical // high density polyethylene (hdpe) production, fossil fuel-based // glo; Articulated lorry transport, Euro 4, Total weight >32 t; EU+EFTA+UK
- kg_km_0: 543; = kg_0*km_0
  Transport amount in km*km, for high density polyethylene, petrochemical // high density polyethylene (hdpe) production, fossil fuel-based // glo; Articulated lorry transport, Euro 4, Total weight >32 t; EU+EFTA+UK
- kg_1: 0.543478
  Mass in kg, for polyethylene terephthalate, mix // polyethylene terephthalate (pet) production, blend of bio- based and fossil // glo; Articulated lorry transport, Euro 4, Total weight >32 t; EU+EFTA+UK
- km_1: 999.12
  Distance in km, for polyethylene terephthalate, mix // polyethylene terephthalate (pet) production, blend of bio- based and fossil // glo; Articulated lorry transport, Euro 4, Total weight >32 t; EU+EFTA+UK
- kg_km_1: 543; = kg_1*km_1
  Transport amount in km*km, for polyethylene terephthalate, mix // polyethylene terephthalate (pet) production, blend of bio- based and fossil // glo; Articulated lorry transport, Euro 4, Total weight >32 t; EU+EFTA+UK
- kg_2: 0.0445652
  Mass in kg, for waste (unspecified) // landfill of plastic waste // eu+efta+uk; Articulated lorry transport, Euro 4, Total weight >32 t; EU+EFTA+UK
- km_2: 70
  Distance in km, for waste (unspecified) // landfill of plastic waste // eu+efta+uk; Articulated lorry transport, Euro 4, Total weight >32 t; EU+EFTA+UK
- kg_km_2: 3.11957; = kg_2*km_2
  Transport amount in km*km, for waste (unspecified) // landfill of plastic waste // eu+efta+uk; Articulated lorry transport, Euro 4, Total weight >32 t; EU+EFTA+UK
- kg_3: 0.543478
  Mass in kg, for high density polyethylene, petrochemical // high density polyethylene (hdpe) production, fossil fuel-based // glo; Transoceanic ship, containers; GLO
- km_3: 17995.2
  Distance in km, for high density polyethylene, petrochemical // high density polyethylene (hdpe) production, fossil fuel-based // glo; Transoceanic ship, containers; GLO
- kg_km_3: 9780; = kg_3*km_3
  Transport amount in km*km, for high density polyethylene, petrochemical // high density polyethylene (hdpe) production, fossil fuel-based // glo; Transoceanic ship, containers; GLO
- kg_4: 0.543478
  Mass in kg, for polyethylene terephthalate, mix // polyethylene terephthalate (pet) production, blend of bio- based and fossil // glo; Transoceanic ship, containers; GLO
- km_4: 17995.2
  Distance in km, for polyethylene terephthalate, mix // polyethylene terephthalate (pet) production, blend of bio- based and fossil // glo; Transoceanic ship, containers; GLO
- kg_km_4: 9780; = kg_4*km_4
  Transport amount in km*km, for polyethylene terephthalate, mix // polyethylene terephthalate (pet) production, blend of bio- based and fossil // glo; Transoceanic ship, containers; GLO

## Reference product
- care label, pet, tyvek (hdpe) // care label // glo: 1

## Inputs
- Transport of high density polyethylene, petrochemical // high density polyethylene (hdpe) production, fossil fuel-based // glo by Articulated lorry transport, Euro 4, Total weight >32 t - EU+EFTA+UK: 543; = kg_km_0
- Transport of polyethylene terephthalate, mix // polyethylene terephthalate (pet) production, blend of bio- based and fossil // glo by Articulated lorry transport, Euro 4, Total weight >32 t - EU+EFTA+UK: 543; = kg_km_1
- Transport of waste (unspecified) // landfill of plastic waste // eu+efta+uk by Articulated lorry transport, Euro 4, Total weight >32 t - EU+EFTA+UK: 3.11957; = kg_km_2
- Transport of high density polyethylene, petrochemical // high density polyethylene (hdpe) production, fossil fuel-based // glo by Transoceanic ship, containers - GLO: 9780; = kg_km_3
- Transport of polyethylene terephthalate, mix // polyethylene terephthalate (pet) production, blend of bio- based and fossil // glo by Transoceanic ship, containers - GLO: 9780; = kg_km_4
- polyethylene terephthalate, recycled, pre-consumer // polyethylene terephthalate (pet) production, recycled, semi-mechanical, pre-consumer // glo: 0.00953804; = CFF_PET
- high density polyethylene, recycled // high density polyethylene (hdpe) production, recycled // glo: 0.00965194; = CFF_HDPE
- care label, pet, tyvek (hdpe) // care label // glo, blackbox: 1
- care label, pet, tyvek (hdpe) // care label // glo, elementary: 1

## Outputs
- avoided product system, hdpe from care label // avoided product system hdpe in care label // glo: 0.00965194; = avoid_HDPE
- avoided product system, pet from care label // avoided product system pet in care label // glo: 0.00953804; = avoid_PET

## Impact indicators
- Eutrophication marine: 0.0460762
- Ecotoxicity, freshwater: 458.64
- Land use: 83.1023
- Water use: 14.5362
- Resource use, minerals and metals: 0.000523629
- Resource use, fossils: 506.771
- Climate change: 34.1289
- Ozone depletion: 3.93553e-7
- Human toxicity, cancer: 3.3962e-8
- Human toxicity, non-cancer: 2.54181e-7
- EF-particulate Matter: 5.21837e-6
- Ionising radiation, human health: 1.42068
- Photochemical ozone formation - human health: 0.131953
- Acidification: 0.2358
- Eutrophication, terrestrial: 0.466264
- Eutrophication, freshwater: 0.00142349

## Deviations from the LCI method principle
The background data uses:
- the \xe2\x80\x9cRecycled content cut-off\xe2\x80\x9d approach to allocate end-of-life by-products and secondary materials. This allocation is explained in the description of the recycled content system model (http://www.ecoinvent.org/database/system-models-in-ecoinvent-3/cut-off-system-model/allocation-cut-off-by-classification.html).
OR
- EF compliant data

## Deviations from the LCI method approaches
Background data:
- the \xe2\x80\x9cRecycled content cut-off\xe2\x80\x9d approach to allocate end-of-life by-products and secondary materials. This allocation is explained in the description of the recycled content system model (http://www.ecoinvent.org/database/system-models-in-ecoinvent-3/cut-off-system-model/allocation-cut-off-by-classification.html). The ecoinvent database mostly relies on “Allocation – market values” apart for few exceptions particularly in the energy sector. ecoinvent energy data is replaced with EF3.0 core data as per the EF guidelines version 2.0.
OR
- EF compliant data

CFF implementation:
-For recycling of waste cotton. The original amount of waste material was 0.0286764705882353kg. The default A of 0.8 for textile shirt was used. 20% of the original amount is therefore considered to reflect the implementation of the CFF formula. Being pre-consumer waste, Qsout/Qp is assumed to be 1. The E*v part of the formula is modelled as a negative input of the relevant virgin material. 90% of the amount of the produced waste material is used to account for losses during recycling.

## Modelling constants
All modelling constants follow the requirements listed in the Tender Specifications 070201/2020/SER/ENV.B1. Completeness: There are no intentional cut-offs in the inventory no matter how small their contribution to all the EF impact categories is. Eventual cut-offs are in compliance with the Guide for EF compliant data sets (JRC 2020), i.e. only if below the 3% cut-off rule. Water use: water use is modelled at country level using separate flows for water withdrawal, water release and water evaporation. Handling multi-functional processes: the following PEF multi- functionality decision hierarchy is applied for resolving all multi- functionality problems: (1) subdivision or system expansion; (2) allocation based on a relevant underlying physical relationship (substitution may apply here); (3) allocation based on some other relationship. Direct land use change: GHG emissions from direct LUC allocated to good/service for 20 years after the LUC occurs, with IPCC default values. Carbon storage and delayed emissions: credits associated with temporary (carbon) storage or delayed emissions up to 300 years are not be considered. Emissions off-setting: are not included. Capital goods (including infrastructures) and their End of life: they are included. System boundaries: system boundaries include all processes linked to the product supply chain (e.g. maintenance). Time period: emissions and removals are modelled as if released or removed at the beginning of the assessment method. Fossil and biogenic carbon emissions and removals: removals and emissions are modelled as follows: All GHG emissions from fossil fuels (including peat and limestone) are modelled consistently with the most updated ILCD list of elementary flows. The non-fossil (biogenic) carbon flows are modelled consistently with the most updated ILCD list of elementary flows.

## Cut-off and completeness
There are no intentional cut-offs in the inventory no matter how small their contribution to all the EF impact categories is. Eventual cut-offs are in compliance with the Guide for EF compliant data sets (JRC 2020), i.e. only if below the 3% cut-off rule. The dataset dry mass and water balance has been checked to ensure the inventory is complete. Capital goods (e.g. infrastructure) and their end-of-life are included.

## Data selection and combination
These datasets include, in both their foreground and background data, links to EF3.0 compliant data.
The relevant background data on energy, transport, and End of Life are from the LCDN data node (http://lcdn.thinkstep.com/Node/).
All other background data in the supply of this product for which no EF3.0 process was available are from ecoinvent v3.7 database (www.ecoinvent.org) or other data sources.

## Data treatment and extrapolations
Several data sources have been used to model the inventory.

## Review details
Internal reviews have been asked to review the plausibility of the unit process, LCIA scores, and DQRs. Internal reviewers have also been asked to review the data for EF compliancy. The consortium is therefore responsible for aspects such as compliancy with the ILCD format, including validation in Look@LCI, and nomenclature.
Internal reviwers have been asked to judge based on the process name, that the unit process models in a complete and representative way the process in the requested location. The review encompassed the plausability of:
- exchanges with nature (elementary flows) as well as exchanges such as product and waste flows.
- meta information (general comment, technology comment, system boundaries, allocation, cut-off rules, etc.). Reviewers were asked to judge if the provided information is enough to understand the content of the process.
- LCIA scores
- DQRs including precision, technology, time and geography. As well as the overall DQR.
External reviewers have been asked to provide their expertise in the field of interest. External reviewers have been asked to review the unit process, including eventual methodological choices, the LCIA scores (provided with contribution scores as well), and DQRs. External reviewers have been provided all the information in a tool developed by the consortium for the purpose of this project.
External reviewers have been asked to judge based on the process name, that the unit process models in a complete and representative way the process in the requested location. The review encompassed:
- Plausability and completeness of exchanges with nature (elementary flows) as well as exchanges such as product and waste flows.
- Review of meta information (general comment, technology comment, system boundaries, allocation, cut-off rules, etc.). Reviewers were asked to judge if the provided information is enough to understand the content of the process.
- Review of properties (biogenic carbon and water content).
- Review of allocation keys.
- Plausability of LCIA scores calculated by the consortium.
- Plausability of DQRs including precision, technology, time and geography. As well as the overall DQR.

## Data sources
- Background Data for Representative products and organisations. EF 3.0 compliant (data stock)
- CONFIGURE YOUR: PRINTED TEXTILE COMPOSITION & CARE LABELS, https://wunderlabel.co.uk/care-labels/printed-textile-composition-labels/, Access Date: 22.03.2021
- Vignesh, K. S., Rajadesingu, S., & Arunachalam, K. D. (2021). Challenges, issues, and problems with zero-waste tools. In Concepts of Advanced Zero Waste Tools (pp. 69-90). Elsevier.
- Altun, S. (2012). Prediction of textile waste profile and recycling opportunities in Turk. Fibres & Textiles in Eastern Europe.

## Intended applications
Implementation of regular Product Environmental Footprint (PEF) studies and Organisation Environmental Footprint (OEF) studies exclusively under the specified Product groups and sectors as defined in the Product Environmental Footprint Category Rules (PEFCR) and Organisation Environmental Footprint Sectorial Rules (OEFSR) listed in http://ec.europa.eu/environment/eussd/smgp/PEFCR_OEFSR.htm
