# non-woven primary backing production, elementary; needle loom machine, heat setting stenter machine, and hot calendering machine; production mix, at plant; service

Dataset: ILCD process, Unit process, single operation
Geography: EU+EFTA+UK
Reference year: 2021
Valid until: 2024
Classification: Other Services / Other services
LCI method principle: Attributional
LCI method approaches: Allocation - market value
Completeness: All relevant flows quantified
Project: Provision of process-based 3.0 Environmental Footprint-compliant life cycle inventory datasets - Apparel 1 - contract number 070201/2020/840291/SER/ENV.B.1
Generated by: Life Cycle Indonesia
Owner: PRé Sustainability B.V.
Compliance: Environmental Footprint non-primary supporting data set; Environmental Footprint 3.1
Amounts: no units in this file; such an amount is in the reference unit of its flow, which a separate flow dataset defines
copyright: true
licenseType: Free of charge for some user types or use types
accessRestrictions: Free of charge for all final users implementing a regular Product Environmental Footprint (PEF) studies and Organisation Environmental Footprint (OEF) studies exclusively under the specified Product groups and sectors as defined in the Product Environmental Footprint Category Rules (PEFCR) and Organisation Environmental Footprint Sectorial Rules (OEFSR) listed in http://ec.europa.eu/environment/eussd/smgp/PEFCR_OEFSR.htm and in accordance with the terms and conditions of the EULA (available at https://ecoinvent.lca-data.com/) exclusively until 31st December 2024. Any use of this dataset or any derivative data not within the specific context of one of the PEF/OEF projects or after the end of 2024 is not permitted.

## General comment
Notice: this data set supersedes the EF3.0-compliant version (see link under "preceding data set version" below calculated with the EF3.0). The life cycle inventory is not changed from the original EF3.0 data set. The LCIA results are calculated based on the EF3.1 methods which provide updated characterisation factors in the following impact categories: Climate Change, Ecotoxicity freshwater, Photochemical Ozone Formation, Acidification, Human Toxicity non-cancer, and Human Toxicity cancer. The review report and the data quality ratings refer to the original results. The data set has been updated by the European Commission on the basis of the original EF3.0 data set delivered by the data provider.This sub-process has limited documentation only. For all detailed documentation of the full model to which this data set belongs (such as DQRs, review reports and other technical documentation), please see this process: non-woven primary backing production - EU+EFTA+UK []

## Technology and included processes
The process includes the steps of needle-entangling a nonwoven fabric, preferably a spun-bonded polyester web, from one or both sides, heat-setting the needled web, calendering and cooling the web and then saturating with a liquid curable elastomeric binder. The saturated web preferably is treated to remove the excess binder, heated to dry the web and cure the binder, and wound up on rolls. The resultant fabric is dimensionally stable and has elastomeric properties similar to a woven fabric which provide improved tuft grip and repairability when used as a backing for tufted carpeting (Aseree, 2006)

This process includes the use of the needle loom machine, heat setting stenter machine, and hot calendering machine. It has function of needle punching, drying and curing. The activity starts when the raw materials enter the process. The chemicals (latex and silicone), energy consumption and infrastructure of the machine are included. There is no direct emission to air since the emission comes from electricity usage, while hazardous waste comes from waste lube oil. In the model, the energy sources of machines used solely from electricity, steam (for heat setting stenter), and thermal oil (for hot calendering). The cooling process using the conventional method so it doesn't required energy. The consumption of lubricating oil for needle loom using a stitch bonding machine as a proxy, heat setting stenter using a thermobonding oven as a proxy, and the hot calendering machine using the hot calendering machine itself. In the model, the latex and silicone (elastomeric binder) is part of the final product. Hence, there is no waste or emission resulted from the usage of elastomeric binders. The raw material of the primary backing is polypropylene with 115 GSM output.

Aseree, Lester M. 2006. PROCESS OF PREPARING CARPET BACKING USING NONWOVEN MATERAL, https://patents.google.com/patent/US20070298208A1/en, United States
Domotex. 2020. Primary Backing, https://www.domotex.de/product/primary-backing/204373/K616779

## Reference product
- non-woven primary backing production // non-woven primary backing production // eu+efta+uk, elementary: 1

## Impact indicators
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
## Deviations from the LCI method principle
The background data uses:
- the \xe2\x80\x9cRecycled content cut-off\xe2\x80\x9d approach to allocate end-of-life by-products and secondary materials. This allocation is explained in the description of the recycled content system model (http://www.ecoinvent.org/database/system-models-in-ecoinvent-3/cut-off-system-model/allocation-cut-off-by-classification.html).
OR
- EF compliant data

## Deviations from the LCI method approaches
Background data:
- the \xe2\x80\x9cRecycled content cut-off\xe2\x80\x9d approach to allocate end-of-life by-products and secondary materials. This allocation is explained in the description of the recycled content system model (http://www.ecoinvent.org/database/system-models-in-ecoinvent-3/cut-off-system-model/allocation-cut-off-by-classification.html). The ecoinvent database mostly relies on “Allocation – market values” apart for few exceptions particularly in the energy sector. ecoinvent energy data is replaced with EF3.0 core data as per the EF guidelines version 2.0.
OR
- EF compliant data

## Modelling constants
All modelling constants follow the requirements listed in the Tender Specifications 070201/2020/SER/ENV.B1. Completeness: There are no intentional cut-offs in the inventory no matter how small their contribution to all the EF impact categories is. Eventual cut-offs are in compliance with the Guide for EF compliant data sets (JRC 2020), i.e. only if below the 3% cut-off rule. Water use: water use is modelled at country level using separate flows for water withdrawal, water release and water evaporation. Handling multi-functional processes: the following PEF multi- functionality decision hierarchy is applied for resolving all multi- functionality problems: (1) subdivision or system expansion; (2) allocation based on a relevant underlying physical relationship (substitution may apply here); (3) allocation based on some other relationship. Direct land use change: GHG emissions from direct LUC allocated to good/service for 20 years after the LUC occurs, with IPCC default values. Carbon storage and delayed emissions: credits associated with temporary (carbon) storage or delayed emissions up to 300 years are not be considered. Emissions off-setting: are not included. Capital goods (including infrastructures) and their End of life: they are included. System boundaries: system boundaries include all processes linked to the product supply chain (e.g. maintenance). Time period: emissions and removals are modelled as if released or removed at the beginning of the assessment method. Fossil and biogenic carbon emissions and removals: removals and emissions are modelled as follows: All GHG emissions from fossil fuels (including peat and limestone) are modelled consistently with the most updated ILCD list of elementary flows. The non-fossil (biogenic) carbon flows are modelled consistently with the most updated ILCD list of elementary flows.

## Cut-off and completeness
There are no intentional cut-offs in the inventory no matter how small their contribution to all the EF impact categories is. Eventual cut-offs are in compliance with the Guide for EF compliant data sets (JRC 2020), i.e. only if below the 3% cut-off rule. The dataset dry mass and water balance has been checked to ensure the inventory is complete. Capital goods (e.g. infrastructure) and their end-of-life are included.

## Data selection and combination
These datasets include, in both their foreground and background data, links to EF3.0 compliant data.
The relevant background data on energy, transport, and End of Life are from the LCDN data node (http://lcdn.thinkstep.com/Node/).
All other background data in the supply of this product for which no EF3.0 process was available are from ecoinvent v3.7 database (www.ecoinvent.org) or other data sources.

## Data treatment and extrapolations
Several data sources have been used to model the inventory.

## Use advice
This data set is a supporting sub-data set and must be used exclusively as sub-data set of its corresponding level-1 partly disaggregated data set (see “General comment” field for exact name and UUID).

## Data sources
- Background Data for Representative products and organisations. EF 3.0 compliant (data stock)
- UN Data (2018) Statistics Data for Lubricants Productions, http://data.un.org/Data.aspx?q=Lubricants&d=EDATA&f=cmID%3aLU, United Nations Statistics Division, Global.
- Cotex (2021) Stitch Bonding Machine, Catalog and Company Email, Suzhou Cotex International Co., Ltd., China.
- Lebon (2021) Nonwoven Oven Machine, Catalog and Company Messages, Qingdao Lebon Industry Co., Ltd., China
- Lebon Machinery (2021), Nonwoven Ironing Machine, Catalog and Company Massages, Qingdao Lebon Industry Co., Ltd., China
- Asree, Lester M. 2006. Process of Preparing Carpet Backing Using Nonwoven Material, https://patents.google.com/patent/US20070298208A1/en, United States
- Mustafa Sabri Ozen, Erhan Sancak, Mehmet Akalin (2015). The effect of needle-punched nonwoven fabric thickness on electromagnetic shielding effectiveness. Textile Research Journal, United Kingdom
- Yarun (2020) Primary Backing, http://www.yrunfabric.com/pinfo.php?title=Primary-Backing&mid=2&u=687, Yangzhou Yarun Fabric Co., Ltd., Yizheng, China https://www.domotex.de/product/primary-backing/204373/K616779
- Sail (2021) Pre Needle Loom Machine, E-mail Company, Sail Nonwoven Machinery Co. Ltd., China
- Sail (2021) Main Needle Loom Machine, E-mail Company, Sail Nonwoven Machinery Co. Ltd., China
- Finestart (2018) Heat Setting Stenter (Stenter Machine). http://www.finestart.com.cn/index.php?m=content&c=index&a=show&catid=54&id=61, Heat Setting Stenter (Stenter Machine), Shandong, China
- Lebon (2021) Nonwoven Ironing Machine, https://www.china-lebon.com/128.html, Qingdao Lebon Industry Co., Ltd., China Alibaba (2021) Nonwoven machinery calender ironing machine, https://www.alibaba.com/product-detail/Nonwoven-machinery-calender-ironing-machine-felt_62016069669.html?spm=a2700.galleryofferlist.normal_offer.d_title.54c95cb4TlzyTj, Alibaba Group, China

## Intended applications
Implementation of regular Product Environmental Footprint (PEF) studies and Organisation Environmental Footprint (OEF) studies exclusively under the specified Product groups and sectors as defined in the Product Environmental Footprint Category Rules (PEFCR) and Organisation Environmental Footprint Sectorial Rules (OEFSR) listed in http://ec.europa.eu/environment/eussd/smgp/PEFCR_OEFSR.htm
