# cotton fibre, organic; ginning process; at plant; dry mass = 0.9kg

Dataset: ILCD process, Partly terminated system
Geography: KG
Reference year: 2017
Valid until: 2024
Classification: Materials production / Food and renewable raw materials
LCI method principle: Attributional
LCI method approaches: Allocation - market value
Completeness: All relevant flows quantified
Project: Provision of process-based 3.0 Environmental Footprint-compliant life cycle inventory datasets - Renewable materials - contract number 070201/2020/840085/SER/ENV.B.1
Generated by: ecoinvent
Owner: ecoinvent
Compliance: ILCD Data Network - Entry-level; Suggestions for updating the PEF method 2019; ISO 14040 Environmental Management – Life Cycle Assessment – Principles and Framework, 2006; ISO 14044:2006. Environmental Management – Life Cycle Assessment – Requirements and guidelines.; Environmental Footprint 3.1
Review: Dependent internal review by Lucia Valsasina, Emilia Moreno Ruiz; Independent review panel by Philippa Notten
Data quality: Overall quality: Very good; Time representativeness: Very good; Geographical representativeness: Very good; Technological representativeness: Good; Precision: Good; Methodological appropriateness and consistency: Not applicable
Amounts: no units in this file; such an amount is in the reference unit of its flow, which a separate flow dataset defines
copyright: true
licenseType: Free of charge for some user types or use types
accessRestrictions: Free of charge for all final users implementing a regular Product Environmental Footprint (PEF) studies and Organisation Environmental Footprint (OEF) studies exclusively under the specified Product groups and sectors as defined in the Product Environmental Footprint Category Rules (PEFCR) and Organisation Environmental Footprint Sectorial Rules (OEFSR) listed in http://ec.europa.eu/environment/eussd/smgp/PEFCR_OEFSR.htm and in accordance with the terms and conditions of the EULA (available at https://ecoinvent.lca-data.com/) exclusively until 31st December 2024. Any use of this dataset or any derivative data not within the specific context of one of the PEF/OEF projects or after the end of 2024 is not permitted.

## General comment
Notice: this data set supersedes the EF3.0-compliant version (see link under "preceding data set version" below calculated with the EF3.0). The life cycle inventory is not changed from the original EF3.0 data set. The LCIA results are calculated based on the EF3.1 methods which provide updated characterisation factors in the following impact categories: Climate Change, Ecotoxicity freshwater, Photochemical Ozone Formation, Acidification, Human Toxicity non-cancer, and Human Toxicity cancer. The review report and the data quality ratings refer to the original results. The data set has been updated by the European Commission on the basis of the original EF3.0 data set delivered by the data provider.Ginning process involves the separation of cotton lint from cotton seed. Seed cotton is first dried and it may then be passed through a suitable cleaning equipment for the removal of dirt. The cleaned and dried seed cotton is then passed through cotton ginning setup where the the lint is separated from seeds.

## Technology and included processes
Ginning is a mechanical process to separate fibers from seeds. This dataset includes the transport from field to the ginning mill, drying the fibres, processing through the cotton gin and packaging materials.
Proxied by data from Tadjikistan.

## Parameters
- kg_0: 0.00013212
  Mass in kg, for industrial machine, heavy, unspecified; Freight train, diesel traction; EU+EFTA+UK
- km_0: 13.7378
  Distance in km, for industrial machine, heavy, unspecified; Freight train, diesel traction; EU+EFTA+UK
- kg_km_0: 0.00181505; = kg_0*km_0
  Transport amount in km*km, for industrial machine, heavy, unspecified; Freight train, diesel traction; EU+EFTA+UK
- kg_1: 0.00013212
  Mass in kg, for industrial machine, heavy, unspecified; Freight train, electricity traction; EU+EFTA+UK
- km_1: 4.14857
  Distance in km, for industrial machine, heavy, unspecified; Freight train, electricity traction; EU+EFTA+UK
- kg_km_1: 0.000548111; = kg_1*km_1
  Transport amount in km*km, for industrial machine, heavy, unspecified; Freight train, electricity traction; EU+EFTA+UK
- kg_2: 0.00013212
  Mass in kg, for industrial machine, heavy, unspecified; Freight train, average; EU+EFTA+UK
- km_2: 0.113617
  Distance in km, for industrial machine, heavy, unspecified; Freight train, average; EU+EFTA+UK
- kg_km_2: 1.50112e-5; = kg_2*km_2
  Transport amount in km*km, for industrial machine, heavy, unspecified; Freight train, average; EU+EFTA+UK
- kg_3: 0.00013212
  Mass in kg, for industrial machine, heavy, unspecified; Articulated lorry transport, Total weight >32 t, mix Euro 0-5; ROW w/o EU+EFTA
- km_3: 325
  Distance in km, for industrial machine, heavy, unspecified; Articulated lorry transport, Total weight >32 t, mix Euro 0-5; ROW w/o EU+EFTA
- kg_km_3: 0.0429391; = kg_3*km_3
  Transport amount in km*km, for industrial machine, heavy, unspecified; Articulated lorry transport, Total weight >32 t, mix Euro 0-5; ROW w/o EU+EFTA
- kg_4: 0.00013212
  Mass in kg, for industrial machine, heavy, unspecified; Transoceanic ship, containers; GLO
- km_4: 737
  Distance in km, for industrial machine, heavy, unspecified; Transoceanic ship, containers; GLO
- kg_km_4: 0.0973727; = kg_4*km_4
  Transport amount in km*km, for industrial machine, heavy, unspecified; Transoceanic ship, containers; GLO
- kg_5: 0.00013212
  Mass in kg, for industrial machine, heavy, unspecified; Barge; ROW w/o EU+EFTA
- km_5: 1
  Distance in km, for industrial machine, heavy, unspecified; Barge; ROW w/o EU+EFTA
- kg_km_5: 0.00013212; = kg_5*km_5
  Transport amount in km*km, for industrial machine, heavy, unspecified; Barge; ROW w/o EU+EFTA
- kg_6: 1.98107
  Mass in kg, for seed cotton, organic // seed cotton, organic // kg; Articulated lorry transport, Euro 4, Total weight >32 t; EU+EFTA+UK
- km_6: 5.08405
  Distance in km, for seed cotton, organic // seed cotton, organic // kg; Articulated lorry transport, Euro 4, Total weight >32 t; EU+EFTA+UK
- kg_km_6: 10.0719; = kg_6*km_6
  Transport amount in km*km, for seed cotton, organic // seed cotton, organic // kg; Articulated lorry transport, Euro 4, Total weight >32 t; EU+EFTA+UK

## Reference product
- cotton fibre, organic // cotton fibre, organic // kg: 1

## Inputs
- Electricity from Electricity grid mix 1kV-60kV - RAS w/o CN: 0.259075
- Transport of industrial machine, heavy, unspecified by Freight train, diesel traction - EU+EFTA+UK: 0.00181505; = kg_km_0
- Transport of industrial machine, heavy, unspecified by Freight train, electricity traction - EU+EFTA+UK: 0.000548111; = kg_km_1
- Transport of industrial machine, heavy, unspecified by Freight train, average - EU+EFTA+UK: 1.50112e-5; = kg_km_2
- Transport of industrial machine, heavy, unspecified by Articulated lorry transport, Total weight >32 t, mix Euro 0-5 - ROW w/o EU+EFTA: 0.0429391; = kg_km_3
- Transport of industrial machine, heavy, unspecified by Transoceanic ship, containers - GLO: 0.0973727; = kg_km_4
- Transport of industrial machine, heavy, unspecified by Barge - ROW w/o EU+EFTA: 0.00013212; = kg_km_5
- Transport of seed cotton, organic // seed cotton, organic // kg by Articulated lorry transport, Euro 4, Total weight >32 t - EU+EFTA+UK: 10.0719; = kg_km_6
- cotton fibre, organic // cotton fibre, organic // kg, blackbox: 1
- cotton fibre, organic // cotton fibre, organic // kg, elementary: 1

## Impact indicators
- Eutrophication marine: 0.0355259
- Ecotoxicity, freshwater: 8.08896
- Land use: 975.764
- Water use: 444.244
- Resource use, minerals and metals: 1.12828e-5
- Resource use, fossils: 10.514
- Climate change: 1.14951
- Ozone depletion: 2.20061e-10
- Human toxicity, cancer: -2.57639e-9
- Human toxicity, non-cancer: -8.25306e-8
- EF-particulate Matter: 3.65736e-7
- Ionising radiation, human health: 0.0173178
- Photochemical ozone formation - human health: 0.00747867
- Acidification: 0.0426023
- Eutrophication, terrestrial: 0.17865
- Eutrophication, freshwater: 0.00461279

## Deviations from the LCI method principle
The background data uses:
- the \xe2\x80\x9cRecycled content cut-off\xe2\x80\x9d approach to allocate end-of-life by-products and secondary materials. This allocation is explained in the description of the recycled content system model (http://www.ecoinvent.org/database/system-models-in-ecoinvent-3/cut-off-system-model/allocation-cut-off-by-classification.html).
OR
- EF compliant data

## Deviations from the LCI method approaches
Background data:
- the \xe2\x80\x9cRecycled content cut-off\xe2\x80\x9d approach to allocate end-of-life by-products and secondary materials. This allocation is explained in the description of the recycled content system model (http://www.ecoinvent.org/database/system-models-in-ecoinvent-3/cut-off-system-model/allocation-cut-off-by-classification.html). The ecoinvent database mostly relies on “Allocation – market values” apart for few exceptions particularly in the energy sector. ecoinvent energy data is replaced with EF3.0 core data as per the EF guidelines version 2.0.
OR
- EF compliant data

## Modelling constants
All modelling constants follow the requirements listed in the Tender Specifications 070201/2020/SER/ENV.B1. Completeness: There are no intentional cut-offs in the inventory no matter how small their contribution to all the EF impact categories is. Eventual cut-offs are in compliance with the Guide for EF compliant data sets (JRC 2020), i.e. only if below the 3% cut-off rule. Water use: water use is modelled at country level using separate flows for water withdrawal, water release and water evaporation. Handling multi-functional processes: the following PEF multi- functionality decision hierarchy is applied for resolving all multi- functionality problems: (1) subdivision or system expansion; (2) allocation based on a relevant underlying physical relationship (substitution may apply here); (3) allocation based on some other relationship. Direct land use change: GHG emissions from direct LUC allocated to good/service for 20 years after the LUC occurs, with IPCC default values. Carbon storage and delayed emissions: credits associated with temporary (carbon) storage or delayed emissions up to 300 years are not be considered. Emissions off-setting: are not included. Capital goods (including infrastructures) and their End of life: they are included. System boundaries: system boundaries include all processes linked to the product supply chain (e.g. maintenance). Time period: emissions and removals are modelled as if released or removed at the beginning of the assessment method. Fossil and biogenic carbon emissions and removals: removals and emissions are modelled as follows: All GHG emissions from fossil fuels (including peat and limestone) are modelled consistently with the most updated ILCD list of elementary flows. The non-fossil (biogenic) carbon flows are modelled consistently with the most updated ILCD list of elementary flows.

## Cut-off and completeness
There are no intentional cut-offs in the inventory no matter how small their contribution to all the EF impact categories is. Eventual cut-offs are in compliance with the Guide for EF compliant data sets (JRC 2020), i.e. only if below the 3% cut-off rule. The dataset dry mass and water balance has been checked to ensure the inventory is complete. Capital goods (e.g. infrastructure) and their end-of-life are included.

## Data selection and combination
These datasets include, in both their foreground and background data, links to EF3.0 compliant data.
The relevant background data on energy, transport, and End of Life are from the LCDN data node (http://lcdn.thinkstep.com/Node/).
All other background data in the supply of this product for which no EF3.0 process was available are from ecoinvent v3.7 database (www.ecoinvent.org) or other data sources.

## Data treatment and extrapolations
Several data sources have been used to model the inventory.

## Review details
Internal reviews have been asked to review the plausibility of the unit process, LCIA scores, and DQRs. Internal reviewers have also been asked to review the data for EF compliancy. The consortium is therefore responsible for aspects such as compliancy with the ILCD format, including validation in Look@LCI, and nomenclature.
Internal reviwers have been asked to judge based on the process name, that the unit process models in a complete and representative way the process in the requested location. The review encompassed the plausability of:
- exchanges with nature (elementary flows) as well as exchanges such as product and waste flows.
- meta information (general comment, technology comment, system boundaries, allocation, cut-off rules, etc.). Reviewers were asked to judge if the provided information is enough to understand the content of the process.
- LCIA scores
- DQRs including precision, technology, time and geography. As well as the overall DQR.
External reviewers have been asked to provide their expertise in the field of interest. External reviewers have been asked to review the unit process, including eventual methodological choices, the LCIA scores (provided with contribution scores as well), and DQRs. External reviewers have been provided all the information in a tool developed by the consortium for the purpose of this project.
External reviewers have been asked to judge based on the process name, that the unit process models in a complete and representative way the process in the requested location. The review encompassed:
- Plausability and completeness of exchanges with nature (elementary flows) as well as exchanges such as product and waste flows.
- Review of meta information (general comment, technology comment, system boundaries, allocation, cut-off rules, etc.). Reviewers were asked to judge if the provided information is enough to understand the content of the process.
- Review of properties (biogenic carbon and water content).
- Review of allocation keys.
- Plausability of LCIA scores calculated by the consortium.
- Plausability of DQRs including precision, technology, time and geography. As well as the overall DQR.

## Data sources
- Background Data for Representative products and organisations. EF 3.0 compliant (data stock)
- Moreira Cardoso, Albino André (2013): Life Cycle Assessment of two textile products, Master thesis university of Porto
- Faist Emmenegger M., Bajaj S., Datta A., Nigam M., Hossain M. M., Hossain M. N., (2018). Life Cycle Inventories of textile products - India and Bangladesh. ecoinvent Association, Zürich, Switzerland.
- Hardin IV, R.G. and P.A. Funk. Energy Monitoring in Gins - 2012 Prelimi_x0002_nary Results. Proceedings of Beltwide Cotton Prod. Res. Conf., National Cotton Council, pp 972-977

## Intended applications
Implementation of regular Product Environmental Footprint (PEF) studies and Organisation Environmental Footprint (OEF) studies exclusively under the specified Product groups and sectors as defined in the Product Environmental Footprint Category Rules (PEFCR) and Organisation Environmental Footprint Sectorial Rules (OEFSR) listed in http://ec.europa.eu/environment/eussd/smgp/PEFCR_OEFSR.htm
