# wood residues, softwood; technology mix; production mix, at plant; measured as dry mass

Dataset: ILCD process, Partly terminated system
Geography: EU+EFTA+UK
Reference year: 2018
Valid until: 2024
Classification: Materials production / Wood
LCI method principle: Attributional
LCI method approaches: Allocation - market value
Completeness: All relevant flows quantified
Project: Provision of process-based 3.0 Environmental Footprint-compliant life cycle inventory datasets - Renewable materials - contract number 070201/2020/840085/SER/ENV.B.1
Generated by: ACV Brasil
Owner: ecoinvent
Compliance: ILCD Data Network - Entry-level; Suggestions for updating the PEF method 2019; ISO 14040 Environmental Management – Life Cycle Assessment – Principles and Framework, 2006; ISO 14044:2006. Environmental Management – Life Cycle Assessment – Requirements and guidelines.; Environmental Footprint 3.1
Review: Dependent internal review by Hans Blonk, Emilia Moreno Ruiz; Independent review panel by Jens Lansche
Data quality: Overall quality: Good; Time representativeness: Good; Geographical representativeness: Very good; Technological representativeness: Very good; Precision: Good; Methodological appropriateness and consistency: Not applicable
Amounts: no units in this file; such an amount is in the reference unit of its flow, which a separate flow dataset defines
copyright: true
licenseType: Free of charge for some user types or use types
accessRestrictions: Free of charge for all final users implementing a regular Product Environmental Footprint (PEF) studies and Organisation Environmental Footprint (OEF) studies exclusively under the specified Product groups and sectors as defined in the Product Environmental Footprint Category Rules (PEFCR) and Organisation Environmental Footprint Sectorial Rules (OEFSR) listed in http://ec.europa.eu/environment/eussd/smgp/PEFCR_OEFSR.htm and in accordance with the terms and conditions of the EULA (available at https://ecoinvent.lca-data.com/) exclusively until 31st December 2024. Any use of this dataset or any derivative data not within the specific context of one of the PEF/OEF projects or after the end of 2024 is not permitted.

## General comment
Notice: this data set supersedes the EF3.0-compliant version (see link under "preceding data set version" below calculated with the EF3.0). The life cycle inventory is not changed from the original EF3.0 data set. The LCIA results are calculated based on the EF3.1 methods which provide updated characterisation factors in the following impact categories: Climate Change, Ecotoxicity freshwater, Photochemical Ozone Formation, Acidification, Human Toxicity non-cancer, and Human Toxicity cancer. The review report and the data quality ratings refer to the original results. The data set has been updated by the European Commission on the basis of the original EF3.0 data set delivered by the data provider.This dataset represents the production of wood residues from softwood forestry measured as dry mass. Wood residues refer to the energy wood (i.e. cleft timber and bundles) produced in forestry activities of conifer tree species. Wood residues are modelled as co-products from the production of logs, pulpwood and wood chips.

## Technology and included processes
The activity of pine cultivation starts with site preparation, including seedling and/or natural regeneration, thinnings, and the final felling. This dataset is modelled as the average of the activities in Sweeden, Germany and Finland, weighted by their production volumes. These regions represent 49% of the total removals of softwood (roundwood) in Europe during 2019 (eurostat, 2021).
Softwood removals during 2019:
Sweeden: 66,048,000 m³
Germany: 56,052,860 m³
Finland: 50,152,21 m³
European Union – 28 countries: 352,966,200 m³
Average dry wood density (kg dry matter/ dry volume): 434.9 kg/m³
References:
Eurostat (2021). Roundwood removals by type of wood and assortment. Tree species: Coniferous. Wood products: Roundwood under bark. Available at: ec.europa.eu/eurostat/databrowser/bookmark/2fe47d27-a1ea-4028-a4cc-06c1f8725af0?lang=en [Accessed on 25/06/2021]

## Parameters
- kg_0: 15.6183
  Mass in kg, for gravel, crushed; Freight train, diesel traction; EU+EFTA+UK
- km_0: 9.04586
  Distance in km, for gravel, crushed; Freight train, diesel traction; EU+EFTA+UK
- kg_km_0: 141.281; = kg_0*km_0
  Transport amount in km*km, for gravel, crushed; Freight train, diesel traction; EU+EFTA+UK
- kg_1: 15.6183
  Mass in kg, for gravel, crushed; Freight train, electricity traction; EU+EFTA+UK
- km_1: 2.98144
  Distance in km, for gravel, crushed; Freight train, electricity traction; EU+EFTA+UK
- kg_km_1: 46.5649; = kg_1*km_1
  Transport amount in km*km, for gravel, crushed; Freight train, electricity traction; EU+EFTA+UK
- kg_2: 15.6183
  Mass in kg, for gravel, crushed; Freight train, average; EU+EFTA+UK
- km_2: 0.0726988
  Distance in km, for gravel, crushed; Freight train, average; EU+EFTA+UK
- kg_km_2: 1.13543; = kg_2*km_2
  Transport amount in km*km, for gravel, crushed; Freight train, average; EU+EFTA+UK
- kg_3: 15.6183
  Mass in kg, for gravel, crushed; Barge; EU+EFTA+UK
- km_3: 0.690346
  Distance in km, for gravel, crushed; Barge; EU+EFTA+UK
- kg_km_3: 10.782; = kg_3*km_3
  Transport amount in km*km, for gravel, crushed; Barge; EU+EFTA+UK
- kg_4: 15.6183
  Mass in kg, for gravel, crushed; Articulated lorry transport, Total weight >32 t, mix Euro 0-5; ROW w/o EU+EFTA
- km_4: 32.3
  Distance in km, for gravel, crushed; Articulated lorry transport, Total weight >32 t, mix Euro 0-5; ROW w/o EU+EFTA
- kg_km_4: 504.47; = kg_4*km_4
  Transport amount in km*km, for gravel, crushed; Articulated lorry transport, Total weight >32 t, mix Euro 0-5; ROW w/o EU+EFTA
- kg_5: 15.6183
  Mass in kg, for gravel, crushed; Transoceanic ship, bulk; GLO
- km_5: 72.7
  Distance in km, for gravel, crushed; Transoceanic ship, bulk; GLO
- kg_km_5: 1135.45; = kg_5*km_5
  Transport amount in km*km, for gravel, crushed; Transoceanic ship, bulk; GLO
- kg_6: 15.6183
  Mass in kg, for gravel, crushed; Articulated lorry transport, Total weight <7.5 t, mix Euro 0-5; EU+EFTA+UK
- km_6: 0.678647
  Distance in km, for gravel, crushed; Articulated lorry transport, Total weight <7.5 t, mix Euro 0-5; EU+EFTA+UK
- kg_km_6: 10.5993; = kg_6*km_6
  Transport amount in km*km, for gravel, crushed; Articulated lorry transport, Total weight <7.5 t, mix Euro 0-5; EU+EFTA+UK
- kg_7: 15.6183
  Mass in kg, for gravel, crushed; Barge; ROW w/o EU+EFTA
- km_7: 1.40965
  Distance in km, for gravel, crushed; Barge; ROW w/o EU+EFTA
- kg_km_7: 22.0163; = kg_7*km_7
  Transport amount in km*km, for gravel, crushed; Barge; ROW w/o EU+EFTA

## Reference product
- wood residues, softwood // wood residues, softwood // eu+efta+uk: 1

## Inputs
- Transport of gravel, crushed by Freight train, diesel traction - EU+EFTA+UK: 141.281; = kg_km_0
- Transport of gravel, crushed by Freight train, electricity traction - EU+EFTA+UK: 46.5649; = kg_km_1
- Transport of gravel, crushed by Freight train, average - EU+EFTA+UK: 1.13543; = kg_km_2
- Transport of gravel, crushed by Barge - EU+EFTA+UK: 10.782; = kg_km_3
- Transport of gravel, crushed by Articulated lorry transport, Total weight >32 t, mix Euro 0-5 - ROW w/o EU+EFTA: 504.47; = kg_km_4
- Transport of gravel, crushed by Transoceanic ship, bulk - GLO: 1135.45; = kg_km_5
- Transport of gravel, crushed by Articulated lorry transport, Total weight <7.5 t, mix Euro 0-5 - EU+EFTA+UK: 10.5993; = kg_km_6
- Transport of gravel, crushed by Barge - ROW w/o EU+EFTA: 22.0163; = kg_km_7
- wood residues, softwood // wood residues, softwood // eu+efta+uk, blackbox: 1
- wood residues, softwood // wood residues, softwood // eu+efta+uk, elementary: 1

## Impact indicators
- Eutrophication marine: 0.0335014
- Ecotoxicity, freshwater: 141.703
- Land use: 141329
- Water use: 2.34158
- Resource use, minerals and metals: 1.99269e-5
- Resource use, fossils: 203.314
- Climate change: 14.9399
- Ozone depletion: 2.63809e-8
- Human toxicity, cancer: 1.23059e-8
- Human toxicity, non-cancer: 1.05484e-7
- EF-particulate Matter: 5.32986e-7
- Ionising radiation, human health: 0.281871
- Photochemical ozone formation - human health: 0.130634
- Acidification: 0.0615024
- Eutrophication, terrestrial: 0.218772
- Eutrophication, freshwater: 0.00174778

## Deviations from the LCI method principle
The background data uses:
- the \xe2\x80\x9cRecycled content cut-off\xe2\x80\x9d approach to allocate end-of-life by-products and secondary materials. This allocation is explained in the description of the recycled content system model (http://www.ecoinvent.org/database/system-models-in-ecoinvent-3/cut-off-system-model/allocation-cut-off-by-classification.html).
OR
- EF compliant data

## Deviations from the LCI method approaches
Background data:
- the \xe2\x80\x9cRecycled content cut-off\xe2\x80\x9d approach to allocate end-of-life by-products and secondary materials. This allocation is explained in the description of the recycled content system model (http://www.ecoinvent.org/database/system-models-in-ecoinvent-3/cut-off-system-model/allocation-cut-off-by-classification.html). The ecoinvent database mostly relies on “Allocation – market values” apart for few exceptions particularly in the energy sector. ecoinvent energy data is replaced with EF3.0 core data as per the EF guidelines version 2.0.
OR
- EF compliant data

## Modelling constants
All modelling constants follow the requirements listed in the Tender Specifications 070201/2020/SER/ENV.B1. Completeness: There are no intentional cut-offs in the inventory no matter how small their contribution to all the EF impact categories is. Eventual cut-offs are in compliance with the Guide for EF compliant data sets (JRC 2020), i.e. only if below the 3% cut-off rule. Water use: water use is modelled at country level using separate flows for water withdrawal, water release and water evaporation. Handling multi-functional processes: the following PEF multi- functionality decision hierarchy is applied for resolving all multi- functionality problems: (1) subdivision or system expansion; (2) allocation based on a relevant underlying physical relationship (substitution may apply here); (3) allocation based on some other relationship. Direct land use change: GHG emissions from direct LUC allocated to good/service for 20 years after the LUC occurs, with IPCC default values. Carbon storage and delayed emissions: credits associated with temporary (carbon) storage or delayed emissions up to 300 years are not be considered. Emissions off-setting: are not included. Capital goods (including infrastructures) and their End of life: they are included. System boundaries: system boundaries include all processes linked to the product supply chain (e.g. maintenance). Time period: emissions and removals are modelled as if released or removed at the beginning of the assessment method. Fossil and biogenic carbon emissions and removals: removals and emissions are modelled as follows: All GHG emissions from fossil fuels (including peat and limestone) are modelled consistently with the most updated ILCD list of elementary flows. The non-fossil (biogenic) carbon flows are modelled consistently with the most updated ILCD list of elementary flows.

## Cut-off and completeness
There are no intentional cut-offs in the inventory no matter how small their contribution to all the EF impact categories is. Eventual cut-offs are in compliance with the Guide for EF compliant data sets (JRC 2020), i.e. only if below the 3% cut-off rule. The dataset dry mass and water balance has been checked to ensure the inventory is complete. Capital goods (e.g. infrastructure) and their end-of-life are included.

## Data selection and combination
These datasets include, in both their foreground and background data, links to EF3.0 compliant data.
The relevant background data on energy, transport, and End of Life are from the LCDN data node (http://lcdn.thinkstep.com/Node/).
All other background data in the supply of this product for which no EF3.0 process was available are from ecoinvent v3.7 database (www.ecoinvent.org) or other data sources.

## Data treatment and extrapolations
Several data sources have been used to model the inventory.

## Review details
Internal reviews have been asked to review the plausibility of the unit process, LCIA scores, and DQRs. Internal reviewers have also been asked to review the data for EF compliancy. The consortium is therefore responsible for aspects such as compliancy with the ILCD format, including validation in Look@LCI, and nomenclature.
Internal reviwers have been asked to judge based on the process name, that the unit process models in a complete and representative way the process in the requested location. The review encompassed the plausability of:
- exchanges with nature (elementary flows) as well as exchanges such as product and waste flows.
- meta information (general comment, technology comment, system boundaries, allocation, cut-off rules, etc.). Reviewers were asked to judge if the provided information is enough to understand the content of the process.
- LCIA scores
- DQRs including precision, technology, time and geography. As well as the overall DQR.
External reviewers have been asked to provide their expertise in the field of interest. External reviewers have been asked to review the unit process, including eventual methodological choices, the LCIA scores (provided with contribution scores as well), and DQRs. External reviewers have been provided all the information in a tool developed by the consortium for the purpose of this project.
External reviewers have been asked to judge based on the process name, that the unit process models in a complete and representative way the process in the requested location. The review encompassed:
- Plausability and completeness of exchanges with nature (elementary flows) as well as exchanges such as product and waste flows.
- Review of meta information (general comment, technology comment, system boundaries, allocation, cut-off rules, etc.). Reviewers were asked to judge if the provided information is enough to understand the content of the process.
- Review of properties (biogenic carbon and water content).
- Review of allocation keys.
- Plausability of LCIA scores calculated by the consortium.
- Plausability of DQRs including precision, technology, time and geography. As well as the overall DQR.

## Data sources
- Background Data for Representative products and organisations. EF 3.0 compliant (data stock)
- Eurostat (2021). Roundwood removals by type of wood and assortment. Tree species: Coniferous. Wood products: Roundwood under bark. Available at: ec.europa.eu/eurostat/databrowser/bookmark/2fe47d27-a1ea-4028-a4cc-06c1f8725af0?lang=en [Accessed on 25/06/2021]

## Intended applications
Implementation of regular Product Environmental Footprint (PEF) studies and Organisation Environmental Footprint (OEF) studies exclusively under the specified Product groups and sectors as defined in the Product Environmental Footprint Category Rules (PEFCR) and Organisation Environmental Footprint Sectorial Rules (OEFSR) listed in http://ec.europa.eu/environment/eussd/smgp/PEFCR_OEFSR.htm
