# leather, pu synthetic, solvent-based; solvent-based; production mix, at plant; 1kg

Dataset: ILCD process, Partly terminated system
Geography: GLO
Reference year: 2018
Valid until: 2024
Classification: Systems / Textiles, furnitures and other interiors
LCI method principle: Attributional
LCI method approaches: Other
Completeness: All relevant flows quantified
Project: Provision of process-based 3.0 Environmental Footprint-compliant life cycle inventory datasets - Apparel 1 - contract number 070201/2020/840291/SER/ENV.B.1
Generated by: PRé Sustainability B.V.
Owner: PRé Sustainability B.V.
Compliance: ILCD Data Network - Entry-level; Suggestions for updating the PEF method 2019; ISO 14040 Environmental Management – Life Cycle Assessment – Principles and Framework, 2006; ISO 14044:2006. Environmental Management – Life Cycle Assessment – Requirements and guidelines.; Environmental Footprint 3.1
Review: Dependent internal review by Avraam Symeonidis, Marisa Vieira; Independent review panel by Madhuri Nigam
Data quality: Overall quality: Good; Time representativeness: Very good; Geographical representativeness: Fair; Technological representativeness: Good; Precision: Fair; Methodological appropriateness and consistency: Not applicable
Amounts: no units in this file; such an amount is in the reference unit of its flow, which a separate flow dataset defines
copyright: true
licenseType: Free of charge for some user types or use types
accessRestrictions: Free of charge for all final users implementing a regular Product Environmental Footprint (PEF) studies and Organisation Environmental Footprint (OEF) studies exclusively under the specified Product groups and sectors as defined in the Product Environmental Footprint Category Rules (PEFCR) and Organisation Environmental Footprint Sectorial Rules (OEFSR) listed in http://ec.europa.eu/environment/eussd/smgp/PEFCR_OEFSR.htm and in accordance with the terms and conditions of the EULA (available at https://ecoinvent.lca-data.com/) exclusively until 31st December 2024. Any use of this dataset or any derivative data not within the specific context of one of the PEF/OEF projects or after the end of 2024 is not permitted.

## General comment
Notice: this data set supersedes the EF3.0-compliant version (see link under "preceding data set version" below calculated with the EF3.0). The life cycle inventory is not changed from the original EF3.0 data set. The LCIA results are calculated based on the EF3.1 methods which provide updated characterisation factors in the following impact categories: Climate Change, Ecotoxicity freshwater, Photochemical Ozone Formation, Acidification, Human Toxicity non-cancer, and Human Toxicity cancer. The review report and the data quality ratings refer to the original results. The data set has been updated by the European Commission on the basis of the original EF3.0 data set delivered by the data provider.PU leather is a combination of a textile baseline and a synthetic material coating that imitates natural leather.

## Technology and included processes
In this model, the baseline is formed by 30% knitted polyester fabric. The coating, which makes up 60% of the PU leather composition, consists of polyurethane, representing the standard material for PU leather. The remaining 10% of the input is different for solvent and water-based coatings, and illustrates typical inputs of chemicals and additives for the particular coating technology according to Maciel et al. (2017). Electricity and heat inputs for PU leather production are based on confidential data from a company that specializes in the production of both solvent and water-based coated PU leather.

Further information is not available due to confidentiality reasons.

## Parameters
- kg_0: 2.778
  Mass in kg, for polyurethane foam // polyurethane foam production // glo; Articulated lorry transport, Total weight >32 t, mix Euro 0-5; ROW w/o EU+EFTA
- km_0: 1000
  Distance in km, for polyurethane foam // polyurethane foam production // glo; Articulated lorry transport, Total weight >32 t, mix Euro 0-5; ROW w/o EU+EFTA
- kg_km_0: 2778; = kg_0*km_0
  Transport amount in km*km, for polyurethane foam // polyurethane foam production // glo; Articulated lorry transport, Total weight >32 t, mix Euro 0-5; ROW w/o EU+EFTA
- kg_1: 1.389
  Mass in kg, for polyethylene terephthalate, mix // polyethylene terephthalate (pet) production, blend of bio- based and fossil // glo; Articulated lorry transport, Total weight >32 t, mix Euro 0-5; ROW w/o EU+EFTA
- km_1: 1000
  Distance in km, for polyethylene terephthalate, mix // polyethylene terephthalate (pet) production, blend of bio- based and fossil // glo; Articulated lorry transport, Total weight >32 t, mix Euro 0-5; ROW w/o EU+EFTA
- kg_km_1: 1389; = kg_1*km_1
  Transport amount in km*km, for polyethylene terephthalate, mix // polyethylene terephthalate (pet) production, blend of bio- based and fossil // glo; Articulated lorry transport, Total weight >32 t, mix Euro 0-5; ROW w/o EU+EFTA
- kg_2: 1.389
  Mass in kg, for partially oriented yarn (poy), only processing energy // partially oriented yarn (poy), only processing energy // glo; Articulated lorry transport, Total weight >32 t, mix Euro 0-5; ROW w/o EU+EFTA
- km_2: 1000
  Distance in km, for partially oriented yarn (poy), only processing energy // partially oriented yarn (poy), only processing energy // glo; Articulated lorry transport, Total weight >32 t, mix Euro 0-5; ROW w/o EU+EFTA
- kg_km_2: 1389; = kg_2*km_2
  Transport amount in km*km, for partially oriented yarn (poy), only processing energy // partially oriented yarn (poy), only processing energy // glo; Articulated lorry transport, Total weight >32 t, mix Euro 0-5; ROW w/o EU+EFTA
- kg_3: 0.5093
  Mass in kg, for colours and additives, for solvent based coating, at plant // colours and additives, for solvent based coating // glo; Articulated lorry transport, Total weight >32 t, mix Euro 0-5; ROW w/o EU+EFTA
- km_3: 1000
  Distance in km, for colours and additives, for solvent based coating, at plant // colours and additives, for solvent based coating // glo; Articulated lorry transport, Total weight >32 t, mix Euro 0-5; ROW w/o EU+EFTA
- kg_km_3: 509.3; = kg_3*km_3
  Transport amount in km*km, for colours and additives, for solvent based coating, at plant // colours and additives, for solvent based coating // glo; Articulated lorry transport, Total weight >32 t, mix Euro 0-5; ROW w/o EU+EFTA
- kg_4: 2.778
  Mass in kg, for polyurethane foam // polyurethane foam production // glo; Transoceanic ship, containers; GLO
- km_4: 18000
  Distance in km, for polyurethane foam // polyurethane foam production // glo; Transoceanic ship, containers; GLO
- kg_km_4: 50004; = kg_4*km_4
  Transport amount in km*km, for polyurethane foam // polyurethane foam production // glo; Transoceanic ship, containers; GLO
- kg_5: 1.389
  Mass in kg, for polyethylene terephthalate, mix // polyethylene terephthalate (pet) production, blend of bio- based and fossil // glo; Transoceanic ship, containers; GLO
- km_5: 18000
  Distance in km, for polyethylene terephthalate, mix // polyethylene terephthalate (pet) production, blend of bio- based and fossil // glo; Transoceanic ship, containers; GLO
- kg_km_5: 25002; = kg_5*km_5
  Transport amount in km*km, for polyethylene terephthalate, mix // polyethylene terephthalate (pet) production, blend of bio- based and fossil // glo; Transoceanic ship, containers; GLO
- kg_6: 1.389
  Mass in kg, for partially oriented yarn (poy), only processing energy // partially oriented yarn (poy), only processing energy // glo; Transoceanic ship, containers; GLO
- km_6: 18000
  Distance in km, for partially oriented yarn (poy), only processing energy // partially oriented yarn (poy), only processing energy // glo; Transoceanic ship, containers; GLO
- kg_km_6: 25002; = kg_6*km_6
  Transport amount in km*km, for partially oriented yarn (poy), only processing energy // partially oriented yarn (poy), only processing energy // glo; Transoceanic ship, containers; GLO
- kg_7: 0.5093
  Mass in kg, for colours and additives, for solvent based coating, at plant // colours and additives, for solvent based coating // glo; Transoceanic ship, containers; GLO
- km_7: 18000
  Distance in km, for colours and additives, for solvent based coating, at plant // colours and additives, for solvent based coating // glo; Transoceanic ship, containers; GLO
- kg_km_7: 9167.4; = kg_7*km_7
  Transport amount in km*km, for colours and additives, for solvent based coating, at plant // colours and additives, for solvent based coating // glo; Transoceanic ship, containers; GLO

## Reference product
- leather, pu synthetic, solvent-based // leather, pu synthetic, solvent-based // glo: 1

## Inputs
- Electricity from Electricity grid mix 1kV-60kV - AU: 0.307432
- Electricity from Electricity grid mix 1kV-60kV - EU+EFTA+UK: 4.53138
- Electricity from Electricity grid mix 1kV-60kV - NZ: 0.058801
- Electricity from Electricity grid mix 1kV-60kV - RAF: 0.990357
- Electricity from Electricity grid mix 1kV-60kV - RNA: 6.63155
- Electricity from Electricity grid mix 1kV-60kV - RSA: 2.25018
- Electricity from Electricity grid mix 1kV-60kV - RU: 1.32603
- Thermal energy (MJ) from Thermal energy from natural gas - EU+EFTA+UK: 24.2381
- Thermal energy (MJ) from Thermal energy from natural gas - ROW: 24.2381
- Transport of polyurethane foam // polyurethane foam production // glo by Articulated lorry transport, Total weight >32 t, mix Euro 0-5 - ROW w/o EU+EFTA: 2778; = kg_km_0
- Transport of polyethylene terephthalate, mix // polyethylene terephthalate (pet) production, blend of bio- based and fossil // glo by Articulated lorry transport, Total weight >32 t, mix Euro 0-5 - ROW w/o EU+EFTA: 1389; = kg_km_1
- Transport of partially oriented yarn (poy), only processing energy // partially oriented yarn (poy), only processing energy // glo by Articulated lorry transport, Total weight >32 t, mix Euro 0-5 - ROW w/o EU+EFTA: 1389; = kg_km_2
- Transport of colours and additives, for solvent based coating, at plant // colours and additives, for solvent based coating // glo by Articulated lorry transport, Total weight >32 t, mix Euro 0-5 - ROW w/o EU+EFTA: 509.3; = kg_km_3
- Transport of polyurethane foam // polyurethane foam production // glo by Transoceanic ship, containers - GLO: 50004; = kg_km_4
- Transport of polyethylene terephthalate, mix // polyethylene terephthalate (pet) production, blend of bio- based and fossil // glo by Transoceanic ship, containers - GLO: 25002; = kg_km_5
- Transport of partially oriented yarn (poy), only processing energy // partially oriented yarn (poy), only processing energy // glo by Transoceanic ship, containers - GLO: 25002; = kg_km_6
- Transport of colours and additives, for solvent based coating, at plant // colours and additives, for solvent based coating // glo by Transoceanic ship, containers - GLO: 9167.4; = kg_km_7
- Electricity from Electricity grid mix 1kV-60kV - CN: 6.79508
- Electricity from Electricity grid mix 1kV-60kV - RAS w/o CN: 7.44495
- leather, pu synthetic, solvent-based // leather, pu synthetic, solvent-based // glo, blackbox: 1
- leather, pu synthetic, solvent-based // leather, pu synthetic, solvent-based // glo, elementary: 1

## Impact indicators
- Eutrophication marine: 0.0629373
- Ecotoxicity, freshwater: 286.986
- Land use: 99.8513
- Water use: -0.673265
- Resource use, minerals and metals: 0.000166663
- Resource use, fossils: 674.08
- Climate change: 37.4863
- Ozone depletion: 4.99577e-7
- Human toxicity, cancer: 2.24028e-8
- Human toxicity, non-cancer: 1.96343e-7
- EF-particulate Matter: 5.69394e-6
- Ionising radiation, human health: 2.24144
- Photochemical ozone formation - human health: 0.166698
- Acidification: 0.265816
- Eutrophication, terrestrial: 0.588299
- Eutrophication, freshwater: 0.000791627

## Deviations from the LCI method approaches
Background data:
- the \xe2\x80\x9cRecycled content cut-off\xe2\x80\x9d approach to allocate end-of-life by-products and secondary materials. This allocation is explained in the description of the recycled content system model (http://www.ecoinvent.org/database/system-models-in-ecoinvent-3/cut-off-system-model/allocation-cut-off-by-classification.html). The ecoinvent database mostly relies on “Allocation – market values” apart for few exceptions particularly in the energy sector. ecoinvent energy data is replaced with EF3.0 core data as per the EF guidelines version 2.0.
OR
- EF compliant data

## Modelling constants
All modelling constants follow the requirements listed in the Tender Specifications ENV.B.1/SER/2016/0038vl. Completeness: All known environmental flows are included. All known resource uses and emissions are listed in the inventory. Water use: water use is modelled at country level using separate flows for water withdrawal, water release and water evaporation. Cut-off: All known environmental flows are included. All known resource uses and emissions are listed in the inventory. Handling multi-functional processes: the following PEF multi- functionality decision hierarchy is applied for resolving all multi- functionality problems: (1) subdivision or system expansion; (2) allocation based on a relevant underlying physical relationship (substitution may apply here); (3) allocation based on some other relationship. Direct land use change: GHG emissions from direct LUC allocated to good/service for 20 years after the LUC occurs, with IPCC default values. Carbon storage and delayed emissions: credits associated with temporary (carbon) storage or delayed emissions up to 300 years are not be considered. Emissions off-setting: are not included. Capital goods (including infrastructures) and their End of life: they are included. System boundaries: system boundaries include all processes linked to the product supply chain (e.g. maintenance). Time period: emissions and removals are modelled as if released or removed at the beginning of the assessment method. Fossil and biogenic carbon emissions and removals: removals and emissions are modelled as follows: All GHG emissions from fossil fuels (including peat and limestone) are modelled consistently with the most updated ILCD list of elementary flows. The non-fossil (biogenic) carbon flows are modelled consistently with the most updated ILCD list of elementary flows.

## Cut-off and completeness
All known environmental flows are included. All known resource uses and emissions are listed in the inventory. The dataset dry mass balance has been checked to ensure the inventory is complete. Capital goods (e.g. infrastructure) and their end-of-life are included.

## Data selection and combination
These datasets include, in both their foreground and background data, links to EF3.0 compliant data.
The relevant background data on energy, transport, and End of Life are from the LCDN data node (http://lcdn.thinkstep.com/Node/).
All other background data in the supply of this product for which no EF3.0 process was available are from ecoinvent v3.7 database (www.ecoinvent.org) or other data sources.

## Data treatment and extrapolations
Several data sources have been used to model the inventory.

## Review details
Internal reviews have been asked to review the plausibility of the unit process, LCIA scores, and DQRs. Internal reviewers have also been asked to review the data for EF compliancy. The consortium is therefore responsible for aspects such as compliancy with the ILCD format, including validation in Look@LCI, and nomenclature.
Internal reviwers have been asked to judge based on the process name, that the unit process models in a complete and representative way the process in the requested location. The review encompassed the plausability of:
- exchanges with nature (elementary flows) as well as exchanges such as product and waste flows.
- meta information (general comment, technology comment, system boundaries, allocation, cut-off rules, etc.). Reviewers were asked to judge if the provided information is enough to understand the content of the process.
- LCIA scores
- DQRs including precision, technology, time and geography. As well as the overall DQR.
External reviewers have been asked to provide their expertise in the field of interest. External reviewers have been asked to review the unit process, including eventual methodological choices, the LCIA scores (provided with contribution scores as well), and DQRs. External reviewers have been provided all the information in a tool developed by the consortium for the purpose of this project.
External reviewers have been asked to judge based on the process name, that the unit process models in a complete and representative way the process in the requested location. The review encompassed:
- Plausability and completeness of exchanges with nature (elementary flows) as well as exchanges such as product and waste flows.
- Review of meta information (general comment, technology comment, system boundaries, allocation, cut-off rules, etc.). Reviewers were asked to judge if the provided information is enough to understand the content of the process.
- Review of properties (biogenic carbon and water content).
- Review of allocation keys.
- Plausability of LCIA scores calculated by the consortium.
- Plausability of DQRs including precision, technology, time and geography. As well as the overall DQR.

## Data sources
- Background Data for Representative products and organisations. EF 3.0 compliant (data stock)
- Maciel VG, Bockorny G, Domingues N, et al (2017) Comparative Life Cycle Assessment among Three Polyurethane Adhesive Technologies for the Footwear Industry.
- Quantis International. ‘World Apparel and Footwear Life Cycle Assessment Database (WALDB: Apparel + Footwear)’. Quantis. Accessed 21 July 2021. https://quantis-intl.com/metrics/databases/waldb-apparel-footwear/.

## Intended applications
Implementation of regular Product Environmental Footprint (PEF) studies and Organisation Environmental Footprint (OEF) studies exclusively under the specified Product groups and sectors as defined in the Product Environmental Footprint Category Rules (PEFCR) and Organisation Environmental Footprint Sectorial Rules (OEFSR) listed in http://ec.europa.eu/environment/eussd/smgp/PEFCR_OEFSR.htm
