# specialist mechanical maintenance; technology mix; production mix, at plant; 1 m2

Dataset: ILCD process, Partly terminated system
Geography: EU+EFTA+UK
Reference year: 2021
Valid until: 2024
Classification: Systems / Textiles, furnitures and other interiors
LCI method principle: Attributional
LCI method approaches: Allocation - market value
Completeness: All relevant flows quantified
Project: Provision of process-based 3.0 Environmental Footprint-compliant life cycle inventory datasets - Others - contract number 070201/2020/840235/SER/ENV.B.1
Generated by: Life Cycle Indonesia
Owner: PRé Sustainability B.V.
Compliance: ILCD Data Network - Entry-level; Suggestions for updating the PEF method 2019; ISO 14040 Environmental Management – Life Cycle Assessment – Principles and Framework, 2006; ISO 14044:2006. Environmental Management – Life Cycle Assessment – Requirements and guidelines.; Environmental Footprint 3.1
Review: Dependent internal review by Avraam Symeonidis, Marisa Vieira; Independent review panel by Madhuri Nigam
Data quality: Overall quality: Good; Time representativeness: Very good; Geographical representativeness: Good; Technological representativeness: Good; Precision: Good; Methodological appropriateness and consistency: Not applicable
Amounts: no units in this file; such an amount is in the reference unit of its flow, which a separate flow dataset defines
copyright: true
licenseType: Free of charge for some user types or use types
accessRestrictions: Free of charge for all final users implementing a regular Product Environmental Footprint (PEF) studies and Organisation Environmental Footprint (OEF) studies exclusively under the specified Product groups and sectors as defined in the Product Environmental Footprint Category Rules (PEFCR) and Organisation Environmental Footprint Sectorial Rules (OEFSR) listed in http://ec.europa.eu/environment/eussd/smgp/PEFCR_OEFSR.htm and in accordance with the terms and conditions of the EULA (available at https://ecoinvent.lca-data.com/) exclusively until 31st December 2024. Any use of this dataset or any derivative data not within the specific context of one of the PEF/OEF projects or after the end of 2024 is not permitted.

## General comment
Notice: this data set supersedes the EF3.0-compliant version (see link under "preceding data set version" below calculated with the EF3.0). The life cycle inventory is not changed from the original EF3.0 data set. The LCIA results are calculated based on the EF3.1 methods which provide updated characterisation factors in the following impact categories: Climate Change, Ecotoxicity freshwater, Photochemical Ozone Formation, Acidification, Human Toxicity non-cancer, and Human Toxicity cancer. The review report and the data quality ratings refer to the original results. The data set has been updated by the European Commission on the basis of the original EF3.0 data set delivered by the data provider.Aside from routine mechanical maintenance, specialist/advanced mechanical maintenance would also be required for the maintenance of turf. Specialist maintenance includes treatment against moss, retopping, deep cleaning, high water pressure cleaning, decompacting, and seasonal maintenance. This dataset covers all specialist treatments by using two types of machines, i.e. high-pressure water cleaning machine and a multifunctional ride-on machine for the advanced maintenance of artificial turf.

This dataset is a service process that does not include the raw material input (synthetic turf). A user employing this service within their models should add this specialist mechanical maintenance dataset to 1 m2 of synthetic turf. Input 7.07E-3 kg diesel fuel, 13.3 liter water, and 2.43E-6 kg of lubricating oil (approximated amount) for regular maintenance of the machine are included in the model for maintenance 1 m2 of turf. Output 13.3 liter wastewater and 2.43E-6 kg of waste (resulted from lubricating oil usage, approximated amount) are already included in the model as well. The lubricating oil waste is incinerated in the model. Meanwhile, the wastewater is treated in the wastewater plant. Additionally, a user is responsible for including transportation of all extra input and output materials that need to be modelled alongside this service.

Jastifer JR, McNitt AS, Mack CD, et al. (2019). Synthetic Turf: History, Design, Maintenance, and Athlete Safety. Sports Health. doi:10.1177/1941738118793378
SMG (2020) OVERVIEW ROUTINE MAINTENANCE, https://www.smg-gmbh.de/catalogues/SMG_Turf-Maintenance-EN.pdf, SMG Sportplatzmaschinenbau GmbH, Vöhringen, Germany

## Technology and included processes
In this model, two machines are used for specialist maintenance, i.e. machine for cleaning synthetic sports surfaces by using high-pressure water and a machine for cleaning and care of artificial turf by using a rotary brush. In this model, assumed the Grams per Square Meter (GSM) of average synthetic turf is 2705 g/m2.

Both machines can be used for soccer fields, hockey fields, sandwich topcoats, and spray coating. A high-pressure water machine is specialized for high-pressure water cleaning, while a cleaning and care machine can be used for treatment against moss, etc (repair work), retopping, deep cleaning, decompacting, and seasonal maintenance. (SMG, 2020).

The water consumption, energy consumption and infrastructure are included in the model. There is no direct emission to the soil. Emission to air resulting from diesel-burning in the machine. Wastewater comes from water consumption for cleaning of synthetic sports surfaces by high-pressure water, while hazardous waste comes from the waste lube oil. Debris resulting from cleaning is not covered in the model. The consumption of lubricating oil using a stitch bonding machine as a proxy. Water consumption for cooling the cleaning machine, electricity for external pump or water supply facilities, and amount of infill is not covered in this model.

SMG (2020) OVERVIEW ROUTINE MAINTENANCE, https://www.smg-gmbh.de/catalogues/SMG_Turf-Maintenance-EN.pdf, SMG Sportplatzmaschinenbau GmbH, Vöhringen, Germany

## Parameters
- kg_0: 2.41723e-6
  Mass in kg, for lubricating oil // lubricants at refinery // eu+efta+uk; Articulated lorry transport, Euro 4, Total weight >32 t; EU+EFTA+UK
- km_0: 129.901
  Distance in km, for lubricating oil // lubricants at refinery // eu+efta+uk; Articulated lorry transport, Euro 4, Total weight >32 t; EU+EFTA+UK
- kg_km_0: 0.000314; = kg_0*km_0
  Transport amount in km*km, for lubricating oil // lubricants at refinery // eu+efta+uk; Articulated lorry transport, Euro 4, Total weight >32 t; EU+EFTA+UK
- kg_1: 2.41723e-6
  Mass in kg, for lubricating oil // lubricants at refinery // eu+efta+uk; Barge; EU+EFTA+UK
- km_1: 270.144
  Distance in km, for lubricating oil // lubricants at refinery // eu+efta+uk; Barge; EU+EFTA+UK
- kg_km_1: 0.000653; = kg_1*km_1
  Transport amount in km*km, for lubricating oil // lubricants at refinery // eu+efta+uk; Barge; EU+EFTA+UK
- kg_2: 2.41723e-6
  Mass in kg, for lubricating oil // lubricants at refinery // eu+efta+uk; Freight train, average; EU+EFTA+UK
- km_2: 239.944
  Distance in km, for lubricating oil // lubricants at refinery // eu+efta+uk; Freight train, average; EU+EFTA+UK
- kg_km_2: 0.00058; = kg_2*km_2
  Transport amount in km*km, for lubricating oil // lubricants at refinery // eu+efta+uk; Freight train, average; EU+EFTA+UK

## Reference product
- specialist mechanical maintenance // specialist mechanical maintenance // eu+efta+uk: 1

## Inputs
- Transport of lubricating oil // lubricants at refinery // eu+efta+uk by Articulated lorry transport, Euro 4, Total weight >32 t - EU+EFTA+UK: 0.000314; = kg_km_0
- Transport of lubricating oil // lubricants at refinery // eu+efta+uk by Barge - EU+EFTA+UK: 0.000653; = kg_km_1
- Transport of lubricating oil // lubricants at refinery // eu+efta+uk by Freight train, average - EU+EFTA+UK: 0.00058; = kg_km_2
- specialist mechanical maintenance // specialist mechanical maintenance // eu+efta+uk, blackbox: 1
- specialist mechanical maintenance // specialist mechanical maintenance // eu+efta+uk, elementary: 1

## Impact indicators
- Eutrophication marine: 8.62571e-5
- Ecotoxicity, freshwater: -0.409592
- Land use: 0.712569
- Water use: 0.356887
- Resource use, minerals and metals: 4.74064e-8
- Resource use, fossils: 0.42433
- Climate change: 0.0151406
- Ozone depletion: 1.84566e-10
- Human toxicity, cancer: 7.32558e-11
- Human toxicity, non-cancer: 5.78041e-10
- EF-particulate Matter: 9.11941e-9
- Ionising radiation, human health: 0.00144668
- Photochemical ozone formation - human health: 0.000438456
- Acidification: 0.000328892
- Eutrophication, terrestrial: 0.00177985
- Eutrophication, freshwater: -1.51857e-5

## Deviations from the LCI method principle
The background data uses:
- the \xe2\x80\x9cRecycled content cut-off\xe2\x80\x9d approach to allocate end-of-life by-products and secondary materials. This allocation is explained in the description of the recycled content system model (http://www.ecoinvent.org/database/system-models-in-ecoinvent-3/cut-off-system-model/allocation-cut-off-by-classification.html).
OR
- EF compliant data

## Deviations from the LCI method approaches
Background data:
- the \xe2\x80\x9cRecycled content cut-off\xe2\x80\x9d approach to allocate end-of-life by-products and secondary materials. This allocation is explained in the description of the recycled content system model (http://www.ecoinvent.org/database/system-models-in-ecoinvent-3/cut-off-system-model/allocation-cut-off-by-classification.html). The ecoinvent database mostly relies on “Allocation – market values” apart for few exceptions particularly in the energy sector. ecoinvent energy data is replaced with EF3.0 core data as per the EF guidelines version 2.0.
OR
- EF compliant data

## Modelling constants
All modelling constants follow the requirements listed in the Tender Specifications 070201/2020/SER/ENV.B1. Completeness: There are no intentional cut-offs in the inventory no matter how small their contribution to all the EF impact categories is. Eventual cut-offs are in compliance with the Guide for EF compliant data sets (JRC 2020), i.e. only if below the 3% cut-off rule. Water use: water use is modelled at country level using separate flows for water withdrawal, water release and water evaporation. Handling multi-functional processes: the following PEF multi- functionality decision hierarchy is applied for resolving all multi- functionality problems: (1) subdivision or system expansion; (2) allocation based on a relevant underlying physical relationship (substitution may apply here); (3) allocation based on some other relationship. Direct land use change: GHG emissions from direct LUC allocated to good/service for 20 years after the LUC occurs, with IPCC default values. Carbon storage and delayed emissions: credits associated with temporary (carbon) storage or delayed emissions up to 300 years are not be considered. Emissions off-setting: are not included. Capital goods (including infrastructures) and their End of life: they are included. System boundaries: system boundaries include all processes linked to the product supply chain (e.g. maintenance). Time period: emissions and removals are modelled as if released or removed at the beginning of the assessment method. Fossil and biogenic carbon emissions and removals: removals and emissions are modelled as follows: All GHG emissions from fossil fuels (including peat and limestone) are modelled consistently with the most updated ILCD list of elementary flows. The non-fossil (biogenic) carbon flows are modelled consistently with the most updated ILCD list of elementary flows.

## Cut-off and completeness
There are no intentional cut-offs in the inventory no matter how small their contribution to all the EF impact categories is. Eventual cut-offs are in compliance with the Guide for EF compliant data sets (JRC 2020), i.e. only if below the 3% cut-off rule. The dataset dry mass and water balance has been checked to ensure the inventory is complete. Capital goods (e.g. infrastructure) and their end-of-life are included.

## Data selection and combination
These datasets include, in both their foreground and background data, links to EF3.0 compliant data.
The relevant background data on energy, transport, and End of Life are from the LCDN data node (http://lcdn.thinkstep.com/Node/).
All other background data in the supply of this product for which no EF3.0 process was available are from ecoinvent v3.7 database (www.ecoinvent.org) or other data sources.

## Data treatment and extrapolations
Several data sources have been used to model the inventory.

## Review details
Internal reviews have been asked to review the plausibility of the unit process, LCIA scores, and DQRs. Internal reviewers have also been asked to review the data for EF compliancy. The consortium is therefore responsible for aspects such as compliancy with the ILCD format, including validation in Look@LCI, and nomenclature.
Internal reviwers have been asked to judge based on the process name, that the unit process models in a complete and representative way the process in the requested location. The review encompassed the plausability of:
- exchanges with nature (elementary flows) as well as exchanges such as product and waste flows.
- meta information (general comment, technology comment, system boundaries, allocation, cut-off rules, etc.). Reviewers were asked to judge if the provided information is enough to understand the content of the process.
- LCIA scores
- DQRs including precision, technology, time and geography. As well as the overall DQR.
External reviewers have been asked to provide their expertise in the field of interest. External reviewers have been asked to review the unit process, including eventual methodological choices, the LCIA scores (provided with contribution scores as well), and DQRs. External reviewers have been provided all the information in a tool developed by the consortium for the purpose of this project.
External reviewers have been asked to judge based on the process name, that the unit process models in a complete and representative way the process in the requested location. The review encompassed:
- Plausability and completeness of exchanges with nature (elementary flows) as well as exchanges such as product and waste flows.
- Review of meta information (general comment, technology comment, system boundaries, allocation, cut-off rules, etc.). Reviewers were asked to judge if the provided information is enough to understand the content of the process.
- Review of properties (biogenic carbon and water content).
- Review of allocation keys.
- Plausability of LCIA scores calculated by the consortium.
- Plausability of DQRs including precision, technology, time and geography. As well as the overall DQR.

## Data sources
- Background Data for Representative products and organisations. EF 3.0 compliant (data stock)
- UN Data (2018) Statistics Data for Lubricants Productions, http://data.un.org/Data.aspx?q=Lubricants&d=EDATA&f=cmID%3aLU, United Nations Statistics Division, Global.
- SMG (2020) OVERVIEW ROUTINE MAINTENANCE, https://www.smg-gmbh.de/catalogues/SMG_Turf-Maintenance-EN.pdf, SMG Sportplatzmaschinenbau GmbH, Vöhringen, Germany
- Artificial Grass GB (2021) Artificial Grass, https://www.artificialgrassgb.co.uk/artificial-grass.html, Artificial Grass GB, Bradford, UK
- Cotex (2021) Stitch Bonding Machine, Catalog and Company Email, Suzhou Cotex International Co., Ltd., China.

## Intended applications
Implementation of regular Product Environmental Footprint (PEF) studies and Organisation Environmental Footprint (OEF) studies exclusively under the specified Product groups and sectors as defined in the Product Environmental Footprint Category Rules (PEFCR) and Organisation Environmental Footprint Sectorial Rules (OEFSR) listed in http://ec.europa.eu/environment/eussd/smgp/PEFCR_OEFSR.htm
