# bleached kraft pulp, eucalyptus; technology mix; production mix, at plant; dry mass 0.9, carbon content, non-fossil 0.494

Dataset: ILCD process, Partly terminated system
Geography: WORLD (WITHOUT EU+EFTA+UK)
Reference year: 2020
Valid until: 2024
Classification: Materials production / Paper and cardboards
LCI method principle: Attributional
LCI method approaches: Allocation - market value
Completeness: All relevant flows quantified
Project: Provision of process-based 3.0 Environmental Footprint-compliant life cycle inventory datasets - Renewable materials - contract number 070201/2020/840085/SER/ENV.B.1
Generated by: EPIS
Owner: EPIS
Compliance: ILCD Data Network - Entry-level; Suggestions for updating the PEF method 2019; ISO 14040 Environmental Management – Life Cycle Assessment – Principles and Framework, 2006; ISO 14044:2006. Environmental Management – Life Cycle Assessment – Requirements and guidelines.; Environmental Footprint 3.1
Review: Dependent internal review by Marisa Vieira, Emilia Moreno Ruiz; Independent review panel by Michael Sturges
Data quality: Overall quality: Good; Time representativeness: Very good; Geographical representativeness: Good; Technological representativeness: Good; Precision: Good; Methodological appropriateness and consistency: Not applicable
Amounts: no units in this file; such an amount is in the reference unit of its flow, which a separate flow dataset defines
copyright: true
licenseType: Free of charge for some user types or use types
accessRestrictions: Free of charge for all final users implementing a regular Product Environmental Footprint (PEF) studies and Organisation Environmental Footprint (OEF) studies exclusively under the specified Product groups and sectors as defined in the Product Environmental Footprint Category Rules (PEFCR) and Organisation Environmental Footprint Sectorial Rules (OEFSR) listed in http://ec.europa.eu/environment/eussd/smgp/PEFCR_OEFSR.htm and in accordance with the terms and conditions of the EULA (available at https://ecoinvent.lca-data.com/) exclusively until 31st December 2024. Any use of this dataset or any derivative data not within the specific context of one of the PEF/OEF projects or after the end of 2024 is not permitted.

## General comment
Notice: this data set supersedes the EF3.0-compliant version (see link under "preceding data set version" below calculated with the EF3.0). The life cycle inventory is not changed from the original EF3.0 data set. The LCIA results are calculated based on the EF3.1 methods which provide updated characterisation factors in the following impact categories: Climate Change, Ecotoxicity freshwater, Photochemical Ozone Formation, Acidification, Human Toxicity non-cancer, and Human Toxicity cancer. The review report and the data quality ratings refer to the original results. The data set has been updated by the European Commission on the basis of the original EF3.0 data set delivered by the data provider.This dataset represents the production of bleached eucalyptus kraft pulp for the geography World (without EU+EFTA+UK) for the year 2020.
Pulp is a clean, wood-based, renewable and biodegradable raw material to make different paper, board and other products. Main end uses for market pulp are tissue (toilet paper), graphic papers, specialty products, packaging, fluff pulp, viscose, CMC etc. Eucalyptus hardwood pulp is made exclusively of eucalyptus species. Hardwood fibres are short and can be rounder than softwood fibres and their number per gram of pulp is much larger; they give the end product its smoothness, softness and optical properties like opacity (that you cannot see through the paper).

This activity starts with the transport of raw material to the pulp factory. The activity ends when the kraft pulp is ready to be sold.
Due to a lack of data, the World (without EU+EFTA+UK) dataset has been extrapolated from industry data for Latin America which was provided by the European Pulp Industry Sector Association AISBL (EPIS). Values represent weighted average of 10 corresponding pulp mills. In 2020, total production of the 10 pulp mills corresponded to 58% of the Latin America market capacity.

## Technology and included processes
The pulp, or fibres from the wood are separated in a kraft cooking process in a so-called fibre line. In a recovery line, the chemicals used in the cooking process are recovered to be used again and energy is produced. The third process is effluent treatment where gaseous and liquid discharges to the environment are continuously minimized and monitored.
The process includes transports to the pulp mill, wood handling, chemical pulping and bleaching, drying process, energy production on-site, recovery cycles of chemicals and internal waste water treatment. The input of magnesium sulphate (0.00048 kg/kg) has been excluded from the inventory since its contribution was less than 3 % in terms of mass and single score.
The following air emissions were reported in the study:
CO2 (fossil and biogenic), SOx (as SO2), NOx, TRS (as S), SO2 (reported as S), Dust (unspecified). Next to these key emissions, additional emissions from on-site energy production from external and internal fuels were calculated, using emission profiles from ecoinvent combustion processes. Internal biogenic fuels are represented by the calculated emissions but do not have the corresponding fuel input from technosphere, because they are supplied from within the system boundaries. The amounts of internal fuels used in the process are: Biogas (14.1732 MJ/t), Bark (314.0627 MJ/t), Black liquor (12745.8861 MJ/t), Sludge (3.6497 MJ/t), Hydrogen (96.4795 MJ/t), Methanol (16.5055 MJ7t), Biomass (2937.3263 MJ/t), Biomass (BAGASSE) (2.0643 MJ/t), Biomass (CHIPS) (10.7341 MJ/t).
The following ecoinvent combustion processes were used to estimate additional air emissions:
Heavy fuel oil: "heat production, heavy fuel oil, at industrial furnace 1MW”, Diesel: "heat production, light fuel oil, at industrial furnace 1MW” , Natural gas, biogas, non-condensable gases and methanol: "heat production, natural gas, at industrial furnace >100kW, Biofuels, wood and bark: "heat production, wood chips from industry, at furnace 1000kW”

Black liquor and sludge were not included in the emissions calculations because no specific emission profiles, e.g. for the black liquor recovery process, were available. Emissions from these internal energy generation processes are therefore only reflected in the key emission factors provided by the industry, other emissions constitute a data gap. Emissions stemming from biogas are approximated with the combustion of natural gas, whereby CO2, CO and CH4 emissions stemming from biogas were modelled as non-fossil.
The amount of infrastructure (pulp factory) was taken from the dataset "The European Pulp Industry Sector Association AISBL, sulfate pulp production, from eucalyptus, bleached, RLA, Undefined, ecoinvent database version 3.7.1."

## Parameters
- kg_0: 0.000453017
  Mass in kg, for malusil; Transoceanic ship, bulk; GLO
- km_0: 219.908
  Distance in km, for malusil; Transoceanic ship, bulk; GLO
- kg_km_0: 0.0996221; = kg_0*km_0
  Transport amount in km*km, for malusil; Transoceanic ship, bulk; GLO
- kg_1: 0.000453017
  Mass in kg, for malusil; Freight train, diesel traction; EU+EFTA+UK
- km_1: 27.1484
  Distance in km, for malusil; Freight train, diesel traction; EU+EFTA+UK
- kg_km_1: 0.0122987; = kg_1*km_1
  Transport amount in km*km, for malusil; Freight train, diesel traction; EU+EFTA+UK
- kg_2: 0.000453017
  Mass in kg, for malusil; Freight train, electricity traction; EU+EFTA+UK
- km_2: 9.23477
  Distance in km, for malusil; Freight train, electricity traction; EU+EFTA+UK
- kg_km_2: 0.0041835; = kg_2*km_2
  Transport amount in km*km, for malusil; Freight train, electricity traction; EU+EFTA+UK
- kg_3: 0.000453017
  Mass in kg, for malusil; Freight train, average; EU+EFTA+UK
- km_3: 0.217806
  Distance in km, for malusil; Freight train, average; EU+EFTA+UK
- kg_km_3: 9.86699e-5; = kg_3*km_3
  Transport amount in km*km, for malusil; Freight train, average; EU+EFTA+UK
- kg_4: 0.000453017
  Mass in kg, for malusil; Barge; EU+EFTA+UK
- km_4: 2.08821
  Distance in km, for malusil; Barge; EU+EFTA+UK
- kg_km_4: 0.000945993; = kg_4*km_4
  Transport amount in km*km, for malusil; Barge; EU+EFTA+UK
- kg_5: 0.000453017
  Mass in kg, for malusil; Barge; ROW w/o EU+EFTA
- km_5: 4.26403
  Distance in km, for malusil; Barge; ROW w/o EU+EFTA
- kg_km_5: 0.00193167; = kg_5*km_5
  Transport amount in km*km, for malusil; Barge; ROW w/o EU+EFTA
- kg_6: 0.000453017
  Mass in kg, for malusil; Articulated lorry transport, Total weight <7.5 t, mix Euro 0-5; EU+EFTA+UK
- km_6: 2.87567
  Distance in km, for malusil; Articulated lorry transport, Total weight <7.5 t, mix Euro 0-5; EU+EFTA+UK
- kg_km_6: 0.00130272; = kg_6*km_6
  Transport amount in km*km, for malusil; Articulated lorry transport, Total weight <7.5 t, mix Euro 0-5; EU+EFTA+UK
- kg_7: 0.000453017
  Mass in kg, for malusil; Articulated lorry transport, Euro 4, Total weight >32 t; EU+EFTA+UK
- km_7: 26.8476
  Distance in km, for malusil; Articulated lorry transport, Euro 4, Total weight >32 t; EU+EFTA+UK
- kg_km_7: 0.0121624; = kg_7*km_7
  Transport amount in km*km, for malusil; Articulated lorry transport, Euro 4, Total weight >32 t; EU+EFTA+UK
- kg_8: 0.000453017
  Mass in kg, for malusil; Articulated lorry transport, Total weight >32 t, mix Euro 0-5; ROW w/o EU+EFTA
- km_8: 70.8559
  Distance in km, for malusil; Articulated lorry transport, Total weight >32 t, mix Euro 0-5; ROW w/o EU+EFTA
- kg_km_8: 0.0320989; = kg_8*km_8
  Transport amount in km*km, for malusil; Articulated lorry transport, Total weight >32 t, mix Euro 0-5; ROW w/o EU+EFTA
- kg_9: 7.70213e-5
  Mass in kg, for sodium hydrogen sulphite // sodium hydrogen sulphite production // eu+efta+uk; Transoceanic ship, containers; GLO
- km_9: 18696.1
  Distance in km, for sodium hydrogen sulphite // sodium hydrogen sulphite production // eu+efta+uk; Transoceanic ship, containers; GLO
- kg_km_9: 1.44; = kg_9*km_9
  Transport amount in km*km, for sodium hydrogen sulphite // sodium hydrogen sulphite production // eu+efta+uk; Transoceanic ship, containers; GLO
- kg_10: 2.71768
  Mass in kg, for eucalyptus forestry // eucalyptus forestry // world (without eu+efta+uk); Articulated lorry transport, Euro 4, Total weight >32 t; EU+EFTA+UK
- km_10: 151.547
  Distance in km, for eucalyptus forestry // eucalyptus forestry // world (without eu+efta+uk); Articulated lorry transport, Euro 4, Total weight >32 t; EU+EFTA+UK
- kg_km_10: 411.857; = kg_10*km_10
  Transport amount in km*km, for eucalyptus forestry // eucalyptus forestry // world (without eu+efta+uk); Articulated lorry transport, Euro 4, Total weight >32 t; EU+EFTA+UK
- kg_11: 2.71768
  Mass in kg, for eucalyptus forestry // eucalyptus forestry // world (without eu+efta+uk); Freight train, average; EU+EFTA+UK
- km_11: 20.5725
  Distance in km, for eucalyptus forestry // eucalyptus forestry // world (without eu+efta+uk); Freight train, average; EU+EFTA+UK
- kg_km_11: 55.9093; = kg_11*km_11
  Transport amount in km*km, for eucalyptus forestry // eucalyptus forestry // world (without eu+efta+uk); Freight train, average; EU+EFTA+UK
- kg_12: 2.71768
  Mass in kg, for eucalyptus forestry // eucalyptus forestry // world (without eu+efta+uk); Barge; ROW w/o EU+EFTA
- km_12: 43.9518
  Distance in km, for eucalyptus forestry // eucalyptus forestry // world (without eu+efta+uk); Barge; ROW w/o EU+EFTA
- kg_km_12: 119.447; = kg_12*km_12
  Transport amount in km*km, for eucalyptus forestry // eucalyptus forestry // world (without eu+efta+uk); Barge; ROW w/o EU+EFTA
- kg_13: 0.135191
  Mass in kg, for biogas for bioenergy // biogas for bioenergy // cn; Articulated lorry transport, Euro 4, Total weight >32 t; EU+EFTA+UK
- km_13: 998.589
  Distance in km, for biogas for bioenergy // biogas for bioenergy // cn; Articulated lorry transport, Euro 4, Total weight >32 t; EU+EFTA+UK
- kg_km_13: 135; = kg_13*km_13
  Transport amount in km*km, for biogas for bioenergy // biogas for bioenergy // cn; Articulated lorry transport, Euro 4, Total weight >32 t; EU+EFTA+UK
- kg_14: 0.135191
  Mass in kg, for biogas for bioenergy // biogas for bioenergy // cn; Transoceanic ship, containers; GLO
- km_14: 17974.6
  Distance in km, for biogas for bioenergy // biogas for bioenergy // cn; Transoceanic ship, containers; GLO
- kg_km_14: 2430; = kg_14*km_14
  Transport amount in km*km, for biogas for bioenergy // biogas for bioenergy // cn; Transoceanic ship, containers; GLO
- kg_15: 0.0117155
  Mass in kg, for biogas for bioenergy // biogas for bioenergy // ras w/o cn; Articulated lorry transport, Euro 4, Total weight >32 t; EU+EFTA+UK
- km_15: 998.677
  Distance in km, for biogas for bioenergy // biogas for bioenergy // ras w/o cn; Articulated lorry transport, Euro 4, Total weight >32 t; EU+EFTA+UK
- kg_km_15: 11.7; = kg_15*km_15
  Transport amount in km*km, for biogas for bioenergy // biogas for bioenergy // ras w/o cn; Articulated lorry transport, Euro 4, Total weight >32 t; EU+EFTA+UK
- kg_16: 0.0117155
  Mass in kg, for biogas for bioenergy // biogas for bioenergy // ras w/o cn; Transoceanic ship, containers; GLO
- km_16: 18010.3
  Distance in km, for biogas for bioenergy // biogas for bioenergy // ras w/o cn; Transoceanic ship, containers; GLO
- kg_km_16: 211; = kg_16*km_16
  Transport amount in km*km, for biogas for bioenergy // biogas for bioenergy // ras w/o cn; Transoceanic ship, containers; GLO
- kg_17: 0.00724511
  Mass in kg, for biogas for bioenergy // biogas for bioenergy // in; Articulated lorry transport, Euro 4, Total weight >32 t; EU+EFTA+UK
- km_17: 1000.67
  Distance in km, for biogas for bioenergy // biogas for bioenergy // in; Articulated lorry transport, Euro 4, Total weight >32 t; EU+EFTA+UK
- kg_km_17: 7.25; = kg_17*km_17
  Transport amount in km*km, for biogas for bioenergy // biogas for bioenergy // in; Articulated lorry transport, Euro 4, Total weight >32 t; EU+EFTA+UK
- kg_18: 0.00724511
  Mass in kg, for biogas for bioenergy // biogas for bioenergy // in; Transoceanic ship, containers; GLO
- km_18: 17943.1
  Distance in km, for biogas for bioenergy // biogas for bioenergy // in; Transoceanic ship, containers; GLO
- kg_km_18: 130; = kg_18*km_18
  Transport amount in km*km, for biogas for bioenergy // biogas for bioenergy // in; Transoceanic ship, containers; GLO
- kg_19: 0.0722614
  Mass in kg, for bark, hardwood // bark, hardwood // eu+efta+uk; Articulated lorry transport, Euro 4, Total weight >32 t; EU+EFTA+UK
- km_19: 1699.99
  Distance in km, for bark, hardwood // bark, hardwood // eu+efta+uk; Articulated lorry transport, Euro 4, Total weight >32 t; EU+EFTA+UK
- kg_km_19: 122.844; = kg_19*km_19
  Transport amount in km*km, for bark, hardwood // bark, hardwood // eu+efta+uk; Articulated lorry transport, Euro 4, Total weight >32 t; EU+EFTA+UK
- kg_20: 0.0722614
  Mass in kg, for bark, hardwood // bark, hardwood // eu+efta+uk; Transoceanic ship, containers; GLO
- km_20: 30599.9
  Distance in km, for bark, hardwood // bark, hardwood // eu+efta+uk; Transoceanic ship, containers; GLO
- kg_km_20: 2211.19; = kg_20*km_20
  Transport amount in km*km, for bark, hardwood // bark, hardwood // eu+efta+uk; Transoceanic ship, containers; GLO
- kg_21: 0.0722614
  Mass in kg, for bark, softwood // bark, softwood // eu+efta+uk; Articulated lorry transport, Euro 4, Total weight >32 t; EU+EFTA+UK
- km_21: 1699.99
  Distance in km, for bark, softwood // bark, softwood // eu+efta+uk; Articulated lorry transport, Euro 4, Total weight >32 t; EU+EFTA+UK
- kg_km_21: 122.844; = kg_21*km_21
  Transport amount in km*km, for bark, softwood // bark, softwood // eu+efta+uk; Articulated lorry transport, Euro 4, Total weight >32 t; EU+EFTA+UK
- kg_22: 0.0722614
  Mass in kg, for bark, softwood // bark, softwood // eu+efta+uk; Transoceanic ship, containers; GLO
- km_22: 30599.9
  Distance in km, for bark, softwood // bark, softwood // eu+efta+uk; Transoceanic ship, containers; GLO
- kg_km_22: 2211.19; = kg_22*km_22
  Transport amount in km*km, for bark, softwood // bark, softwood // eu+efta+uk; Transoceanic ship, containers; GLO
- kg_23: 0.000451262
  Mass in kg, for heavy fuel oil (1.0 wt.% s) // heavy fuel oil at refinery // in; Articulated lorry transport, Euro 4, Total weight >32 t; EU+EFTA+UK
- km_23: 999.42
  Distance in km, for heavy fuel oil (1.0 wt.% s) // heavy fuel oil at refinery // in; Articulated lorry transport, Euro 4, Total weight >32 t; EU+EFTA+UK
- kg_km_23: 0.451; = kg_23*km_23
  Transport amount in km*km, for heavy fuel oil (1.0 wt.% s) // heavy fuel oil at refinery // in; Articulated lorry transport, Euro 4, Total weight >32 t; EU+EFTA+UK
- kg_24: 0.000451262
  Mass in kg, for heavy fuel oil (1.0 wt.% s) // heavy fuel oil at refinery // in; Transoceanic ship, containers; GLO
- km_24: 17994
  Distance in km, for heavy fuel oil (1.0 wt.% s) // heavy fuel oil at refinery // in; Transoceanic ship, containers; GLO
- kg_km_24: 8.12; = kg_24*km_24
  Transport amount in km*km, for heavy fuel oil (1.0 wt.% s) // heavy fuel oil at refinery // in; Transoceanic ship, containers; GLO
- kg_25: 0.000763673
  Mass in kg, for heavy fuel oil (1.0 wt.% s) // heavy fuel oil at refinery // jp; Articulated lorry transport, Euro 4, Total weight >32 t; EU+EFTA+UK
- km_25: 1000.43
  Distance in km, for heavy fuel oil (1.0 wt.% s) // heavy fuel oil at refinery // jp; Articulated lorry transport, Euro 4, Total weight >32 t; EU+EFTA+UK
- kg_km_25: 0.764; = kg_25*km_25
  Transport amount in km*km, for heavy fuel oil (1.0 wt.% s) // heavy fuel oil at refinery // jp; Articulated lorry transport, Euro 4, Total weight >32 t; EU+EFTA+UK
- kg_26: 0.000763673
  Mass in kg, for heavy fuel oil (1.0 wt.% s) // heavy fuel oil at refinery // jp; Transoceanic ship, containers; GLO
- km_26: 17939.6
  Distance in km, for heavy fuel oil (1.0 wt.% s) // heavy fuel oil at refinery // jp; Transoceanic ship, containers; GLO
- kg_km_26: 13.7; = kg_26*km_26
  Transport amount in km*km, for heavy fuel oil (1.0 wt.% s) // heavy fuel oil at refinery // jp; Transoceanic ship, containers; GLO
- kg_27: 0.00461675
  Mass in kg, for heavy fuel oil (1.0 wt.% s) // heavy fuel oil at refinery // ras w/o cn; Articulated lorry transport, Euro 4, Total weight >32 t; EU+EFTA+UK
- km_27: 1000.7
  Distance in km, for heavy fuel oil (1.0 wt.% s) // heavy fuel oil at refinery // ras w/o cn; Articulated lorry transport, Euro 4, Total weight >32 t; EU+EFTA+UK
- kg_km_27: 4.62; = kg_27*km_27
  Transport amount in km*km, for heavy fuel oil (1.0 wt.% s) // heavy fuel oil at refinery // ras w/o cn; Articulated lorry transport, Euro 4, Total weight >32 t; EU+EFTA+UK
- kg_28: 0.00461675
  Mass in kg, for heavy fuel oil (1.0 wt.% s) // heavy fuel oil at refinery // ras w/o cn; Transoceanic ship, containers; GLO
- km_28: 17999.7
  Distance in km, for heavy fuel oil (1.0 wt.% s) // heavy fuel oil at refinery // ras w/o cn; Transoceanic ship, containers; GLO
- kg_km_28: 83.1; = kg_28*km_28
  Transport amount in km*km, for heavy fuel oil (1.0 wt.% s) // heavy fuel oil at refinery // ras w/o cn; Transoceanic ship, containers; GLO
- kg_29: 4.62832e-5
  Mass in kg, for heavy fuel oil (1.0 wt.% s) // heavy fuel oil at refinery // au; Articulated lorry transport, Euro 4, Total weight >32 t; EU+EFTA+UK
- km_29: 1000.36
  Distance in km, for heavy fuel oil (1.0 wt.% s) // heavy fuel oil at refinery // au; Articulated lorry transport, Euro 4, Total weight >32 t; EU+EFTA+UK
- kg_km_29: 0.0463; = kg_29*km_29
  Transport amount in km*km, for heavy fuel oil (1.0 wt.% s) // heavy fuel oil at refinery // au; Articulated lorry transport, Euro 4, Total weight >32 t; EU+EFTA+UK
- kg_30: 4.62832e-5
  Mass in kg, for heavy fuel oil (1.0 wt.% s) // heavy fuel oil at refinery // au; Transoceanic ship, containers; GLO
- km_30: 17997.9
  Distance in km, for heavy fuel oil (1.0 wt.% s) // heavy fuel oil at refinery // au; Transoceanic ship, containers; GLO
- kg_km_30: 0.833; = kg_30*km_30
  Transport amount in km*km, for heavy fuel oil (1.0 wt.% s) // heavy fuel oil at refinery // au; Transoceanic ship, containers; GLO
- kg_31: 0.000474403
  Mass in kg, for heavy fuel oil (1.0 wt.% s) // heavy fuel oil at refinery // cn; Articulated lorry transport, Euro 4, Total weight >32 t; EU+EFTA+UK
- km_31: 999.15
  Distance in km, for heavy fuel oil (1.0 wt.% s) // heavy fuel oil at refinery // cn; Articulated lorry transport, Euro 4, Total weight >32 t; EU+EFTA+UK
- kg_km_31: 0.474; = kg_31*km_31
  Transport amount in km*km, for heavy fuel oil (1.0 wt.% s) // heavy fuel oil at refinery // cn; Articulated lorry transport, Euro 4, Total weight >32 t; EU+EFTA+UK
- kg_32: 0.000474403
  Mass in kg, for heavy fuel oil (1.0 wt.% s) // heavy fuel oil at refinery // cn; Transoceanic ship, containers; GLO
- km_32: 18001.6
  Distance in km, for heavy fuel oil (1.0 wt.% s) // heavy fuel oil at refinery // cn; Transoceanic ship, containers; GLO
- kg_km_32: 8.54; = kg_32*km_32
  Transport amount in km*km, for heavy fuel oil (1.0 wt.% s) // heavy fuel oil at refinery // cn; Transoceanic ship, containers; GLO
- kg_33: 0.00237202
  Mass in kg, for heavy fuel oil (1.0 wt.% s) // heavy fuel oil at refinery // ru; Articulated lorry transport, Euro 4, Total weight >32 t; EU+EFTA+UK
- km_33: 999.15
  Distance in km, for heavy fuel oil (1.0 wt.% s) // heavy fuel oil at refinery // ru; Articulated lorry transport, Euro 4, Total weight >32 t; EU+EFTA+UK
- kg_km_33: 2.37; = kg_33*km_33
  Transport amount in km*km, for heavy fuel oil (1.0 wt.% s) // heavy fuel oil at refinery // ru; Articulated lorry transport, Euro 4, Total weight >32 t; EU+EFTA+UK
- kg_34: 0.00237202
  Mass in kg, for heavy fuel oil (1.0 wt.% s) // heavy fuel oil at refinery // ru; Transoceanic ship, containers; GLO
- km_34: 18001.6
  Distance in km, for heavy fuel oil (1.0 wt.% s) // heavy fuel oil at refinery // ru; Transoceanic ship, containers; GLO
- kg_km_34: 42.7; = kg_34*km_34
  Transport amount in km*km, for heavy fuel oil (1.0 wt.% s) // heavy fuel oil at refinery // ru; Transoceanic ship, containers; GLO
- kg_35: 0.000844669
  Mass in kg, for heavy fuel oil (1.0 wt.% s) // heavy fuel oil at refinery // raf; Articulated lorry transport, Euro 4, Total weight >32 t; EU+EFTA+UK
- km_35: 1000.39
  Distance in km, for heavy fuel oil (1.0 wt.% s) // heavy fuel oil at refinery // raf; Articulated lorry transport, Euro 4, Total weight >32 t; EU+EFTA+UK
- kg_km_35: 0.845; = kg_35*km_35
  Transport amount in km*km, for heavy fuel oil (1.0 wt.% s) // heavy fuel oil at refinery // raf; Articulated lorry transport, Euro 4, Total weight >32 t; EU+EFTA+UK
- kg_36: 0.000844669
  Mass in kg, for heavy fuel oil (1.0 wt.% s) // heavy fuel oil at refinery // raf; Transoceanic ship, containers; GLO
- km_36: 17995.2
  Distance in km, for heavy fuel oil (1.0 wt.% s) // heavy fuel oil at refinery // raf; Transoceanic ship, containers; GLO
- kg_km_36: 15.2; = kg_36*km_36
  Transport amount in km*km, for heavy fuel oil (1.0 wt.% s) // heavy fuel oil at refinery // raf; Transoceanic ship, containers; GLO
- kg_37: 0.000404978
  Mass in kg, for heavy fuel oil (1.0 wt.% s) // heavy fuel oil at refinery // br; Articulated lorry transport, Euro 4, Total weight >32 t; EU+EFTA+UK
- km_37: 1000.05
  Distance in km, for heavy fuel oil (1.0 wt.% s) // heavy fuel oil at refinery // br; Articulated lorry transport, Euro 4, Total weight >32 t; EU+EFTA+UK
- kg_km_37: 0.405; = kg_37*km_37
  Transport amount in km*km, for heavy fuel oil (1.0 wt.% s) // heavy fuel oil at refinery // br; Articulated lorry transport, Euro 4, Total weight >32 t; EU+EFTA+UK
- kg_38: 0.000404978
  Mass in kg, for heavy fuel oil (1.0 wt.% s) // heavy fuel oil at refinery // br; Transoceanic ship, containers; GLO
- km_38: 18001
  Distance in km, for heavy fuel oil (1.0 wt.% s) // heavy fuel oil at refinery // br; Transoceanic ship, containers; GLO
- kg_km_38: 7.29; = kg_38*km_38
  Transport amount in km*km, for heavy fuel oil (1.0 wt.% s) // heavy fuel oil at refinery // br; Transoceanic ship, containers; GLO
- kg_39: 0.00160834
  Mass in kg, for heavy fuel oil (1.0 wt.% s) // heavy fuel oil at refinery // rsa; Articulated lorry transport, Euro 4, Total weight >32 t; EU+EFTA+UK
- km_39: 1001.03
  Distance in km, for heavy fuel oil (1.0 wt.% s) // heavy fuel oil at refinery // rsa; Articulated lorry transport, Euro 4, Total weight >32 t; EU+EFTA+UK
- kg_km_39: 1.61; = kg_39*km_39
  Transport amount in km*km, for heavy fuel oil (1.0 wt.% s) // heavy fuel oil at refinery // rsa; Articulated lorry transport, Euro 4, Total weight >32 t; EU+EFTA+UK
- kg_40: 0.00160834
  Mass in kg, for heavy fuel oil (1.0 wt.% s) // heavy fuel oil at refinery // rsa; Transoceanic ship, containers; GLO
- km_40: 18031
  Distance in km, for heavy fuel oil (1.0 wt.% s) // heavy fuel oil at refinery // rsa; Transoceanic ship, containers; GLO
- kg_km_40: 29; = kg_40*km_40
  Transport amount in km*km, for heavy fuel oil (1.0 wt.% s) // heavy fuel oil at refinery // rsa; Transoceanic ship, containers; GLO
- kg_41: 2.5991e-5
  Mass in kg, for diesel // diesel mix at refinery // cn; Articulated lorry transport, Euro 4, Total weight >32 t; EU+EFTA+UK
- km_41: 1000.35
  Distance in km, for diesel // diesel mix at refinery // cn; Articulated lorry transport, Euro 4, Total weight >32 t; EU+EFTA+UK
- kg_km_41: 0.026; = kg_41*km_41
  Transport amount in km*km, for diesel // diesel mix at refinery // cn; Articulated lorry transport, Euro 4, Total weight >32 t; EU+EFTA+UK
- kg_42: 2.5991e-5
  Mass in kg, for diesel // diesel mix at refinery // cn; Transoceanic ship, containers; GLO
- km_42: 18006.3
  Distance in km, for diesel // diesel mix at refinery // cn; Transoceanic ship, containers; GLO
- kg_km_42: 0.468; = kg_42*km_42
  Transport amount in km*km, for diesel // diesel mix at refinery // cn; Transoceanic ship, containers; GLO
- kg_43: 6.93876e-6
  Mass in kg, for diesel // diesel mix at refinery // jp; Articulated lorry transport, Euro 4, Total weight >32 t; EU+EFTA+UK
- km_43: 1000.18
  Distance in km, for diesel // diesel mix at refinery // jp; Articulated lorry transport, Euro 4, Total weight >32 t; EU+EFTA+UK
- kg_km_43: 0.00694; = kg_43*km_43
  Transport amount in km*km, for diesel // diesel mix at refinery // jp; Articulated lorry transport, Euro 4, Total weight >32 t; EU+EFTA+UK
- kg_44: 6.93876e-6
  Mass in kg, for diesel // diesel mix at refinery // jp; Transoceanic ship, containers; GLO
- km_44: 18014.7
  Distance in km, for diesel // diesel mix at refinery // jp; Transoceanic ship, containers; GLO
- kg_km_44: 0.125; = kg_44*km_44
  Transport amount in km*km, for diesel // diesel mix at refinery // jp; Transoceanic ship, containers; GLO
- kg_45: 4.82185e-6
  Mass in kg, for diesel // diesel mix at refinery // raf; Articulated lorry transport, Euro 4, Total weight >32 t; EU+EFTA+UK
- km_45: 999.616
  Distance in km, for diesel // diesel mix at refinery // raf; Articulated lorry transport, Euro 4, Total weight >32 t; EU+EFTA+UK
- kg_km_45: 0.00482; = kg_45*km_45
  Transport amount in km*km, for diesel // diesel mix at refinery // raf; Articulated lorry transport, Euro 4, Total weight >32 t; EU+EFTA+UK
- kg_46: 4.82185e-6
  Mass in kg, for diesel // diesel mix at refinery // raf; Transoceanic ship, containers; GLO
- km_46: 18001.4
  Distance in km, for diesel // diesel mix at refinery // raf; Transoceanic ship, containers; GLO
- kg_km_46: 0.0868; = kg_46*km_46
  Transport amount in km*km, for diesel // diesel mix at refinery // raf; Transoceanic ship, containers; GLO
- kg_47: 1.07022e-5
  Mass in kg, for diesel // diesel mix at refinery // ru; Articulated lorry transport, Euro 4, Total weight >32 t; EU+EFTA+UK
- km_47: 999.798
  Distance in km, for diesel // diesel mix at refinery // ru; Articulated lorry transport, Euro 4, Total weight >32 t; EU+EFTA+UK
- kg_km_47: 0.0107; = kg_47*km_47
  Transport amount in km*km, for diesel // diesel mix at refinery // ru; Articulated lorry transport, Euro 4, Total weight >32 t; EU+EFTA+UK
- kg_48: 1.07022e-5
  Mass in kg, for diesel // diesel mix at refinery // ru; Transoceanic ship, containers; GLO
- km_48: 18033.7
  Distance in km, for diesel // diesel mix at refinery // ru; Transoceanic ship, containers; GLO
- kg_km_48: 0.193; = kg_48*km_48
  Transport amount in km*km, for diesel // diesel mix at refinery // ru; Transoceanic ship, containers; GLO
- kg_49: 1.9993e-6
  Mass in kg, for diesel // diesel mix at refinery // au; Articulated lorry transport, Euro 4, Total weight >32 t; EU+EFTA+UK
- km_49: 1000.35
  Distance in km, for diesel // diesel mix at refinery // au; Articulated lorry transport, Euro 4, Total weight >32 t; EU+EFTA+UK
- kg_km_49: 0.002; = kg_49*km_49
  Transport amount in km*km, for diesel // diesel mix at refinery // au; Articulated lorry transport, Euro 4, Total weight >32 t; EU+EFTA+UK
- kg_50: 1.9993e-6
  Mass in kg, for diesel // diesel mix at refinery // au; Transoceanic ship, containers; GLO
- km_50: 18006.3
  Distance in km, for diesel // diesel mix at refinery // au; Transoceanic ship, containers; GLO
- kg_km_50: 0.036; = kg_50*km_50
  Transport amount in km*km, for diesel // diesel mix at refinery // au; Transoceanic ship, containers; GLO
- kg_51: 1.39951e-5
  Mass in kg, for diesel // diesel mix at refinery // in; Articulated lorry transport, Euro 4, Total weight >32 t; EU+EFTA+UK
- km_51: 1000.35
  Distance in km, for diesel // diesel mix at refinery // in; Articulated lorry transport, Euro 4, Total weight >32 t; EU+EFTA+UK
- kg_km_51: 0.014; = kg_51*km_51
  Transport amount in km*km, for diesel // diesel mix at refinery // in; Articulated lorry transport, Euro 4, Total weight >32 t; EU+EFTA+UK
- kg_52: 1.39951e-5
  Mass in kg, for diesel // diesel mix at refinery // in; Transoceanic ship, containers; GLO
- km_52: 18006.3
  Distance in km, for diesel // diesel mix at refinery // in; Transoceanic ship, containers; GLO
- kg_km_52: 0.252; = kg_52*km_52
  Transport amount in km*km, for diesel // diesel mix at refinery // in; Transoceanic ship, containers; GLO
- kg_53: 6.23313e-6
  Mass in kg, for diesel // diesel mix at refinery // br; Articulated lorry transport, Euro 4, Total weight >32 t; EU+EFTA+UK
- km_53: 999.498
  Distance in km, for diesel // diesel mix at refinery // br; Articulated lorry transport, Euro 4, Total weight >32 t; EU+EFTA+UK
- kg_km_53: 0.00623; = kg_53*km_53
  Transport amount in km*km, for diesel // diesel mix at refinery // br; Articulated lorry transport, Euro 4, Total weight >32 t; EU+EFTA+UK
- kg_54: 6.23313e-6
  Mass in kg, for diesel // diesel mix at refinery // br; Transoceanic ship, containers; GLO
- km_54: 17968.5
  Distance in km, for diesel // diesel mix at refinery // br; Transoceanic ship, containers; GLO
- kg_km_54: 0.112; = kg_54*km_54
  Transport amount in km*km, for diesel // diesel mix at refinery // br; Transoceanic ship, containers; GLO
- kg_55: 9.05568e-6
  Mass in kg, for diesel // diesel mix at refinery // rsa; Articulated lorry transport, Euro 4, Total weight >32 t; EU+EFTA+UK
- km_55: 1000.48
  Distance in km, for diesel // diesel mix at refinery // rsa; Articulated lorry transport, Euro 4, Total weight >32 t; EU+EFTA+UK
- kg_km_55: 0.00906; = kg_55*km_55
  Transport amount in km*km, for diesel // diesel mix at refinery // rsa; Articulated lorry transport, Euro 4, Total weight >32 t; EU+EFTA+UK
- kg_56: 9.05568e-6
  Mass in kg, for diesel // diesel mix at refinery // rsa; Transoceanic ship, containers; GLO
- km_56: 17999.8
  Distance in km, for diesel // diesel mix at refinery // rsa; Transoceanic ship, containers; GLO
- kg_km_56: 0.163; = kg_56*km_56
  Transport amount in km*km, for diesel // diesel mix at refinery // rsa; Transoceanic ship, containers; GLO
- kg_57: 3.77516e-5
  Mass in kg, for diesel // diesel mix at refinery // ras w/o cn; Articulated lorry transport, Euro 4, Total weight >32 t; EU+EFTA+UK
- km_57: 1001.28
  Distance in km, for diesel // diesel mix at refinery // ras w/o cn; Articulated lorry transport, Euro 4, Total weight >32 t; EU+EFTA+UK
- kg_km_57: 0.0378; = kg_57*km_57
  Transport amount in km*km, for diesel // diesel mix at refinery // ras w/o cn; Articulated lorry transport, Euro 4, Total weight >32 t; EU+EFTA+UK
- kg_58: 3.77516e-5
  Mass in kg, for diesel // diesel mix at refinery // ras w/o cn; Transoceanic ship, containers; GLO
- km_58: 18012.5
  Distance in km, for diesel // diesel mix at refinery // ras w/o cn; Transoceanic ship, containers; GLO
- kg_km_58: 0.68; = kg_58*km_58
  Transport amount in km*km, for diesel // diesel mix at refinery // ras w/o cn; Transoceanic ship, containers; GLO
- kg_59: 0.00597809
  Mass in kg, for hydrogen peroxide, 100% // hydrogen peroxide, 100% production // eu+efta+uk; Articulated lorry transport, Euro 4, Total weight >32 t; EU+EFTA+UK
- km_59: 1000.32
  Distance in km, for hydrogen peroxide, 100% // hydrogen peroxide, 100% production // eu+efta+uk; Articulated lorry transport, Euro 4, Total weight >32 t; EU+EFTA+UK
- kg_km_59: 5.98; = kg_59*km_59
  Transport amount in km*km, for hydrogen peroxide, 100% // hydrogen peroxide, 100% production // eu+efta+uk; Articulated lorry transport, Euro 4, Total weight >32 t; EU+EFTA+UK
- kg_60: 0.00597809
  Mass in kg, for hydrogen peroxide, 100% // hydrogen peroxide, 100% production // eu+efta+uk; Transoceanic ship, containers; GLO
- km_60: 18066
  Distance in km, for hydrogen peroxide, 100% // hydrogen peroxide, 100% production // eu+efta+uk; Transoceanic ship, containers; GLO
- kg_km_60: 108; = kg_60*km_60
  Transport amount in km*km, for hydrogen peroxide, 100% // hydrogen peroxide, 100% production // eu+efta+uk; Transoceanic ship, containers; GLO
- kg_61: 0.0478499
  Mass in kg, for oxygen // oxygen production // eu+efta+uk; Articulated lorry transport, Euro 4, Total weight >32 t; EU+EFTA+UK
- km_61: 998.957
  Distance in km, for oxygen // oxygen production // eu+efta+uk; Articulated lorry transport, Euro 4, Total weight >32 t; EU+EFTA+UK
- kg_km_61: 47.8; = kg_61*km_61
  Transport amount in km*km, for oxygen // oxygen production // eu+efta+uk; Articulated lorry transport, Euro 4, Total weight >32 t; EU+EFTA+UK
- kg_62: 0.0478499
  Mass in kg, for oxygen // oxygen production // eu+efta+uk; Transoceanic ship, containers; GLO
- km_62: 17993.8
  Distance in km, for oxygen // oxygen production // eu+efta+uk; Transoceanic ship, containers; GLO
- kg_km_62: 861; = kg_62*km_62
  Transport amount in km*km, for oxygen // oxygen production // eu+efta+uk; Transoceanic ship, containers; GLO
- kg_63: 0.00698399
  Mass in kg, for sodium chlorate // sodium chlorate production // glo; Articulated lorry transport, Euro 4, Total weight >32 t; EU+EFTA+UK
- km_63: 999.429
  Distance in km, for sodium chlorate // sodium chlorate production // glo; Articulated lorry transport, Euro 4, Total weight >32 t; EU+EFTA+UK
- kg_km_63: 6.98; = kg_63*km_63
  Transport amount in km*km, for sodium chlorate // sodium chlorate production // glo; Articulated lorry transport, Euro 4, Total weight >32 t; EU+EFTA+UK
- kg_64: 0.00698399
  Mass in kg, for sodium chlorate // sodium chlorate production // glo; Transoceanic ship, containers; GLO
- km_64: 18041.3
  Distance in km, for sodium chlorate // sodium chlorate production // glo; Transoceanic ship, containers; GLO
- kg_km_64: 126; = kg_64*km_64
  Transport amount in km*km, for sodium chlorate // sodium chlorate production // glo; Transoceanic ship, containers; GLO
- kg_65: 0.0218723
  Mass in kg, for sodium hydroxide // sodium hydroxide production // eu+efta+uk; Articulated lorry transport, Euro 4, Total weight >32 t; EU+EFTA+UK
- km_65: 1001.26
  Distance in km, for sodium hydroxide // sodium hydroxide production // eu+efta+uk; Articulated lorry transport, Euro 4, Total weight >32 t; EU+EFTA+UK
- kg_km_65: 21.9; = kg_65*km_65
  Transport amount in km*km, for sodium hydroxide // sodium hydroxide production // eu+efta+uk; Articulated lorry transport, Euro 4, Total weight >32 t; EU+EFTA+UK
- kg_66: 0.0218723
  Mass in kg, for sodium hydroxide // sodium hydroxide production // eu+efta+uk; Transoceanic ship, containers; GLO
- km_66: 18013.6
  Distance in km, for sodium hydroxide // sodium hydroxide production // eu+efta+uk; Transoceanic ship, containers; GLO
- kg_km_66: 394; = kg_66*km_66
  Transport amount in km*km, for sodium hydroxide // sodium hydroxide production // eu+efta+uk; Transoceanic ship, containers; GLO
- kg_67: 0.0156375
  Mass in kg, for sulphuric acid // sulphuric acid production // eu+efta+uk; Articulated lorry transport, Euro 4, Total weight >32 t; EU+EFTA+UK
- km_67: 997.602
  Distance in km, for sulphuric acid // sulphuric acid production // eu+efta+uk; Articulated lorry transport, Euro 4, Total weight >32 t; EU+EFTA+UK
- kg_km_67: 15.6; = kg_67*km_67
  Transport amount in km*km, for sulphuric acid // sulphuric acid production // eu+efta+uk; Articulated lorry transport, Euro 4, Total weight >32 t; EU+EFTA+UK
- kg_68: 0.0156375
  Mass in kg, for sulphuric acid // sulphuric acid production // eu+efta+uk; Transoceanic ship, containers; GLO
- km_68: 17969.6
  Distance in km, for sulphuric acid // sulphuric acid production // eu+efta+uk; Transoceanic ship, containers; GLO
- kg_km_68: 281; = kg_68*km_68
  Transport amount in km*km, for sulphuric acid // sulphuric acid production // eu+efta+uk; Transoceanic ship, containers; GLO
- kg_69: 0.000354506
  Mass in kg, for ozone // ozone production // glo; Articulated lorry transport, Euro 4, Total weight >32 t; EU+EFTA+UK
- km_69: 1001.39
  Distance in km, for ozone // ozone production // glo; Articulated lorry transport, Euro 4, Total weight >32 t; EU+EFTA+UK
- kg_km_69: 0.355; = kg_69*km_69
  Transport amount in km*km, for ozone // ozone production // glo; Articulated lorry transport, Euro 4, Total weight >32 t; EU+EFTA+UK
- kg_70: 0.000354506
  Mass in kg, for ozone // ozone production // glo; Transoceanic ship, containers; GLO
- km_70: 17996.9
  Distance in km, for ozone // ozone production // glo; Transoceanic ship, containers; GLO
- kg_km_70: 6.38; = kg_70*km_70
  Transport amount in km*km, for ozone // ozone production // glo; Transoceanic ship, containers; GLO
- kg_71: 4.00703e-5
  Mass in kg, for sodium sulphite // sodium sulphite production // eu+efta+uk; Articulated lorry transport, Euro 4, Total weight >32 t; EU+EFTA+UK
- km_71: 1000.74
  Distance in km, for sodium sulphite // sodium sulphite production // eu+efta+uk; Articulated lorry transport, Euro 4, Total weight >32 t; EU+EFTA+UK
- kg_km_71: 0.0401; = kg_71*km_71
  Transport amount in km*km, for sodium sulphite // sodium sulphite production // eu+efta+uk; Articulated lorry transport, Euro 4, Total weight >32 t; EU+EFTA+UK
- kg_72: 4.00703e-5
  Mass in kg, for sodium sulphite // sodium sulphite production // eu+efta+uk; Transoceanic ship, containers; GLO
- km_72: 17993.4
  Distance in km, for sodium sulphite // sodium sulphite production // eu+efta+uk; Transoceanic ship, containers; GLO
- kg_km_72: 0.721; = kg_72*km_72
  Transport amount in km*km, for sodium sulphite // sodium sulphite production // eu+efta+uk; Transoceanic ship, containers; GLO
- kg_73: 0.00681072
  Mass in kg, for chlorine dioxide // chlorine dioxide production // glo; Articulated lorry transport, Euro 4, Total weight >32 t; EU+EFTA+UK
- km_73: 999.894
  Distance in km, for chlorine dioxide // chlorine dioxide production // glo; Articulated lorry transport, Euro 4, Total weight >32 t; EU+EFTA+UK
- kg_km_73: 6.81; = kg_73*km_73
  Transport amount in km*km, for chlorine dioxide // chlorine dioxide production // glo; Articulated lorry transport, Euro 4, Total weight >32 t; EU+EFTA+UK
- kg_74: 0.00681072
  Mass in kg, for chlorine dioxide // chlorine dioxide production // glo; Transoceanic ship, containers; GLO
- km_74: 18059.8
  Distance in km, for chlorine dioxide // chlorine dioxide production // glo; Transoceanic ship, containers; GLO
- kg_km_74: 123; = kg_74*km_74
  Transport amount in km*km, for chlorine dioxide // chlorine dioxide production // glo; Transoceanic ship, containers; GLO
- kg_75: 0.000560618
  Mass in kg, for hydrochloric acid // hydrochloric acid production // eu+efta+uk; Articulated lorry transport, Euro 4, Total weight >32 t; EU+EFTA+UK
- km_75: 1000.68
  Distance in km, for hydrochloric acid // hydrochloric acid production // eu+efta+uk; Articulated lorry transport, Euro 4, Total weight >32 t; EU+EFTA+UK
- kg_km_75: 0.561; = kg_75*km_75
  Transport amount in km*km, for hydrochloric acid // hydrochloric acid production // eu+efta+uk; Articulated lorry transport, Euro 4, Total weight >32 t; EU+EFTA+UK
- kg_76: 0.000560618
  Mass in kg, for hydrochloric acid // hydrochloric acid production // eu+efta+uk; Transoceanic ship, containers; GLO
- km_76: 18015.8
  Distance in km, for hydrochloric acid // hydrochloric acid production // eu+efta+uk; Transoceanic ship, containers; GLO
- kg_km_76: 10.1; = kg_76*km_76
  Transport amount in km*km, for hydrochloric acid // hydrochloric acid production // eu+efta+uk; Transoceanic ship, containers; GLO
- kg_77: 0.00166734
  Mass in kg, for sodium sulphate // sodium sulphate production // eu+efta+uk; Articulated lorry transport, Euro 4, Total weight >32 t; EU+EFTA+UK
- km_77: 1001.6
  Distance in km, for sodium sulphate // sodium sulphate production // eu+efta+uk; Articulated lorry transport, Euro 4, Total weight >32 t; EU+EFTA+UK
- kg_km_77: 1.67; = kg_77*km_77
  Transport amount in km*km, for sodium sulphate // sodium sulphate production // eu+efta+uk; Articulated lorry transport, Euro 4, Total weight >32 t; EU+EFTA+UK
- kg_78: 0.00166734
  Mass in kg, for sodium sulphate // sodium sulphate production // eu+efta+uk; Transoceanic ship, containers; GLO
- km_78: 17992.8
  Distance in km, for sodium sulphate // sodium sulphate production // eu+efta+uk; Transoceanic ship, containers; GLO
- kg_km_78: 30; = kg_78*km_78
  Transport amount in km*km, for sodium sulphate // sodium sulphate production // eu+efta+uk; Transoceanic ship, containers; GLO
- kg_79: 0.000801273
  Mass in kg, for sodium hypochlorite // sodium hypochlorite production // eu+efta+uk; Articulated lorry transport, Euro 4, Total weight >32 t; EU+EFTA+UK
- km_79: 999.659
  Distance in km, for sodium hypochlorite // sodium hypochlorite production // eu+efta+uk; Articulated lorry transport, Euro 4, Total weight >32 t; EU+EFTA+UK
- kg_km_79: 0.801; = kg_79*km_79
  Transport amount in km*km, for sodium hypochlorite // sodium hypochlorite production // eu+efta+uk; Articulated lorry transport, Euro 4, Total weight >32 t; EU+EFTA+UK
- kg_80: 0.000801273
  Mass in kg, for sodium hypochlorite // sodium hypochlorite production // eu+efta+uk; Transoceanic ship, containers; GLO
- km_80: 17971.4
  Distance in km, for sodium hypochlorite // sodium hypochlorite production // eu+efta+uk; Transoceanic ship, containers; GLO
- kg_km_80: 14.4; = kg_80*km_80
  Transport amount in km*km, for sodium hypochlorite // sodium hypochlorite production // eu+efta+uk; Transoceanic ship, containers; GLO
- kg_81: 0.00160584
  Mass in kg, for precipitated calcium carbonate // precipitated calcium carbonate production // eu+efta+uk; Articulated lorry transport, Euro 4, Total weight >32 t; EU+EFTA+UK
- km_81: 1002.59
  Distance in km, for precipitated calcium carbonate // precipitated calcium carbonate production // eu+efta+uk; Articulated lorry transport, Euro 4, Total weight >32 t; EU+EFTA+UK
- kg_km_81: 1.61; = kg_81*km_81
  Transport amount in km*km, for precipitated calcium carbonate // precipitated calcium carbonate production // eu+efta+uk; Articulated lorry transport, Euro 4, Total weight >32 t; EU+EFTA+UK
- kg_82: 0.00160584
  Mass in kg, for precipitated calcium carbonate // precipitated calcium carbonate production // eu+efta+uk; Transoceanic ship, containers; GLO
- km_82: 17996.8
  Distance in km, for precipitated calcium carbonate // precipitated calcium carbonate production // eu+efta+uk; Transoceanic ship, containers; GLO
- kg_km_82: 28.9; = kg_82*km_82
  Transport amount in km*km, for precipitated calcium carbonate // precipitated calcium carbonate production // eu+efta+uk; Transoceanic ship, containers; GLO
- kg_83: 0.000507426
  Mass in kg, for aluminium sulphate powder // aluminium sulphate powder production // eu+efta+uk; Articulated lorry transport, Euro 4, Total weight >32 t; EU+EFTA+UK
- km_83: 999.16
  Distance in km, for aluminium sulphate powder // aluminium sulphate powder production // eu+efta+uk; Articulated lorry transport, Euro 4, Total weight >32 t; EU+EFTA+UK
- kg_km_83: 0.507; = kg_83*km_83
  Transport amount in km*km, for aluminium sulphate powder // aluminium sulphate powder production // eu+efta+uk; Articulated lorry transport, Euro 4, Total weight >32 t; EU+EFTA+UK
- kg_84: 0.000507426
  Mass in kg, for aluminium sulphate powder // aluminium sulphate powder production // eu+efta+uk; Transoceanic ship, containers; GLO
- km_84: 17992.8
  Distance in km, for aluminium sulphate powder // aluminium sulphate powder production // eu+efta+uk; Transoceanic ship, containers; GLO
- kg_km_84: 9.13; = kg_84*km_84
  Transport amount in km*km, for aluminium sulphate powder // aluminium sulphate powder production // eu+efta+uk; Transoceanic ship, containers; GLO
- kg_85: 7.70213e-5
  Mass in kg, for sodium hydrogen sulphite // sodium hydrogen sulphite production // eu+efta+uk; Articulated lorry transport, Euro 4, Total weight >32 t; EU+EFTA+UK
- km_85: 1038.67
  Distance in km, for sodium hydrogen sulphite // sodium hydrogen sulphite production // eu+efta+uk; Articulated lorry transport, Euro 4, Total weight >32 t; EU+EFTA+UK
- kg_km_85: 0.08; = kg_85*km_85
  Transport amount in km*km, for sodium hydrogen sulphite // sodium hydrogen sulphite production // eu+efta+uk; Articulated lorry transport, Euro 4, Total weight >32 t; EU+EFTA+UK
- kg_86: 0.0150803
  Mass in kg, for biodegradable waste to landfill // landfill of biodegradable waste // eu+efta+uk; Articulated lorry transport, Euro 4, Total weight >32 t; EU+EFTA+UK
- km_86: 77
  Distance in km, for biodegradable waste to landfill // landfill of biodegradable waste // eu+efta+uk; Articulated lorry transport, Euro 4, Total weight >32 t; EU+EFTA+UK
- kg_km_86: 1.16118; = kg_86*km_86
  Transport amount in km*km, for biodegradable waste to landfill // landfill of biodegradable waste // eu+efta+uk; Articulated lorry transport, Euro 4, Total weight >32 t; EU+EFTA+UK

## Reference product
- bleached kraft pulp, eucalyptus // bleached kraft pulp, eucalyptus // world (without eu+efta+uk): 1

## Inputs
- Transport of malusil by Transoceanic ship, bulk - GLO: 0.0996221; = kg_km_0
- Transport of malusil by Freight train, diesel traction - EU+EFTA+UK: 0.0122987; = kg_km_1
- Transport of malusil by Freight train, electricity traction - EU+EFTA+UK: 0.0041835; = kg_km_2
- Transport of malusil by Freight train, average - EU+EFTA+UK: 9.86699e-5; = kg_km_3
- Transport of malusil by Barge - EU+EFTA+UK: 0.000945993; = kg_km_4
- Transport of malusil by Barge - ROW w/o EU+EFTA: 0.00193167; = kg_km_5
- Transport of malusil by Articulated lorry transport, Total weight <7.5 t, mix Euro 0-5 - EU+EFTA+UK: 0.00130272; = kg_km_6
- Transport of malusil by Articulated lorry transport, Euro 4, Total weight >32 t - EU+EFTA+UK: 0.0121624; = kg_km_7
- Transport of malusil by Articulated lorry transport, Total weight >32 t, mix Euro 0-5 - ROW w/o EU+EFTA: 0.0320989; = kg_km_8
- Transport of sodium hydrogen sulphite // sodium hydrogen sulphite production // eu+efta+uk by Transoceanic ship, containers - GLO: 1.44; = kg_km_9
- Transport of eucalyptus forestry // eucalyptus forestry // world (without eu+efta+uk) by Articulated lorry transport, Euro 4, Total weight >32 t - EU+EFTA+UK: 411.857; = kg_km_10
- Transport of eucalyptus forestry // eucalyptus forestry // world (without eu+efta+uk) by Freight train, average - EU+EFTA+UK: 55.9093; = kg_km_11
- Transport of eucalyptus forestry // eucalyptus forestry // world (without eu+efta+uk) by Barge - ROW w/o EU+EFTA: 119.447; = kg_km_12
- Transport of biogas for bioenergy // biogas for bioenergy // cn by Articulated lorry transport, Euro 4, Total weight >32 t - EU+EFTA+UK: 135; = kg_km_13
- Transport of biogas for bioenergy // biogas for bioenergy // cn by Transoceanic ship, containers - GLO: 2430; = kg_km_14
- Transport of biogas for bioenergy // biogas for bioenergy // ras w/o cn by Articulated lorry transport, Euro 4, Total weight >32 t - EU+EFTA+UK: 11.7; = kg_km_15
- Transport of biogas for bioenergy // biogas for bioenergy // ras w/o cn by Transoceanic ship, containers - GLO: 211; = kg_km_16
- Transport of biogas for bioenergy // biogas for bioenergy // in by Articulated lorry transport, Euro 4, Total weight >32 t - EU+EFTA+UK: 7.25; = kg_km_17
- Transport of biogas for bioenergy // biogas for bioenergy // in by Transoceanic ship, containers - GLO: 130; = kg_km_18
- Transport of bark, hardwood // bark, hardwood // eu+efta+uk by Articulated lorry transport, Euro 4, Total weight >32 t - EU+EFTA+UK: 122.844; = kg_km_19
- Transport of bark, hardwood // bark, hardwood // eu+efta+uk by Transoceanic ship, containers - GLO: 2211.19; = kg_km_20
- Transport of bark, softwood // bark, softwood // eu+efta+uk by Articulated lorry transport, Euro 4, Total weight >32 t - EU+EFTA+UK: 122.844; = kg_km_21
- Transport of bark, softwood // bark, softwood // eu+efta+uk by Transoceanic ship, containers - GLO: 2211.19; = kg_km_22
- Transport of heavy fuel oil (1.0 wt.% s) // heavy fuel oil at refinery // in by Articulated lorry transport, Euro 4, Total weight >32 t - EU+EFTA+UK: 0.451; = kg_km_23
- Transport of heavy fuel oil (1.0 wt.% s) // heavy fuel oil at refinery // in by Transoceanic ship, containers - GLO: 8.12; = kg_km_24
- Transport of heavy fuel oil (1.0 wt.% s) // heavy fuel oil at refinery // jp by Articulated lorry transport, Euro 4, Total weight >32 t - EU+EFTA+UK: 0.764; = kg_km_25
- Transport of heavy fuel oil (1.0 wt.% s) // heavy fuel oil at refinery // jp by Transoceanic ship, containers - GLO: 13.7; = kg_km_26
- Transport of heavy fuel oil (1.0 wt.% s) // heavy fuel oil at refinery // ras w/o cn by Articulated lorry transport, Euro 4, Total weight >32 t - EU+EFTA+UK: 4.62; = kg_km_27
- Transport of heavy fuel oil (1.0 wt.% s) // heavy fuel oil at refinery // ras w/o cn by Transoceanic ship, containers - GLO: 83.1; = kg_km_28
- Transport of heavy fuel oil (1.0 wt.% s) // heavy fuel oil at refinery // au by Articulated lorry transport, Euro 4, Total weight >32 t - EU+EFTA+UK: 0.0463; = kg_km_29
- Transport of heavy fuel oil (1.0 wt.% s) // heavy fuel oil at refinery // au by Transoceanic ship, containers - GLO: 0.833; = kg_km_30
- Transport of heavy fuel oil (1.0 wt.% s) // heavy fuel oil at refinery // cn by Articulated lorry transport, Euro 4, Total weight >32 t - EU+EFTA+UK: 0.474; = kg_km_31
- Transport of heavy fuel oil (1.0 wt.% s) // heavy fuel oil at refinery // cn by Transoceanic ship, containers - GLO: 8.54; = kg_km_32
- Transport of heavy fuel oil (1.0 wt.% s) // heavy fuel oil at refinery // ru by Articulated lorry transport, Euro 4, Total weight >32 t - EU+EFTA+UK: 2.37; = kg_km_33
- Transport of heavy fuel oil (1.0 wt.% s) // heavy fuel oil at refinery // ru by Transoceanic ship, containers - GLO: 42.7; = kg_km_34
- Transport of heavy fuel oil (1.0 wt.% s) // heavy fuel oil at refinery // raf by Articulated lorry transport, Euro 4, Total weight >32 t - EU+EFTA+UK: 0.845; = kg_km_35
- Transport of heavy fuel oil (1.0 wt.% s) // heavy fuel oil at refinery // raf by Transoceanic ship, containers - GLO: 15.2; = kg_km_36
- Transport of heavy fuel oil (1.0 wt.% s) // heavy fuel oil at refinery // br by Articulated lorry transport, Euro 4, Total weight >32 t - EU+EFTA+UK: 0.405; = kg_km_37
- Transport of heavy fuel oil (1.0 wt.% s) // heavy fuel oil at refinery // br by Transoceanic ship, containers - GLO: 7.29; = kg_km_38
- Transport of heavy fuel oil (1.0 wt.% s) // heavy fuel oil at refinery // rsa by Articulated lorry transport, Euro 4, Total weight >32 t - EU+EFTA+UK: 1.61; = kg_km_39
- Transport of heavy fuel oil (1.0 wt.% s) // heavy fuel oil at refinery // rsa by Transoceanic ship, containers - GLO: 29; = kg_km_40
- Transport of diesel // diesel mix at refinery // cn by Articulated lorry transport, Euro 4, Total weight >32 t - EU+EFTA+UK: 0.026; = kg_km_41
- Transport of diesel // diesel mix at refinery // cn by Transoceanic ship, containers - GLO: 0.468; = kg_km_42
- Transport of diesel // diesel mix at refinery // jp by Articulated lorry transport, Euro 4, Total weight >32 t - EU+EFTA+UK: 0.00694; = kg_km_43
- Transport of diesel // diesel mix at refinery // jp by Transoceanic ship, containers - GLO: 0.125; = kg_km_44
- Transport of diesel // diesel mix at refinery // raf by Articulated lorry transport, Euro 4, Total weight >32 t - EU+EFTA+UK: 0.00482; = kg_km_45
- Transport of diesel // diesel mix at refinery // raf by Transoceanic ship, containers - GLO: 0.0868; = kg_km_46
- Transport of diesel // diesel mix at refinery // ru by Articulated lorry transport, Euro 4, Total weight >32 t - EU+EFTA+UK: 0.0107; = kg_km_47
- Transport of diesel // diesel mix at refinery // ru by Transoceanic ship, containers - GLO: 0.193; = kg_km_48
- Transport of diesel // diesel mix at refinery // au by Articulated lorry transport, Euro 4, Total weight >32 t - EU+EFTA+UK: 0.002; = kg_km_49
- Transport of diesel // diesel mix at refinery // au by Transoceanic ship, containers - GLO: 0.036; = kg_km_50
- Transport of diesel // diesel mix at refinery // in by Articulated lorry transport, Euro 4, Total weight >32 t - EU+EFTA+UK: 0.014; = kg_km_51
- Transport of diesel // diesel mix at refinery // in by Transoceanic ship, containers - GLO: 0.252; = kg_km_52
- Transport of diesel // diesel mix at refinery // br by Articulated lorry transport, Euro 4, Total weight >32 t - EU+EFTA+UK: 0.00623; = kg_km_53
- Transport of diesel // diesel mix at refinery // br by Transoceanic ship, containers - GLO: 0.112; = kg_km_54
- Transport of diesel // diesel mix at refinery // rsa by Articulated lorry transport, Euro 4, Total weight >32 t - EU+EFTA+UK: 0.00906; = kg_km_55
- Transport of diesel // diesel mix at refinery // rsa by Transoceanic ship, containers - GLO: 0.163; = kg_km_56
- Transport of diesel // diesel mix at refinery // ras w/o cn by Articulated lorry transport, Euro 4, Total weight >32 t - EU+EFTA+UK: 0.0378; = kg_km_57
- Transport of diesel // diesel mix at refinery // ras w/o cn by Transoceanic ship, containers - GLO: 0.68; = kg_km_58
- Transport of hydrogen peroxide, 100% // hydrogen peroxide, 100% production // eu+efta+uk by Articulated lorry transport, Euro 4, Total weight >32 t - EU+EFTA+UK: 5.98; = kg_km_59
- Transport of hydrogen peroxide, 100% // hydrogen peroxide, 100% production // eu+efta+uk by Transoceanic ship, containers - GLO: 108; = kg_km_60
- Transport of oxygen // oxygen production // eu+efta+uk by Articulated lorry transport, Euro 4, Total weight >32 t - EU+EFTA+UK: 47.8; = kg_km_61
- Transport of oxygen // oxygen production // eu+efta+uk by Transoceanic ship, containers - GLO: 861; = kg_km_62
- Transport of sodium chlorate // sodium chlorate production // glo by Articulated lorry transport, Euro 4, Total weight >32 t - EU+EFTA+UK: 6.98; = kg_km_63
- Transport of sodium chlorate // sodium chlorate production // glo by Transoceanic ship, containers - GLO: 126; = kg_km_64
- Transport of sodium hydroxide // sodium hydroxide production // eu+efta+uk by Articulated lorry transport, Euro 4, Total weight >32 t - EU+EFTA+UK: 21.9; = kg_km_65
- Transport of sodium hydroxide // sodium hydroxide production // eu+efta+uk by Transoceanic ship, containers - GLO: 394; = kg_km_66
- Transport of sulphuric acid // sulphuric acid production // eu+efta+uk by Articulated lorry transport, Euro 4, Total weight >32 t - EU+EFTA+UK: 15.6; = kg_km_67
- Transport of sulphuric acid // sulphuric acid production // eu+efta+uk by Transoceanic ship, containers - GLO: 281; = kg_km_68
- Transport of ozone // ozone production // glo by Articulated lorry transport, Euro 4, Total weight >32 t - EU+EFTA+UK: 0.355; = kg_km_69
- Transport of ozone // ozone production // glo by Transoceanic ship, containers - GLO: 6.38; = kg_km_70
- Transport of sodium sulphite // sodium sulphite production // eu+efta+uk by Articulated lorry transport, Euro 4, Total weight >32 t - EU+EFTA+UK: 0.0401; = kg_km_71
- Transport of sodium sulphite // sodium sulphite production // eu+efta+uk by Transoceanic ship, containers - GLO: 0.721; = kg_km_72
- Transport of chlorine dioxide // chlorine dioxide production // glo by Articulated lorry transport, Euro 4, Total weight >32 t - EU+EFTA+UK: 6.81; = kg_km_73
- Transport of chlorine dioxide // chlorine dioxide production // glo by Transoceanic ship, containers - GLO: 123; = kg_km_74
- Transport of hydrochloric acid // hydrochloric acid production // eu+efta+uk by Articulated lorry transport, Euro 4, Total weight >32 t - EU+EFTA+UK: 0.561; = kg_km_75
- Transport of hydrochloric acid // hydrochloric acid production // eu+efta+uk by Transoceanic ship, containers - GLO: 10.1; = kg_km_76
- Transport of sodium sulphate // sodium sulphate production // eu+efta+uk by Articulated lorry transport, Euro 4, Total weight >32 t - EU+EFTA+UK: 1.67; = kg_km_77
- Transport of sodium sulphate // sodium sulphate production // eu+efta+uk by Transoceanic ship, containers - GLO: 30; = kg_km_78
- Transport of sodium hypochlorite // sodium hypochlorite production // eu+efta+uk by Articulated lorry transport, Euro 4, Total weight >32 t - EU+EFTA+UK: 0.801; = kg_km_79
- Transport of sodium hypochlorite // sodium hypochlorite production // eu+efta+uk by Transoceanic ship, containers - GLO: 14.4; = kg_km_80
- Transport of precipitated calcium carbonate // precipitated calcium carbonate production // eu+efta+uk by Articulated lorry transport, Euro 4, Total weight >32 t - EU+EFTA+UK: 1.61; = kg_km_81
- Transport of precipitated calcium carbonate // precipitated calcium carbonate production // eu+efta+uk by Transoceanic ship, containers - GLO: 28.9; = kg_km_82
- Transport of aluminium sulphate powder // aluminium sulphate powder production // eu+efta+uk by Articulated lorry transport, Euro 4, Total weight >32 t - EU+EFTA+UK: 0.507; = kg_km_83
- Transport of aluminium sulphate powder // aluminium sulphate powder production // eu+efta+uk by Transoceanic ship, containers - GLO: 9.13; = kg_km_84
- Transport of sodium hydrogen sulphite // sodium hydrogen sulphite production // eu+efta+uk by Articulated lorry transport, Euro 4, Total weight >32 t - EU+EFTA+UK: 0.08; = kg_km_85
- Electricity from Electricity grid mix 1kV-60kV - AU: 0.0008
- Electricity from Electricity grid mix 1kV-60kV - NZ: 0.0002
- Electricity from Electricity grid mix 1kV-60kV - RU: 0.0036
- Electricity from Electricity grid mix 1kV-60kV - RAF: 0.0027
- Electricity from Electricity grid mix 1kV-60kV - RSA: 0.0062
- Electricity from Electricity grid mix 1kV-60kV - RNA: 0.0181
- Transport of biodegradable waste to landfill // landfill of biodegradable waste // eu+efta+uk by Articulated lorry transport, Euro 4, Total weight >32 t - EU+EFTA+UK: 1.16118; = kg_km_86
- Electricity from Electricity grid mix 1kV-60kV - CN: 0.0186101
- Electricity from Electricity grid mix 1kV-60kV - RAS w/o CN: 0.0203899
- bleached kraft pulp, eucalyptus // bleached kraft pulp, eucalyptus // world (without eu+efta+uk), blackbox: 1
- bleached kraft pulp, eucalyptus // bleached kraft pulp, eucalyptus // world (without eu+efta+uk), elementary: 1

## Impact indicators
- Eutrophication marine: 0.00196354
- Ecotoxicity, freshwater: 67.7463
- Land use: 54.1904
- Water use: 0.501466
- Resource use, minerals and metals: 3.18288e-6
- Resource use, fossils: 4.29602
- Climate change: 0.347612
- Ozone depletion: 3.1933e-8
- Human toxicity, cancer: 2.53836e-10
- Human toxicity, non-cancer: 1.2468e-8
- EF-particulate Matter: 7.01141e-8
- Ionising radiation, human health: 0.0213267
- Photochemical ozone formation - human health: 0.00428892
- Acidification: 0.00615656
- Eutrophication, terrestrial: 0.0225896
- Eutrophication, freshwater: 8.68465e-5

## Deviations from the LCI method principle
The background data uses:
- the \xe2\x80\x9cRecycled content cut-off\xe2\x80\x9d approach to allocate end-of-life by-products and secondary materials. This allocation is explained in the description of the recycled content system model (http://www.ecoinvent.org/database/system-models-in-ecoinvent-3/cut-off-system-model/allocation-cut-off-by-classification.html).
OR
- EF compliant data

## Deviations from the LCI method approaches
Background data:
- the \xe2\x80\x9cRecycled content cut-off\xe2\x80\x9d approach to allocate end-of-life by-products and secondary materials. This allocation is explained in the description of the recycled content system model (http://www.ecoinvent.org/database/system-models-in-ecoinvent-3/cut-off-system-model/allocation-cut-off-by-classification.html). The ecoinvent database mostly relies on “Allocation – market values” apart for few exceptions particularly in the energy sector. ecoinvent energy data is replaced with EF3.0 core data as per the EF guidelines version 2.0.
OR
- EF compliant data

## Modelling constants
All modelling constants follow the requirements listed in the Tender Specifications 070201/2020/SER/ENV.B1. Completeness: There are no intentional cut-offs in the inventory no matter how small their contribution to all the EF impact categories is. Eventual cut-offs are in compliance with the Guide for EF compliant data sets (JRC 2020), i.e. only if below the 3% cut-off rule. Water use: water use is modelled at country level using separate flows for water withdrawal, water release and water evaporation. Handling multi-functional processes: the following PEF multi- functionality decision hierarchy is applied for resolving all multi- functionality problems: (1) subdivision or system expansion; (2) allocation based on a relevant underlying physical relationship (substitution may apply here); (3) allocation based on some other relationship. Direct land use change: GHG emissions from direct LUC allocated to good/service for 20 years after the LUC occurs, with IPCC default values. Carbon storage and delayed emissions: credits associated with temporary (carbon) storage or delayed emissions up to 300 years are not be considered. Emissions off-setting: are not included. Capital goods (including infrastructures) and their End of life: they are included. System boundaries: system boundaries include all processes linked to the product supply chain (e.g. maintenance). Time period: emissions and removals are modelled as if released or removed at the beginning of the assessment method. Fossil and biogenic carbon emissions and removals: removals and emissions are modelled as follows: All GHG emissions from fossil fuels (including peat and limestone) are modelled consistently with the most updated ILCD list of elementary flows. The non-fossil (biogenic) carbon flows are modelled consistently with the most updated ILCD list of elementary flows.

## Cut-off and completeness
There are no intentional cut-offs in the inventory no matter how small their contribution to all the EF impact categories is. Eventual cut-offs are in compliance with the Guide for EF compliant data sets (JRC 2020), i.e. only if below the 3% cut-off rule. The dataset dry mass and water balance has been checked to ensure the inventory is complete. Capital goods (e.g. infrastructure) and their end-of-life are included.

## Data selection and combination
These datasets include, in both their foreground and background data, links to EF3.0 compliant data.
The relevant background data on energy, transport, and End of Life are from the LCDN data node (http://lcdn.thinkstep.com/Node/).
All other background data in the supply of this product for which no EF3.0 process was available are from ecoinvent v3.7 database (www.ecoinvent.org) or other data sources.

## Data treatment and extrapolations
Several data sources have been used to model the inventory.

## Review details
Internal reviews have been asked to review the plausibility of the unit process, LCIA scores, and DQRs. Internal reviewers have also been asked to review the data for EF compliancy. The consortium is therefore responsible for aspects such as compliancy with the ILCD format, including validation in Look@LCI, and nomenclature.
Internal reviwers have been asked to judge based on the process name, that the unit process models in a complete and representative way the process in the requested location. The review encompassed the plausability of:
- exchanges with nature (elementary flows) as well as exchanges such as product and waste flows.
- meta information (general comment, technology comment, system boundaries, allocation, cut-off rules, etc.). Reviewers were asked to judge if the provided information is enough to understand the content of the process.
- LCIA scores
- DQRs including precision, technology, time and geography. As well as the overall DQR.
External reviewers have been asked to provide their expertise in the field of interest. External reviewers have been asked to review the unit process, including eventual methodological choices, the LCIA scores (provided with contribution scores as well), and DQRs. External reviewers have been provided all the information in a tool developed by the consortium for the purpose of this project.
External reviewers have been asked to judge based on the process name, that the unit process models in a complete and representative way the process in the requested location. The review encompassed:
- Plausability and completeness of exchanges with nature (elementary flows) as well as exchanges such as product and waste flows.
- Review of meta information (general comment, technology comment, system boundaries, allocation, cut-off rules, etc.). Reviewers were asked to judge if the provided information is enough to understand the content of the process.
- Review of properties (biogenic carbon and water content).
- Review of allocation keys.
- Plausability of LCIA scores calculated by the consortium.
- Plausability of DQRs including precision, technology, time and geography. As well as the overall DQR.

## Data sources
- Background Data for Representative products and organisations. EF 3.0 compliant (data stock)
- The European Pulp Industry Sector Association AISBL (EPIS), (2020). EPIS Life Cycle Inventory data for Bleached Eucalyptus Kraft Pulp for Latin America, 2020 Data.

## Intended applications
Implementation of regular Product Environmental Footprint (PEF) studies and Organisation Environmental Footprint (OEF) studies exclusively under the specified Product groups and sectors as defined in the Product Environmental Footprint Category Rules (PEFCR) and Organisation Environmental Footprint Sectorial Rules (OEFSR) listed in http://ec.europa.eu/environment/eussd/smgp/PEFCR_OEFSR.htm
