# leather, other reptile; technology mix; m2

Dataset: ILCD process, Partly terminated system
Geography: GLO
Reference year: 2021
Valid until: 2024
Classification: Systems / Textiles, furnitures and other interiors
LCI method principle: Attributional
LCI method approaches: Allocation - market value
Completeness: All relevant flows quantified
Project: Provision of process-based 3.0 Environmental Footprint-compliant life cycle inventory datasets - Apparel 2 - contract number 070201/2020/840292/SER/ENV.B.1
Generated by: PRé Sustainability B.V.
Owner: PRé Sustainability B.V.
Compliance: ILCD Data Network - Entry-level; Suggestions for updating the PEF method 2019; ISO 14040 Environmental Management – Life Cycle Assessment – Principles and Framework, 2006; ISO 14044:2006. Environmental Management – Life Cycle Assessment – Requirements and guidelines.; Environmental Footprint 3.1
Review: Dependent internal review by Avraam Symeonidis, Marisa Vieira; Independent review panel by Madhuri Nigam
Data quality: Overall quality: Good; Time representativeness: Good; Geographical representativeness: Good; Technological representativeness: Very good; Precision: Fair; Methodological appropriateness and consistency: Not applicable
Amounts: no units in this file; such an amount is in the reference unit of its flow, which a separate flow dataset defines
copyright: true
licenseType: Free of charge for some user types or use types
accessRestrictions: Free of charge for all final users implementing a regular Product Environmental Footprint (PEF) studies and Organisation Environmental Footprint (OEF) studies exclusively under the specified Product groups and sectors as defined in the Product Environmental Footprint Category Rules (PEFCR) and Organisation Environmental Footprint Sectorial Rules (OEFSR) listed in http://ec.europa.eu/environment/eussd/smgp/PEFCR_OEFSR.htm and in accordance with the terms and conditions of the EULA (available at https://ecoinvent.lca-data.com/) exclusively until 31st December 2024. Any use of this dataset or any derivative data not within the specific context of one of the PEF/OEF projects or after the end of 2024 is not permitted.

## General comment
Notice: this data set supersedes the EF3.0-compliant version (see link under "preceding data set version" below calculated with the EF3.0). The life cycle inventory is not changed from the original EF3.0 data set. The LCIA results are calculated based on the EF3.1 methods which provide updated characterisation factors in the following impact categories: Climate Change, Ecotoxicity freshwater, Photochemical Ozone Formation, Acidification, Human Toxicity non-cancer, and Human Toxicity cancer. The review report and the data quality ratings refer to the original results. The data set has been updated by the European Commission on the basis of the original EF3.0 data set delivered by the data provider.WARNING! The EF method does not have a means to account for biodiversity degradation, threats of extinction, or the energy content of food consumed by wild animals which later enter the technosphere via hunting. Declare this if using this dataset in your study, or find a means to quantify it. This dataset uses hunted wild animals

Market for "reptile leather, other than crocodile and alligator", it is assumed that equal amounts (by square metre)of lizard and snake leather are used in the production of reptile leather, other than crocodile and alligator.

Allocation and waste
We could not find data on the proportion of the body mass that is fit for human consumption, or if there is sufficient demand for the meat, so we assumed in the worst case, the mass that is not skin is wasted in landfill. The economic value of the snake rearing and skinning comes from the sale of the skin in the model, as the demand for the meat would be only within the local market, whereas the skin can be sold internationally. Therefore we give 100% economic allocation to the skin.
Market for "reptile leather, other than crocodile and alligator", it is assumed that equal amounts (by square metre)of lizard and snake leather are used in the production of reptile leather, other than crocodile and alligator.

System boundary: From animal carcass to tanned and dried skin at factory gate

## Technology and included processes
System boundary: From animal at farm or in wild to slaughterhouse gate
Includes:
- Hunting/Farming stage
- Drying of skin in the sun
- Preserving agents and pesticides used in storage to prevent damage to skin
- Tanning process
- Transport by small lorry (Euro 4, Total weight <7.5 t)
- Waste from offal to landfill. It is assumed that only the skin is used, as insufficient
- Includes for reared animals:
-- Feed
-- Nutritional supplements
-- Transport of feed and nutritional supplements
-- Net bags used for storage
-- Land occupation
-- Electrical energy use
-- Faecal emissions (estimated as dry mass of feed consumed, minus bod weight gained)

Does not include:
- Biodiversity loss due to hunting of wild animals, because there is no elementary flow corresponding to biodiversity in EF 3 nomenclature. Please note this in your study, or find a way to quantify
- Calorific content of food consumed by wild animals, again due to lack of representation in the nomenclature. Please note this in your study, or find a way to quantify
- Firearms, ammunition or knives for hunted animals, due to lack of available data
- Enclosures for reared animals (python and tegu lizard)
- Emissions from onsite heating/energy production for reared animals (only grid electricity is modelled)
- Equipment required for rearing
- Water inputs (cleaning/hydration) are not modelled for reared animals

## Reference product
- leather, other reptile // leather, other reptile // glo: 1

## Inputs
- leather, other reptile // leather, other reptile // glo, blackbox: 1
- leather, other reptile // leather, other reptile // glo, elementary: 1

## Impact indicators
- Eutrophication marine: 2.45443
- Ecotoxicity, freshwater: 16171
- Land use: 17592.1
- Water use: 1850.42
- Resource use, minerals and metals: 0.00545425
- Resource use, fossils: 21255.6
- Climate change: 2068.55
- Ozone depletion: 1.26788e-6
- Human toxicity, cancer: 1.27521e-6
- Human toxicity, non-cancer: 1.84525e-5
- EF-particulate Matter: 0.000586758
- Ionising radiation, human health: 39.6793
- Photochemical ozone formation - human health: 5.42201
- Acidification: 15.8571
- Eutrophication, terrestrial: 25.2964
- Eutrophication, freshwater: 0.0288611

## Deviations from the LCI method principle
The background data uses:
- the \xe2\x80\x9cRecycled content cut-off\xe2\x80\x9d approach to allocate end-of-life by-products and secondary materials. This allocation is explained in the description of the recycled content system model (http://www.ecoinvent.org/database/system-models-in-ecoinvent-3/cut-off-system-model/allocation-cut-off-by-classification.html).
OR
- EF compliant data

## Deviations from the LCI method approaches
Background data:
- the \xe2\x80\x9cRecycled content cut-off\xe2\x80\x9d approach to allocate end-of-life by-products and secondary materials. This allocation is explained in the description of the recycled content system model (http://www.ecoinvent.org/database/system-models-in-ecoinvent-3/cut-off-system-model/allocation-cut-off-by-classification.html). The ecoinvent database mostly relies on “Allocation – market values” apart for few exceptions particularly in the energy sector. ecoinvent energy data is replaced with EF3.0 core data as per the EF guidelines version 2.0.
OR
- EF compliant data

## Modelling constants
All modelling constants follow the requirements listed in the Tender Specifications 070201/2020/SER/ENV.B1. Completeness: There are no intentional cut-offs in the inventory no matter how small their contribution to all the EF impact categories is. Eventual cut-offs are in compliance with the Guide for EF compliant data sets (JRC 2020), i.e. only if below the 3% cut-off rule. Water use: water use is modelled at country level using separate flows for water withdrawal, water release and water evaporation. Handling multi-functional processes: the following PEF multi- functionality decision hierarchy is applied for resolving all multi- functionality problems: (1) subdivision or system expansion; (2) allocation based on a relevant underlying physical relationship (substitution may apply here); (3) allocation based on some other relationship. Direct land use change: GHG emissions from direct LUC allocated to good/service for 20 years after the LUC occurs, with IPCC default values. Carbon storage and delayed emissions: credits associated with temporary (carbon) storage or delayed emissions up to 300 years are not be considered. Emissions off-setting: are not included. Capital goods (including infrastructures) and their End of life: they are included. System boundaries: system boundaries include all processes linked to the product supply chain (e.g. maintenance). Time period: emissions and removals are modelled as if released or removed at the beginning of the assessment method. Fossil and biogenic carbon emissions and removals: removals and emissions are modelled as follows: All GHG emissions from fossil fuels (including peat and limestone) are modelled consistently with the most updated ILCD list of elementary flows. The non-fossil (biogenic) carbon flows are modelled consistently with the most updated ILCD list of elementary flows.

## Cut-off and completeness
There are no intentional cut-offs in the inventory no matter how small their contribution to all the EF impact categories is. Eventual cut-offs are in compliance with the Guide for EF compliant data sets (JRC 2020), i.e. only if below the 3% cut-off rule. The dataset dry mass and water balance has been checked to ensure the inventory is complete. Capital goods (e.g. infrastructure) and their end-of-life are included.

## Data selection and combination
These datasets include, in both their foreground and background data, links to EF3.0 compliant data.
The relevant background data on energy, transport, and End of Life are from the LCDN data node (http://lcdn.thinkstep.com/Node/).
All other background data in the supply of this product for which no EF3.0 process was available are from ecoinvent v3.7 database (www.ecoinvent.org) or other data sources.

## Data treatment and extrapolations
Several data sources have been used to model the inventory.

## Review details
Internal reviews have been asked to review the plausibility of the unit process, LCIA scores, and DQRs. Internal reviewers have also been asked to review the data for EF compliancy. The consortium is therefore responsible for aspects such as compliancy with the ILCD format, including validation in Look@LCI, and nomenclature.
Internal reviwers have been asked to judge based on the process name, that the unit process models in a complete and representative way the process in the requested location. The review encompassed the plausability of:
- exchanges with nature (elementary flows) as well as exchanges such as product and waste flows.
- meta information (general comment, technology comment, system boundaries, allocation, cut-off rules, etc.). Reviewers were asked to judge if the provided information is enough to understand the content of the process.
- LCIA scores
- DQRs including precision, technology, time and geography. As well as the overall DQR.
External reviewers have been asked to provide their expertise in the field of interest. External reviewers have been asked to review the unit process, including eventual methodological choices, the LCIA scores (provided with contribution scores as well), and DQRs. External reviewers have been provided all the information in a tool developed by the consortium for the purpose of this project.
External reviewers have been asked to judge based on the process name, that the unit process models in a complete and representative way the process in the requested location. The review encompassed:
- Plausability and completeness of exchanges with nature (elementary flows) as well as exchanges such as product and waste flows.
- Review of meta information (general comment, technology comment, system boundaries, allocation, cut-off rules, etc.). Reviewers were asked to judge if the provided information is enough to understand the content of the process.
- Review of properties (biogenic carbon and water content).
- Review of allocation keys.
- Plausability of LCIA scores calculated by the consortium.
- Plausability of DQRs including precision, technology, time and geography. As well as the overall DQR.

## Data sources
- Background Data for Representative products and organisations. EF 3.0 compliant (data stock)
- Exo Terra. ‘Multi Vitamin / Multi Vitamin Powder Supplement’. Accessed 29 April 2021. https://web.archive.org/web/20210415080648/http://www.exo-terra.com/en/products/powder_multi_vitamin.php.
- Teju Lizard. Skin Type - Lizard Skin - Teju Lizard - PanAm Leathers Europe SARL. (n.d.). Retrieved September 12, 2022, from https://eu.panamleathers.com/lizard-skin/teju-lizard/
- ICCT and DieselNet. ‘South America | Transport Policy’, 2021. https://www.transportpolicy.net/region/south-america/.
- Klein, Wilfried, Steven F. Perry, Augusto S. Abe, and Denis V. Andrade. ‘Metabolic Response to Feeding in Tupinambis Merianae : Circadian Rhythm and a Possible Respiratory Constraint’. Physiological and Biochemical Zoology 79, no. 3 (May 2006): 593–601. https://doi.org/10.1086/502818.
- Mara Cíntia Kiefer and Ivan Sazima. ‘Diet of the Juvenile Tegu Lizard in Southeastern Brazil’, 2002. http://repositorio.unicamp.br/bitstream/REPOSIP/61732/1/WOS000175683300010.pdf.
- Microlivestock: Little-Known Small Animals with a Promising Economic Future. Accessed 28 April 2021. https://doi.org/10.17226/1831.
- Office of Environment and Heritage, New South Wales. ‘Code of Practice for the Private Keeping of Reptiles’, 2013. https://www.environment.nsw.gov.au/-/media/OEH/Corporate-Site/Documents/Licences-and-permits/keeping-private-reptiles-code-of-practice.pdf.
- ReptiFiles®, LLC. ‘Tegu Food Options | ReptiFiles’ Tegu Care Guide’. Accessed 29 April 2021. https://reptifiles.com/colombian-argentine-tegu-care/tegu-food/.
- The Tegu. ‘What Will My Tegu Eat?’ Accessed 29 April 2021. http://thetegutupinambis.weebly.com/what-will-my-tegu-eat.html.
- Animalia. ‘Asian Water Monitor - Facts, Diet, Habitat & Pictures on Animalia.Bio’, 2020. https://animalia.bio/asian-water-monitor.
- Arida, Evy, Arief Hidayat, Mulyadi Mulyadi, Noor Laina Maireda, Dadang Rahadian Subasli, and Mumpuni Mumpuni. ‘Consumption and Trade of Asian Water Monitor, Varanus Salvator as Reliance on Wildlife for Livelihoods among Rural Communities in North Sumatra, Indonesia’. Journal of Tropical Ethnobiology 3, no. 2 (31 July 2020): 81–92. https://doi.org/10.46359/jte.v3i2.40.
- “Genuine Lizard Skin - Glazed Finish in Natural | Buy Exotic Leather Skins and Hides Online in the U.S. with Roj&eacute; Exotic American Leathers.” Rojé Exotic Leather, store.rojeleather.com/genuine-lizard-skin-fc-glazed-finish-with-natural-markings. Accessed 5 Sept. 2022.
- “Lizard Leather Skins and Hides - Exotic Leathers at Lowest Prices and Free U.S. Shipping.” Lizard Leather Skins and Hides - Exotic Leathers at Lowest Prices and Free U.S. Shipping, web.archive.org/web/20170830170639/http://store.rojeleather.com/lizard-leather-skins-and-hides. Accessed 5 Sept. 2022.
- “Lizard Skin Lucido Green.” PanAm Leathers Europe SARL, web.archive.org/web/20201024023306/https://eu.panamleathers.com/lizard-skin-nile-fcbl-lucido-Green. Accessed 5 Sept. 2022.
- National Research Council. Microlivestock: Little-Known Small Animals with a Promising Economic Future, 1991. Chapter 4: Lizards. https://doi.org/10.17226/1831.
- Bennett, Daniel. ‘A Little Book of Monitor Lizards’, 1 January 1995. https://www.researchgate.net/publication/277559302_A_little_book_of_monitor_lizards.
- “Lizard Skin Lucido Grey.” PanAm Leathers Europe SARL, web.archive.org/web/20201024033212/https://eu.panamleathers.com/lizard-skin-nile-fcbl-lucido-Grey. Accessed 5 Sept. 2022.
- Hunter Briggs. ‘Asian Water Monitor Care & Facts: What You Need to Know – Everything Reptiles’, 1 October 2020. https://www.everythingreptiles.com/asian-water-monitor/.
- Quantis Intl, 28th November 2018
- The Observatory of Economic Complexity. ‘Reptile Leather, Other than Vegetable Pre-Tanned (HS: 410729) Product Trade, Exporters and Importers’. Accessed 4 May 2021. https://oec.world/en/profile/hs92/reptile-leather-other-than-vegetable-pre-tanned.
- Pfaff, Gerhard. Inorganic Pigments. Walter de Gruyter GmbH & Co KG, 2017.
- ‘Asia | Transport Policy’. Accessed 10 May 2021. https://www.transportpolicy.net/region/asia/.
- ‘Python Short Tail - Teal Matte - Back Cut | Buy Exotic Leather Skins and Hides Online in the U.S. with Roj&eacute; Exotic American Leathers.’, 8 July 2018. https://web.archive.org/web/20180708142506/http://store.rojeleather.com/python-short-tail-teal-matte-back-cut/#product-description.
- ‘Python Short Tail - Teal Matte - Back Cut | Buy Exotic Leather Skins and Hides Online in the U.S. with Roje; Exotic American Leathers.’, 8 July 2018. https://web.archive.org/web/20180708142506/http://store.rojeleather.com/python-short-tail-teal-matte-back-cut/#product-description.
- Aust, Patrick W., Ngo Van Tri, Daniel J. D. Natusch, and Graham J. Alexander. ‘Asian Snake Farms: Conservation Curse or Sustainable Enterprise?’ Oryx 51, no. 3 (July 2017): 498–505. https://doi.org/10.1017/S003060531600034X.
- Brown, C. 2016. "Python reticulatus" (On-line), Animal Diversity Web. Accessed May 04, 2021 at https://animaldiversity.org/accounts/Python_reticulatus/
- C, Lou. ‘How Do Snakes Poop and Pee? What Does Snake Poop Look Like?’ ExoPetGuides (blog), 27 September 2019. https://exopetguides.com/reptiles/snakes/how-do-snakes-poop-and-pee/.
- “Knitted Tubular Net For Vegetable And Fruit Packing Pe Net Tubular Net - Buy Tubular Net,Vegetable Packing,Pe Net Product on Alibaba.Com.” Knitted Tubular Net For Vegetable And Fruit Packing Pe Net Tubular Net - Buy Tubular Net,Vegetable Packing,Pe Net Product on Alibaba.Com, www.alibaba.com/product-detail/Knitted-tubular-net-for-vegetable-and_1600145344332.html?spm=a2700.details.0.0.3d3a66f70DI1iR. Accessed 5 Sept. 2022.
- Magnino, Simone, Pierre Colin, Eduardo Dei-Cas, Mogens Madsen, Jim McLauchlin, Karsten Nöckler, Miguel Prieto Maradona, Eirini Tsigarida, Emmanuel Vanopdenbosch, and Carlos Van Peteghem. ‘Biological Risks Associated with Consumption of Reptile Products’. International Journal of Food Microbiology, 2009, 13.
- Omonona, Abosede, Yusuf Kareem, Paul Odeniran, and Isaiah Ademola. ‘Parasites and Blood Profile of Nile Monitor Lizards (Varanus Niloticus) in Ibadan, Nigeria’. Nigerian Journal of Parasitology 40 (1 September 2019): 303–8. https://doi.org/10.4314/njpar.v40i2.30.

## Intended applications
Implementation of regular Product Environmental Footprint (PEF) studies and Organisation Environmental Footprint (OEF) studies exclusively under the specified Product groups and sectors as defined in the Product Environmental Footprint Category Rules (PEFCR) and Organisation Environmental Footprint Sectorial Rules (OEFSR) listed in http://ec.europa.eu/environment/eussd/smgp/PEFCR_OEFSR.htm
