# kapok fibre; technology mix; production mix, at farm; raw fiber

Dataset: ILCD process, Partly terminated system
Geography: GLO
Reference year: 2019
Valid until: 2024
Classification: Materials production / Food and renewable raw materials
LCI method principle: Attributional
LCI method approaches: Allocation - market value
Completeness: All relevant flows quantified
Project: Provision of process-based 3.0 Environmental Footprint-compliant life cycle inventory datasets - Renewable materials - contract number 070201/2020/840085/SER/ENV.B.1
Generated by: ecoinvent
Owner: ecoinvent
Compliance: ILCD Data Network - Entry-level; Suggestions for updating the PEF method 2019; ISO 14040 Environmental Management – Life Cycle Assessment – Principles and Framework, 2006; ISO 14044:2006. Environmental Management – Life Cycle Assessment – Requirements and guidelines.; Environmental Footprint 3.1
Review: Dependent internal review by Lucia Valsasina, Emilia Moreno Ruiz; Independent review panel by Philippa Notten
Data quality: Overall quality: Good; Time representativeness: Very good; Geographical representativeness: Good; Technological representativeness: Good; Precision: Good; Methodological appropriateness and consistency: Not applicable
Amounts: no units in this file; such an amount is in the reference unit of its flow, which a separate flow dataset defines
copyright: true
licenseType: Free of charge for some user types or use types
accessRestrictions: Free of charge for all final users implementing a regular Product Environmental Footprint (PEF) studies and Organisation Environmental Footprint (OEF) studies exclusively under the specified Product groups and sectors as defined in the Product Environmental Footprint Category Rules (PEFCR) and Organisation Environmental Footprint Sectorial Rules (OEFSR) listed in http://ec.europa.eu/environment/eussd/smgp/PEFCR_OEFSR.htm and in accordance with the terms and conditions of the EULA (available at https://ecoinvent.lca-data.com/) exclusively until 31st December 2024. Any use of this dataset or any derivative data not within the specific context of one of the PEF/OEF projects or after the end of 2024 is not permitted.

## General comment
Notice: this data set supersedes the EF3.0-compliant version (see link under "preceding data set version" below calculated with the EF3.0). The life cycle inventory is not changed from the original EF3.0 data set. The LCIA results are calculated based on the EF3.1 methods which provide updated characterisation factors in the following impact categories: Climate Change, Ecotoxicity freshwater, Photochemical Ozone Formation, Acidification, Human Toxicity non-cancer, and Human Toxicity cancer. The review report and the data quality ratings refer to the original results. The data set has been updated by the European Commission on the basis of the original EF3.0 data set delivered by the data provider.This dataset models the production of 1 kg kapok fibre, also called silk cotton or java cotton. They are natural, smooth, lightweight, yellowish, hollow body fibres that are naturally produced directly from kapok trees. They are not suitable for spinning into a yarn because they are very smooth, slippery and brittle. Therefore, their main applications are as stuffing for insulation against sound and heat, stuffing in textile industry for bedding, as reinforced material to thermoset and thermoplastic polymer matrices, in pulping and paper making, for biofuel production and as oil-absorbent material.

Reference

Textile Blog, 2020. Kapok Fibre: Properties, Processing and Applications, Textile Blog Available at: https://www.textileblog.com/kapok-fiber-properties-processing-and-applications/

## Technology and included processes
Kapok fibre can be harvested directly from the kapok tree. Kapok trees grown in tropical southern Asia, India, tropical Africa and northern Australia and can grow to over 60m. The trees become productive after 4-5 years and their economical lifespan is roughly 60 years. The pods which contain the fibre are harvested manually by labourers and there is no consumption of energy or fuels during the harvesting phase. Additionally, the production is using no irrigation, fertilisers and pesticides. The fibre is naturally dried under sun.

## Parameters
- kg_0: 6.06155e-8
  Mass in kg, for fruit tree seedling, for planting; Freight train, diesel traction; EU+EFTA+UK
- km_0: 960964
  Distance in km, for fruit tree seedling, for planting; Freight train, diesel traction; EU+EFTA+UK
- kg_km_0: 0.0582493; = kg_0*km_0
  Transport amount in km*km, for fruit tree seedling, for planting; Freight train, diesel traction; EU+EFTA+UK
- kg_1: 6.06155e-8
  Mass in kg, for fruit tree seedling, for planting; Freight train, electricity traction; EU+EFTA+UK
- km_1: 326881
  Distance in km, for fruit tree seedling, for planting; Freight train, electricity traction; EU+EFTA+UK
- kg_km_1: 0.019814; = kg_1*km_1
  Transport amount in km*km, for fruit tree seedling, for planting; Freight train, electricity traction; EU+EFTA+UK
- kg_2: 6.06155e-8
  Mass in kg, for fruit tree seedling, for planting; Freight train, average; EU+EFTA+UK
- km_2: 7709.64
  Distance in km, for fruit tree seedling, for planting; Freight train, average; EU+EFTA+UK
- kg_km_2: 0.000467323; = kg_2*km_2
  Transport amount in km*km, for fruit tree seedling, for planting; Freight train, average; EU+EFTA+UK
- kg_3: 6.06155e-8
  Mass in kg, for fruit tree seedling, for planting; Barge; EU+EFTA+UK
- km_3: 265669
  Distance in km, for fruit tree seedling, for planting; Barge; EU+EFTA+UK
- kg_km_3: 0.0161036; = kg_3*km_3
  Transport amount in km*km, for fruit tree seedling, for planting; Barge; EU+EFTA+UK
- kg_4: 6.06155e-8
  Mass in kg, for fruit tree seedling, for planting; Barge; ROW w/o EU+EFTA
- km_4: 542483
  Distance in km, for fruit tree seedling, for planting; Barge; ROW w/o EU+EFTA
- kg_km_4: 0.0328829; = kg_4*km_4
  Transport amount in km*km, for fruit tree seedling, for planting; Barge; ROW w/o EU+EFTA
- kg_5: 6.06155e-8
  Mass in kg, for fruit tree seedling, for planting; Articulated lorry transport, Total weight <7.5 t, mix Euro 0-5; EU+EFTA+UK
- km_5: 116111
  Distance in km, for fruit tree seedling, for planting; Articulated lorry transport, Total weight <7.5 t, mix Euro 0-5; EU+EFTA+UK
- kg_km_5: 0.00703815; = kg_5*km_5
  Transport amount in km*km, for fruit tree seedling, for planting; Articulated lorry transport, Total weight <7.5 t, mix Euro 0-5; EU+EFTA+UK
- kg_6: 6.06155e-8
  Mass in kg, for fruit tree seedling, for planting; Articulated lorry transport, Euro 4, Total weight >32 t; EU+EFTA+UK
- km_6: 1.08023e6
  Distance in km, for fruit tree seedling, for planting; Articulated lorry transport, Euro 4, Total weight >32 t; EU+EFTA+UK
- kg_km_6: 0.0654789; = kg_6*km_6
  Transport amount in km*km, for fruit tree seedling, for planting; Articulated lorry transport, Euro 4, Total weight >32 t; EU+EFTA+UK
- kg_7: 6.06155e-8
  Mass in kg, for fruit tree seedling, for planting; Articulated lorry transport, Total weight >32 t, mix Euro 0-5; ROW w/o EU+EFTA
- km_7: 2.85095e6
  Distance in km, for fruit tree seedling, for planting; Articulated lorry transport, Total weight >32 t, mix Euro 0-5; ROW w/o EU+EFTA
- kg_km_7: 0.172811; = kg_7*km_7
  Transport amount in km*km, for fruit tree seedling, for planting; Articulated lorry transport, Total weight >32 t, mix Euro 0-5; ROW w/o EU+EFTA

## Reference product
- kapok fibre // kapok fibre // glo: 1

## Inputs
- Transport of fruit tree seedling, for planting by Freight train, diesel traction - EU+EFTA+UK: 0.0582493; = kg_km_0
- Transport of fruit tree seedling, for planting by Freight train, electricity traction - EU+EFTA+UK: 0.019814; = kg_km_1
- Transport of fruit tree seedling, for planting by Freight train, average - EU+EFTA+UK: 0.000467323; = kg_km_2
- Transport of fruit tree seedling, for planting by Barge - EU+EFTA+UK: 0.0161036; = kg_km_3
- Transport of fruit tree seedling, for planting by Barge - ROW w/o EU+EFTA: 0.0328829; = kg_km_4
- Transport of fruit tree seedling, for planting by Articulated lorry transport, Total weight <7.5 t, mix Euro 0-5 - EU+EFTA+UK: 0.00703815; = kg_km_5
- Transport of fruit tree seedling, for planting by Articulated lorry transport, Euro 4, Total weight >32 t - EU+EFTA+UK: 0.0654789; = kg_km_6
- Transport of fruit tree seedling, for planting by Articulated lorry transport, Total weight >32 t, mix Euro 0-5 - ROW w/o EU+EFTA: 0.172811; = kg_km_7
- kapok fibre // kapok fibre // glo, blackbox: 1
- kapok fibre // kapok fibre // glo, elementary: 1

## Impact indicators
- Eutrophication marine: 4.62182e-5
- Ecotoxicity, freshwater: 0.426775
- Land use: 1246.19
- Water use: 2.76663
- Resource use, minerals and metals: 1.06606e-6
- Resource use, fossils: 0.445446
- Climate change: 0.0394633
- Ozone depletion: 8.6163e-10
- Human toxicity, cancer: -1.36009e-11
- Human toxicity, non-cancer: -7.92676e-9
- EF-particulate Matter: 6.59302e-9
- Ionising radiation, human health: 0.00150615
- Photochemical ozone formation - human health: 0.000136396
- Acidification: 0.000242644
- Eutrophication, terrestrial: 0.000568948
- Eutrophication, freshwater: 0.0710331

## Deviations from the LCI method principle
The background data uses:
- the \xe2\x80\x9cRecycled content cut-off\xe2\x80\x9d approach to allocate end-of-life by-products and secondary materials. This allocation is explained in the description of the recycled content system model (http://www.ecoinvent.org/database/system-models-in-ecoinvent-3/cut-off-system-model/allocation-cut-off-by-classification.html).
OR
- EF compliant data

## Deviations from the LCI method approaches
Background data:
- the \xe2\x80\x9cRecycled content cut-off\xe2\x80\x9d approach to allocate end-of-life by-products and secondary materials. This allocation is explained in the description of the recycled content system model (http://www.ecoinvent.org/database/system-models-in-ecoinvent-3/cut-off-system-model/allocation-cut-off-by-classification.html). The ecoinvent database mostly relies on “Allocation – market values” apart for few exceptions particularly in the energy sector. ecoinvent energy data is replaced with EF3.0 core data as per the EF guidelines version 2.0.
OR
- EF compliant data

## Modelling constants
All modelling constants follow the requirements listed in the Tender Specifications 070201/2020/SER/ENV.B1. Completeness: There are no intentional cut-offs in the inventory no matter how small their contribution to all the EF impact categories is. Eventual cut-offs are in compliance with the Guide for EF compliant data sets (JRC 2020), i.e. only if below the 3% cut-off rule. Water use: water use is modelled at country level using separate flows for water withdrawal, water release and water evaporation. Handling multi-functional processes: the following PEF multi- functionality decision hierarchy is applied for resolving all multi- functionality problems: (1) subdivision or system expansion; (2) allocation based on a relevant underlying physical relationship (substitution may apply here); (3) allocation based on some other relationship. Direct land use change: GHG emissions from direct LUC allocated to good/service for 20 years after the LUC occurs, with IPCC default values. Carbon storage and delayed emissions: credits associated with temporary (carbon) storage or delayed emissions up to 300 years are not be considered. Emissions off-setting: are not included. Capital goods (including infrastructures) and their End of life: they are included. System boundaries: system boundaries include all processes linked to the product supply chain (e.g. maintenance). Time period: emissions and removals are modelled as if released or removed at the beginning of the assessment method. Fossil and biogenic carbon emissions and removals: removals and emissions are modelled as follows: All GHG emissions from fossil fuels (including peat and limestone) are modelled consistently with the most updated ILCD list of elementary flows. The non-fossil (biogenic) carbon flows are modelled consistently with the most updated ILCD list of elementary flows.

## Cut-off and completeness
There are no intentional cut-offs in the inventory no matter how small their contribution to all the EF impact categories is. Eventual cut-offs are in compliance with the Guide for EF compliant data sets (JRC 2020), i.e. only if below the 3% cut-off rule. The dataset dry mass and water balance has been checked to ensure the inventory is complete. Capital goods (e.g. infrastructure) and their end-of-life are included.

## Data selection and combination
These datasets include, in both their foreground and background data, links to EF3.0 compliant data.
The relevant background data on energy, transport, and End of Life are from the LCDN data node (http://lcdn.thinkstep.com/Node/).
All other background data in the supply of this product for which no EF3.0 process was available are from ecoinvent v3.7 database (www.ecoinvent.org) or other data sources.

## Data treatment and extrapolations
Several data sources have been used to model the inventory.

## Review details
Internal reviews have been asked to review the plausibility of the unit process, LCIA scores, and DQRs. Internal reviewers have also been asked to review the data for EF compliancy. The consortium is therefore responsible for aspects such as compliancy with the ILCD format, including validation in Look@LCI, and nomenclature.
Internal reviwers have been asked to judge based on the process name, that the unit process models in a complete and representative way the process in the requested location. The review encompassed the plausability of:
- exchanges with nature (elementary flows) as well as exchanges such as product and waste flows.
- meta information (general comment, technology comment, system boundaries, allocation, cut-off rules, etc.). Reviewers were asked to judge if the provided information is enough to understand the content of the process.
- LCIA scores
- DQRs including precision, technology, time and geography. As well as the overall DQR.
External reviewers have been asked to provide their expertise in the field of interest. External reviewers have been asked to review the unit process, including eventual methodological choices, the LCIA scores (provided with contribution scores as well), and DQRs. External reviewers have been provided all the information in a tool developed by the consortium for the purpose of this project.
External reviewers have been asked to judge based on the process name, that the unit process models in a complete and representative way the process in the requested location. The review encompassed:
- Plausability and completeness of exchanges with nature (elementary flows) as well as exchanges such as product and waste flows.
- Review of meta information (general comment, technology comment, system boundaries, allocation, cut-off rules, etc.). Reviewers were asked to judge if the provided information is enough to understand the content of the process.
- Review of properties (biogenic carbon and water content).
- Review of allocation keys.
- Plausability of LCIA scores calculated by the consortium.
- Plausability of DQRs including precision, technology, time and geography. As well as the overall DQR.

## Data sources
- Background Data for Representative products and organisations. EF 3.0 compliant (data stock)
- Ebru Bozaci (2019): Optimization of the alternative treatment methods for Ceiba pentandra (L.) Gaertn (kapok) fiber using response surface methodology, The Journal of The Textile Institute, DOI: 10.1080/00405000.2019.1602897
- BALAJI P. (2017): FRUIT YIELD AND ECONOMIC ANALYSIS OF SELECTED TREE SPECIES (STS) UNDER AGRO-FORESTRY SYSTEM IN TAMIL NADU, Forest College and Research Institute, tamil Nadu Agricultural University Mettupalayam

## Intended applications
Implementation of regular Product Environmental Footprint (PEF) studies and Organisation Environmental Footprint (OEF) studies exclusively under the specified Product groups and sectors as defined in the Product Environmental Footprint Category Rules (PEFCR) and Organisation Environmental Footprint Sectorial Rules (OEFSR) listed in http://ec.europa.eu/environment/eussd/smgp/PEFCR_OEFSR.htm
