# fur; technology mix; production mix, at farm

Dataset: ILCD process, Partly terminated system
Geography: GLO
Reference year: 2018
Valid until: 2024
Classification: Materials production / Food and renewable raw materials
LCI method principle: Attributional
LCI method approaches: Allocation - market value
Completeness: All relevant flows quantified
Project: Provision of process-based 3.0 Environmental Footprint-compliant life cycle inventory datasets - Renewable materials - contract number 070201/2020/840085/SER/ENV.B.1
Generated by: Blonk Sustainability Tools
Owner: Blonk Sustainability Tools
Compliance: ILCD Data Network - Entry-level; Suggestions for updating the PEF method 2019; ISO 14040 Environmental Management – Life Cycle Assessment – Principles and Framework, 2006; ISO 14044:2006. Environmental Management – Life Cycle Assessment – Requirements and guidelines.; Environmental Footprint 3.1
Review: Dependent internal review by Hans Blonk, Emilia Moreno Ruiz; Independent review panel by Laura Batlle Bayer
Data quality: Overall quality: Very good; Time representativeness: Very good; Geographical representativeness: Very good; Technological representativeness: Very good; Precision: Good; Methodological appropriateness and consistency: Not applicable
Amounts: no units in this file; such an amount is in the reference unit of its flow, which a separate flow dataset defines
copyright: true
licenseType: Free of charge for some user types or use types
accessRestrictions: Free of charge for all final users implementing a regular Product Environmental Footprint (PEF) studies and Organisation Environmental Footprint (OEF) studies exclusively under the specified Product groups and sectors as defined in the Product Environmental Footprint Category Rules (PEFCR) and Organisation Environmental Footprint Sectorial Rules (OEFSR) listed in http://ec.europa.eu/environment/eussd/smgp/PEFCR_OEFSR.htm and in accordance with the terms and conditions of the EULA (available at https://ecoinvent.lca-data.com/) exclusively until 31st December 2024. Any use of this dataset or any derivative data not within the specific context of one of the PEF/OEF projects or after the end of 2024 is not permitted.

## General comment
Notice: this data set supersedes the EF3.0-compliant version (see link under "preceding data set version" below calculated with the EF3.0). The life cycle inventory is not changed from the original EF3.0 data set. The LCIA results are calculated based on the EF3.1 methods which provide updated characterisation factors in the following impact categories: Climate Change, Ecotoxicity freshwater, Photochemical Ozone Formation, Acidification, Human Toxicity non-cancer, and Human Toxicity cancer. The review report and the data quality ratings refer to the original results. The data set has been updated by the European Commission on the basis of the original EF3.0 data set delivered by the data provider.Fur has been an important factor in human clothing since prehistoric times, being used almost exclusively, to this day. Its usefulness was dependent on both its armament and its decorative properties. Currently, large amounts of fur are used in the manufacture of clothing, in the form of fur coats, trimmings and linings. The wool on the sheepskin is a complex of substances consisting of keratin and collagen. Processing is the preparation of raw fur for use in the manufacture of clothing or for other commercial purposes. It includes dressing and dyeing raw fur leather (C.M Bishop 1983)

## Technology and included processes
This dataset aims at representing the production of one kg of Global sheep fur shearling. The global market mix of sheep fur is 60.5 % Australia, 21% New Zeeland and 18.5% UK. Data related to fur production in UK wasn’t available. Therefore, the global market mix was adjusted to 74% from Australia and 26% from New Zeeland. The activity starts with slaughtering the sheep and ends with the fur shearling. Included activities are slaughtering, transport to processing and processing. Different inputs such as chemicals, water and energy were taken into account.The sheepskin goes through a multi-step procedure that can last up to one month to clean, process, finish it, and transform it into soft leather.

## Parameters
- kg_0: 300
  Mass in kg, for sodium chloride powder // sodium chloride powder production // eu+efta+uk; Articulated lorry transport, Euro 4, Total weight >32 t; EU+EFTA+UK
- km_0: 1000
  Distance in km, for sodium chloride powder // sodium chloride powder production // eu+efta+uk; Articulated lorry transport, Euro 4, Total weight >32 t; EU+EFTA+UK
- kg_km_0: 300000; = kg_0*km_0
  Transport amount in km*km, for sodium chloride powder // sodium chloride powder production // eu+efta+uk; Articulated lorry transport, Euro 4, Total weight >32 t; EU+EFTA+UK
- kg_1: 300
  Mass in kg, for sodium chloride powder // sodium chloride powder production // eu+efta+uk; Transoceanic ship, containers; GLO
- km_1: 18000
  Distance in km, for sodium chloride powder // sodium chloride powder production // eu+efta+uk; Transoceanic ship, containers; GLO
- kg_km_1: 5.4e6; = kg_1*km_1
  Transport amount in km*km, for sodium chloride powder // sodium chloride powder production // eu+efta+uk; Transoceanic ship, containers; GLO
- kg_2: 40
  Mass in kg, for formic acid // formic acid production // eu+efta+uk; Articulated lorry transport, Euro 4, Total weight >32 t; EU+EFTA+UK
- km_2: 1000
  Distance in km, for formic acid // formic acid production // eu+efta+uk; Articulated lorry transport, Euro 4, Total weight >32 t; EU+EFTA+UK
- kg_km_2: 40000; = kg_2*km_2
  Transport amount in km*km, for formic acid // formic acid production // eu+efta+uk; Articulated lorry transport, Euro 4, Total weight >32 t; EU+EFTA+UK
- kg_3: 40
  Mass in kg, for formic acid // formic acid production // eu+efta+uk; Transoceanic ship, containers; GLO
- km_3: 18000
  Distance in km, for formic acid // formic acid production // eu+efta+uk; Transoceanic ship, containers; GLO
- kg_km_3: 720000; = kg_3*km_3
  Transport amount in km*km, for formic acid // formic acid production // eu+efta+uk; Transoceanic ship, containers; GLO
- kg_4: 3.5
  Mass in kg, for sulphuric acid // sulphuric acid production // eu+efta+uk; Articulated lorry transport, Euro 4, Total weight >32 t; EU+EFTA+UK
- km_4: 1000
  Distance in km, for sulphuric acid // sulphuric acid production // eu+efta+uk; Articulated lorry transport, Euro 4, Total weight >32 t; EU+EFTA+UK
- kg_km_4: 3500; = kg_4*km_4
  Transport amount in km*km, for sulphuric acid // sulphuric acid production // eu+efta+uk; Articulated lorry transport, Euro 4, Total weight >32 t; EU+EFTA+UK
- kg_5: 3.5
  Mass in kg, for sulphuric acid // sulphuric acid production // eu+efta+uk; Transoceanic ship, containers; GLO
- km_5: 18000
  Distance in km, for sulphuric acid // sulphuric acid production // eu+efta+uk; Transoceanic ship, containers; GLO
- kg_km_5: 63000; = kg_5*km_5
  Transport amount in km*km, for sulphuric acid // sulphuric acid production // eu+efta+uk; Transoceanic ship, containers; GLO
- kg_6: 30
  Mass in kg, for chromium oxide // chromium oxide production // eu+efta+uk; Articulated lorry transport, Euro 4, Total weight >32 t; EU+EFTA+UK
- km_6: 1000
  Distance in km, for chromium oxide // chromium oxide production // eu+efta+uk; Articulated lorry transport, Euro 4, Total weight >32 t; EU+EFTA+UK
- kg_km_6: 30000; = kg_6*km_6
  Transport amount in km*km, for chromium oxide // chromium oxide production // eu+efta+uk; Articulated lorry transport, Euro 4, Total weight >32 t; EU+EFTA+UK
- kg_7: 30
  Mass in kg, for chromium oxide // chromium oxide production // eu+efta+uk; Transoceanic ship, containers; GLO
- km_7: 18000
  Distance in km, for chromium oxide // chromium oxide production // eu+efta+uk; Transoceanic ship, containers; GLO
- kg_km_7: 540000; = kg_7*km_7
  Transport amount in km*km, for chromium oxide // chromium oxide production // eu+efta+uk; Transoceanic ship, containers; GLO
- kg_8: 15
  Mass in kg, for syntetic tannins and retanning agents // syntetic tannins and retanning agents production // eu+efta+uk; Articulated lorry transport, Euro 4, Total weight >32 t; EU+EFTA+UK
- km_8: 1000
  Distance in km, for syntetic tannins and retanning agents // syntetic tannins and retanning agents production // eu+efta+uk; Articulated lorry transport, Euro 4, Total weight >32 t; EU+EFTA+UK
- kg_km_8: 15000; = kg_8*km_8
  Transport amount in km*km, for syntetic tannins and retanning agents // syntetic tannins and retanning agents production // eu+efta+uk; Articulated lorry transport, Euro 4, Total weight >32 t; EU+EFTA+UK
- kg_9: 15
  Mass in kg, for syntetic tannins and retanning agents // syntetic tannins and retanning agents production // eu+efta+uk; Transoceanic ship, containers; GLO
- km_9: 18000
  Distance in km, for syntetic tannins and retanning agents // syntetic tannins and retanning agents production // eu+efta+uk; Transoceanic ship, containers; GLO
- kg_km_9: 270000; = kg_9*km_9
  Transport amount in km*km, for syntetic tannins and retanning agents // syntetic tannins and retanning agents production // eu+efta+uk; Transoceanic ship, containers; GLO
- kg_10: 10
  Mass in kg, for sodium bicarbonate // sodium bicarbonate production // eu+efta+uk; Articulated lorry transport, Euro 4, Total weight >32 t; EU+EFTA+UK
- km_10: 1000
  Distance in km, for sodium bicarbonate // sodium bicarbonate production // eu+efta+uk; Articulated lorry transport, Euro 4, Total weight >32 t; EU+EFTA+UK
- kg_km_10: 10000; = kg_10*km_10
  Transport amount in km*km, for sodium bicarbonate // sodium bicarbonate production // eu+efta+uk; Articulated lorry transport, Euro 4, Total weight >32 t; EU+EFTA+UK
- kg_11: 10
  Mass in kg, for sodium bicarbonate // sodium bicarbonate production // eu+efta+uk; Transoceanic ship, containers; GLO
- km_11: 18000
  Distance in km, for sodium bicarbonate // sodium bicarbonate production // eu+efta+uk; Transoceanic ship, containers; GLO
- kg_km_11: 180000; = kg_11*km_11
  Transport amount in km*km, for sodium bicarbonate // sodium bicarbonate production // eu+efta+uk; Transoceanic ship, containers; GLO
- kg_12: 1000
  Mass in kg, for sheepskin, glo; Articulated lorry transport, Euro 4, Total weight >32 t; EU+EFTA+UK
- km_12: 1000
  Distance in km, for sheepskin, glo; Articulated lorry transport, Euro 4, Total weight >32 t; EU+EFTA+UK
- kg_km_12: 1e6; = kg_12*km_12
  Transport amount in km*km, for sheepskin, glo; Articulated lorry transport, Euro 4, Total weight >32 t; EU+EFTA+UK
- kg_13: 1000
  Mass in kg, for sheepskin, glo; Transoceanic ship, containers; GLO
- km_13: 18000
  Distance in km, for sheepskin, glo; Transoceanic ship, containers; GLO
- kg_km_13: 1.8e7; = kg_13*km_13
  Transport amount in km*km, for sheepskin, glo; Transoceanic ship, containers; GLO

## Reference product
- fur, shearling // fur // glo: 1

## Inputs
- Transport of sodium chloride powder // sodium chloride powder production // eu+efta+uk by Articulated lorry transport, Euro 4, Total weight >32 t - EU+EFTA+UK: 300000; = kg_km_0
- Transport of sodium chloride powder // sodium chloride powder production // eu+efta+uk by Transoceanic ship, containers - GLO: 5.4e6; = kg_km_1
- Transport of formic acid // formic acid production // eu+efta+uk by Articulated lorry transport, Euro 4, Total weight >32 t - EU+EFTA+UK: 40000; = kg_km_2
- Transport of formic acid // formic acid production // eu+efta+uk by Transoceanic ship, containers - GLO: 720000; = kg_km_3
- Transport of sulphuric acid // sulphuric acid production // eu+efta+uk by Articulated lorry transport, Euro 4, Total weight >32 t - EU+EFTA+UK: 3500; = kg_km_4
- Transport of sulphuric acid // sulphuric acid production // eu+efta+uk by Transoceanic ship, containers - GLO: 63000; = kg_km_5
- Transport of chromium oxide // chromium oxide production // eu+efta+uk by Articulated lorry transport, Euro 4, Total weight >32 t - EU+EFTA+UK: 30000; = kg_km_6
- Transport of chromium oxide // chromium oxide production // eu+efta+uk by Transoceanic ship, containers - GLO: 540000; = kg_km_7
- Transport of syntetic tannins and retanning agents // syntetic tannins and retanning agents production // eu+efta+uk by Articulated lorry transport, Euro 4, Total weight >32 t - EU+EFTA+UK: 15000; = kg_km_8
- Transport of syntetic tannins and retanning agents // syntetic tannins and retanning agents production // eu+efta+uk by Transoceanic ship, containers - GLO: 270000; = kg_km_9
- Transport of sodium bicarbonate // sodium bicarbonate production // eu+efta+uk by Articulated lorry transport, Euro 4, Total weight >32 t - EU+EFTA+UK: 10000; = kg_km_10
- Transport of sodium bicarbonate // sodium bicarbonate production // eu+efta+uk by Transoceanic ship, containers - GLO: 180000; = kg_km_11
- Transport of sheepskin, glo by Articulated lorry transport, Euro 4, Total weight >32 t - EU+EFTA+UK: 1e6; = kg_km_12
- Transport of sheepskin, glo by Transoceanic ship, containers - GLO: 1.8e7; = kg_km_13
- fur, shearling // fur // glo, blackbox: 1
- fur, shearling // fur // glo, elementary: 1

## Impact indicators
- Eutrophication marine: 135.02
- Ecotoxicity, freshwater: 1.26656e6
- Land use: 1.60048e6
- Water use: 36049.9
- Resource use, minerals and metals: 0.0192572
- Resource use, fossils: 36773.8
- Climate change: 9528.24
- Ozone depletion: 3.96143e-5
- Human toxicity, cancer: 2.53751e-6
- Human toxicity, non-cancer: 0.000223148
- EF-particulate Matter: 0.00204279
- Ionising radiation, human health: 60.4177
- Photochemical ozone formation - human health: 24.5133
- Acidification: 254.028
- Eutrophication, terrestrial: 1111.94
- Eutrophication, freshwater: 1.82925

## Deviations from the LCI method principle
The background data uses:
- the \xe2\x80\x9cRecycled content cut-off\xe2\x80\x9d approach to allocate end-of-life by-products and secondary materials. This allocation is explained in the description of the recycled content system model (http://www.ecoinvent.org/database/system-models-in-ecoinvent-3/cut-off-system-model/allocation-cut-off-by-classification.html).
OR
- EF compliant data

## Deviations from the LCI method approaches
Background data:
- the \xe2\x80\x9cRecycled content cut-off\xe2\x80\x9d approach to allocate end-of-life by-products and secondary materials. This allocation is explained in the description of the recycled content system model (http://www.ecoinvent.org/database/system-models-in-ecoinvent-3/cut-off-system-model/allocation-cut-off-by-classification.html). The ecoinvent database mostly relies on “Allocation – market values” apart for few exceptions particularly in the energy sector. ecoinvent energy data is replaced with EF3.0 core data as per the EF guidelines version 2.0.
OR
- EF compliant data

## Modelling constants
All modelling constants follow the requirements listed in the Tender Specifications 070201/2020/SER/ENV.B1. Completeness: There are no intentional cut-offs in the inventory no matter how small their contribution to all the EF impact categories is. Eventual cut-offs are in compliance with the Guide for EF compliant data sets (JRC 2020), i.e. only if below the 3% cut-off rule. Water use: water use is modelled at country level using separate flows for water withdrawal, water release and water evaporation. Handling multi-functional processes: the following PEF multi- functionality decision hierarchy is applied for resolving all multi- functionality problems: (1) subdivision or system expansion; (2) allocation based on a relevant underlying physical relationship (substitution may apply here); (3) allocation based on some other relationship. Direct land use change: GHG emissions from direct LUC allocated to good/service for 20 years after the LUC occurs, with IPCC default values. Carbon storage and delayed emissions: credits associated with temporary (carbon) storage or delayed emissions up to 300 years are not be considered. Emissions off-setting: are not included. Capital goods (including infrastructures) and their End of life: they are included. System boundaries: system boundaries include all processes linked to the product supply chain (e.g. maintenance). Time period: emissions and removals are modelled as if released or removed at the beginning of the assessment method. Fossil and biogenic carbon emissions and removals: removals and emissions are modelled as follows: All GHG emissions from fossil fuels (including peat and limestone) are modelled consistently with the most updated ILCD list of elementary flows. The non-fossil (biogenic) carbon flows are modelled consistently with the most updated ILCD list of elementary flows.

## Cut-off and completeness
There are no intentional cut-offs in the inventory no matter how small their contribution to all the EF impact categories is. Eventual cut-offs are in compliance with the Guide for EF compliant data sets (JRC 2020), i.e. only if below the 3% cut-off rule. The dataset dry mass and water balance has been checked to ensure the inventory is complete. Capital goods (e.g. infrastructure) and their end-of-life are included.

## Data selection and combination
These datasets include, in both their foreground and background data, links to EF3.0 compliant data.
The relevant background data on energy, transport, and End of Life are from the LCDN data node (http://lcdn.thinkstep.com/Node/).
All other background data in the supply of this product for which no EF3.0 process was available are from ecoinvent v3.7 database (www.ecoinvent.org) or other data sources.

## Data treatment and extrapolations
Several data sources have been used to model the inventory.

## Review details
Internal reviews have been asked to review the plausibility of the unit process, LCIA scores, and DQRs. Internal reviewers have also been asked to review the data for EF compliancy. The consortium is therefore responsible for aspects such as compliancy with the ILCD format, including validation in Look@LCI, and nomenclature.
Internal reviwers have been asked to judge based on the process name, that the unit process models in a complete and representative way the process in the requested location. The review encompassed the plausability of:
- exchanges with nature (elementary flows) as well as exchanges such as product and waste flows.
- meta information (general comment, technology comment, system boundaries, allocation, cut-off rules, etc.). Reviewers were asked to judge if the provided information is enough to understand the content of the process.
- LCIA scores
- DQRs including precision, technology, time and geography. As well as the overall DQR.
External reviewers have been asked to provide their expertise in the field of interest. External reviewers have been asked to review the unit process, including eventual methodological choices, the LCIA scores (provided with contribution scores as well), and DQRs. External reviewers have been provided all the information in a tool developed by the consortium for the purpose of this project.
External reviewers have been asked to judge based on the process name, that the unit process models in a complete and representative way the process in the requested location. The review encompassed:
- Plausability and completeness of exchanges with nature (elementary flows) as well as exchanges such as product and waste flows.
- Review of meta information (general comment, technology comment, system boundaries, allocation, cut-off rules, etc.). Reviewers were asked to judge if the provided information is enough to understand the content of the process.
- Review of properties (biogenic carbon and water content).
- Review of allocation keys.
- Plausability of LCIA scores calculated by the consortium.
- Plausability of DQRs including precision, technology, time and geography. As well as the overall DQR.

## Data sources
- Background Data for Representative products and organisations. EF 3.0 compliant (data stock)
- Chandrasekaran, V. (2018). Substitution of hazardous chemicals in fur processing industry. Kaunas University of Technology.
- C. M. Bishop (1983). Manufacturing Processes: Sheepskin and Fur Processing. J. Soc. Occup. Med. (1983) 33, 85-87. UK

## Intended applications
Implementation of regular Product Environmental Footprint (PEF) studies and Organisation Environmental Footprint (OEF) studies exclusively under the specified Product groups and sectors as defined in the Product Environmental Footprint Category Rules (PEFCR) and Organisation Environmental Footprint Sectorial Rules (OEFSR) listed in http://ec.europa.eu/environment/eussd/smgp/PEFCR_OEFSR.htm
