# steaming, setting: low; steaming; production mix, at plant; service

Dataset: ILCD process, Partly terminated system
Geography: EU+EFTA+UK
Reference year: 2021
Valid until: 2024
Classification: Systems / Textiles, furnitures and other interiors
LCI method principle: Attributional
LCI method approaches: Allocation - market value
Completeness: All relevant flows quantified
Project: Provision of process-based 3.0 Environmental Footprint-compliant life cycle inventory datasets - Others - contract number 070201/2020/840235/SER/ENV.B.1
Generated by: Life Cycle Indonesia
Owner: PRé Sustainability B.V.
Compliance: ILCD Data Network - Entry-level; Suggestions for updating the PEF method 2019; ISO 14040 Environmental Management – Life Cycle Assessment – Principles and Framework, 2006; ISO 14044:2006. Environmental Management – Life Cycle Assessment – Requirements and guidelines.; Environmental Footprint 3.1
Review: Dependent internal review by Avraam Symeonidis, Emilia Moreno Ruiz; Independent review panel by Fábio Valebona
Data quality: Overall quality: Very good; Time representativeness: Very good; Geographical representativeness: Very good; Technological representativeness: Very good; Precision: Good; Methodological appropriateness and consistency: Not applicable
Amounts: no units in this file; such an amount is in the reference unit of its flow, which a separate flow dataset defines
copyright: true
licenseType: Free of charge for some user types or use types
accessRestrictions: Free of charge for all final users implementing a regular Product Environmental Footprint (PEF) studies and Organisation Environmental Footprint (OEF) studies exclusively under the specified Product groups and sectors as defined in the Product Environmental Footprint Category Rules (PEFCR) and Organisation Environmental Footprint Sectorial Rules (OEFSR) listed in http://ec.europa.eu/environment/eussd/smgp/PEFCR_OEFSR.htm and in accordance with the terms and conditions of the EULA (available at https://ecoinvent.lca-data.com/) exclusively until 31st December 2024. Any use of this dataset or any derivative data not within the specific context of one of the PEF/OEF projects or after the end of 2024 is not permitted.

## General comment
Notice: this data set supersedes the EF3.0-compliant version (see link under "preceding data set version" below calculated with the EF3.0). The life cycle inventory is not changed from the original EF3.0 data set. The LCIA results are calculated based on the EF3.1 methods which provide updated characterisation factors in the following impact categories: Climate Change, Ecotoxicity freshwater, Photochemical Ozone Formation, Acidification, Human Toxicity non-cancer, and Human Toxicity cancer. The review report and the data quality ratings refer to the original results. The data set has been updated by the European Commission on the basis of the original EF3.0 data set delivered by the data provider.Steaming is one of the alternative of ironing. The process uses water steam as a way of removing creases and the spread of diseases and other infections. Steaming is much faster than ironing and the chance of burning the garment is lower since it is not in direct contact with the garment (García, 2020). Garment steamer is commonly used for steaming process. Instead of laying the clothes on an ironing board, the garment is steammed while hanging. The principle of hanging ironing technology is an ironing shape modeling method that hanging fabric, by using its own gravity, bringing it to receive vertical downward action of gravity, and coordinating fabric with suitable temperature, humidity and pressure to change the structure, surface state and so on (Xie and Zhou, 2010)

García, Álvaro González (2020). Re-design for Manufacturability of A Garment Steamer. Madrid: Comillas Universidad Pontificia.
Xie, Zhibin and Zhou, Yuexi (2010). Research for new technology of garment steamer based on saturated steam thermal principle. China: International Conference on Mechanic Automation and Control Engineering.

## Technology and included processes
Simliar to iron, garment steamer can be adjusted to the suitable temperature of the garment. In garment steamer, the settings can be up to 5 settings with each setting suited for different garment. In general, the highest steam setting is used for linen and jeans fabric and the lowest steam setting used for synthetic fabric such as nylon, polyester and rayon. Silk, wool, cotton, cotton blend, corduroy can be used with medium settings. Specific setting for each fabric can depend on each garment steamer. Input of water in garment steamer would be processed into steam and the temperature is determined by the pressure.

This data represents steaming process in low temperature setting. The activity starts when the material enter the process. Materials entering the process are included as well as energy and water uses. There is no direct emission to soil, water, or air.

Sunbeam (2015). Butler Turbo Garment Steamer User Guide. Australia: Sunbeam Corporation Limited.

## Reference product
- steaming, setting: low // steaming, setting: low // eu+efta+uk: 1

## Inputs
- Electricity from Electricity grid mix 1kV-60kV - EU+EFTA+UK: 1.04869
- steaming, setting: low // steaming, setting: low // eu+efta+uk, blackbox: 1
- steaming, setting: low // steaming, setting: low // eu+efta+uk, elementary: 1

## Impact indicators
- Eutrophication marine: 7.16172e-5
- Ecotoxicity, freshwater: 0.564119
- Land use: 0.52626
- Water use: 0.0489014
- Resource use, minerals and metals: 4.20281e-8
- Resource use, fossils: 2.13271
- Climate change: 0.12285
- Ozone depletion: 5.50525e-11
- Human toxicity, cancer: 2.81754e-11
- Human toxicity, non-cancer: 4.4508e-10
- EF-particulate Matter: 4.00437e-9
- Ionising radiation, human health: 0.0519155
- Photochemical ozone formation - human health: 0.000203026
- Acidification: 0.000375589
- Eutrophication, terrestrial: 0.000756058
- Eutrophication, freshwater: 3.63263e-7

## Deviations from the LCI method principle
The background data uses:
- the \xe2\x80\x9cRecycled content cut-off\xe2\x80\x9d approach to allocate end-of-life by-products and secondary materials. This allocation is explained in the description of the recycled content system model (http://www.ecoinvent.org/database/system-models-in-ecoinvent-3/cut-off-system-model/allocation-cut-off-by-classification.html).
OR
- EF compliant data

## Deviations from the LCI method approaches
Background data:
- the \xe2\x80\x9cRecycled content cut-off\xe2\x80\x9d approach to allocate end-of-life by-products and secondary materials. This allocation is explained in the description of the recycled content system model (http://www.ecoinvent.org/database/system-models-in-ecoinvent-3/cut-off-system-model/allocation-cut-off-by-classification.html). The ecoinvent database mostly relies on “Allocation – market values” apart for few exceptions particularly in the energy sector. ecoinvent energy data is replaced with EF3.0 core data as per the EF guidelines version 2.0.
OR
- EF compliant data

## Modelling constants
All modelling constants follow the requirements listed in the Tender Specifications 070201/2020/SER/ENV.B1. Completeness: There are no intentional cut-offs in the inventory no matter how small their contribution to all the EF impact categories is. Eventual cut-offs are in compliance with the Guide for EF compliant data sets (JRC 2020), i.e. only if below the 3% cut-off rule. Water use: water use is modelled at country level using separate flows for water withdrawal, water release and water evaporation. Handling multi-functional processes: the following PEF multi- functionality decision hierarchy is applied for resolving all multi- functionality problems: (1) subdivision or system expansion; (2) allocation based on a relevant underlying physical relationship (substitution may apply here); (3) allocation based on some other relationship. Direct land use change: GHG emissions from direct LUC allocated to good/service for 20 years after the LUC occurs, with IPCC default values. Carbon storage and delayed emissions: credits associated with temporary (carbon) storage or delayed emissions up to 300 years are not be considered. Emissions off-setting: are not included. Capital goods (including infrastructures) and their End of life: they are included. System boundaries: system boundaries include all processes linked to the product supply chain (e.g. maintenance). Time period: emissions and removals are modelled as if released or removed at the beginning of the assessment method. Fossil and biogenic carbon emissions and removals: removals and emissions are modelled as follows: All GHG emissions from fossil fuels (including peat and limestone) are modelled consistently with the most updated ILCD list of elementary flows. The non-fossil (biogenic) carbon flows are modelled consistently with the most updated ILCD list of elementary flows.

## Cut-off and completeness
There are no intentional cut-offs in the inventory no matter how small their contribution to all the EF impact categories is. Eventual cut-offs are in compliance with the Guide for EF compliant data sets (JRC 2020), i.e. only if below the 3% cut-off rule. The dataset dry mass and water balance has been checked to ensure the inventory is complete. Capital goods (e.g. infrastructure) and their end-of-life are included.

## Data selection and combination
These datasets include, in both their foreground and background data, links to EF3.0 compliant data.
The relevant background data on energy, transport, and End of Life are from the LCDN data node (http://lcdn.thinkstep.com/Node/).
All other background data in the supply of this product for which no EF3.0 process was available are from ecoinvent v3.7 database (www.ecoinvent.org) or other data sources.

## Data treatment and extrapolations
Several data sources have been used to model the inventory.

## Review details
Internal reviews have been asked to review the plausibility of the unit process, LCIA scores, and DQRs. Internal reviewers have also been asked to review the data for EF compliancy. The consortium is therefore responsible for aspects such as compliancy with the ILCD format, including validation in Look@LCI, and nomenclature.
Internal reviwers have been asked to judge based on the process name, that the unit process models in a complete and representative way the process in the requested location. The review encompassed the plausability of:
- exchanges with nature (elementary flows) as well as exchanges such as product and waste flows.
- meta information (general comment, technology comment, system boundaries, allocation, cut-off rules, etc.). Reviewers were asked to judge if the provided information is enough to understand the content of the process.
- LCIA scores
- DQRs including precision, technology, time and geography. As well as the overall DQR.
External reviewers have been asked to provide their expertise in the field of interest. External reviewers have been asked to review the unit process, including eventual methodological choices, the LCIA scores (provided with contribution scores as well), and DQRs. External reviewers have been provided all the information in a tool developed by the consortium for the purpose of this project.
External reviewers have been asked to judge based on the process name, that the unit process models in a complete and representative way the process in the requested location. The review encompassed:
- Plausability and completeness of exchanges with nature (elementary flows) as well as exchanges such as product and waste flows.
- Review of meta information (general comment, technology comment, system boundaries, allocation, cut-off rules, etc.). Reviewers were asked to judge if the provided information is enough to understand the content of the process.
- Review of properties (biogenic carbon and water content).
- Review of allocation keys.
- Plausability of LCIA scores calculated by the consortium.
- Plausability of DQRs including precision, technology, time and geography. As well as the overall DQR.

## Data sources
- Background Data for Representative products and organisations. EF 3.0 compliant (data stock)
- Sunbeam (2015), Butler Turbo Garment Steamer User Guide, Sunbeam Corporation Limited, Australia & NewZealand.
- V. Braun and Rainer Stamminger (2011). Using Fabric Softeners, Drying and Ironing in Germany A non-representative Census of Consumer Behaviour, Tenside Surfactants Detergents Journal, Germany
- Kidness-shop (2019). To what temperature does the iron heat up. Recommendations for choosing the temperature of ironing. About optimal temperature conditions, https://kidness-shop.ru/en/rody/do-kakoi-temperatury-razogrevaetsya-utyug-rekomendacii-po-vyboru.html, kidness-shop.ru, Russia
- Morplan (2019) Clothes Steamers, https://www.morplan.com/gb_en/products/electrical/clothes-steamers, Morplan Ltd., United Kingdom
- Pinny n Press (2021) Pinny n Press Frequently Asked Questions, https://ironingservicetamworth.co.uk/faqs/, Pinny n Press., United Kingdom
- Jiffy Steamer (2021) How to Steam Clothes, https://jiffysteamer.com/support/how-to-steam-clothes/, Jiffy Steamer Company, LLC., Tennessee, America
- Tania (2021) How Much Does a T-Shirt Weigh? [With Examples], https://silverbobbin.com/how-much-does-t-shirt-weigh/, Silver Bobbin
- Supporters (2021) Standard polyester fabric, https://www.supporters.de/Standard-polyester-fabric#:~:text=The%20standard%20polyester%20fabrics%20are,swivel%20and%20small%20stand%20flags., Supporters GmbH, Lampertheim, Germany

## Intended applications
Implementation of regular Product Environmental Footprint (PEF) studies and Organisation Environmental Footprint (OEF) studies exclusively under the specified Product groups and sectors as defined in the Product Environmental Footprint Category Rules (PEFCR) and Organisation Environmental Footprint Sectorial Rules (OEFSR) listed in http://ec.europa.eu/environment/eussd/smgp/PEFCR_OEFSR.htm
