# wood residues, hardwood, elementary; technology mix; production mix, at forest; measured as dry mass

Dataset: ILCD process, Unit process, single operation
Geography: RNA
Reference year: 2018
Valid until: 2024
Classification: Other Services / Other services
LCI method principle: Attributional
LCI method approaches: Allocation - market value
Completeness: All relevant flows quantified
Project: Provision of process-based 3.0 Environmental Footprint-compliant life cycle inventory datasets - Renewable materials - contract number 070201/2020/840085/SER/ENV.B.1
Generated by: ACV Brasil
Owner: ecoinvent
Compliance: Environmental Footprint non-primary supporting data set; Environmental Footprint 3.1
Amounts: no units in this file; such an amount is in the reference unit of its flow, which a separate flow dataset defines
copyright: true
licenseType: Free of charge for some user types or use types
accessRestrictions: Free of charge for all final users implementing a regular Product Environmental Footprint (PEF) studies and Organisation Environmental Footprint (OEF) studies exclusively under the specified Product groups and sectors as defined in the Product Environmental Footprint Category Rules (PEFCR) and Organisation Environmental Footprint Sectorial Rules (OEFSR) listed in http://ec.europa.eu/environment/eussd/smgp/PEFCR_OEFSR.htm and in accordance with the terms and conditions of the EULA (available at https://ecoinvent.lca-data.com/) exclusively until 31st December 2024. Any use of this dataset or any derivative data not within the specific context of one of the PEF/OEF projects or after the end of 2024 is not permitted.

## General comment
Notice: this data set supersedes the EF3.0-compliant version (see link under "preceding data set version" below calculated with the EF3.0). The life cycle inventory is not changed from the original EF3.0 data set. The LCIA results are calculated based on the EF3.1 methods which provide updated characterisation factors in the following impact categories: Climate Change, Ecotoxicity freshwater, Photochemical Ozone Formation, Acidification, Human Toxicity non-cancer, and Human Toxicity cancer. The review report and the data quality ratings refer to the original results. The data set has been updated by the European Commission on the basis of the original EF3.0 data set delivered by the data provider.This sub-process has limited documentation only. For all detailed documentation of the full model to which this data set belongs (such as DQRs, review reports and other technical documentation), please see this process: wood residues, hardwood - RNA []

## Technology and included processes
The activity of hardwood cultivation starts with site preparation, including seedling and/or natural regeneration, thinning, and the final felling. This dataset is modelled according to the activity ‘hardwood forestry, oak, sustainable forest management – DE’, valid from 2010 to 2012, published in the ecoinvent database 3.7.1. The dataset is updated with information retrieved from Abbas & Handler (2018) and Oneil et al. (2010). This data was used to update the parameters of ‘yield wood over rotation period’ and the respective ‘rotation period’ from the ecoinvent activity in the ecoEditor software. The unit process dataset (UPR) was subsequently allocated among the co-products ‘hardwood’, ‘wood residues’ and ‘wood chips’. Materials and energy inputs from the technosphere were allocated according to revenue prices while remaining inputs from the environment (i.e. energy in biomass, carbon dioxide from air, standing wood, and land occupation/transformation) were allocated according to the volume of the co-products. Flows allocated by price are 76.3% allocated to softwood; 7.21% to wood chips; and 16.46% to wood residues.
Parameters:
Yield of wood under bark per ha over one rotation period: 328 m³
Rotation period (number of years from planting to final harvest): 80
Dry wood density (kg dry matter/ dry volume): 640 kg/m³
Hardwood price (as solid wood under bark): 0.14 EUR/kg (average from ecoinvent)
Wood chips price (as dry mass): 0.11 EUR/kg (from ecoinvent)
Wood residues (as dry mass): 0.07 EUR/kg (from ecoinvent)
References:
Abbas, D., & Handler, R. M. (2018). Life-cycle assessment of forest harvesting and transportation operations in Tennessee. Journal of Cleaner Production, 176, 512-520.
Oneil et al. (2010). LIFE-CYCLE IMPACTS OF INLAND NORTHWEST AND NORTHEAST/NORTH CENTRAL FOREST RESOURCES. Available at: https://corrim.org/wp-content/uploads/2017/12/WFS_SI_Impacts_of_Inland_NW_NE_NC_Forest_Resources.pdf
ecoinvent database version 3.7.1 – System model Undefined. Activity name: hardwood forestry, oak, sustainable forest management. Geography: Germany. Time period: 2010-01-01 to 2012-12-31. Available at: v371.ecoquery.ecoinvent.org/Details/UPR/a8c8e52a-d826-4210-ae4d-417ae22fcbd2/8b738ea0-f89e-4627-8679-433616064e82

## Reference product
- wood residues, hardwood // wood residues, hardwood // rna, elementary: 1

## Inputs
- to traffic area, rail/road embankment, Land transformation: 2.5854e-7
- from traffic area, rail/road embankment, Land transformation: 2.5854e-7
- traffic area, rail/road embankment, Land occupation: 2.06832e-5
- carbon dioxide (biogenic), Renewable material resources from air: 1.76504
- forest, intensive, Land occupation: 0.000936873
- to forest, intensive, Land transformation: 1.17109e-5
- Energy, gross calorific value, in biomass, primary forest, Renewable energy resources from biosphere: 19.0991
- Wood, soft, standing, Renewable material resources from biosphere: 0.0015625
- from forest, intensive, Land transformation: 1.17109e-5
- traffic area, rail/road embankment, Land occupation [US]: 0.0754551
- forest, intensive, Land occupation [US]: 3.41784
- forest, intensive, Land occupation [CA]: 0.309884
- to forest, intensive, Land transformation [CA]: 0.00387355
- to forest, intensive, Land transformation [US]: 0.042723
- from forest, intensive, Land transformation [CA]: 0.00387355
- from forest, intensive, Land transformation [US]: 0.042723
- to traffic area, rail/road embankment, Land transformation [CA]: 8.55157e-5
- to traffic area, rail/road embankment, Land transformation [US]: 0.000943189
- from traffic area, rail/road embankment, Land transformation [CA]: 8.55157e-5
- from traffic area, rail/road embankment, Land transformation [US]: 0.000943189
- traffic area, rail/road embankment, Land occupation [CA]: 0.00684126

## Impact indicators
- Land use: 184.549
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
## Deviations from the LCI method principle
The background data uses:
- the \xe2\x80\x9cRecycled content cut-off\xe2\x80\x9d approach to allocate end-of-life by-products and secondary materials. This allocation is explained in the description of the recycled content system model (http://www.ecoinvent.org/database/system-models-in-ecoinvent-3/cut-off-system-model/allocation-cut-off-by-classification.html).
OR
- EF compliant data

## Deviations from the LCI method approaches
Background data:
- the \xe2\x80\x9cRecycled content cut-off\xe2\x80\x9d approach to allocate end-of-life by-products and secondary materials. This allocation is explained in the description of the recycled content system model (http://www.ecoinvent.org/database/system-models-in-ecoinvent-3/cut-off-system-model/allocation-cut-off-by-classification.html). The ecoinvent database mostly relies on “Allocation – market values” apart for few exceptions particularly in the energy sector. ecoinvent energy data is replaced with EF3.0 core data as per the EF guidelines version 2.0.
OR
- EF compliant data

## Modelling constants
All modelling constants follow the requirements listed in the Tender Specifications 070201/2020/SER/ENV.B1. Completeness: There are no intentional cut-offs in the inventory no matter how small their contribution to all the EF impact categories is. Eventual cut-offs are in compliance with the Guide for EF compliant data sets (JRC 2020), i.e. only if below the 3% cut-off rule. Water use: water use is modelled at country level using separate flows for water withdrawal, water release and water evaporation. Handling multi-functional processes: the following PEF multi- functionality decision hierarchy is applied for resolving all multi- functionality problems: (1) subdivision or system expansion; (2) allocation based on a relevant underlying physical relationship (substitution may apply here); (3) allocation based on some other relationship. Direct land use change: GHG emissions from direct LUC allocated to good/service for 20 years after the LUC occurs, with IPCC default values. Carbon storage and delayed emissions: credits associated with temporary (carbon) storage or delayed emissions up to 300 years are not be considered. Emissions off-setting: are not included. Capital goods (including infrastructures) and their End of life: they are included. System boundaries: system boundaries include all processes linked to the product supply chain (e.g. maintenance). Time period: emissions and removals are modelled as if released or removed at the beginning of the assessment method. Fossil and biogenic carbon emissions and removals: removals and emissions are modelled as follows: All GHG emissions from fossil fuels (including peat and limestone) are modelled consistently with the most updated ILCD list of elementary flows. The non-fossil (biogenic) carbon flows are modelled consistently with the most updated ILCD list of elementary flows.

## Cut-off and completeness
There are no intentional cut-offs in the inventory no matter how small their contribution to all the EF impact categories is. Eventual cut-offs are in compliance with the Guide for EF compliant data sets (JRC 2020), i.e. only if below the 3% cut-off rule. The dataset dry mass and water balance has been checked to ensure the inventory is complete. Capital goods (e.g. infrastructure) and their end-of-life are included.

## Data selection and combination
These datasets include, in both their foreground and background data, links to EF3.0 compliant data.
The relevant background data on energy, transport, and End of Life are from the LCDN data node (http://lcdn.thinkstep.com/Node/).
All other background data in the supply of this product for which no EF3.0 process was available are from ecoinvent v3.7 database (www.ecoinvent.org) or other data sources.

## Data treatment and extrapolations
Several data sources have been used to model the inventory.

## Use advice
This data set is a supporting sub-data set and must be used exclusively as sub-data set of its corresponding level-1 partly disaggregated data set (see “General comment” field for exact name and UUID).

## Data sources
- Background Data for Representative products and organisations. EF 3.0 compliant (data stock)
- Abbas, D., & Handler, R. M. (2018). Life-cycle assessment of forest harvesting and transportation operations in Tennessee. Journal of Cleaner Production, 176, 512-520.
- Oneil et al. (2010). LIFE-CYCLE IMPACTS OF INLAND NORTHWEST AND NORTHEAST/NORTH CENTRAL FOREST RESOURCES. Available at: https://corrim.org/wp-content/uploads/2017/12/WFS_SI_Impacts_of_Inland_NW_NE_NC_Forest_Resources.pdf
- ecoinvent database version 3.7.1 – System model Undefined. Activity name: hardwood forestry, oak, sustainable forest management. Geography: Germany. Time period: 2010-01-01 to 2012-12-31. Available at: v371.ecoquery.ecoinvent.org/Details/UPR/a8c8e52a-d826-4210-ae4d-417ae22fcbd2/8b738ea0-f89e-4627-8679-433616064e83

## Intended applications
Implementation of regular Product Environmental Footprint (PEF) studies and Organisation Environmental Footprint (OEF) studies exclusively under the specified Product groups and sectors as defined in the Product Environmental Footprint Category Rules (PEFCR) and Organisation Environmental Footprint Sectorial Rules (OEFSR) listed in http://ec.europa.eu/environment/eussd/smgp/PEFCR_OEFSR.htm
