# lamination, hotmelt glue; lamination process; average service, at plant; 1 kg of hotmelt glue laminated fabric

Dataset: ILCD process, Partly terminated system
Geography: GLO
Reference year: 2021
Valid until: 2024
Classification: Systems / Textiles, furnitures and other interiors
LCI method principle: Attributional
LCI method approaches: Allocation - market value
Completeness: All relevant flows quantified
Project: Provision of process-based 3.0 Environmental Footprint-compliant life cycle inventory datasets - Apparel 1 - contract number 070201/2020/840291/SER/ENV.B.1
Generated by: Metsims Sustainability Consulting
Owner: PRé Sustainability B.V.
Compliance: ILCD Data Network - Entry-level; Suggestions for updating the PEF method 2019; ISO 14040 Environmental Management – Life Cycle Assessment – Principles and Framework, 2006; ISO 14044:2006. Environmental Management – Life Cycle Assessment – Requirements and guidelines.; Environmental Footprint 3.1
Review: Dependent internal review by Avraam Symeonidis, Emilia Moreno Ruiz; Independent review panel by Madhuri Nigam
Data quality: Overall quality: Very good; Time representativeness: Very good; Geographical representativeness: Good; Technological representativeness: Very good; Precision: Very good; Methodological appropriateness and consistency: Not applicable
Amounts: no units in this file; such an amount is in the reference unit of its flow, which a separate flow dataset defines
copyright: true
licenseType: Free of charge for some user types or use types
accessRestrictions: Free of charge for all final users implementing a regular Product Environmental Footprint (PEF) studies and Organisation Environmental Footprint (OEF) studies exclusively under the specified Product groups and sectors as defined in the Product Environmental Footprint Category Rules (PEFCR) and Organisation Environmental Footprint Sectorial Rules (OEFSR) listed in http://ec.europa.eu/environment/eussd/smgp/PEFCR_OEFSR.htm and in accordance with the terms and conditions of the EULA (available at https://ecoinvent.lca-data.com/) exclusively until 31st December 2024. Any use of this dataset or any derivative data not within the specific context of one of the PEF/OEF projects or after the end of 2024 is not permitted.

## General comment
Notice: this data set supersedes the EF3.0-compliant version (see link under "preceding data set version" below calculated with the EF3.0). The life cycle inventory is not changed from the original EF3.0 data set. The LCIA results are calculated based on the EF3.1 methods which provide updated characterisation factors in the following impact categories: Climate Change, Ecotoxicity freshwater, Photochemical Ozone Formation, Acidification, Human Toxicity non-cancer, and Human Toxicity cancer. The review report and the data quality ratings refer to the original results. The data set has been updated by the European Commission on the basis of the original EF3.0 data set delivered by the data provider.The process covers textile hotmelt glue lamination process for 1 kg laminated fabric. Hot -melt adhesives are thermoplastic and can be melted or softened by heat.

This production process data represent an average layered fabric that has 3.5 layers. Derived from the mix of 2,3,4 and 5 layered laminated fabric datasets. For the certain layered fabric, aveage layer number of layer must be considered. Adhesive consumption is included to dataset as mix from following chemicals:
1. Ethylene-vinyl acetate (EVA)
2. High density polyethylene (HDPE)
3. Low density polyethylene (LDPE)
4. Polyamide (PA)
5. Polyethylene terephthalate (PET)
6. Polyurethane

Waste rate is assumed as 1 kg at 1 tonne production.

## Technology and included processes
This dataset consists of 2-5 layers hotmelt lamination process mixture.

Hot -melt adhesives are thermoplastic and can be melted or softened by heat. When spread on the fabric in the hot state, lamination with another fabric can occur on re-solidification as the coating cools down. LDPE, HDPE, EVA (Ethylen Viniyl Acetate), PA, PET and PU adhesives are used for hot melt lamination. These polymer mixture consist of these chemicals were modelled in the dataset for the average data.

A user employing this service within their models should use it along with an 1.001 kg of material to produce an 1 kg of laminated fabric. 0.001 kg of waste shall also be added. A user is responsible for defining the nature of the recycling and/or disposal of this waste. Additionally, a user is responsible for accounting transportation expenditures for all extra input and output materials that need to be modelled alongside this service.*

*Waste rate is assumed.

## Parameters
- kg_0: 0.0333333
  Mass in kg, for ethylene-vinyl acetate (eva) // ethylene-vinyl acetate (eva) production // eu+efta+uk; Articulated lorry transport, Euro 4, Total weight >32 t; EU+EFTA+UK
- km_0: 999
  Distance in km, for ethylene-vinyl acetate (eva) // ethylene-vinyl acetate (eva) production // eu+efta+uk; Articulated lorry transport, Euro 4, Total weight >32 t; EU+EFTA+UK
- kg_km_0: 33.3; = kg_0*km_0
  Transport amount in km*km, for ethylene-vinyl acetate (eva) // ethylene-vinyl acetate (eva) production // eu+efta+uk; Articulated lorry transport, Euro 4, Total weight >32 t; EU+EFTA+UK
- kg_1: 0.0333333
  Mass in kg, for high density polyethylene, mix // high density polyethylene (hdpe) production, blend of bio-based and fossil // glo; Articulated lorry transport, Euro 4, Total weight >32 t; EU+EFTA+UK
- km_1: 999
  Distance in km, for high density polyethylene, mix // high density polyethylene (hdpe) production, blend of bio-based and fossil // glo; Articulated lorry transport, Euro 4, Total weight >32 t; EU+EFTA+UK
- kg_km_1: 33.3; = kg_1*km_1
  Transport amount in km*km, for high density polyethylene, mix // high density polyethylene (hdpe) production, blend of bio-based and fossil // glo; Articulated lorry transport, Euro 4, Total weight >32 t; EU+EFTA+UK
- kg_2: 0.0333333
  Mass in kg, for low density polyethylene,mix // low density polyethylene (ldpe) production, blend of bio-based and fossil // glo; Articulated lorry transport, Euro 4, Total weight >32 t; EU+EFTA+UK
- km_2: 999
  Distance in km, for low density polyethylene,mix // low density polyethylene (ldpe) production, blend of bio-based and fossil // glo; Articulated lorry transport, Euro 4, Total weight >32 t; EU+EFTA+UK
- kg_km_2: 33.3; = kg_2*km_2
  Transport amount in km*km, for low density polyethylene,mix // low density polyethylene (ldpe) production, blend of bio-based and fossil // glo; Articulated lorry transport, Euro 4, Total weight >32 t; EU+EFTA+UK
- kg_3: 0.0333333
  Mass in kg, for polyamide, mix // polyamide (pa) production, blend of bio-based and fossil // glo; Articulated lorry transport, Euro 4, Total weight >32 t; EU+EFTA+UK
- km_3: 999
  Distance in km, for polyamide, mix // polyamide (pa) production, blend of bio-based and fossil // glo; Articulated lorry transport, Euro 4, Total weight >32 t; EU+EFTA+UK
- kg_km_3: 33.3; = kg_3*km_3
  Transport amount in km*km, for polyamide, mix // polyamide (pa) production, blend of bio-based and fossil // glo; Articulated lorry transport, Euro 4, Total weight >32 t; EU+EFTA+UK
- kg_4: 0.0333333
  Mass in kg, for polyethylene terephthalate, mix // polyethylene terephthalate (pet) production, blend of bio- based and fossil // glo; Articulated lorry transport, Euro 4, Total weight >32 t; EU+EFTA+UK
- km_4: 999
  Distance in km, for polyethylene terephthalate, mix // polyethylene terephthalate (pet) production, blend of bio- based and fossil // glo; Articulated lorry transport, Euro 4, Total weight >32 t; EU+EFTA+UK
- kg_km_4: 33.3; = kg_4*km_4
  Transport amount in km*km, for polyethylene terephthalate, mix // polyethylene terephthalate (pet) production, blend of bio- based and fossil // glo; Articulated lorry transport, Euro 4, Total weight >32 t; EU+EFTA+UK
- kg_5: 0.0333333
  Mass in kg, for polyurethane foam // polyurethane foam production // glo; Articulated lorry transport, Euro 4, Total weight >32 t; EU+EFTA+UK
- km_5: 999
  Distance in km, for polyurethane foam // polyurethane foam production // glo; Articulated lorry transport, Euro 4, Total weight >32 t; EU+EFTA+UK
- kg_km_5: 33.3; = kg_5*km_5
  Transport amount in km*km, for polyurethane foam // polyurethane foam production // glo; Articulated lorry transport, Euro 4, Total weight >32 t; EU+EFTA+UK
- kg_6: 0.0333333
  Mass in kg, for ethylene-vinyl acetate (eva) // ethylene-vinyl acetate (eva) production // eu+efta+uk; Transoceanic ship, containers; GLO
- km_6: 18000
  Distance in km, for ethylene-vinyl acetate (eva) // ethylene-vinyl acetate (eva) production // eu+efta+uk; Transoceanic ship, containers; GLO
- kg_km_6: 600; = kg_6*km_6
  Transport amount in km*km, for ethylene-vinyl acetate (eva) // ethylene-vinyl acetate (eva) production // eu+efta+uk; Transoceanic ship, containers; GLO
- kg_7: 0.0333333
  Mass in kg, for high density polyethylene, mix // high density polyethylene (hdpe) production, blend of bio-based and fossil // glo; Transoceanic ship, containers; GLO
- km_7: 18000
  Distance in km, for high density polyethylene, mix // high density polyethylene (hdpe) production, blend of bio-based and fossil // glo; Transoceanic ship, containers; GLO
- kg_km_7: 600; = kg_7*km_7
  Transport amount in km*km, for high density polyethylene, mix // high density polyethylene (hdpe) production, blend of bio-based and fossil // glo; Transoceanic ship, containers; GLO
- kg_8: 0.0333333
  Mass in kg, for low density polyethylene,mix // low density polyethylene (ldpe) production, blend of bio-based and fossil // glo; Transoceanic ship, containers; GLO
- km_8: 18000
  Distance in km, for low density polyethylene,mix // low density polyethylene (ldpe) production, blend of bio-based and fossil // glo; Transoceanic ship, containers; GLO
- kg_km_8: 600; = kg_8*km_8
  Transport amount in km*km, for low density polyethylene,mix // low density polyethylene (ldpe) production, blend of bio-based and fossil // glo; Transoceanic ship, containers; GLO
- kg_9: 0.0333333
  Mass in kg, for polyamide, mix // polyamide (pa) production, blend of bio-based and fossil // glo; Transoceanic ship, containers; GLO
- km_9: 18000
  Distance in km, for polyamide, mix // polyamide (pa) production, blend of bio-based and fossil // glo; Transoceanic ship, containers; GLO
- kg_km_9: 600; = kg_9*km_9
  Transport amount in km*km, for polyamide, mix // polyamide (pa) production, blend of bio-based and fossil // glo; Transoceanic ship, containers; GLO
- kg_10: 0.0333333
  Mass in kg, for polyethylene terephthalate, mix // polyethylene terephthalate (pet) production, blend of bio- based and fossil // glo; Transoceanic ship, containers; GLO
- km_10: 18000
  Distance in km, for polyethylene terephthalate, mix // polyethylene terephthalate (pet) production, blend of bio- based and fossil // glo; Transoceanic ship, containers; GLO
- kg_km_10: 600; = kg_10*km_10
  Transport amount in km*km, for polyethylene terephthalate, mix // polyethylene terephthalate (pet) production, blend of bio- based and fossil // glo; Transoceanic ship, containers; GLO
- kg_11: 0.0333333
  Mass in kg, for polyurethane foam // polyurethane foam production // glo; Transoceanic ship, containers; GLO
- km_11: 18000
  Distance in km, for polyurethane foam // polyurethane foam production // glo; Transoceanic ship, containers; GLO
- kg_km_11: 600; = kg_11*km_11
  Transport amount in km*km, for polyurethane foam // polyurethane foam production // glo; Transoceanic ship, containers; GLO

## Reference product
- lamination, hotmelt glue // lamination, hotmelt glue // glo: 1

## Inputs
- Electricity from Electricity grid mix 1kV-60kV - AU: 0.217
- Electricity from Electricity grid mix 1kV-60kV - EU+EFTA+UK: 3.1966
- Electricity from Electricity grid mix 1kV-60kV - NZ: 0.0413
- Electricity from Electricity grid mix 1kV-60kV - RAF: 0.6985
- Electricity from Electricity grid mix 1kV-60kV - RNA: 4.6781
- Electricity from Electricity grid mix 1kV-60kV - RSA: 1.5873
- Electricity from Electricity grid mix 1kV-60kV - RU: 0.9354
- Transport of ethylene-vinyl acetate (eva) // ethylene-vinyl acetate (eva) production // eu+efta+uk by Articulated lorry transport, Euro 4, Total weight >32 t - EU+EFTA+UK: 33.3; = kg_km_0
- Transport of high density polyethylene, mix // high density polyethylene (hdpe) production, blend of bio-based and fossil // glo by Articulated lorry transport, Euro 4, Total weight >32 t - EU+EFTA+UK: 33.3; = kg_km_1
- Transport of low density polyethylene,mix // low density polyethylene (ldpe) production, blend of bio-based and fossil // glo by Articulated lorry transport, Euro 4, Total weight >32 t - EU+EFTA+UK: 33.3; = kg_km_2
- Transport of polyamide, mix // polyamide (pa) production, blend of bio-based and fossil // glo by Articulated lorry transport, Euro 4, Total weight >32 t - EU+EFTA+UK: 33.3; = kg_km_3
- Transport of polyethylene terephthalate, mix // polyethylene terephthalate (pet) production, blend of bio- based and fossil // glo by Articulated lorry transport, Euro 4, Total weight >32 t - EU+EFTA+UK: 33.3; = kg_km_4
- Transport of polyurethane foam // polyurethane foam production // glo by Articulated lorry transport, Euro 4, Total weight >32 t - EU+EFTA+UK: 33.3; = kg_km_5
- Transport of ethylene-vinyl acetate (eva) // ethylene-vinyl acetate (eva) production // eu+efta+uk by Transoceanic ship, containers - GLO: 600; = kg_km_6
- Transport of high density polyethylene, mix // high density polyethylene (hdpe) production, blend of bio-based and fossil // glo by Transoceanic ship, containers - GLO: 600; = kg_km_7
- Transport of low density polyethylene,mix // low density polyethylene (ldpe) production, blend of bio-based and fossil // glo by Transoceanic ship, containers - GLO: 600; = kg_km_8
- Transport of polyamide, mix // polyamide (pa) production, blend of bio-based and fossil // glo by Transoceanic ship, containers - GLO: 600; = kg_km_9
- Transport of polyethylene terephthalate, mix // polyethylene terephthalate (pet) production, blend of bio- based and fossil // glo by Transoceanic ship, containers - GLO: 600; = kg_km_10
- Transport of polyurethane foam // polyurethane foam production // glo by Transoceanic ship, containers - GLO: 600; = kg_km_11
- Electricity from Electricity grid mix 1kV-60kV - CN: 4.79329
- Electricity from Electricity grid mix 1kV-60kV - RAS w/o CN: 5.25171
- lamination, hotmelt glue // lamination, hotmelt glue // glo, blackbox: 1
- lamination, hotmelt glue // lamination, hotmelt glue // glo, elementary: 1

## Impact indicators
- Eutrophication marine: 0.00712384
- Ecotoxicity, freshwater: 35.7818
- Land use: 19.2624
- Water use: 1.6416
- Resource use, minerals and metals: 7.48936e-6
- Resource use, fossils: 69.9418
- Climate change: 4.90707
- Ozone depletion: 1.38504e-8
- Human toxicity, cancer: 2.69524e-9
- Human toxicity, non-cancer: 3.67985e-8
- EF-particulate Matter: 1.11333e-6
- Ionising radiation, human health: 0.319526
- Photochemical ozone formation - human health: 0.0154553
- Acidification: 0.0343013
- Eutrophication, terrestrial: 0.0604868
- Eutrophication, freshwater: 4.494e-5

## Deviations from the LCI method principle
The background data uses:
- the \xe2\x80\x9cRecycled content cut-off\xe2\x80\x9d approach to allocate end-of-life by-products and secondary materials. This allocation is explained in the description of the recycled content system model (http://www.ecoinvent.org/database/system-models-in-ecoinvent-3/cut-off-system-model/allocation-cut-off-by-classification.html).
OR
- EF compliant data

## Deviations from the LCI method approaches
Background data:
- the \xe2\x80\x9cRecycled content cut-off\xe2\x80\x9d approach to allocate end-of-life by-products and secondary materials. This allocation is explained in the description of the recycled content system model (http://www.ecoinvent.org/database/system-models-in-ecoinvent-3/cut-off-system-model/allocation-cut-off-by-classification.html). The ecoinvent database mostly relies on “Allocation – market values” apart for few exceptions particularly in the energy sector. ecoinvent energy data is replaced with EF3.0 core data as per the EF guidelines version 2.0.
OR
- EF compliant data

## Modelling constants
All modelling constants follow the requirements listed in the Tender Specifications 070201/2020/SER/ENV.B1. Completeness: There are no intentional cut-offs in the inventory no matter how small their contribution to all the EF impact categories is. Eventual cut-offs are in compliance with the Guide for EF compliant data sets (JRC 2020), i.e. only if below the 3% cut-off rule. Water use: water use is modelled at country level using separate flows for water withdrawal, water release and water evaporation. Handling multi-functional processes: the following PEF multi- functionality decision hierarchy is applied for resolving all multi- functionality problems: (1) subdivision or system expansion; (2) allocation based on a relevant underlying physical relationship (substitution may apply here); (3) allocation based on some other relationship. Direct land use change: GHG emissions from direct LUC allocated to good/service for 20 years after the LUC occurs, with IPCC default values. Carbon storage and delayed emissions: credits associated with temporary (carbon) storage or delayed emissions up to 300 years are not be considered. Emissions off-setting: are not included. Capital goods (including infrastructures) and their End of life: they are included. System boundaries: system boundaries include all processes linked to the product supply chain (e.g. maintenance). Time period: emissions and removals are modelled as if released or removed at the beginning of the assessment method. Fossil and biogenic carbon emissions and removals: removals and emissions are modelled as follows: All GHG emissions from fossil fuels (including peat and limestone) are modelled consistently with the most updated ILCD list of elementary flows. The non-fossil (biogenic) carbon flows are modelled consistently with the most updated ILCD list of elementary flows.

## Cut-off and completeness
There are no intentional cut-offs in the inventory no matter how small their contribution to all the EF impact categories is. Eventual cut-offs are in compliance with the Guide for EF compliant data sets (JRC 2020), i.e. only if below the 3% cut-off rule. The dataset dry mass and water balance has been checked to ensure the inventory is complete. Capital goods (e.g. infrastructure) and their end-of-life are included.

## Data selection and combination
These datasets include, in both their foreground and background data, links to EF3.0 compliant data.
The relevant background data on energy, transport, and End of Life are from the LCDN data node (http://lcdn.thinkstep.com/Node/).
All other background data in the supply of this product for which no EF3.0 process was available are from ecoinvent v3.7 database (www.ecoinvent.org) or other data sources.

## Data treatment and extrapolations
Several data sources have been used to model the inventory.

## Review details
Internal reviews have been asked to review the plausibility of the unit process, LCIA scores, and DQRs. Internal reviewers have also been asked to review the data for EF compliancy. The consortium is therefore responsible for aspects such as compliancy with the ILCD format, including validation in Look@LCI, and nomenclature.
Internal reviwers have been asked to judge based on the process name, that the unit process models in a complete and representative way the process in the requested location. The review encompassed the plausability of:
- exchanges with nature (elementary flows) as well as exchanges such as product and waste flows.
- meta information (general comment, technology comment, system boundaries, allocation, cut-off rules, etc.). Reviewers were asked to judge if the provided information is enough to understand the content of the process.
- LCIA scores
- DQRs including precision, technology, time and geography. As well as the overall DQR.
External reviewers have been asked to provide their expertise in the field of interest. External reviewers have been asked to review the unit process, including eventual methodological choices, the LCIA scores (provided with contribution scores as well), and DQRs. External reviewers have been provided all the information in a tool developed by the consortium for the purpose of this project.
External reviewers have been asked to judge based on the process name, that the unit process models in a complete and representative way the process in the requested location. The review encompassed:
- Plausability and completeness of exchanges with nature (elementary flows) as well as exchanges such as product and waste flows.
- Review of meta information (general comment, technology comment, system boundaries, allocation, cut-off rules, etc.). Reviewers were asked to judge if the provided information is enough to understand the content of the process.
- Review of properties (biogenic carbon and water content).
- Review of allocation keys.
- Plausability of LCIA scores calculated by the consortium.
- Plausability of DQRs including precision, technology, time and geography. As well as the overall DQR.

## Data sources
- Background Data for Representative products and organisations. EF 3.0 compliant (data stock)
- Fung, W. (2002). Coated and laminated textiles (Vol. 23). Woodhead Publishing.
- Singha, K. (2012). A review on coating & lamination in textiles: processes and applications. American Journal of Polymer Science, 2(3), 39-49.
- Fries, J. A. (1983). Adhesives for fabric lamination. Journal of Coated Fabrics, 12(3), 174-186.
- PUR Hot Melt Glue Nonwoven/Film Laminating Machine, https://www.kuntai-group.com/laminating-machine/laminating-machine-application/pur-hot-melt-glue-lamination-machine/pur-hot-melt-glue-nonwoven-film-laminating.html, Web Access: 10.02.2021
- PUR Textile Cloth Fabric Hot Melt Glue Laminating Machine, https://www.kuntai-group.com/laminating-machine/hot-melt-glue-laminating-machine/pur-textile-cloth-fabric-hot-melt-glue.html, Web Access: 10.02.2021
- Automatic Hot Melt Glue Laminating Machine, https://www.kuntai-group.com/laminating-machine/laminating-machine-application/pur-hot-melt-glue-lamination-machine/automatic-hot-melt-glue-laminating-machine.html, Web Access: 10.02.2021
- Hot Melt Film Laminating Machine, https://www.kuntai-group.com/laminating-machine/flat-bed-laminating-machine/hot-melt-film-laminating-machine.html, Web Access: 10.02.2021
- PUR Hot Melt Glue Sofa Fabric Laminating Machine, https://www.kuntai-group.com/laminating-machine/hot-melt-glue-laminating-machine/pur-hot-melt-glue-sofa-fabric-laminating.html, Web Access: 10.02.2021
- ONL-M1300 High Speed Non Woven Coating And Lamination Machine, https://www.allwell-group.com/fr/products/onl-m1300-high-speed-non-woven-coating-and-lamination-machine.html, Web Access: 10.02.2021

## Intended applications
Implementation of regular Product Environmental Footprint (PEF) studies and Organisation Environmental Footprint (OEF) studies exclusively under the specified Product groups and sectors as defined in the Product Environmental Footprint Category Rules (PEFCR) and Organisation Environmental Footprint Sectorial Rules (OEFSR) listed in http://ec.europa.eu/environment/eussd/smgp/PEFCR_OEFSR.htm
