# sundries (strass, pearls); production, at plant; item(s) = 1 cm2

Dataset: ILCD process, Partly terminated system
Geography: GLO
Reference year: 2021
Valid until: 2024
Classification: Systems / Textiles, furnitures and other interiors
LCI method principle: Attributional
LCI method approaches: Allocation - market value
Completeness: All relevant flows quantified
Project: Provision of process-based 3.0 Environmental Footprint-compliant life cycle inventory datasets - Others - contract number 070201/2020/840235/SER/ENV.B.1
Generated by: Metsims Sustainability Consulting
Owner: PRé Sustainability B.V.
Compliance: ILCD Data Network - Entry-level; Suggestions for updating the PEF method 2019; ISO 14040 Environmental Management – Life Cycle Assessment – Principles and Framework, 2006; ISO 14044:2006. Environmental Management – Life Cycle Assessment – Requirements and guidelines.; Environmental Footprint 3.1
Review: Dependent internal review by Avraam Symeonidis, Emilia Moreno Ruiz; Independent review panel by Madhuri Nigam
Data quality: Overall quality: Good; Time representativeness: Very good; Geographical representativeness: Fair; Technological representativeness: Good; Precision: Very good; Methodological appropriateness and consistency: Not applicable
Amounts: no units in this file; such an amount is in the reference unit of its flow, which a separate flow dataset defines
copyright: true
licenseType: Free of charge for some user types or use types
accessRestrictions: Free of charge for all final users implementing a regular Product Environmental Footprint (PEF) studies and Organisation Environmental Footprint (OEF) studies exclusively under the specified Product groups and sectors as defined in the Product Environmental Footprint Category Rules (PEFCR) and Organisation Environmental Footprint Sectorial Rules (OEFSR) listed in http://ec.europa.eu/environment/eussd/smgp/PEFCR_OEFSR.htm and in accordance with the terms and conditions of the EULA (available at https://ecoinvent.lca-data.com/) exclusively until 31st December 2024. Any use of this dataset or any derivative data not within the specific context of one of the PEF/OEF projects or after the end of 2024 is not permitted.

## General comment
Notice: this data set supersedes the EF3.0-compliant version (see link under "preceding data set version" below calculated with the EF3.0). The life cycle inventory is not changed from the original EF3.0 data set. The LCIA results are calculated based on the EF3.1 methods which provide updated characterisation factors in the following impact categories: Climate Change, Ecotoxicity freshwater, Photochemical Ozone Formation, Acidification, Human Toxicity non-cancer, and Human Toxicity cancer. The review report and the data quality ratings refer to the original results. The data set has been updated by the European Commission on the basis of the original EF3.0 data set delivered by the data provider.Sundries are miscellaneous small items made of strass and pearls. It is assumed that strass and pearls were linked each other by textile structure in dataset model.

Raw material production and production waste were included to dataset.

## Technology and included processes
Sundries are miscellaneous small items made of strass and pearls. It is assumed that strass and pearls were linked each other by textile structure in dataset model. Raw material production and production waste were included to dataset.

Textiles materials which were included to data set are consist of nylon and PET yarn.

Waste processing model was generated from global waste collection rate. Global waste collection rate is 65%. 75% of waste collected are delivered to recycle facility and, 25% of collected waste are delivered to landfill areas. Uncollected part of waste (35%) was assumed that it is dropped to landfill areas. From production facility to landfill transport was assumed as 70 km.

## Parameters
- R2_nylon: 1.86582e-6
  The amount of waste nylon produced is 2.07E-06kg. The assumed percentage of losses of the recycling process is 0.1. R2 has been therefore calculated as the original amount of waste minues losses, i.e. 1.86E-06kg. The value for A has been taken from the default values for the implementation of the CFF provided. The default value for plastics is 0.5. Being pre-consumer waste, Qsout/Qp is assumed to be 1. The E*v part of the formula is modelled as a negative input of the relevant virgin material.
- R2_PET: 1.8881e-6
  The amount of waste PET produced is 2.07E-06kg. The assumed percentage of losses of the recycling process is 0.089. R2 has been therefore calculated as the original amount of waste minues losses, i.e. 1.89E-06kg. The value for A has been taken from the default values for the implementation of the CFF provided. The default value for plastics is 0.5. Being pre-consumer waste, Qsout/Qp is assumed to be 1. The E*v part of the formula is modelled as a negative input of the relevant virgin material.
- A_nylon: 0.5
  (same comment as for R2_nylon)
- A_PET: 0.5
  (same comment as for R2_PET)
- Qsout/Qp_nylon: 1
  (same comment as for R2_nylon)
- Qsout/Qp_PET: 1
  (same comment as for R2_PET)
- CFF_nylon: 2.07313e-6; = R2_nylon*A_nylon
  (same comment as for R2_nylon)
- CFF_PET: 2.07313e-6; = R2_PET*A_PET
  (same comment as for R2_PET)
- avoid_nylon: 9.32909e-7; = CFF_nylon*Qsout/Qp_nylon
  (same comment as for R2_nylon)
- avoid_PET: 9.44049e-7; = CFF_PET*Qsout/Qp_PET
  (same comment as for R2_PET)
- kg_0: 0.00251269
  Mass in kg, for mother of pearl // mother of pearl // glo; Articulated lorry transport, Euro 4, Total weight >32 t; EU+EFTA+UK
- km_0: 998.929
  Distance in km, for mother of pearl // mother of pearl // glo; Articulated lorry transport, Euro 4, Total weight >32 t; EU+EFTA+UK
- kg_km_0: 2.51; = kg_0*km_0
  Transport amount in km*km, for mother of pearl // mother of pearl // glo; Articulated lorry transport, Euro 4, Total weight >32 t; EU+EFTA+UK
- kg_1: 7.08763e-5
  Mass in kg, for nylon 6 // nylon 6 production, fossil fuel-based // glo; Articulated lorry transport, Euro 4, Total weight >32 t; EU+EFTA+UK
- km_1: 1000.33
  Distance in km, for nylon 6 // nylon 6 production, fossil fuel-based // glo; Articulated lorry transport, Euro 4, Total weight >32 t; EU+EFTA+UK
- kg_km_1: 0.0709; = kg_1*km_1
  Transport amount in km*km, for nylon 6 // nylon 6 production, fossil fuel-based // glo; Articulated lorry transport, Euro 4, Total weight >32 t; EU+EFTA+UK
- kg_2: 7.08763e-5
  Mass in kg, for polyamide 6.6 // nylon 6.6 production, fossil fuel-based // glo; Articulated lorry transport, Euro 4, Total weight >32 t; EU+EFTA+UK
- km_2: 1000.33
  Distance in km, for polyamide 6.6 // nylon 6.6 production, fossil fuel-based // glo; Articulated lorry transport, Euro 4, Total weight >32 t; EU+EFTA+UK
- kg_km_2: 0.0709; = kg_2*km_2
  Transport amount in km*km, for polyamide 6.6 // nylon 6.6 production, fossil fuel-based // glo; Articulated lorry transport, Euro 4, Total weight >32 t; EU+EFTA+UK
- kg_3: 0.000141753
  Mass in kg, for polyethylene terephthalate, mix // polyethylene terephthalate (pet) production, blend of bio- based and fossil // glo; Articulated lorry transport, Euro 4, Total weight >32 t; EU+EFTA+UK
- km_3: 1001.75
  Distance in km, for polyethylene terephthalate, mix // polyethylene terephthalate (pet) production, blend of bio- based and fossil // glo; Articulated lorry transport, Euro 4, Total weight >32 t; EU+EFTA+UK
- kg_km_3: 0.142; = kg_3*km_3
  Transport amount in km*km, for polyethylene terephthalate, mix // polyethylene terephthalate (pet) production, blend of bio- based and fossil // glo; Articulated lorry transport, Euro 4, Total weight >32 t; EU+EFTA+UK
- kg_4: 1.93163e-5
  Mass in kg, for waste (unspecified) // landfill of inert material (other materials) // eu+efta+uk; Articulated lorry transport, Euro 4, Total weight >32 t; EU+EFTA+UK
- km_4: 70
  Distance in km, for waste (unspecified) // landfill of inert material (other materials) // eu+efta+uk; Articulated lorry transport, Euro 4, Total weight >32 t; EU+EFTA+UK
- kg_km_4: 0.00135214; = kg_4*km_4
  Transport amount in km*km, for waste (unspecified) // landfill of inert material (other materials) // eu+efta+uk; Articulated lorry transport, Euro 4, Total weight >32 t; EU+EFTA+UK
- kg_5: 4.35889e-6
  Mass in kg, for waste (unspecified) // landfill of plastic waste // eu+efta+uk; Articulated lorry transport, Euro 4, Total weight >32 t; EU+EFTA+UK
- km_5: 70
  Distance in km, for waste (unspecified) // landfill of plastic waste // eu+efta+uk; Articulated lorry transport, Euro 4, Total weight >32 t; EU+EFTA+UK
- kg_km_5: 0.000305122; = kg_5*km_5
  Transport amount in km*km, for waste (unspecified) // landfill of plastic waste // eu+efta+uk; Articulated lorry transport, Euro 4, Total weight >32 t; EU+EFTA+UK
- kg_6: 0.00251269
  Mass in kg, for mother of pearl // mother of pearl // glo; Transoceanic ship, containers; GLO
- km_6: 17988.7
  Distance in km, for mother of pearl // mother of pearl // glo; Transoceanic ship, containers; GLO
- kg_km_6: 45.2; = kg_6*km_6
  Transport amount in km*km, for mother of pearl // mother of pearl // glo; Transoceanic ship, containers; GLO
- kg_7: 7.08763e-5
  Mass in kg, for nylon 6 // nylon 6 production, fossil fuel-based // glo; Transoceanic ship, containers; GLO
- km_7: 18059.6
  Distance in km, for nylon 6 // nylon 6 production, fossil fuel-based // glo; Transoceanic ship, containers; GLO
- kg_km_7: 1.28; = kg_7*km_7
  Transport amount in km*km, for nylon 6 // nylon 6 production, fossil fuel-based // glo; Transoceanic ship, containers; GLO
- kg_8: 7.08763e-5
  Mass in kg, for polyamide 6.6 // nylon 6.6 production, fossil fuel-based // glo; Transoceanic ship, containers; GLO
- km_8: 18059.6
  Distance in km, for polyamide 6.6 // nylon 6.6 production, fossil fuel-based // glo; Transoceanic ship, containers; GLO
- kg_km_8: 1.28; = kg_8*km_8
  Transport amount in km*km, for polyamide 6.6 // nylon 6.6 production, fossil fuel-based // glo; Transoceanic ship, containers; GLO
- kg_9: 0.000141753
  Mass in kg, for polyethylene terephthalate, mix // polyethylene terephthalate (pet) production, blend of bio- based and fossil // glo; Transoceanic ship, containers; GLO
- km_9: 18059.6
  Distance in km, for polyethylene terephthalate, mix // polyethylene terephthalate (pet) production, blend of bio- based and fossil // glo; Transoceanic ship, containers; GLO
- kg_km_9: 2.56; = kg_9*km_9
  Transport amount in km*km, for polyethylene terephthalate, mix // polyethylene terephthalate (pet) production, blend of bio- based and fossil // glo; Transoceanic ship, containers; GLO

## Reference product
- sundries // sundries (strass, pearls) // glo: 1

## Inputs
- Transport of mother of pearl // mother of pearl // glo by Articulated lorry transport, Euro 4, Total weight >32 t - EU+EFTA+UK: 2.51; = kg_km_0
- Transport of nylon 6 // nylon 6 production, fossil fuel-based // glo by Articulated lorry transport, Euro 4, Total weight >32 t - EU+EFTA+UK: 0.0709; = kg_km_1
- Transport of polyamide 6.6 // nylon 6.6 production, fossil fuel-based // glo by Articulated lorry transport, Euro 4, Total weight >32 t - EU+EFTA+UK: 0.0709; = kg_km_2
- Transport of polyethylene terephthalate, mix // polyethylene terephthalate (pet) production, blend of bio- based and fossil // glo by Articulated lorry transport, Euro 4, Total weight >32 t - EU+EFTA+UK: 0.142; = kg_km_3
- Transport of waste (unspecified) // landfill of inert material (other materials) // eu+efta+uk by Articulated lorry transport, Euro 4, Total weight >32 t - EU+EFTA+UK: 0.00135214; = kg_km_4
- Transport of waste (unspecified) // landfill of plastic waste // eu+efta+uk by Articulated lorry transport, Euro 4, Total weight >32 t - EU+EFTA+UK: 0.000305122; = kg_km_5
- Transport of mother of pearl // mother of pearl // glo by Transoceanic ship, containers - GLO: 45.2; = kg_km_6
- Transport of nylon 6 // nylon 6 production, fossil fuel-based // glo by Transoceanic ship, containers - GLO: 1.28; = kg_km_7
- Transport of polyamide 6.6 // nylon 6.6 production, fossil fuel-based // glo by Transoceanic ship, containers - GLO: 1.28; = kg_km_8
- Transport of polyethylene terephthalate, mix // polyethylene terephthalate (pet) production, blend of bio- based and fossil // glo by Transoceanic ship, containers - GLO: 2.56; = kg_km_9
- polyethylene terephthalate, recycled, pre-consumer // polyethylene terephthalate (pet) production, recycled, semi-mechanical, pre-consumer // glo: 9.44049e-7; = CFF_PET
- nylon, recycled // nylon production, recycled, mechanical // glo: 9.32909e-7; = CFF_nylon
- sundries // sundries (strass, pearls) // glo, blackbox: 1
- sundries // sundries (strass, pearls) // glo, elementary: 1

## Outputs
- avoided product system, nylon from sundries (strass, pearls) // avoided product system nylon in sundries (strass, pearls) // glo: 9.32909e-7; = avoid_nylon
- avoided product system, pet from sundries (strass, pearls) // avoided product system pet in sundries (strass, pearls) // glo: 9.44049e-7; = avoid_PET

## Impact indicators
- Eutrophication marine: 9.01424e-6
- Ecotoxicity, freshwater: 0.0317105
- Land use: 0.00594327
- Water use: 0.00088781
- Resource use, minerals and metals: 8.42675e-8
- Resource use, fossils: 0.0421873
- Climate change: 0.00288241
- Ozone depletion: 1.82177e-11
- Human toxicity, cancer: 1.88283e-12
- Human toxicity, non-cancer: 1.79548e-11
- EF-particulate Matter: 6.29952e-10
- Ionising radiation, human health: 6.04247e-5
- Photochemical ozone formation - human health: 2.11603e-5
- Acidification: 3.34562e-5
- Eutrophication, terrestrial: 8.48557e-5
- Eutrophication, freshwater: 8.74529e-8

## Deviations from the LCI method principle
The background data use the \xe2\x80\x9cRecycled content cut-off\xe2\x80\x9d approach to allocate end-of-life by-products and secondary materials. This allocation is explained in the description of the recycled content system model (http://www.ecoinvent.org/database/system-models-in-ecoinvent-3/cut-off-system-model/allocation-cut-off-by-classification.html).

## Deviations from the LCI method approaches
Allocation following the ISO 14044 hierarchy.

## Modelling constants
All modelling constants follow the requirements listed in the Tender Specifications ENV.B.1/SER/2016/0038vl. Completeness: All known environmental flows are included. All known resource uses and emissions are listed in the inventory. Water use: water use is modelled at country level using separate flows for water withdrawal, water release and water evaporation. Cut-off: All known environmental flows are included. All known resource uses and emissions are listed in the inventory. Handling multi-functional processes: the following PEF multi- functionality decision hierarchy is applied for resolving all multi- functionality problems: (1) subdivision or system expansion; (2) allocation based on a relevant underlying physical relationship (substitution may apply here); (3) allocation based on some other relationship. Direct land use change: GHG emissions from direct LUC allocated to good/service for 20 years after the LUC occurs, with IPCC default values. Carbon storage and delayed emissions: credits associated with temporary (carbon) storage or delayed emissions up to 300 years are not be considered. Emissions off-setting: are not included. Capital goods (including infrastructures) and their End of life: they are included. System boundaries: system boundaries include all processes linked to the product supply chain (e.g. maintenance). Time period: emissions and removals are modelled as if released or removed at the beginning of the assessment method. Fossil and biogenic carbon emissions and removals: removals and emissions are modelled as follows: All GHG emissions from fossil fuels (including peat and limestone) are modelled consistently with the most updated ILCD list of elementary flows. The non-fossil (biogenic) carbon flows are modelled consistently with the most updated ILCD list of elementary flows.

## Cut-off and completeness
All known environmental flows are included. All known resource uses and emissions are listed in the inventory. The dataset dry mass balance has been checked to ensure the inventory is complete. Capital goods (e.g. infrastructure) and their end-of-life are included.

## Data selection and combination
These datasets include, in both their foreground and background data, links to EF3.0 compliant data.
The relevant background data on energy, transport, and End of Life are from the LCDN data node (http://lcdn.thinkstep.com/Node/).
All other background data in the supply of this product for which no EF3.0 process was available are from ecoinvent v3.7 database (www.ecoinvent.org) or other data sources.

## Data treatment and extrapolations
Several data sources have been used to model the inventory.

## Review details
Internal reviews have been asked to review the plausibility of the unit process, LCIA scores, and DQRs. Internal reviewers have also been asked to review the data for EF compliancy. The consortium is therefore responsible for aspects such as compliancy with the ILCD format, including validation in Look@LCI, and nomenclature.
Internal reviwers have been asked to judge based on the process name, that the unit process models in a complete and representative way the process in the requested location. The review encompassed the plausability of:
- exchanges with nature (elementary flows) as well as exchanges such as product and waste flows.
- meta information (general comment, technology comment, system boundaries, allocation, cut-off rules, etc.). Reviewers were asked to judge if the provided information is enough to understand the content of the process.
- LCIA scores
- DQRs including precision, technology, time and geography. As well as the overall DQR.
External reviewers have been asked to provide their expertise in the field of interest. External reviewers have been asked to review the unit process, including eventual methodological choices, the LCIA scores (provided with contribution scores as well), and DQRs. External reviewers have been provided all the information in a tool developed by the consortium for the purpose of this project.
External reviewers have been asked to judge based on the process name, that the unit process models in a complete and representative way the process in the requested location. The review encompassed:
- Plausability and completeness of exchanges with nature (elementary flows) as well as exchanges such as product and waste flows.
- Review of meta information (general comment, technology comment, system boundaries, allocation, cut-off rules, etc.). Reviewers were asked to judge if the provided information is enough to understand the content of the process.
- Review of properties (biogenic carbon and water content).
- Review of allocation keys.
- Plausability of LCIA scores calculated by the consortium.
- Plausability of DQRs including precision, technology, time and geography. As well as the overall DQR.

## Data sources
- Background Data for Representative products and organisations. EF 3.0 compliant (data stock)
- Johnston, B., Kishore, P., Vuibeqa, G. B., Hine, D., & Southgate, P. C. (2020). Economic assessment of community-based pearl oyster spat collection and mabé pearl production in the western Pacific. Aquaculture, 514, 734505.
- Wickell C., All About Mother of Pearl (2019), https://www.thesprucecrafts.com/what-is-mother-of-pearl-2043714, Access Date: 05.04.2021
- Vignesh, K. S., Rajadesingu, S., & Arunachalam, K. D. (2021). Challenges, issues, and problems with zero-waste tools. In Concepts of Advanced Zero Waste Tools (pp. 69-90). Elsevier.
- Rosato, D. V. (1998). Blown film. In Extruding Plastics (pp. 305-348). Springer, Boston, MA.
- Altun, S. (2012). Prediction of textile waste profile and recycling opportunities in Turk. Fibres & Textiles in Eastern Europe.
- Sun, J., & Bhushan, B. (2012). Hierarchical structure and mechanical properties of nacre: a review. Rsc Advances, 2(20), 7617-7632.
- Proteins, http://abyss.uoregon.edu/~js/glossary/proteins.html, Access Date: 21.06.2021
- Chemical and Physical Properties of Polysaccharides in Cooking, https://www.scienceofcooking.com/chemical_physical_properties_polysaccharides.htm, Access Date: 21.06.2021

## Intended applications
Implementation of regular Product Environmental Footprint (PEF) studies and Organisation Environmental Footprint (OEF) studies exclusively under the specified Product groups and sectors as defined in the Product Environmental Footprint Category Rules (PEFCR) and Organisation Environmental Footprint Sectorial Rules (OEFSR) listed in http://ec.europa.eu/environment/eussd/smgp/PEFCR_OEFSR.htm
