# Lorry, Total weight >32 t, cooled, CNG Euro 0- 6 mix / 24.7t payload capacity; CNG driven, Euro 4 - 6 mix, cargo, cooled; consumption mix, to consumer; >32 t gross weight / 24.7t payload capacity

Dataset: ILCD process, Unit process, single operation
Geography: GLO
Reference year: 2020
Valid until: 2024
Classification: Transport services / Road
Synonyms: lorry
LCI method principle: Attributional
Completeness: All relevant flows quantified
Share of supply or production covered: 95 %
Method details: GaBi Refinery Modelling Principles; GaBi Modelling Principles; GaBi Water Modelling Principles; GaBi Agriculture Model Documentation; GaBi Land Use Change Model Documentation; GaBi Energy Modelling Principles; Suggestions for updating the PEF method 2019; Guide for EF compliant data sets; GaBi Agrarian Modelling Principles
Project: Provision of product environmental footprint-compliant life cycle inventory datasets. Contract number N° 09.029901/2021/846457/SER/ENV.B.1
Generated by: Sphera Solutions GmbH
Owner: Sphera Solutions GmbH
Compliance: ILCD Data Network - Entry-level; Suggestions for updating the PEF method 2019; ISO 14040 Environmental Management – Life Cycle Assessment – Principles and Framework, 2006; ISO 14044:2006. Environmental Management – Life Cycle Assessment – Requirements and guidelines.; Environmental Footprint 3.1
Review: Independent internal review by Sphera Solutions GmbH, Dr. Michael Baumann, Sphera Solutions GmbH, Dr. Stefan Eckert
Data quality: Technological representativeness: Good; Time representativeness: Good; Geographical representativeness: Good; Completeness: Not evaluated / unknown; Precision: Good; Methodological appropriateness and consistency: Not evaluated / unknown; Overall quality: Good
Amounts: no units in this file; such an amount is in the reference unit of its flow, which a separate flow dataset defines
copyright: true
licenseType: Free of charge for some user types or use types
accessRestrictions: Datasets can only be used in accordance with the terms and conditions of this EULA exclusively until 31st December 2024 (PERMITTED USE).

## General comment
- emission values for Euro 4 - 6 (no relevant vehicle numbers complying with Euro 0-3 present in vehicle fleet for reference year), shares of technologies are adjustable
- fleet composition (share of different technologies) based on HBEFA 4.1. 2021 (base year)
- source emissions/driving share/fleet composition: HBEFA 4.1, status September 2019
- input parameter: distance [km], payload [t], utilisation [-], driving share motorway/rural/urban, share of emission standards
- Parameter “switch_part_NE”, allow the possibility of including non-exhaust PM emissions (0= no non-exhaust PM, 1 = non-exhaust PM included).
- Source of non-exhaust PM emissions: HBEFA 4.1. Remark: “Please note that the differentiation by traffic situation is uncertain and that the output emission factors are only valid for Central Europe (DE, AT, CH, FR) but not for Northern Europe (NO, SE). Treat any results with caution”

## Geography
The data set is representative for the mentioned region.

## Time period
annual average

## Technology and included processes
Truck as heavy or light duty vehicle for road transport. Variable parameters are: payload, utilisation ratio, distance and driving share urban/interurban/motorway. Inputs: CNG, road and vehicle (production). Outputs: cargo, cooling leakage emisions and combustion emissions (ammonia, carbon dioxide, carbon monoxide, methane, nitrogen monoxide, nitrogen dioxide, nitrous oxide, NMVOC, particulate PM 2.5). NMVOC emissions of the truck result from imperfect combustion and evaporation losses via diffusion through the tank. Truck production, end-of-life treatment of the truck and the fuel supply chain (emissions of exploration, refinery, transportation etc.) are not included in the data set.
For more information please refer to: https://scn.spherasolutions.com/client/downloads.aspx?product=GaBi&productID=47

## Technical purpose
Provision of a standard transport service according to the applied technology.

## Model description
The open parameters in this processes enable the user to adjust the model to their individual circumstances. The description of the parameters is given alongside the parameters in the comments section.

For mathematical model details concerning the implementation of the CCF formula see:
http://www.gabi-software.com/fileadmin/GaBi_Databases/PEF_CFF_model_description.pdf

## Parameters
- Cool_Leakage_dr: 5.04414e-8; = (Cool_Leakage_ra / km_year) * distance / (payload * utilisation * 1000)
  [kg] Calculated leakage rate per km driven per year
- Cool_Leakage_ra: 0.76
  [kg/year] Coolant leakage
- distance: 100
  [km] distance start - end, default = 100 km
- E4sp_CH4_mw: 2.12678e-5; = (0.23347781598568 + (0.376042664051056 - 0.23347781598568) * utilisation) / (payload * 1000 * utilisation)
  [gCH4/(kg*km)] CH4 emission motorway, Euro 4
- E4sp_CH4_ru: 2.15033e-5; = (0.221297413110733 + (0.38964718580246 - 0.221297413110733) * utilisation) / (payload * 1000 * utilisation)
  [gCH4/(kg*km)] CH4 emission rural, Euro 4
- E4sp_CH4_tot: 0.00220523; = ((share_mw * E4sp_CH4_mw) + (share_ru * E4sp_CH4_ru) + (share_ur * E4sp_CH4_ur)) * distance
  [gCH4/kg] CH4 emission weighted, Euro 4
- E4sp_CH4_ur: 3.17006e-5; = (0.311672806739807 + (0.583739042282104 - 0.311672806739807) * utilisation) / (payload * 1000 * utilisation)
  [gCH4/(kg*km)] CH4 emission urban, Euro 4
- E4sp_CO_mw: 4.89953e-5; = (0.537869334220886 + (0.866299986839294 - 0.537869334220886) * utilisation) / (payload * 1000 * utilisation)
  [gCO/(kg*km)] CO emission motorway, Euro 4
- E4sp_CO_ru: 4.95378e-5; = (0.509809017181396 + (0.897641062736511 - 0.509809017181396) * utilisation) / (payload * 1000 * utilisation)
  [gCO/(kg*km)] CO emission rural, Euro 4
- E4sp_CO_tot: 0.00508025; = ((share_mw * E4sp_CO_mw) + (share_ru * E4sp_CO_ru) + (share_ur * E4sp_CO_ur)) * distance
  [gCO/kg] CO emission weighted, Euro 4
- E4sp_CO_ur: 7.30296e-5; = (0.718009293079376 + (1.34477591514587 - 0.718009293079376) * utilisation) / (payload * 1000 * utilisation)
  [gCO/(kg*km)] CO emission urban, Euro 4
- E4sp_CO2_bio: 0.337885; = E4sp_CO2_tot * share_CO2_bio
  [gCO2/kg] weighted CO2 emission, biogenic CO2 share of CO2 emission, Euro 4
- E4sp_CO2_fos: 6.41981; = E4sp_CO2_tot * (1 - share_CO2_bio)
  [gCO2/kg] weighted CO2 emission, fossil CO2 share of CO2 emission, Euro 4
- E4sp_CO2_mw: 0.0647646; = (660.127380371094 + 69.8 + (1063.21044921875 - 660.127380371094) * utilisation) / (payload * 1000 * utilisation)
  [gCO2/(kg*km)] CO2 emission motorway, Euro 4
- E4sp_CO2_ru: 0.0657889; = (625.688903808594 + 75.2 + (1101.67541503906 - 625.688903808594) * utilisation) / (payload * 1000 * utilisation)
  [gCO2/(kg*km)] CO2 emission rural, Euro 4
- E4sp_CO2_tot: 6.7577; = ((share_mw * E4sp_CO2_mw) + (share_ru * E4sp_CO2_ru) + (share_ur * E4sp_CO2_ur)) * distance
  [gCO2/kg] CO2 emission weighted, Euro 4
- E4sp_CO2_ur: 0.101576; = (881.213256835938 + 180.0 + (1650.44421386719 - 881.213256835938) * utilisation) / (payload * 1000 * utilisation)
  [gCO2/(kg*km)] CO2 emission urban, Euro 4
- E4sp_fuel_mw: 2.29541e-5; = (232.972396850586 + 26.1 + (375.228637695313 - 232.972396850586) * utilisation) / (payload * 1000 * utilisation) / 1000
  [kgfuel/(kg*km)] fuel consumption motorway, Euro 4
- E4sp_fuel_ru: 2.33218e-5; = (220.818344116211 + 28.1 + (388.803680419922 - 220.818344116211) * utilisation) / (payload * 1000 * utilisation) / 1000
  [kgfuel/(kg*km)] fuel consumption rural, Euro 4
- E4sp_fuel_tot: 0.00239583; = ((share_mw * E4sp_fuel_mw) + (share_ru * E4sp_fuel_ru) + (share_ur * E4sp_fuel_ur)) * distance
  [kgfuel/kg] fuel consumption weighted, Euro 4
- E4sp_fuel_ur: 3.60921e-5; = (310.998107910156 + 67.2 + (582.475402832031 - 310.998107910156) * utilisation) / (payload * 1000 * utilisation) / 1000
  [kgfuel/(kg*km)] fuel consumption urban, Euro 4
- E4sp_NMVOC_mw: 1.84938e-6; = (0.0203024186193943 + (0.0326993614435196 - 0.0203024186193943) * utilisation) / (payload * 1000 * utilisation)
  [gNMVOC/(kg*km)] NMVOC emission motorway (without benzene), Euro 4
- E4sp_NMVOC_ru: 1.86986e-6; = (0.0192432515323162 + (0.0338823609054089 - 0.0192432515323162) * utilisation) / (payload * 1000 * utilisation)
  [gNMVOC/(kg*km)] NMVOC emission rural (without benzene), Euro 4
- E4sp_NMVOC_tot: 0.000191759; = ((share_mw * E4sp_NMVOC_mw) + (share_ru * E4sp_NMVOC_ru) + (share_ur * E4sp_NMVOC_ur)) * distance
  [gNMVOC/kg] NMVOC emission weighted (without benzene), Euro 4
- E4sp_NMVOC_ur: 2.75658e-6; = (0.027101980522275 + (0.0507599115371704 - 0.027101980522275) * utilisation) / (payload * 1000 * utilisation)
  [gNMVOC/(kg*km)] NMVOC emission urban (without benzene), Euro 4
- E4sp_NO_mw: 6.68262e-5; = (0.733617067337036 + (1.18157395720482 - 0.733617067337036) * utilisation) / (payload * 1000 * utilisation)
  [gNO/(kg*km)] NO emission motorway, Euro 4
- E4sp_NO_ru: 6.75662e-5; = (0.695344671607018 + (1.2243210375309 - 0.695344671607018) * utilisation) / (payload * 1000 * utilisation)
  [gNO/(kg*km)] NO emission rural, Euro 4
- E4sp_NO_tot: 0.00692911; = ((share_mw * E4sp_NO_mw) + (share_ru * E4sp_NO_ru) + (share_ur * E4sp_NO_ur)) * distance
  [gNO/kg] NO emission weighted, Euro 4
- E4sp_NO_ur: 9.96074e-5; = (0.979315638542175 + (1.83418250083923 - 0.979315638542175) * utilisation) / (payload * 1000 * utilisation)
  [gNO/(kg*km)] NO emission urban, Euro 4
- E4sp_NO2_mw: 2.22754e-5; = (0.244539022445679 + (0.39385798573494 - 0.244539022445679) * utilisation) / (payload * 1000 * utilisation)
  [gNO2/(kg*km)] NO2 emissions motorway, Euro 4
- E4sp_NO2_ru: 2.25221e-5; = (0.231781557202339 + (0.4081070125103 - 0.231781557202339) * utilisation) / (payload * 1000 * utilisation)
  [gNO2/(kg*km)] NO2 emissions rural, Euro 4
- E4sp_NO2_tot: 0.0023097; = ((share_mw * E4sp_NO2_mw) + (share_ru * E4sp_NO2_ru) + (share_ur * E4sp_NO2_ur)) * distance
  [gNO2/kg] NO2 emissions weighted, Euro 4
- E4sp_NO2_ur: 3.32025e-5; = (0.326438546180725 + (0.611394166946411 - 0.326438546180725) * utilisation) / (payload * 1000 * utilisation)
  [gNO2/(kg*km)] NO2 emissions urban, Euro 4
- E4sp_part_mw: 3.82297e-7; = (0.00419684965163469 + (0.00675950525328517 - 0.00419684965163469) * utilisation) / (payload * 1000 * utilisation)
  [gparticle/(kg*km)] particle emission motorway, Euro 4
- E4sp_part_ru: 3.8653e-7; = (0.00397790223360062 + (0.00700405100360513 - 0.00397790223360062) * utilisation) / (payload * 1000 * utilisation)
  [gparticle/(kg*km)] particle emission rural, Euro 4
- E4sp_part_tot: 3.96398e-5; = ((share_mw * E4sp_Part_mw) + (share_ru * E4sp_Part_ru) + (share_ur * E4sp_Part_ur)) * distance
  [gparticle/kg] particle emission weighted, Euro 4
- E4sp_part_ur: 5.6983e-7; = (0.00560243334621191 + (0.010492923669517 - 0.00560243334621191) * utilisation) / (payload * 1000 * utilisation)
  [gparticle/(kg*km)] particle emission urban, Euro 4
- E4sp_SO2_mw: 4.45741e-6; = (0.0671597272157669 + (0.0671597272157669 - 0.0671597272157669) * utilisation) / (payload * 1000 * utilisation)
  [kgSO2/(kg*km)] SO2 emission motorway, Euro 4
- E5sp_CH4_mw: 2.12678e-5; = (0.23347781598568 + (0.376042664051056 - 0.23347781598568) * utilisation) / (payload * 1000 * utilisation)
  [gCH4/(kg*km)] CH4 emission motorway, Euro 5
- E5sp_CH4_ru: 2.15033e-5; = (0.221297413110733 + (0.38964718580246 - 0.221297413110733) * utilisation) / (payload * 1000 * utilisation)
  [gCH4/(kg*km)] CH4 emission rural, Euro 5
- E5sp_CH4_tot: 0.00220523; = ((share_mw * E5sp_CH4_mw) + (share_ru * E5sp_CH4_ru) + (share_ur * E5sp_CH4_ur)) * distance
  [gCH4/kg] CH4 emission weighted, Euro 5
- E5sp_CH4_ur: 3.17006e-5; = (0.311672806739807 + (0.583739042282104 - 0.311672806739807) * utilisation) / (payload * 1000 * utilisation)
  [gCH4/(kg*km)] CH4 emission urban, Euro 5
- E5sp_CO_mw: 4.89953e-5; = (0.537869334220886 + (0.866299986839294 - 0.537869334220886) * utilisation) / (payload * 1000 * utilisation)
  [gCO/(kg*km)] CO emission motorway, Euro 5
- E5sp_CO_ru: 4.95378e-5; = (0.509809017181396 + (0.897641062736511 - 0.509809017181396) * utilisation) / (payload * 1000 * utilisation)
  [gCO/(kg*km)] CO emission rural, Euro 5
- E5sp_CO_tot: 0.00508025; = ((share_mw * E5sp_CO_mw) + (share_ru * E5sp_CO_ru) + (share_ur * E5sp_CO_ur)) * distance
  [gCO/kg] CO emission weighted, Euro 5
- E5sp_CO_ur: 7.30296e-5; = (0.718009293079376 + (1.34477591514587 - 0.718009293079376) * utilisation) / (payload * 1000 * utilisation)
  [gCO/(kg*km)] CO emission urban, Euro 5
- E5sp_CO2_bio: 0.337885; = E5sp_CO2_tot * share_CO2_bio
  [gCO2/kg] weighted CO2 emission, biogenic CO2 share of CO2 emission, Euro 5
- E5sp_CO2_fos: 6.41981; = E5sp_CO2_tot * (1 - share_CO2_bio)
  [gCO2/kg] weighted CO2 emission, fossil CO2 share of CO2 emission, Euro 5
- E5sp_CO2_mw: 0.0647646; = (660.127380371094 + 69.8 + (1063.21044921875 - 660.127380371094) * utilisation) / (payload * 1000 * utilisation)
  [gCO2/(kg*km)] CO2 emission motorway, Euro 5
- E5sp_CO2_ru: 0.0657889; = (625.688903808594 + 75.2 + (1101.67541503906 - 625.688903808594) * utilisation) / (payload * 1000 * utilisation)
  [gCO2/(kg*km)] CO2 emission rural, Euro 5
- E5sp_CO2_tot: 6.7577; = ((share_mw * E5sp_CO2_mw) + (share_ru * E5sp_CO2_ru) + (share_ur * E5sp_CO2_ur)) * distance
  [gCO2/kg] CO2 emission weighted, Euro 5
- E5sp_CO2_ur: 0.101576; = (881.213256835938 + 180.0 + (1650.44421386719 - 881.213256835938) * utilisation) / (payload * 1000 * utilisation)
  [gCO2/(kg*km)] CO2 emission urban, Euro 5
- E5sp_fuel_mw: 2.29541e-5; = (232.972396850586 + 26.1 + (375.228637695313 - 232.972396850586) * utilisation) / (payload * 1000 * utilisation) / 1000
  [kgfuel/(kg*km)] fuel consumption motorway, Euro 5
- E5sp_fuel_ru: 2.33218e-5; = (220.818344116211 + 28.1 + (388.803680419922 - 220.818344116211) * utilisation) / (payload * 1000 * utilisation) / 1000
  [kgfuel/(kg*km)] fuel consumption rural, Euro 5
- E5sp_fuel_tot: 0.00239583; = ((share_mw * E5sp_fuel_mw) + (share_ru * E5sp_fuel_ru) + (share_ur * E5sp_fuel_ur)) * distance
  [kgfuel/kg] fuel consumption weighted, Euro 5
- E5sp_fuel_ur: 3.60921e-5; = (310.998107910156 + 67.2 + (582.475402832031 - 310.998107910156) * utilisation) / (payload * 1000 * utilisation) / 1000
  [kgfuel/(kg*km)] fuel consumption urban, Euro 5
- E5sp_NMVOC_mw: 1.84938e-6; = (0.0203024186193943 + (0.0326993614435196 - 0.0203024186193943) * utilisation) / (payload * 1000 * utilisation)
  [gNMVOC/(kg*km)] NMVOC emission motorway (without benzene), Euro 5
- E5sp_NMVOC_ru: 1.86986e-6; = (0.0192432515323162 + (0.0338823609054089 - 0.0192432515323162) * utilisation) / (payload * 1000 * utilisation)
  [gNMVOC/(kg*km)] NMVOC emission rural (without benzene), Euro 5
- E5sp_NMVOC_tot: 0.000191759; = ((share_mw * E5sp_NMVOC_mw) + (share_ru * E5sp_NMVOC_ru) + (share_ur * E5sp_NMVOC_ur)) * distance
  [gNMVOC/kg] NMVOC emission weighted (without benzene), Euro 5
- E5sp_NMVOC_ur: 2.75658e-6; = (0.027101980522275 + (0.0507599115371704 - 0.027101980522275) * utilisation) / (payload * 1000 * utilisation)
  [gNMVOC/(kg*km)] NMVOC emission urban (without benzene), Euro 5
- E5sp_NO_mw: 6.68262e-5; = (0.733617067337036 + (1.18157395720482 - 0.733617067337036) * utilisation) / (payload * 1000 * utilisation)
  [gNO/(kg*km)] NO emission motorway, Euro 5
- E5sp_NO_ru: 6.75662e-5; = (0.695344671607018 + (1.2243210375309 - 0.695344671607018) * utilisation) / (payload * 1000 * utilisation)
  [gNO/(kg*km)] NO emission rural, Euro 5
- E5sp_NO_tot: 0.00692911; = ((share_mw * E5sp_NO_mw) + (share_ru * E5sp_NO_ru) + (share_ur * E5sp_NO_ur)) * distance
  [gNO/kg] NO emission weighted, Euro 5
- E5sp_NO_ur: 9.96074e-5; = (0.979315638542175 + (1.83418250083923 - 0.979315638542175) * utilisation) / (payload * 1000 * utilisation)
  [gNO/(kg*km)] NO emission urban, Euro 5
- E5sp_NO2_mw: 2.22754e-5; = (0.244539022445679 + (0.39385798573494 - 0.244539022445679) * utilisation) / (payload * 1000 * utilisation)
  [gNO2/(kg*km)] NO2 emissions motorway, Euro 5
- E5sp_NO2_ru: 2.25221e-5; = (0.231781557202339 + (0.4081070125103 - 0.231781557202339) * utilisation) / (payload * 1000 * utilisation)
  [gNO2/(kg*km)] NO2 emissions rural, Euro 5
- E5sp_NO2_tot: 0.0023097; = ((share_mw * E5sp_NO2_mw) + (share_ru * E5sp_NO2_ru) + (share_ur * E5sp_NO2_ur)) * distance
  [gNO2/kg] NO2 emissions weighted, Euro 5
- E5sp_NO2_ur: 3.32025e-5; = (0.326438546180725 + (0.611394166946411 - 0.326438546180725) * utilisation) / (payload * 1000 * utilisation)
  [gNO2/(kg*km)] NO2 emissions urban, Euro 5
- E5sp_part_mw: 3.82297e-7; = (0.00419684965163469 + (0.00675950525328517 - 0.00419684965163469) * utilisation) / (payload * 1000 * utilisation)
  [gparticle/(kg*km)] particle emission motorway, Euro 5
- E5sp_part_ru: 3.8653e-7; = (0.00397790223360062 + (0.00700405100360513 - 0.00397790223360062) * utilisation) / (payload * 1000 * utilisation)
  [gparticle/(kg*km)] particle emission rural, Euro 5
- E5sp_part_tot: 3.96398e-5; = ((share_mw * E5sp_Part_mw) + (share_ru * E5sp_Part_ru) + (share_ur * E5sp_Part_ur)) * distance
  [gparticle/kg] particle emission weighted, Euro 5
- E5sp_part_ur: 5.6983e-7; = (0.00560243334621191 + (0.010492923669517 - 0.00560243334621191) * utilisation) / (payload * 1000 * utilisation)
  [gparticle/(kg*km)] particle emission urban, Euro 5
- E6sp_benzene_mw: 0; = (0 + (0 - 0) * utilisation) / (payload * 1000 * utilisation)
  [gbenzene/(kg*km)] benzene emission motorway, Euro 6
- E6sp_benzene_ru: 0; = (0 + (0 - 0) * utilisation) / (payload * 1000 * utilisation)
  [gbenzene/(kg*km)] benzene emission rural, Euro 6
- E6sp_benzene_to: 0; = ((share_mw * E6sp_benzene_mw) + (share_ru * E6sp_benzene_ru) + (share_ur * E6sp_benzene_ur)) * distance
  [gbenzene/kg] benzene emission weighted, Euro 6
- E6sp_benzene_ur: 0; = (0 + (0 - 0) * utilisation) / (payload * 1000 * utilisation)
  [gbenzene/(kg*km)] benzene emission urban, Euro 6
- E6sp_CH4_mw: 1.02534e-5; = (0.112280569970608 + (0.181472450494766 - 0.112280569970608) * utilisation) / (payload * 1000 * utilisation)
  [gCH4/(kg*km)] CH4 emission motorway, Euro 6
- E6sp_CH4_ru: 1.03699e-5; = (0.106755487620831 + (0.187883481383324 - 0.106755487620831) * utilisation) / (payload * 1000 * utilisation)
  [gCH4/(kg*km)] CH4 emission rural, Euro 6
- E6sp_CH4_tot: 0.00106198; = ((share_mw * E6sp_CH4_mw) + (share_ru * E6sp_CH4_ru) + (share_ur * E6sp_CH4_ur)) * distance
  [gCH4/kg] CH4 emission weighted, Euro 6
- E6sp_CH4_ur: 1.51054e-5; = (0.146013617515564 + (0.279751062393188 - 0.146013617515564) * utilisation) / (payload * 1000 * utilisation)
  [gCH4/(kg*km)] CH4 emission urban, Euro 6
- E6sp_CO_mw: 4.20606e-5; = (0.460588395595551 + (0.744421780109406 - 0.460588395595551) * utilisation) / (payload * 1000 * utilisation)
  [gCO/(kg*km)] CO emission motorway, Euro 6
- E6sp_CO_ru: 4.25387e-5; = (0.437923818826675 + (0.770720601081848 - 0.437923818826675) * utilisation) / (payload * 1000 * utilisation)
  [gCO/(kg*km)] CO emission rural, Euro 6
- E6sp_CO_tot: 0.00435638; = ((share_mw * E6sp_CO_mw) + (share_ru * E6sp_CO_ru) + (share_ur * E6sp_CO_ur)) * distance
  [gCO/kg] CO emission weighted, Euro 6
- E6sp_CO_ur: 6.19643e-5; = (0.598965406417847 + (1.14757251739502 - 0.598965406417847) * utilisation) / (payload * 1000 * utilisation)
  [gCO/(kg*km)] CO emission urban, Euro 6
- E6sp_CO2_bio: 0.33273; = E6sp_CO2_tot * share_CO2_bio
  [gCO2/kg] weighted CO2 emission, biogenic CO2 share of CO2 emission, Euro 6
- E6sp_CO2_fos: 6.32186; = E6sp_CO2_tot * (1 - share_CO2_bio)
  [gCO2/kg] weighted CO2 emission, fossil CO2 share of CO2 emission, Euro 6
- E6sp_CO2_mw: 0.0638314; = (648.406555175781 + 69.6 + (1047.98107910156 - 648.406555175781) * utilisation) / (payload * 1000 * utilisation)
  [gCO2/(kg*km)] CO2 emission motorway, Euro 6
- E6sp_CO2_ru: 0.064876; = (616.499816894531 + 75.2 + (1085.00402832031 - 616.499816894531) * utilisation) / (payload * 1000 * utilisation)
  [gCO2/(kg*km)] CO2 emission rural, Euro 6
- E6sp_CO2_tot: 6.65459; = ((share_mw * E6sp_CO2_mw) + (share_ru * E6sp_CO2_ru) + (share_ur * E6sp_CO2_ur)) * distance
  [gCO2/kg] CO2 emission weighted, Euro 6
- E6sp_CO2_ur: 0.0991786; = (843.210754394531 + 180.0 + (1615.52819824219 - 843.210754394531) * utilisation) / (payload * 1000 * utilisation)
  [gCO2/(kg*km)] CO2 emission urban, Euro 6
- E6sp_fuel_mw: 2.26294e-5; = (228.835876464844 + 26.1 + (369.853881835938 - 228.835876464844) * utilisation) / (payload * 1000 * utilisation) / 1000
  [kgfuel/(kg*km)] fuel consumption motorway, Euro 6
- E6sp_fuel_ru: 2.29996e-5; = (217.575347900391 + 28.1 + (382.920013427734 - 217.575347900391) * utilisation) / (payload * 1000 * utilisation) / 1000
  [kgfuel/(kg*km)] fuel consumption rural, Euro 6
- E6sp_fuel_tot: 0.00235977; = ((share_mw * E6sp_fuel_mw) + (share_ru * E6sp_fuel_ru) + (share_ur * E6sp_fuel_ur)) * distance
  [kgfuel/kg] fuel consumption weighted, Euro 6
- E6sp_fuel_ur: 3.5246e-5; = (297.586242675781 + 67.2 + (570.152770996094 - 297.586242675781) * utilisation) / (payload * 1000 * utilisation) / 1000
  [kgfuel/(kg*km)] fuel consumption urban, Euro 6
- E6sp_NMVOC_mw: 8.91598e-7; = (0.00976352766156197 + (0.0157802123576403 - 0.00976352766156197) * utilisation) / (payload * 1000 * utilisation)
  [gNMVOC/(kg*km)] NMVOC emission motorway (without benzene), Euro 6
- E6sp_NMVOC_ru: 9.01732e-7; = (0.0092830853536725 + (0.0163376927375793 - 0.0092830853536725) * utilisation) / (payload * 1000 * utilisation)
  [gNMVOC/(kg*km)] NMVOC emission rural (without benzene), Euro 6
- E6sp_NMVOC_tot: 9.23463e-5; = ((share_mw * E6sp_NMVOC_mw) + (share_ru * E6sp_NMVOC_ru) + (share_ur * E6sp_NMVOC_ur)) * distance
  [gNMVOC/kg] NMVOC emission weighted (without benzene), Euro 6
- E6sp_NMVOC_ur: 1.31352e-6; = (0.0126968361437321 + (0.024326179176569 - 0.0126968361437321) * utilisation) / (payload * 1000 * utilisation)
  [gNMVOC/(kg*km)] NMVOC emission urban (without benzene), Euro 6
- E6sp_NO_mw: 2.0941e-5; = (0.22931633144617 + (0.370630413293839 - 0.22931633144617) * utilisation) / (payload * 1000 * utilisation)
  [gNO/(kg*km)] NO emission motorway, Euro 6
- E6sp_NO_ru: 2.1179e-5; = (0.218032166361808 + (0.383723974227905 - 0.218032166361808) * utilisation) / (payload * 1000 * utilisation)
  [gNO/(kg*km)] NO emission rural, Euro 6
- E6sp_NO_tot: 0.00216894; = ((share_mw * E6sp_NO_mw) + (share_ru * E6sp_NO_ru) + (share_ur * E6sp_NO_ur)) * distance
  [gNO/kg] NO emission weighted, Euro 6
- E6sp_NO_ur: 3.08506e-5; = (0.298211060464382 + (0.571349859237671 - 0.298211060464382) * utilisation) / (payload * 1000 * utilisation)
  [gNO/(kg*km)] NO emission urban, Euro 6
- E6sp_NO2_mw: 6.98033e-6; = (0.0764387771487236 + (0.123543471097946 - 0.0764387771487236) * utilisation) / (payload * 1000 * utilisation)
  [gNO2/(kg*km)] NO2 emissions motorway, Euro 6
- E6sp_NO2_ru: 7.05967e-6; = (0.0726773887872696 + (0.127907991409302 - 0.0726773887872696) * utilisation) / (payload * 1000 * utilisation)
  [gNO2/(kg*km)] NO2 emissions rural, Euro 6
- E6sp_NO2_tot: 0.00072298; = ((share_mw * E6sp_NO2_mw) + (share_ru * E6sp_NO2_ru) + (share_ur * E6sp_NO2_ur)) * distance
  [gNO2/kg] NO2 emissions weighted, Euro 6
- E6sp_NO2_ur: 1.02835e-5; = (0.0994036868214607 + (0.190449953079224 - 0.0994036868214607) * utilisation) / (payload * 1000 * utilisation)
  [gNO2/(kg*km)] NO2 emissions urban, Euro 6
- E6sp_part_mw: 3.76448e-7; = (0.00412233266979456 + (0.006662683095783 - 0.00412233266979456) * utilisation) / (payload * 1000 * utilisation)
  [gparticle/(kg*km)] particle emission motorway, Euro 6
- E6sp_part_ru: 3.80727e-7; = (0.00391948176547885 + (0.00689806090667844 - 0.00391948176547885) * utilisation) / (payload * 1000 * utilisation)
  [gparticle/(kg*km)] particle emission rural, Euro 6
- E6sp_part_tot: 3.89902e-5; = ((share_mw * E6sp_Part_mw) + (share_ru * E6sp_Part_ru) + (share_ur * E6sp_Part_ur)) * distance
  [gparticle/kg] particle emission weighted, Euro 6
- E6sp_part_ur: 5.54589e-7; = (0.00536082731559873 + (0.0102709401398897 - 0.00536082731559873) * utilisation) / (payload * 1000 * utilisation)
  [gparticle/(kg*km)] particle emission urban, Euro 6
- km_year: 100000; = service_life / lifetime_truck
  [km/year] Calculated km per year
- Lifetime_truck: 10
  [Years] Assumed lifetime of truck (assumed 10 years)
- lorry: 6.63702e-9; = distance / (service_life * tonnage * 1000)
  [pcs] pieces of lorry allocated to the transport
- payload: 24.7
  [t] default = 24,7t
- service_life: 1e6
  [km] total service life of the lorry, default 1.000.000 km, used for allocation of capital goods
- share_check: 1; = share_mw + share_ru + share_ur
  Check - value must be 1
- share_check_E: 1; = share_E4 + share_E5 + share_E6
  Check - value must be 1
- share_CO2_bio: 0.05
  [-] share of biogenic C in fuel
- share_E4: 0.02
  [-] share of Euro 4 vehicle kilometers, default = 0,02
- share_E5: 0.14
  [-] share of Euro 5 vehicle kilometers, default = 0,14
- share_E6: 0.84
  [-] share of Euro 6 vehicle kilometers, default = 0,84
- share_mw: 0.7
  [-] driving share motorway , default = 0,70
- share_ru: 0.23
  [-] driving share rural , default = 0,23
- share_ur: 0.07
  [-] driving share urban , default = 0,07
- spec_CH4_tot: 0.0012449; = E4sp_CH4_tot * share_E4 + E5sp_CH4_tot * share_E5 + E6sp_CH4_tot * share_E6
  [gCH4/kg] CH4 emission weighted; Mix
- spec_CO_tot: 0.0044722; = E4sp_CO_tot * share_E4 + E5sp_CO_tot * share_E5 + E6sp_CO_tot * share_E6
  [gCO/kg] CO emission weighted; Mix
- spec_CO2_bio: 0.333555; = E4sp_CO2_bio * share_E4 + E5sp_CO2_bio * share_E5 + E6sp_CO2_bio * share_E6
  [gCO2/kg] biogenic CO2-emissions per kg
- spec_CO2_fos: 6.33754; = E4sp_CO2_fos * share_E4 + E5sp_CO2_fos * share_E5 + E6sp_CO2_fos * share_E6
  [gCO2/kg] fossil CO2-Emission per kg
- spec_CO2_tot: 6.67109; = E4sp_CO2_tot * share_E4 + E5sp_CO2_tot * share_E5 + E6sp_CO2_tot * share_E6
  [gCO2/kg] CO2 Emissions weighted; Mix
- spec_fuel_tot: 0.00236554; = E4sp_fuel_tot * share_E4 + E5sp_fuel_tot * share_E5 + E6sp_fuel_tot * share_E6
  [kgfuel/kg] fuel consumption; Mix
- spec_NMVOC_tot: 0.000108252; = E4sp_NMVOC_tot * share_E4 + E5sp_NMVOC_tot * share_E5 + E6sp_NMVOC_tot * share_E6
  [gNMVOC/kg] NMVOC Emissions (Without Xylene, Toluene and Benzene); Mix
- spec_NO_tot: 0.00293057; = E4sp_NO_tot * share_E4 + E5sp_NO_tot * share_E5 + E6sp_NO_tot * share_E6
  [gNO/kg] NO Emissions weighted; Mix
- spec_NO2_tot: 0.000976856; = E4sp_NO2_tot * share_E4 + E5sp_NO2_tot * share_E5 + E6sp_NO2_tot * share_E6
  [gNO2/kg] NO2 Emissions weighted; Mix
- spec_part_tot: 3.90942e-5; = E4sp_part_tot * share_E4 + E5sp_part_tot * share_E5 + E6sp_part_tot * share_E6
  [gParticulate matter/kg] Particulate emissions weighted; Mix
- street: 6.06774e-7; = (spec_fuel_tot/53800000000)*(690000/50)*1000
  [m] meters of average street allocated to the transport (default service life of the street = 50a)
- tonnage: 15.067; = utilisation * payload
  [t]
- utilisation: 0.61
  [-] utilisation by mass, default = 0.61

## Reference product
- Transport: 100; calculated

## Inputs
- Truck (tractor & trailer): 6.63702e-9; = lorry
- Road (average): 6.06774e-7; = street
- Natural gas: 0.00236554; = spec_fuel_tot; calculated

## Outputs
All rows: calculated
- methane (fossil) [Emissions to air, unspecified]: 1.2449e-6; = 0.001 * spec_CH4_tot
- carbon dioxide (biogenic) [Emissions to air, unspecified]: 0.000333555; = 0.001 * spec_CO2_bio
- particles (PM2.5) [Emissions to air, unspecified]: 3.90942e-8; = 0.001 * spec_part_tot
- nitrogen monoxide [Emissions to air, unspecified]: 2.93057e-6; = 0.001 * spec_NO_tot
- HFC-125 [Emissions to air, unspecified]: 2.21942e-8; = 0.44 * Cool_Leakage_dr
- nitrogen dioxide [Emissions to air, unspecified]: 9.76856e-7; = 0.001 * spec_NO2_tot
- 1,1,1-trifluoroethane [Emissions to air, unspecified]: 2.62295e-8; = 0.52 * Cool_Leakage_dr
- non-methane volatile organic compounds [Emissions to air, unspecified]: 1.08252e-7; = 0.001 * spec_NMVOC_tot
- carbon monoxide [Emissions to air, unspecified]: 4.4722e-6; = 0.001 * spec_CO_tot
- carbon dioxide (fossil) [Emissions to air, unspecified]: 0.00633754; = 0.001 * spec_CO2_fos
- HFC-134a [Emissions to air, unspecified]: 2.01765e-9; = 0.04 * Cool_Leakage_dr

## Impact indicators
- Acidification: 4.0481e-6
- Climate change: 0.00661312
- Ecotoxicity, freshwater: 1.43992e-6
- Eutrophication marine: 2.12662e-6
- Eutrophication, terrestrial: 2.33039e-5
- Human toxicity, cancer: 2.36631e-17
- Human toxicity, non-cancer: 6.72002e-14
- EF-particulate Matter: 1.55757e-11
- Photochemical ozone formation - human health: 4.23218e-6
- Climate change-Fossil: 0.00661992
- Ecotoxicity, freshwater_inorganics: 1.02114e-7
- Ecotoxicity, freshwater_organics: 1.33781e-6
- Human toxicity, cancer_organics: 2.36631e-17
- Human toxicity, non-cancer_inorganics: 4.82774e-12
- Human toxicity, non-cancer_organics: 6.72002e-14
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
## Modelling constants
Direct land use change: GHG emissions from direct LUC allocated to good/service for 20 years after the LUC occurs.
Carbon storage and delayed emissions: credits associated with temporary (carbon) storage or delayed emissions are not considered in the calculation of the EF for the default impact categories.
Emissions off-setting: not included
Fossil and biogenic carbon emissions and removals: removals and emissions are modelled as follows: All GHG emissions from fossil fuels (including peat and limestone) are modelled consistently with the ILCD list of elementary flows. In the case that the emissions refer to the molecules CO2 and CH4, they are modelled as ‘carbon dioxide (fossil)’ and ‘methane (fossil)’. Biogenic uptake and emissions are modelled separately. For land use change, all carbon emissions and uptakes are inventoried separately for each of the elementary flows. Soil carbon accumulation (uptake) via improved agricultural management is excluded from the model.

## Cut-off and completeness
A cut-off rule based on mass or energy flow or the level of environmental significance of max. 3% is applied and confirmed by the reviewer. An active cut-off within the system has not been applied, no data gaps are known and all elementary flows of environmental effect are included in the inventory.

Capital goods (including infrastructures) and their end of life are included unless the exclusion is clearly documented and conform with the cut-off principles.

System boundaries include all known processes linked to the product supply chain.

## Data selection and combination
LCI modeling is fully consistent.
Energy and transport datasets from the PEF energy and transports tender are consistently used.

## Data treatment and extrapolations
For details please see the document "GaBi Databases Modelling Principles"

## Use advice
Notice: this data set supersedes the EF3.0-compliant version (see link under "preceding data set version" below calculated with the EF3.0). The life cycle inventory is not changed from the original EF3.0 data set. The LCIA results are calculated based on the EF3.1 methods which provide updated characterisation factors in the following impact categories: Climate Change, Ecotoxicity freshwater, Photochemical Ozone Formation, Acidification, Human Toxicity non-cancer, and Human Toxicity cancer. The review report and the data quality ratings refer to the original results. The data set has been updated by the European Commission on the basis of the original EF3.0 data set delivered by the data provider.

Life Cycle Inventory (LCI) datasets to be used for implementing regular Product Environmental Footprint (PEF) studies and Organisation Environmental Footprint (OEF) studies exclusively under the specified Product groups and sectors as defined in the Product Environmental Footprint Category Rules (PEFCR) and Organisation Environmental Footprint Sectorial Rules (OEFSR) listed in https://ec.europa.eu/environment/eussd/smgp/ef_transition.htm
The datasets are specifically designed for these methodological requirements (see above) and the related LCIA methods (listed below) recommended in EF.

## Review details
The dataset is compliant to "Zampori L., Pant R.: Suggestions for updating the Product Environmental Footprint (PEF) method, 2019 and Fazio S., Zampori L., De Schryver A. et al.: Guide for EF compliant data sets, Version 2.0, 2020.
In the PEF context the fields "Methodological appropriateness and consistency" and "completeness" are not evaluated by the review since their good quality is defined as mandatory.

## Other review details
Good overall quality (2,0) interpreted into "very good quality" in the PEF quality validation scheme. The quality indicator for completeness was not requested to be quantified as a single DQI for all tenders. If a value “Not evaluated / unknown” completeness is given, this indicates that a single DQI was not explicitly requested but the completeness is still to be understood as very good.
The Data Quality Indicator Results are conservative expert judgements, confirmed or - if necessary - corrected by the reviewers, based on their methodological as well as process understanding and considering semi-quantitatively the contribution of the DQIs of the used EF energy and transport datasets and of EF-related DQIs provided and reviewed within the GaBi databases. The overall DQIs of the datasets take into account primarily the quality and representativeness of the foreground technology information and that of the key upstream processes. If datasets are e.g. energy and transport intensive - or gain credits from energy recovery - the DQIs of the used EF energy and transport datasets influence the overall DQI significantly and have stronger been taken into account, via expert judgement. Analogous applies for other key background datasets. For the DQIs of the mentioned GaBi secondary datasets, similar DQIs had already been assigned to those datasets and were considered by the reviewers via expert judgement when assigning of the overall DQIs. In case of doubt, lower (i.e. lower quality) DQIs were assigned.

## Data sources
- Handbook Emission Factors for Road Transport HBEFA, Version 4.1, 2019

## Intended applications
Life Cycle Inventory (LCI) datasets to be used in Product Environmental Footprint Category Rules (PEFCRs) and Organisation Environmental Footprint Sectoral Rules (OEFSRs) developed in the context of the Environmental Footprint transition phase launched by the Commission in 2018.
