# timber granulate, virgin, elementary; transportation and sieving; production mix, at plant; virgin material, measured as dry mass

Dataset: ILCD process, Unit process, single operation
Geography: CA
Reference year: 2018
Valid until: 2024
Classification: Other Services / Other services
LCI method principle: Attributional
LCI method approaches: Allocation - market value
Completeness: All relevant flows quantified
Project: Provision of process-based 3.0 Environmental Footprint-compliant life cycle inventory datasets - Renewable materials - contract number 070201/2020/840085/SER/ENV.B.1
Generated by: ACV Brasil
Owner: ecoinvent
Compliance: Environmental Footprint non-primary supporting data set; Environmental Footprint 3.1
Amounts: no units in this file; such an amount is in the reference unit of its flow, which a separate flow dataset defines
copyright: true
licenseType: Free of charge for some user types or use types
accessRestrictions: Free of charge for all final users implementing a regular Product Environmental Footprint (PEF) studies and Organisation Environmental Footprint (OEF) studies exclusively under the specified Product groups and sectors as defined in the Product Environmental Footprint Category Rules (PEFCR) and Organisation Environmental Footprint Sectorial Rules (OEFSR) listed in http://ec.europa.eu/environment/eussd/smgp/PEFCR_OEFSR.htm and in accordance with the terms and conditions of the EULA (available at https://ecoinvent.lca-data.com/) exclusively until 31st December 2024. Any use of this dataset or any derivative data not within the specific context of one of the PEF/OEF projects or after the end of 2024 is not permitted.

## General comment
Notice: this data set supersedes the EF3.0-compliant version (see link under "preceding data set version" below calculated with the EF3.0). The life cycle inventory is not changed from the original EF3.0 data set. The LCIA results are calculated based on the EF3.1 methods which provide updated characterisation factors in the following impact categories: Climate Change, Ecotoxicity freshwater, Photochemical Ozone Formation, Acidification, Human Toxicity non-cancer, and Human Toxicity cancer. The review report and the data quality ratings refer to the original results. The data set has been updated by the European Commission on the basis of the original EF3.0 data set delivered by the data provider.This sub-process has limited documentation only. For all detailed documentation of the full model to which this data set belongs (such as DQRs, review reports and other technical documentation), please see this process: timber granulate, virgin - CA []

## Technology and included processes
Sawdust is produced as a by-product of wood sawing. The sawdust is stored and transported within the plant through pneumatic mechanisms. Finally, the material is sieved.
This dataset is modelled according to the activity ‘sawing, softwood – CH’, valid from 2011 to 2013, published in the ecoinvent database 3.7.1. The dataset is updated with electricity and fuel requirements retrieved from CORRIM (2020). The unit process dataset (UPR) was subsequently allocated among the co-products ‘sawnwood, softwood, raw’, ‘bark’, ‘sawdust’ and ‘slab and siding’. All flows were allocated according to revenue prices, apart the input of Roundwood, which was allocated according to the volume of the co-products. Furthermore, the electricity requirements for pneumatic transportation and sieving are estimated from a cork granulate plant (Martins, 2018).
The activity starts with materials entering the process. Energy consumption, infrastructure and the treatment of waste are included.
References:
CORRIM – Consortium for Research on Renewable Industrial Materials (2020). Life cycle assessment for the production of southeastern softwood lumber. Available at: https://corrim.org/wp-content/uploads/2020/06/CORIRM-AWC-SE-Lumber.pdf
ecoinvent database version 3.7.1 – System model Undefined. Activity name: sawing, softwood. Geography: Switzerland. Time period: 2011-01-01 to 2013-12-31. Available at: https://v371.ecoquery.ecoinvent.org/Details/UPR/8BEDEF0E-564F-400F-8C46-D3E34945BACC/8B738EA0-F89E-4627-8679-433616064E82
Martins, D.F.M. (2018). Contributos para a conceção de uma unidade fabril de granulado de cortiça. Master thesis. Faculdade de Ciências e Tecnologia. Universidade Nova de Lisboa. Available at: core.ac.uk/download/pdf/303762413.pdf. Accessed on: 25/05/2021.
Plosplan® (2021). Residual wood. Upcycling. Available at: https://plospan.com/residual-wood/. Accessed on: 30/06/2021.

## Reference product
- timber granulate, virgin // timber granulate, virgin // ca, elementary: 1

## Impact indicators
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
## Deviations from the LCI method principle
The background data uses:
- the \xe2\x80\x9cRecycled content cut-off\xe2\x80\x9d approach to allocate end-of-life by-products and secondary materials. This allocation is explained in the description of the recycled content system model (http://www.ecoinvent.org/database/system-models-in-ecoinvent-3/cut-off-system-model/allocation-cut-off-by-classification.html).
OR
- EF compliant data

## Deviations from the LCI method approaches
The sawing activity has been allocated among the co-products ‘sawnwood, softwood, raw’, ‘bark’, ‘sawdust’ and ‘slab and siding’. All flows were allocated according to revenue, apart from the input of Roundwood, which has been allocated according to the volume of the co-products.
Background data:
- the \xe2\x80\x9cRecycled content cut-off\xe2\x80\x9d approach to allocate end-of-life by-products and secondary materials. This allocation is explained in the description of the recycled content system model (http://www.ecoinvent.org/database/system-models-in-ecoinvent-3/cut-off-system-model/allocation-cut-off-by-classification.html). The ecoinvent database mostly relies on “Allocation – market values” apart for few exceptions particularly in the energy sector. ecoinvent energy data is replaced with EF3.0 core data as per the EF guidelines version 2.0.
OR
- EF compliant data

## Modelling constants
All modelling constants follow the requirements listed in the Tender Specifications 070201/2020/SER/ENV.B1. Completeness: There are no intentional cut-offs in the inventory no matter how small their contribution to all the EF impact categories is. Eventual cut-offs are in compliance with the Guide for EF compliant data sets (JRC 2020), i.e. only if below the 3% cut-off rule. Water use: water use is modelled at country level using separate flows for water withdrawal, water release and water evaporation. Handling multi-functional processes: the following PEF multi- functionality decision hierarchy is applied for resolving all multi- functionality problems: (1) subdivision or system expansion; (2) allocation based on a relevant underlying physical relationship (substitution may apply here); (3) allocation based on some other relationship. Direct land use change: GHG emissions from direct LUC allocated to good/service for 20 years after the LUC occurs, with IPCC default values. Carbon storage and delayed emissions: credits associated with temporary (carbon) storage or delayed emissions up to 300 years are not be considered. Emissions off-setting: are not included. Capital goods (including infrastructures) and their End of life: they are included. System boundaries: system boundaries include all processes linked to the product supply chain (e.g. maintenance). Time period: emissions and removals are modelled as if released or removed at the beginning of the assessment method. Fossil and biogenic carbon emissions and removals: removals and emissions are modelled as follows: All GHG emissions from fossil fuels (including peat and limestone) are modelled consistently with the most updated ILCD list of elementary flows. The non-fossil (biogenic) carbon flows are modelled consistently with the most updated ILCD list of elementary flows.

## Cut-off and completeness
There are no intentional cut-offs in the inventory no matter how small their contribution to all the EF impact categories is. Eventual cut-offs are in compliance with the Guide for EF compliant data sets (JRC 2020), i.e. only if below the 3% cut-off rule. The dataset dry mass and water balance has been checked to ensure the inventory is complete. Capital goods (e.g. infrastructure) and their end-of-life are included.

## Data selection and combination
These datasets include, in both their foreground and background data, links to EF3.0 compliant data.
The relevant background data on energy, transport, and End of Life are from the LCDN data node (http://lcdn.thinkstep.com/Node/).
All other background data in the supply of this product for which no EF3.0 process was available are from ecoinvent v3.7 database (www.ecoinvent.org) or other data sources.

## Data treatment and extrapolations
Several data sources have been used to model the inventory.

## Use advice
This data set is a supporting sub-data set and must be used exclusively as sub-data set of its corresponding level-1 partly disaggregated data set (see “General comment” field for exact name and UUID).

## Data sources
- Background Data for Representative products and organisations. EF 3.0 compliant (data stock)
- CORRIM – Consortium for Research on Renewable Industrial Materials (2020). Life cycle assessment for the production of southeastern softwood lumber. Available at: https://corrim.org/wp-content/uploads/2020/06/CORIRM-AWC-SE-Lumber.pdf
- ecoinvent database version 3.7.1 – System model Undefined. Activity name: sawing, softwood. Geography: Switzerland. Time period: 2011-01-01 to 2013-12-31. Available at: https://v371.ecoquery.ecoinvent.org/Details/UPR/8BEDEF0E-564F-400F-8C46-D3E34945BACC/8B738EA0-F89E-4627-8679-433616064E88
- Martins, D.F.M. (2018). Contributos para a conceção de uma unidade fabril de granulado de cortiça. Master thesis. Faculdade de Ciências e Tecnologia. Universidade Nova de Lisboa. Available at: core.ac.uk/download/pdf/303762413.pdf. Accessed on: 25/05/2021.
- Plosplan® (2021). Residual wood. Upcycling. Available at: https://plospan.com/residual-wood/. Accessed on: 30/06/2021.

## Intended applications
Implementation of regular Product Environmental Footprint (PEF) studies and Organisation Environmental Footprint (OEF) studies exclusively under the specified Product groups and sectors as defined in the Product Environmental Footprint Category Rules (PEFCR) and Organisation Environmental Footprint Sectorial Rules (OEFSR) listed in http://ec.europa.eu/environment/eussd/smgp/PEFCR_OEFSR.htm
