# combing; technology mix; production mix, at plant; service (raw materials excluded)

Dataset: ILCD process, Partly terminated system
Geography: GLO
Reference year: 2021
Valid until: 2024
Classification: Systems / Textiles, furnitures and other interiors
LCI method principle: Attributional
LCI method approaches: Allocation - market value
Completeness: All relevant flows quantified
Project: Provision of process-based 3.0 Environmental Footprint-compliant life cycle inventory datasets - Apparel 1 - contract number 070201/2020/840291/SER/ENV.B.1
Generated by: Life Cycle Indonesia
Owner: PRé Sustainability B.V.
Compliance: ILCD Data Network - Entry-level; Suggestions for updating the PEF method 2019; ISO 14040 Environmental Management – Life Cycle Assessment – Principles and Framework, 2006; ISO 14044:2006. Environmental Management – Life Cycle Assessment – Requirements and guidelines.; Environmental Footprint 3.1
Review: Dependent internal review by Avraam Symeonidis, Emilia Moreno Ruiz; Independent review panel by Fábio Valebona
Data quality: Overall quality: Very good; Time representativeness: Very good; Geographical representativeness: Good; Technological representativeness: Very good; Precision: Good; Methodological appropriateness and consistency: Not applicable
Amounts: no units in this file; such an amount is in the reference unit of its flow, which a separate flow dataset defines
copyright: true
licenseType: Free of charge for some user types or use types
accessRestrictions: Free of charge for all final users implementing a regular Product Environmental Footprint (PEF) studies and Organisation Environmental Footprint (OEF) studies exclusively under the specified Product groups and sectors as defined in the Product Environmental Footprint Category Rules (PEFCR) and Organisation Environmental Footprint Sectorial Rules (OEFSR) listed in http://ec.europa.eu/environment/eussd/smgp/PEFCR_OEFSR.htm and in accordance with the terms and conditions of the EULA (available at https://ecoinvent.lca-data.com/) exclusively until 31st December 2024. Any use of this dataset or any derivative data not within the specific context of one of the PEF/OEF projects or after the end of 2024 is not permitted.

## General comment
Notice: this data set supersedes the EF3.0-compliant version (see link under "preceding data set version" below calculated with the EF3.0). The life cycle inventory is not changed from the original EF3.0 data set. The LCIA results are calculated based on the EF3.1 methods which provide updated characterisation factors in the following impact categories: Climate Change, Ecotoxicity freshwater, Photochemical Ozone Formation, Acidification, Human Toxicity non-cancer, and Human Toxicity cancer. The review report and the data quality ratings refer to the original results. The data set has been updated by the European Commission on the basis of the original EF3.0 data set delivered by the data provider.Combing is one of the process in yarn preparation. It is an intermittent operation carried out between carding and draw frame. The combing process is carried out in order to improve the quality of the sliver coming out of the card. It aims to remove short fibers from the group of fibers. Combed sliver has a better luster compared with carded sliver because of the improved fiber lignment. The feed material for the combing machine is in the form of lap, so lap preparation process is before the combing process. The combing process is normally used to produce smoother, finer, stronger, and more uniform yarns.

Kumar, R. Senthil. 2015. Process Management in Spinning. Boca Raton: Taylor & Francis Group, LLC., pp 113

## Technology and included processes
The combing process is especially of value with longer cottons where the extreme varia_x0002_tion in fiber length is too high for the best spinning conditions. During combing, a series of fine and closely spaced needles (Unicomb) are passed through the fibers pro_x0002_jecting from gripped nippers. By means of this operation, shorter fibers, neps, and dirt (noil) are removed and the fibers are oriented. Depending upon the yarn quality requirements, the noil% in the combing process is set, ranging from 12% to 25%.

The input raw materials are not included in the model. Energy uses and infrastructure are included. There is no direct emission to soil and air since the emission comes from electricity usage. There is no input of any lubrication / grease oil since the amount is very small, hence ignored. The noil resulted from this process can be sold as by-product to beuaty industry as raw materials for cotton buds and cotton pads, hence not regarded as waste.

In the model, the finishng process is not included in the scope of this dataset and enegy sources of machines used solely from electricity.

economic allocation of Comber Noil which are assigned 6% of the impacts.

Kumar, R. Senthil. 2015. Process Management in Spinning. Boca Raton: Taylor & Francis Group, LLC., pp 113
Sunita Dasman (2021) Expert Interview, Indonesia.
Zhengzhou (2021) Company Catalog and Messages, Zhengzhou Hongshi Machinery Co.,Ltd, China.

## Reference product
- combing // combing // glo: 1

## Inputs
- Electricity from Electricity grid mix 1kV-60kV - AU: 0.00104151
- Electricity from Electricity grid mix 1kV-60kV - EU+EFTA+UK: 0.0162013
- Electricity from Electricity grid mix 1kV-60kV - NZ: 0.000231448
- Electricity from Electricity grid mix 1kV-60kV - RAF: 0.00358744
- Electricity from Electricity grid mix 1kV-60kV - RNA: 0.0237234
- Electricity from Electricity grid mix 1kV-60kV - RSA: 0.00798495
- Electricity from Electricity grid mix 1kV-60kV - RU: 0.00474468
- Electricity from Electricity grid mix 1kV-60kV - CN: 0.0242421
- Electricity from Electricity grid mix 1kV-60kV - RAS w/o CN: 0.0265606
- combing // combing // glo, blackbox: 1
- combing // combing // glo, elementary: 1

## Impact indicators
- Eutrophication marine: 1.81958e-5
- Ecotoxicity, freshwater: 0.0931164
- Land use: 0.0278763
- Water use: 0.00677472
- Resource use, minerals and metals: 1.65832e-8
- Resource use, fossils: 0.276814
- Climate change: 0.0209429
- Ozone depletion: 3.5689e-12
- Human toxicity, cancer: 1.36748e-11
- Human toxicity, non-cancer: 1.23314e-10
- EF-particulate Matter: 4.98195e-9
- Ionising radiation, human health: 0.00150522
- Photochemical ozone formation - human health: 5.58134e-5
- Acidification: 0.00013333
- Eutrophication, terrestrial: 0.000198206
- Eutrophication, freshwater: 6.61989e-8

## Deviations from the LCI method principle
The background data uses:
- the \xe2\x80\x9cRecycled content cut-off\xe2\x80\x9d approach to allocate end-of-life by-products and secondary materials. This allocation is explained in the description of the recycled content system model (http://www.ecoinvent.org/database/system-models-in-ecoinvent-3/cut-off-system-model/allocation-cut-off-by-classification.html).
OR
- EF compliant data

## Deviations from the LCI method approaches
economic allocation of Comber Noil which are assigned 6% of the impacts.

Background data:
- the \xe2\x80\x9cRecycled content cut-off\xe2\x80\x9d approach to allocate end-of-life by-products and secondary materials. This allocation is explained in the description of the recycled content system model (http://www.ecoinvent.org/database/system-models-in-ecoinvent-3/cut-off-system-model/allocation-cut-off-by-classification.html). The ecoinvent database mostly relies on “Allocation – market values” apart for few exceptions particularly in the energy sector. ecoinvent energy data is replaced with EF3.0 core data as per the EF guidelines version 2.0.
OR
- EF compliant data

## Modelling constants
All modelling constants follow the requirements listed in the Tender Specifications 070201/2020/SER/ENV.B1. Completeness: There are no intentional cut-offs in the inventory no matter how small their contribution to all the EF impact categories is. Eventual cut-offs are in compliance with the Guide for EF compliant data sets (JRC 2020), i.e. only if below the 3% cut-off rule. Water use: water use is modelled at country level using separate flows for water withdrawal, water release and water evaporation. Handling multi-functional processes: the following PEF multi- functionality decision hierarchy is applied for resolving all multi- functionality problems: (1) subdivision or system expansion; (2) allocation based on a relevant underlying physical relationship (substitution may apply here); (3) allocation based on some other relationship. Direct land use change: GHG emissions from direct LUC allocated to good/service for 20 years after the LUC occurs, with IPCC default values. Carbon storage and delayed emissions: credits associated with temporary (carbon) storage or delayed emissions up to 300 years are not be considered. Emissions off-setting: are not included. Capital goods (including infrastructures) and their End of life: they are included. System boundaries: system boundaries include all processes linked to the product supply chain (e.g. maintenance). Time period: emissions and removals are modelled as if released or removed at the beginning of the assessment method. Fossil and biogenic carbon emissions and removals: removals and emissions are modelled as follows: All GHG emissions from fossil fuels (including peat and limestone) are modelled consistently with the most updated ILCD list of elementary flows. The non-fossil (biogenic) carbon flows are modelled consistently with the most updated ILCD list of elementary flows.

## Cut-off and completeness
There are no intentional cut-offs in the inventory no matter how small their contribution to all the EF impact categories is. Eventual cut-offs are in compliance with the Guide for EF compliant data sets (JRC 2020), i.e. only if below the 3% cut-off rule. The dataset dry mass and water balance has been checked to ensure the inventory is complete. Capital goods (e.g. infrastructure) and their end-of-life are included.

## Data selection and combination
These datasets include, in both their foreground and background data, links to EF3.0 compliant data.
The relevant background data on energy, transport, and End of Life are from the LCDN data node (http://lcdn.thinkstep.com/Node/).
All other background data in the supply of this product for which no EF3.0 process was available are from ecoinvent v3.7 database (www.ecoinvent.org) or other data sources.

## Data treatment and extrapolations
Several data sources have been used to model the inventory.

## Review details
Internal reviews have been asked to review the plausibility of the unit process, LCIA scores, and DQRs. Internal reviewers have also been asked to review the data for EF compliancy. The consortium is therefore responsible for aspects such as compliancy with the ILCD format, including validation in Look@LCI, and nomenclature.
Internal reviwers have been asked to judge based on the process name, that the unit process models in a complete and representative way the process in the requested location. The review encompassed the plausability of:
- exchanges with nature (elementary flows) as well as exchanges such as product and waste flows.
- meta information (general comment, technology comment, system boundaries, allocation, cut-off rules, etc.). Reviewers were asked to judge if the provided information is enough to understand the content of the process.
- LCIA scores
- DQRs including precision, technology, time and geography. As well as the overall DQR.
External reviewers have been asked to provide their expertise in the field of interest. External reviewers have been asked to review the unit process, including eventual methodological choices, the LCIA scores (provided with contribution scores as well), and DQRs. External reviewers have been provided all the information in a tool developed by the consortium for the purpose of this project.
External reviewers have been asked to judge based on the process name, that the unit process models in a complete and representative way the process in the requested location. The review encompassed:
- Plausability and completeness of exchanges with nature (elementary flows) as well as exchanges such as product and waste flows.
- Review of meta information (general comment, technology comment, system boundaries, allocation, cut-off rules, etc.). Reviewers were asked to judge if the provided information is enough to understand the content of the process.
- Review of properties (biogenic carbon and water content).
- Review of allocation keys.
- Plausability of LCIA scores calculated by the consortium.
- Plausability of DQRs including precision, technology, time and geography. As well as the overall DQR.

## Data sources
- Background Data for Representative products and organisations. EF 3.0 compliant (data stock)
- Zhengzhou (2021) Company Catalog and Messages, Zhengzhou Hongshi Machinery Co.,Ltd, China.
- R. Senthil Kumar (2015). Process Management in Spinning. Taylor & Francis Group, LLC., Boca Raton, Florida
- KVR INTEXX (2021) Cotton Compact Combed Yarns For Weaving, http://www.fabricsfromindia.com/, KVR INTEXX, India.
- Thanh Vin Company (2021) Cotton Waste Cotton Comber Noil, http://www.thanhvin.com/, Thanh Vin Company Limited, Vietnam.

## Intended applications
Implementation of regular Product Environmental Footprint (PEF) studies and Organisation Environmental Footprint (OEF) studies exclusively under the specified Product groups and sectors as defined in the Product Environmental Footprint Category Rules (PEFCR) and Organisation Environmental Footprint Sectorial Rules (OEFSR) listed in http://ec.europa.eu/environment/eussd/smgp/PEFCR_OEFSR.htm
