# bonding, mechanical, stitch bonding, non- woven fabric; technology mix; production mix, at plant; service (raw materials excluded)

Dataset: ILCD process, Partly terminated system
Geography: GLO
Reference year: 2021
Valid until: 2024
Classification: Systems / Textiles, furnitures and other interiors
LCI method principle: Attributional
LCI method approaches: Allocation - market value
Completeness: All relevant flows quantified
Project: Provision of process-based 3.0 Environmental Footprint-compliant life cycle inventory datasets - Apparel 1 - contract number 070201/2020/840291/SER/ENV.B.1
Generated by: Life Cycle Indonesia
Owner: PRé Sustainability B.V.
Compliance: ILCD Data Network - Entry-level; Suggestions for updating the PEF method 2019; ISO 14040 Environmental Management – Life Cycle Assessment – Principles and Framework, 2006; ISO 14044:2006. Environmental Management – Life Cycle Assessment – Requirements and guidelines.; Environmental Footprint 3.1
Review: Dependent internal review by Avraam Symeonidis, Emilia Moreno Ruiz; Independent review panel by Fábio Valebona
Data quality: Overall quality: Good; Time representativeness: Very good; Geographical representativeness: Good; Technological representativeness: Good; Precision: Good; Methodological appropriateness and consistency: Not applicable
Amounts: no units in this file; such an amount is in the reference unit of its flow, which a separate flow dataset defines
copyright: true
licenseType: Free of charge for some user types or use types
accessRestrictions: Free of charge for all final users implementing a regular Product Environmental Footprint (PEF) studies and Organisation Environmental Footprint (OEF) studies exclusively under the specified Product groups and sectors as defined in the Product Environmental Footprint Category Rules (PEFCR) and Organisation Environmental Footprint Sectorial Rules (OEFSR) listed in http://ec.europa.eu/environment/eussd/smgp/PEFCR_OEFSR.htm and in accordance with the terms and conditions of the EULA (available at https://ecoinvent.lca-data.com/) exclusively until 31st December 2024. Any use of this dataset or any derivative data not within the specific context of one of the PEF/OEF projects or after the end of 2024 is not permitted.

## General comment
Notice: this data set supersedes the EF3.0-compliant version (see link under "preceding data set version" below calculated with the EF3.0). The life cycle inventory is not changed from the original EF3.0 data set. The LCIA results are calculated based on the EF3.1 methods which provide updated characterisation factors in the following impact categories: Climate Change, Ecotoxicity freshwater, Photochemical Ozone Formation, Acidification, Human Toxicity non-cancer, and Human Toxicity cancer. The review report and the data quality ratings refer to the original results. The data set has been updated by the European Commission on the basis of the original EF3.0 data set delivered by the data provider.Non-woven fabric can be produced from mechanical stitch bonding process. Several commons type of stitch bonding process are Malimo and Maliwatt. Nylon and polyester fiber yarns are one the favored materials for the stitching part (Karthik, et al., 2016). The structure of the stitch bonded fabric is determined by the warp-knitting action operated by the machine, by the properties and dimensions of the fibres, by web structure and density, by the structure of the sewing thread, by the sewing density, by the machine gauge (needle number per inch), by the tension of the sewing yarn and by the stitch length. Both holes of the stitches and the pile formed on the fabric surface affect fabric properties (Tanchis, 2008). Stitch bonded fabric usually used for furniture/furnishings, automotive, shoes, and insulations. (Karthik, et al., 2016).

In Maliwatt process, polyester filament is mainly used as the stitching yarn, but other polymers are also utilised depending on the end product. The main applications of Maliwatt fabrics are soft furnishings, upholstery fabrics for mattresses and camping chairs, blankets, transportation cloth, cleaning cloths, secondary carpet backing, lining fabrics, interlining for shoes and apparel, adhesive tapes; (e.g., those used for harnessing electric cables in automobiles), velcro-type fasteners, fabrics for hygiene and sanitary purposes, laminating and sub-upholstery fabrics, insulating materials, coating substrate, geotextiles, filter fabrics, composites and flame-retardant fabrics. The fabric structure is influenced by the use of one or two guide bars, and by changing the stitch set-up of the guide bars (Russell, 2007).

Several materials are compatible with Malimo process for instance fibreglass, aramid, carbon, high-tenacity polyester, polyamide, polyethylene and polypropylene. Malimo fabrics can be used as composites for high-tech areas, sandwich nonwovens, geotextiles, insulating material, packing textiles, also as furnishing fabrics, upholstery fabrics, textile wall coverings, cleaning and polishing cloths. Different versions and auxiliary devices of Malimo process have been developed to enable complex fabric structures to be produced (Russell, 2007).

Khartik, T., et al. 2016. Non-woven - Process, Structure, Properties and Applications. New Delhi: Woodhead Publishing India. pp 29-132
Mao, N. and Russell, S.J. 2015. Fibre to Fabric: Nonwoven Fabrics. United Kingdom: University of Leeds
Russel, S.J. 2007. Handbook of Nonwovens. England: Woodhead Publishing Limited. Pp 203 - 212
Tanchis, Giovanni. 2008. The Nonwovens: Reference books of textiles technologies. Italia: Fondazione ACIMIT. Pp 197

## Technology and included processes
In Stitch bonding maliwatt process, The horizontal compound needle and closing wire system, which operates in conjunction with the knock-over sinker and the supporting rail, penetrates through the substrate which is normally a cross-laid web. The sheet of stitching yarn, which is inserted via the guides into the open hooks of the compound needles, forms stitches that penetrate the web. By adjusting the compound needle and closing wire system, it is possible to incorporate fibres from the web into the stitches at the same time, thereby preventing the stitches from running from the end knitted last (Russell, 2007).

Stitch bonding malimo process start with compound needles piercing the yarn layers (warp and weft yarns), webs, backing fabrics, films, paper or any other sheet material that may be inserted. The guides place the stitching yarns into the open hooks of the compound needles. The previously formed stitches slide up the compound needle shanks and closing wires. The needles start to withdraw to their knock-over position, the hooks of the compound needles with the new stitching yarn overlaps are now closed by the closing wires so
that the old stitches can slide off over the top of the needles. The old stitches are knocked over and the new loops are drawn through them to complete the new course (Russell, 2007).

Nowadays, both Maliwatt and Malimo process can be produced using the same machines and commonly found in the market.

The model represents the process of bonding, hence the input raw materials are not included in the model. The user will use this dataset along with the input raw materials. Energy uses, infrastructure, and yarn consumption are included. There is no direct emission to soil, water or air. In the model, the finishing process is not included in the scope of this dataset and energy sources of machine used solely from electricity.

Russel, S.J. 2007. Handbook of Nonwovens. England: Woodhead Publishing Limited. Pp 203 – 212

## Parameters
- kg_0: 1.63404e-7
  Mass in kg, for lubricating oil // lubricants at refinery // cn; Articulated lorry transport, Euro 4, Total weight >32 t; EU+EFTA+UK
- km_0: 1000
  Distance in km, for lubricating oil // lubricants at refinery // cn; Articulated lorry transport, Euro 4, Total weight >32 t; EU+EFTA+UK
- kg_km_0: 0.000163404; = kg_0*km_0
  Transport amount in km*km, for lubricating oil // lubricants at refinery // cn; Articulated lorry transport, Euro 4, Total weight >32 t; EU+EFTA+UK
- kg_1: 5.24224e-7
  Mass in kg, for lubricating oil // lubricants at refinery // eu+efta+uk; Articulated lorry transport, Euro 4, Total weight >32 t; EU+EFTA+UK
- km_1: 999.572
  Distance in km, for lubricating oil // lubricants at refinery // eu+efta+uk; Articulated lorry transport, Euro 4, Total weight >32 t; EU+EFTA+UK
- kg_km_1: 0.000524; = kg_1*km_1
  Transport amount in km*km, for lubricating oil // lubricants at refinery // eu+efta+uk; Articulated lorry transport, Euro 4, Total weight >32 t; EU+EFTA+UK
- kg_2: 3.9273e-8
  Mass in kg, for lubricating oil // lubricants at refinery // raf; Articulated lorry transport, Euro 4, Total weight >32 t; EU+EFTA+UK
- km_2: 1000
  Distance in km, for lubricating oil // lubricants at refinery // raf; Articulated lorry transport, Euro 4, Total weight >32 t; EU+EFTA+UK
- kg_km_2: 3.9273e-5; = kg_2*km_2
  Transport amount in km*km, for lubricating oil // lubricants at refinery // raf; Articulated lorry transport, Euro 4, Total weight >32 t; EU+EFTA+UK
- kg_3: 1.02916e-6
  Mass in kg, for lubricating oil // lubricants at refinery // ras w/o cn; Articulated lorry transport, Euro 4, Total weight >32 t; EU+EFTA+UK
- km_3: 1000
  Distance in km, for lubricating oil // lubricants at refinery // ras w/o cn; Articulated lorry transport, Euro 4, Total weight >32 t; EU+EFTA+UK
- kg_km_3: 0.00102916; = kg_3*km_3
  Transport amount in km*km, for lubricating oil // lubricants at refinery // ras w/o cn; Articulated lorry transport, Euro 4, Total weight >32 t; EU+EFTA+UK
- kg_4: 8.03343e-7
  Mass in kg, for lubricating oil // lubricants at refinery // rna; Articulated lorry transport, Euro 4, Total weight >32 t; EU+EFTA+UK
- km_4: 1000
  Distance in km, for lubricating oil // lubricants at refinery // rna; Articulated lorry transport, Euro 4, Total weight >32 t; EU+EFTA+UK
- kg_km_4: 0.000803343; = kg_4*km_4
  Transport amount in km*km, for lubricating oil // lubricants at refinery // rna; Articulated lorry transport, Euro 4, Total weight >32 t; EU+EFTA+UK
- kg_5: 9.57279e-8
  Mass in kg, for lubricating oil // lubricants at refinery // rsa; Articulated lorry transport, Euro 4, Total weight >32 t; EU+EFTA+UK
- km_5: 1000
  Distance in km, for lubricating oil // lubricants at refinery // rsa; Articulated lorry transport, Euro 4, Total weight >32 t; EU+EFTA+UK
- kg_km_5: 9.57279e-5; = kg_5*km_5
  Transport amount in km*km, for lubricating oil // lubricants at refinery // rsa; Articulated lorry transport, Euro 4, Total weight >32 t; EU+EFTA+UK
- kg_6: 8.51032e-7
  Mass in kg, for lubricating oil // lubricants at refinery // ru; Articulated lorry transport, Euro 4, Total weight >32 t; EU+EFTA+UK
- km_6: 1000
  Distance in km, for lubricating oil // lubricants at refinery // ru; Articulated lorry transport, Euro 4, Total weight >32 t; EU+EFTA+UK
- kg_km_6: 0.000851032; = kg_6*km_6
  Transport amount in km*km, for lubricating oil // lubricants at refinery // ru; Articulated lorry transport, Euro 4, Total weight >32 t; EU+EFTA+UK
- kg_7: 0.05
  Mass in kg, for thread // thread // glo; Articulated lorry transport, Euro 4, Total weight >32 t; EU+EFTA+UK
- km_7: 1000
  Distance in km, for thread // thread // glo; Articulated lorry transport, Euro 4, Total weight >32 t; EU+EFTA+UK
- kg_km_7: 50; = kg_7*km_7
  Transport amount in km*km, for thread // thread // glo; Articulated lorry transport, Euro 4, Total weight >32 t; EU+EFTA+UK
- kg_8: 1.63404e-7
  Mass in kg, for lubricating oil // lubricants at refinery // cn; Transoceanic ship, containers; GLO
- km_8: 18000
  Distance in km, for lubricating oil // lubricants at refinery // cn; Transoceanic ship, containers; GLO
- kg_km_8: 0.00294127; = kg_8*km_8
  Transport amount in km*km, for lubricating oil // lubricants at refinery // cn; Transoceanic ship, containers; GLO
- kg_9: 3.9273e-8
  Mass in kg, for lubricating oil // lubricants at refinery // raf; Transoceanic ship, containers; GLO
- km_9: 18000
  Distance in km, for lubricating oil // lubricants at refinery // raf; Transoceanic ship, containers; GLO
- kg_km_9: 0.000706914; = kg_9*km_9
  Transport amount in km*km, for lubricating oil // lubricants at refinery // raf; Transoceanic ship, containers; GLO
- kg_10: 5.24224e-7
  Mass in kg, for lubricating oil // lubricants at refinery // eu+efta+uk; Transoceanic ship, containers; GLO
- km_10: 18007.6
  Distance in km, for lubricating oil // lubricants at refinery // eu+efta+uk; Transoceanic ship, containers; GLO
- kg_km_10: 0.00944; = kg_10*km_10
  Transport amount in km*km, for lubricating oil // lubricants at refinery // eu+efta+uk; Transoceanic ship, containers; GLO
- kg_11: 0.05
  Mass in kg, for thread // thread // glo; Transoceanic ship, containers; GLO
- km_11: 18000
  Distance in km, for thread // thread // glo; Transoceanic ship, containers; GLO
- kg_km_11: 900; = kg_11*km_11
  Transport amount in km*km, for thread // thread // glo; Transoceanic ship, containers; GLO
- kg_12: 1.02916e-6
  Mass in kg, for lubricating oil // lubricants at refinery // ras w/o cn; Transoceanic ship, containers; GLO
- km_12: 18000
  Distance in km, for lubricating oil // lubricants at refinery // ras w/o cn; Transoceanic ship, containers; GLO
- kg_km_12: 0.0185249; = kg_12*km_12
  Transport amount in km*km, for lubricating oil // lubricants at refinery // ras w/o cn; Transoceanic ship, containers; GLO
- kg_13: 8.03343e-7
  Mass in kg, for lubricating oil // lubricants at refinery // rna; Transoceanic ship, containers; GLO
- km_13: 18000
  Distance in km, for lubricating oil // lubricants at refinery // rna; Transoceanic ship, containers; GLO
- kg_km_13: 0.0144602; = kg_13*km_13
  Transport amount in km*km, for lubricating oil // lubricants at refinery // rna; Transoceanic ship, containers; GLO
- kg_14: 9.57279e-8
  Mass in kg, for lubricating oil // lubricants at refinery // rsa; Transoceanic ship, containers; GLO
- km_14: 18000
  Distance in km, for lubricating oil // lubricants at refinery // rsa; Transoceanic ship, containers; GLO
- kg_km_14: 0.0017231; = kg_14*km_14
  Transport amount in km*km, for lubricating oil // lubricants at refinery // rsa; Transoceanic ship, containers; GLO
- kg_15: 8.51032e-7
  Mass in kg, for lubricating oil // lubricants at refinery // ru; Transoceanic ship, containers; GLO
- km_15: 18000
  Distance in km, for lubricating oil // lubricants at refinery // ru; Transoceanic ship, containers; GLO
- kg_km_15: 0.0153186; = kg_15*km_15
  Transport amount in km*km, for lubricating oil // lubricants at refinery // ru; Transoceanic ship, containers; GLO

## Reference product
- non-woven fabric // bonding, mechanical, stitch bonding, non- woven fabric // glo: 1

## Inputs
- Transport of lubricating oil // lubricants at refinery // cn by Articulated lorry transport, Euro 4, Total weight >32 t - EU+EFTA+UK: 0.000163404; = kg_km_0
- Transport of lubricating oil // lubricants at refinery // eu+efta+uk by Articulated lorry transport, Euro 4, Total weight >32 t - EU+EFTA+UK: 0.000524; = kg_km_1
- Transport of lubricating oil // lubricants at refinery // raf by Articulated lorry transport, Euro 4, Total weight >32 t - EU+EFTA+UK: 3.9273e-5; = kg_km_2
- Transport of lubricating oil // lubricants at refinery // ras w/o cn by Articulated lorry transport, Euro 4, Total weight >32 t - EU+EFTA+UK: 0.00102916; = kg_km_3
- Transport of lubricating oil // lubricants at refinery // rna by Articulated lorry transport, Euro 4, Total weight >32 t - EU+EFTA+UK: 0.000803343; = kg_km_4
- Transport of lubricating oil // lubricants at refinery // rsa by Articulated lorry transport, Euro 4, Total weight >32 t - EU+EFTA+UK: 9.57279e-5; = kg_km_5
- Transport of lubricating oil // lubricants at refinery // ru by Articulated lorry transport, Euro 4, Total weight >32 t - EU+EFTA+UK: 0.000851032; = kg_km_6
- Transport of thread // thread // glo by Articulated lorry transport, Euro 4, Total weight >32 t - EU+EFTA+UK: 50; = kg_km_7
- Transport of lubricating oil // lubricants at refinery // cn by Transoceanic ship, containers - GLO: 0.00294127; = kg_km_8
- Transport of lubricating oil // lubricants at refinery // raf by Transoceanic ship, containers - GLO: 0.000706914; = kg_km_9
- Transport of lubricating oil // lubricants at refinery // eu+efta+uk by Transoceanic ship, containers - GLO: 0.00944; = kg_km_10
- Transport of thread // thread // glo by Transoceanic ship, containers - GLO: 900; = kg_km_11
- Transport of lubricating oil // lubricants at refinery // ras w/o cn by Transoceanic ship, containers - GLO: 0.0185249; = kg_km_12
- Transport of lubricating oil // lubricants at refinery // rna by Transoceanic ship, containers - GLO: 0.0144602; = kg_km_13
- Transport of lubricating oil // lubricants at refinery // rsa by Transoceanic ship, containers - GLO: 0.0017231; = kg_km_14
- Transport of lubricating oil // lubricants at refinery // ru by Transoceanic ship, containers - GLO: 0.0153186; = kg_km_15
- Electricity from Electricity grid mix 1kV-60kV - AU: 0.0007
- Electricity from Electricity grid mix 1kV-60kV - EU+EFTA+UK: 0.0101
- Electricity from Electricity grid mix 1kV-60kV - NZ: 0.0001
- Electricity from Electricity grid mix 1kV-60kV - RAF: 0.0022
- Electricity from Electricity grid mix 1kV-60kV - RNA: 0.0148
- Electricity from Electricity grid mix 1kV-60kV - RSA: 0.005
- Electricity from Electricity grid mix 1kV-60kV - RU: 0.003
- Electricity from Electricity grid mix 1kV-60kV - CN: 0.0151267
- Electricity from Electricity grid mix 1kV-60kV - RAS w/o CN: 0.0165733
- non-woven fabric // bonding, mechanical, stitch bonding, non- woven fabric // glo, blackbox: 1
- non-woven fabric // bonding, mechanical, stitch bonding, non- woven fabric // glo, elementary: 1

## Impact indicators
- Eutrophication marine: 0.00160464
- Ecotoxicity, freshwater: 4.76921
- Land use: 13.5622
- Water use: 1.51856
- Resource use, minerals and metals: 9.21197e-6
- Resource use, fossils: 4.54523
- Climate change: 0.35602
- Ozone depletion: 3.2343e-9
- Human toxicity, cancer: 3.04131e-10
- Human toxicity, non-cancer: 6.31622e-9
- EF-particulate Matter: 7.50194e-8
- Ionising radiation, human health: 0.0112787
- Photochemical ozone formation - human health: 0.00173633
- Acidification: 0.00340706
- Eutrophication, terrestrial: 0.00960462
- Eutrophication, freshwater: 0.000101409

## Deviations from the LCI method principle
The background data uses:
- the \xe2\x80\x9cRecycled content cut-off\xe2\x80\x9d approach to allocate end-of-life by-products and secondary materials. This allocation is explained in the description of the recycled content system model (http://www.ecoinvent.org/database/system-models-in-ecoinvent-3/cut-off-system-model/allocation-cut-off-by-classification.html).
OR
- EF compliant data

## Deviations from the LCI method approaches
Background data:
- the \xe2\x80\x9cRecycled content cut-off\xe2\x80\x9d approach to allocate end-of-life by-products and secondary materials. This allocation is explained in the description of the recycled content system model (http://www.ecoinvent.org/database/system-models-in-ecoinvent-3/cut-off-system-model/allocation-cut-off-by-classification.html). The ecoinvent database mostly relies on “Allocation – market values” apart for few exceptions particularly in the energy sector. ecoinvent energy data is replaced with EF3.0 core data as per the EF guidelines version 2.0.
OR
- EF compliant data

## Modelling constants
All modelling constants follow the requirements listed in the Tender Specifications 070201/2020/SER/ENV.B1. Completeness: There are no intentional cut-offs in the inventory no matter how small their contribution to all the EF impact categories is. Eventual cut-offs are in compliance with the Guide for EF compliant data sets (JRC 2020), i.e. only if below the 3% cut-off rule. Water use: water use is modelled at country level using separate flows for water withdrawal, water release and water evaporation. Handling multi-functional processes: the following PEF multi- functionality decision hierarchy is applied for resolving all multi- functionality problems: (1) subdivision or system expansion; (2) allocation based on a relevant underlying physical relationship (substitution may apply here); (3) allocation based on some other relationship. Direct land use change: GHG emissions from direct LUC allocated to good/service for 20 years after the LUC occurs, with IPCC default values. Carbon storage and delayed emissions: credits associated with temporary (carbon) storage or delayed emissions up to 300 years are not be considered. Emissions off-setting: are not included. Capital goods (including infrastructures) and their End of life: they are included. System boundaries: system boundaries include all processes linked to the product supply chain (e.g. maintenance). Time period: emissions and removals are modelled as if released or removed at the beginning of the assessment method. Fossil and biogenic carbon emissions and removals: removals and emissions are modelled as follows: All GHG emissions from fossil fuels (including peat and limestone) are modelled consistently with the most updated ILCD list of elementary flows. The non-fossil (biogenic) carbon flows are modelled consistently with the most updated ILCD list of elementary flows.

## Cut-off and completeness
There are no intentional cut-offs in the inventory no matter how small their contribution to all the EF impact categories is. Eventual cut-offs are in compliance with the Guide for EF compliant data sets (JRC 2020), i.e. only if below the 3% cut-off rule. The dataset dry mass and water balance has been checked to ensure the inventory is complete. Capital goods (e.g. infrastructure) and their end-of-life are included.

## Data selection and combination
These datasets include, in both their foreground and background data, links to EF3.0 compliant data.
The relevant background data on energy, transport, and End of Life are from the LCDN data node (http://lcdn.thinkstep.com/Node/).
All other background data in the supply of this product for which no EF3.0 process was available are from ecoinvent v3.7 database (www.ecoinvent.org) or other data sources.

## Data treatment and extrapolations
Several data sources have been used to model the inventory.

## Review details
Internal reviews have been asked to review the plausibility of the unit process, LCIA scores, and DQRs. Internal reviewers have also been asked to review the data for EF compliancy. The consortium is therefore responsible for aspects such as compliancy with the ILCD format, including validation in Look@LCI, and nomenclature.
Internal reviwers have been asked to judge based on the process name, that the unit process models in a complete and representative way the process in the requested location. The review encompassed the plausability of:
- exchanges with nature (elementary flows) as well as exchanges such as product and waste flows.
- meta information (general comment, technology comment, system boundaries, allocation, cut-off rules, etc.). Reviewers were asked to judge if the provided information is enough to understand the content of the process.
- LCIA scores
- DQRs including precision, technology, time and geography. As well as the overall DQR.
External reviewers have been asked to provide their expertise in the field of interest. External reviewers have been asked to review the unit process, including eventual methodological choices, the LCIA scores (provided with contribution scores as well), and DQRs. External reviewers have been provided all the information in a tool developed by the consortium for the purpose of this project.
External reviewers have been asked to judge based on the process name, that the unit process models in a complete and representative way the process in the requested location. The review encompassed:
- Plausability and completeness of exchanges with nature (elementary flows) as well as exchanges such as product and waste flows.
- Review of meta information (general comment, technology comment, system boundaries, allocation, cut-off rules, etc.). Reviewers were asked to judge if the provided information is enough to understand the content of the process.
- Review of properties (biogenic carbon and water content).
- Review of allocation keys.
- Plausability of LCIA scores calculated by the consortium.
- Plausability of DQRs including precision, technology, time and geography. As well as the overall DQR.

## Data sources
- Background Data for Representative products and organisations. EF 3.0 compliant (data stock)
- UN Data (2018) Statistics Data for Lubricants Productions, http://data.un.org/Data.aspx?q=Lubricants&d=EDATA&f=cmID%3aLU, United Nations Statistics Division, Global.
- Cotex (2021) Stitch Bonding Machine, Catalog and Company Email, Suzhou Cotex International Co., Ltd., China.
- Tenowo GmbH (2015). Stitch-bonded carbon nonwovens, Allgemeiner Vliesstoff-Report, Germany.
- Martin Prins, Niall Finn and Errol Wood (2012) Woolwise: The Australian Wool Education Trust licensee for educational activities University of New England, https://www.woolwise.com/wp-content/uploads/2017/07/WOOL-482-582-12-T-10.pdf

## Intended applications
Implementation of regular Product Environmental Footprint (PEF) studies and Organisation Environmental Footprint (OEF) studies exclusively under the specified Product groups and sectors as defined in the Product Environmental Footprint Category Rules (PEFCR) and Organisation Environmental Footprint Sectorial Rules (OEFSR) listed in http://ec.europa.eu/environment/eussd/smgp/PEFCR_OEFSR.htm
