# bleached kraft pulp, softwood, elementary; technology mix; production mix, at plant; dry mass 0.9, carbon content, non-fossil 0.494

Dataset: ILCD process, Unit process, single operation
Geography: RNA
Reference year: 2020
Valid until: 2024
Classification: Other Services / Other services
LCI method principle: Attributional
LCI method approaches: Allocation - market value
Completeness: All relevant flows quantified
Project: Provision of process-based 3.0 Environmental Footprint-compliant life cycle inventory datasets - Renewable materials - contract number 070201/2020/840085/SER/ENV.B.1
Generated by: EPIS
Owner: EPIS
Compliance: Environmental Footprint non-primary supporting data set; Environmental Footprint 3.1
Amounts: no units in this file; such an amount is in the reference unit of its flow, which a separate flow dataset defines
copyright: true
licenseType: Free of charge for some user types or use types
accessRestrictions: Free of charge for all final users implementing a regular Product Environmental Footprint (PEF) studies and Organisation Environmental Footprint (OEF) studies exclusively under the specified Product groups and sectors as defined in the Product Environmental Footprint Category Rules (PEFCR) and Organisation Environmental Footprint Sectorial Rules (OEFSR) listed in http://ec.europa.eu/environment/eussd/smgp/PEFCR_OEFSR.htm and in accordance with the terms and conditions of the EULA (available at https://ecoinvent.lca-data.com/) exclusively until 31st December 2024. Any use of this dataset or any derivative data not within the specific context of one of the PEF/OEF projects or after the end of 2024 is not permitted.

## General comment
Notice: this data set supersedes the EF3.0-compliant version (see link under "preceding data set version" below calculated with the EF3.0). The life cycle inventory is not changed from the original EF3.0 data set. The LCIA results are calculated based on the EF3.1 methods which provide updated characterisation factors in the following impact categories: Climate Change, Ecotoxicity freshwater, Photochemical Ozone Formation, Acidification, Human Toxicity non-cancer, and Human Toxicity cancer. The review report and the data quality ratings refer to the original results. The data set has been updated by the European Commission on the basis of the original EF3.0 data set delivered by the data provider.This sub-process has limited documentation only. For all detailed documentation of the full model to which this data set belongs (such as DQRs, review reports and other technical documentation), please see this process: bleached kraft pulp, softwood - RNA []

## Technology and included processes
The pulp, or fibres from the wood are separated in a kraft cooking process in a so-called fibre line. In a recovery line, the chemicals used in the cooking process are recovered to be used again and energy is produced. The third process is effluent treatment where gaseous and liquid discharges to the environment are continuously minimized and monitored.
The process includes transports to the pulp mill, wood handling, chemical pulping and bleaching, drying process, energy production on-site, recovery cycles of chemicals and internal waste water treatment. The input of magnesium sulphate (0.0027 kg/kg) has been excluded from the inventory since its contribution was less than 3 % in terms of mass and single score.
The following air emissions were reported in the study:
CO2 (fossil and biogenic), SOx (as SO2), NOx, TRS (as S), SO2 (reported as S), Dust (unspecified). Next to these key emissions, additional emissions from on-site energy production from external and internal fuels were calculated, using emission profiles from ecoinvent combustion processes. Internal biogenic fuels are represented by the calculated emissions but do not have the corresponding fuel input from technosphere, because they are supplied from within the system boundaries. The amounts of internal fuels used in the process are: Biogas (55MJ/t), Bark (1952MJ/t), Black liquor(18349MJ/t), Sludge (61 MJ/t), Methanol (145 MJ7t), Biomass (6 MJ/t), tall oil pitch (229 MJ/t), Biomass (wood residuals) (84 MJ/t)

The following ecoinvent combustion processes were used to estimate additional air emissions:

Hard coal: heat production, at hard coal industrial furnace 1-10MW, Europe without Switzerland; Heavy fuel oil: heat production, heavy fuel oil, at industrial furnace 1MW, Europe without Switzerland; Light fuel oil: heat production, light fuel oil, at industrial furnace 1MW, Europe without Switzerland; Biofuel - Biogas: heat production, natural gas, at industrial furnace >100kW, Europe without Switzerland; Methanol: heat production, natural gas, at industrial furnace >100kW, Europe without Switzerland; Natural gas: heat production, natural gas, at industrial furnace >100kW, Europe without Switzerland; Biofuel - Bark (wet weight): heat production, wood chips from industry, at furnace 1000kW, CH; Biofuel - Biomass: heat production, wood chips from industry, at furnace 1000kW, CH; Biofuel - Biomass - wood residuals: heat production, wood chips from industry, at furnace 1000kW, CH; Biofuel - Bark: heat production, wood chips from industry, at furnace 1000kW, CH; Wood pellets: heat production, wood chips from industry, at furnace 1000kW, CH;
Black liquor, sludge, tall oil pitch, and sodium formiate were not included in the emissions calculations because no specific emission profiles, e.g. for the black liquor recovery process, were available. Emissions from these internal energy generation processes are therefore only reflected in the key emission factors provided by the industry, other emissions constitute a data gap. Emissions of stemming from biogas are approximated with the combustion of natural gas, whereby CO2, CO and CH4 emissions stemming from biogas were modelled as non-fossil.
The amount of infrastructure (pulp factory) was taken from the dataset “The European Pulp Industry Sector Association AISBL, sulfate pulp production, from softwood, bleached, RER, Undefined, ecoinvent database version 3.7.1”

## Reference product
- bleached kraft pulp, softwood // bleached kraft pulp, softwood // rna, elementary: 1

## Inputs
- water, Renewable material resources from water [CA]: 0.00573064
- water, Renewable material resources from water: 1.73255e-5
- water, Renewable material resources from water [US]: 0.0632057

## Outputs
- Water, Emissions to air, unspecified: 0.0400899
- carbon dioxide (fossil), Emissions to urban air close to ground: 0.0516409
- Water, Emissions to water, unspecified: 6.66161e-6
- biological oxygen demand, Emissions to fresh water: 0.000392076
- chemical oxygen demand, Emissions to fresh water: 0.0109733
- Phosphorus, Emissions to fresh water: 1.18877e-5
- total organic carbon, Emissions to fresh water: 0.00392499
- nitrogen, total (excluding N2), Emissions to fresh water: 0.000115224
- sulfur oxides, Emissions to air, unspecified: 0.000154471
- adsorbable organic halogen compounds, Emissions to fresh water: 7.96027e-5
- Suspended solids, unspecified, Emissions to water, unspecified: 0.000748487
- ammonia, Emissions to urban air close to ground: 3.95753e-6
- Water, Emissions to water, unspecified [CA]: 0.00220342
- Water, Emissions to water, unspecified [US]: 0.0243024
- acetic acid, Emissions to urban air close to ground: 2.73222e-7
- formaldehyde, Emissions to urban air close to ground: 5.13301e-7
- acetone, Emissions to urban air close to ground: 4.26936e-8
- chlorine, Emissions to urban air close to ground: 4.11126e-7
- toluene, Emissions to urban air close to ground: 8.31244e-7
- carbon monoxide (fossil), Emissions to urban air close to ground: 3.46231e-6
- Nitrogen oxides, Emissions to urban air close to ground: 0.00142415
- ethylene, Emissions to urban air close to ground: 7.13058e-9
- acetaldehyde, Emissions to urban air close to ground: 1.82703e-7
- methanol, Emissions to urban air close to ground: 1.45158e-7
- propionic acid, Emissions to urban air close to ground: 1.36597e-8
- sulfur dioxide, Emissions to urban air close to ground: 0.000183635
- non-methane volatile organic compounds, Emissions to urban air close to ground: 1.59923e-5
- benzene, Emissions to urban air close to ground: 2.35318e-6
- particles (PM2.5), Emissions to urban air close to ground: 4.6192e-5
- nitrous oxide, Emissions to urban air close to ground: 5.56486e-6
- zinc, Emissions to urban air close to ground: 7.16278e-7
- nickel, Emissions to urban air close to ground: 1.53215e-7
- selenium, Emissions to urban air close to ground: 3.43802e-9
- chromium, Emissions to urban air close to ground: 1.05071e-8
- lead, Emissions to urban air close to ground: 9.85515e-8
- cadmium, Emissions to urban air close to ground: 1.60258e-9
- copper, Emissions to urban air close to ground: 7.02481e-8
- methane (fossil), Emissions to urban air close to ground: 1.98939e-6
- xylene (all isomers), Emissions to urban air close to ground: 2.37686e-10
- pentachlorophenol, Emissions to urban air close to ground: 1.85007e-11
- arsenic, Emissions to urban air close to ground: 6.04428e-9
- benzo[a]pyrene, Emissions to urban air close to ground: 1.15746e-9
- carbon dioxide (biogenic), Emissions to urban air close to ground: 2.38969
- cobalt, Emissions to urban air close to ground: 9.40009e-9
- ethanol, Emissions to urban air close to ground: 8.53871e-8
- fluorine, Emissions to urban air close to ground: 1.14202e-7
- iron, Emissions to urban air close to ground: 2.43897e-7
- m-xylene, Emissions to urban air close to ground: 2.74084e-7
- hydrogen chloride, Emissions to urban air close to ground: 5.0819e-7
- polycyclic aromatic hydrocarbons, Emissions to urban air close to ground: 3.23605e-8
- manganese, Emissions to urban air close to ground: 3.88339e-7
- pentane, Emissions to urban air close to ground: 8.24202e-7
- hexachlorobenzene, Emissions to urban air close to ground: 1.64451e-14
- Hydrocarbons, aromatic, Emissions to urban air close to ground: 4.33538e-8
- DOC, Dissolved Organic Carbon, Emissions to fresh water: 0.00392499
- magnesium, Emissions to urban air close to ground: 8.31261e-7
- potassium, Emissions to urban air close to ground: 5.34494e-5
- sodium, Emissions to urban air close to ground: 3.18422e-6
- calcium, Emissions to urban air close to ground: 1.33959e-5
- vanadium, Emissions to urban air close to ground: 2.84714e-7
- bromine, Emissions to urban air close to ground: 1.37065e-7
- n-butane, Emissions to urban air close to ground: 4.85021e-7
- Hydrocarbons, aliphatic, unsaturated, Emissions to urban air close to ground: 7.09024e-6
- Hydrocarbons, aliphatic, alkanes, unspecified, Emissions to urban air close to ground: 2.261e-6
- carbon monoxide (biogenic), Emissions to urban air close to ground: 0.000685501
- Phosphorus, Emissions to urban air close to ground: 6.85361e-7
- ethyl benzene, Emissions to urban air close to ground: 6.85211e-8
- chromium (vi), Emissions to urban air close to ground: 1.122e-10
- molybdenum, Emissions to urban air close to ground: 2.28826e-9
- mercury, Emissions to urban air close to ground: 7.66148e-10
- methane (biogenic), Emissions to urban air close to ground: 7.12833e-6
- hydrogen fluoride, Emissions to urban air close to ground: 1.68549e-8
- propane, Emissions to urban air close to ground: 1.47955e-7
- 2,3,7,8-tetrachlorodibenzo-p-dioxin, Emissions to urban air close to ground: 7.10111e-14
- ethane, Emissions to urban air close to ground: 3.56529e-9
- lead-210, Emissions to urban air close to ground: 1.10524e-7
- antimony, Emissions to urban air close to ground: 3.75544e-12
- polonium-210, Emissions to urban air close to ground: 2.02033e-7
- radium-226, Emissions to urban air close to ground: 2.85223e-8
- thallium, Emissions to urban air close to ground: 3.75544e-12
- tin, Emissions to urban air close to ground: 1.50218e-12
- titanium, Emissions to urban air close to ground: 9.00831e-10
- boron, Emissions to urban air close to ground: 1.12663e-9
- Silicon, Emissions to urban air close to ground: 3.75544e-8
- acetylene, Emissions to urban air close to ground: 1.18843e-9
- beryllium, Emissions to urban air close to ground: 2.99485e-12
- aluminium, Emissions to urban air close to ground: 2.54324e-8
- iodine, Emissions to urban air close to ground: 2.70962e-11
- barium, Emissions to urban air close to ground: 2.99485e-10
- propene, Emissions to urban air close to ground: 1.18843e-9
- radon-222, Emissions to urban air close to ground: 2.37686e-9
- strontium, Emissions to urban air close to ground: 4.51604e-10
- uranium-238, Emissions to urban air close to ground: 2.37686e-8
- particles (PM10), Emissions to urban air close to ground: 0.00016188
- potassium-40, Emissions to urban air close to ground: 3.20876e-8
- radium-228, Emissions to urban air close to ground: 1.54496e-7
- scandium, Emissions to urban air close to ground: 2.99485e-12
- thorium-232, Emissions to urban air close to ground: 8.31902e-9
- Uranium, Emissions to urban air close to ground: 6.01346e-12
- Thorium, Emissions to urban air close to ground: 4.51604e-12
- total reduced sulphur compounds, Emissions to air, unspecified: 4.21177e-5
- radon-220, Emissions to urban air close to ground: 2.37686e-9
- thorium-228, Emissions to urban air close to ground: 1.30727e-8

## Impact indicators
- Eutrophication marine: 0.000669583
- Ecotoxicity, freshwater: 0.297864
- Land use: 0
- Water use: 1.34149
- Resource use, minerals and metals: 0
- Resource use, fossils: 0
- Climate change: 0.0534119
- Ozone depletion: 0
- Human toxicity, cancer: 2.74025e-11
- Human toxicity, non-cancer: 3.73141e-10
- EF-particulate Matter: 2.49354e-8
- Ionising radiation, human health: 3.27176e-8
- Photochemical ozone formation - human health: 0.00147187
- Acidification: 0.00150874
- Eutrophication, terrestrial: 0.0061202
- Eutrophication, freshwater: 1.18877e-5

## Deviations from the LCI method principle
The background data uses:
- the \xe2\x80\x9cRecycled content cut-off\xe2\x80\x9d approach to allocate end-of-life by-products and secondary materials. This allocation is explained in the description of the recycled content system model (http://www.ecoinvent.org/database/system-models-in-ecoinvent-3/cut-off-system-model/allocation-cut-off-by-classification.html).
OR
- EF compliant data

## Deviations from the LCI method approaches
Background data:
- the \xe2\x80\x9cRecycled content cut-off\xe2\x80\x9d approach to allocate end-of-life by-products and secondary materials. This allocation is explained in the description of the recycled content system model (http://www.ecoinvent.org/database/system-models-in-ecoinvent-3/cut-off-system-model/allocation-cut-off-by-classification.html). The ecoinvent database mostly relies on “Allocation – market values” apart for few exceptions particularly in the energy sector. ecoinvent energy data is replaced with EF3.0 core data as per the EF guidelines version 2.0.
OR
- EF compliant data

## Modelling constants
All modelling constants follow the requirements listed in the Tender Specifications 070201/2020/SER/ENV.B1. Completeness: There are no intentional cut-offs in the inventory no matter how small their contribution to all the EF impact categories is. Eventual cut-offs are in compliance with the Guide for EF compliant data sets (JRC 2020), i.e. only if below the 3% cut-off rule. Water use: water use is modelled at country level using separate flows for water withdrawal, water release and water evaporation. Handling multi-functional processes: the following PEF multi- functionality decision hierarchy is applied for resolving all multi- functionality problems: (1) subdivision or system expansion; (2) allocation based on a relevant underlying physical relationship (substitution may apply here); (3) allocation based on some other relationship. Direct land use change: GHG emissions from direct LUC allocated to good/service for 20 years after the LUC occurs, with IPCC default values. Carbon storage and delayed emissions: credits associated with temporary (carbon) storage or delayed emissions up to 300 years are not be considered. Emissions off-setting: are not included. Capital goods (including infrastructures) and their End of life: they are included. System boundaries: system boundaries include all processes linked to the product supply chain (e.g. maintenance). Time period: emissions and removals are modelled as if released or removed at the beginning of the assessment method. Fossil and biogenic carbon emissions and removals: removals and emissions are modelled as follows: All GHG emissions from fossil fuels (including peat and limestone) are modelled consistently with the most updated ILCD list of elementary flows. The non-fossil (biogenic) carbon flows are modelled consistently with the most updated ILCD list of elementary flows.

## Cut-off and completeness
There are no intentional cut-offs in the inventory no matter how small their contribution to all the EF impact categories is. Eventual cut-offs are in compliance with the Guide for EF compliant data sets (JRC 2020), i.e. only if below the 3% cut-off rule. The dataset dry mass and water balance has been checked to ensure the inventory is complete. Capital goods (e.g. infrastructure) and their end-of-life are included.

## Data selection and combination
These datasets include, in both their foreground and background data, links to EF3.0 compliant data.
The relevant background data on energy, transport, and End of Life are from the LCDN data node (http://lcdn.thinkstep.com/Node/).
All other background data in the supply of this product for which no EF3.0 process was available are from ecoinvent v3.7 database (www.ecoinvent.org) or other data sources.

## Data treatment and extrapolations
Several data sources have been used to model the inventory.

## Use advice
This data set is a supporting sub-data set and must be used exclusively as sub-data set of its corresponding level-1 partly disaggregated data set (see “General comment” field for exact name and UUID).

## Data sources
- Background Data for Representative products and organisations. EF 3.0 compliant (data stock)
- The European Pulp Industry Sector Association AISBL (EPIS), (2020). EPIS Life Cycle Inventory data for Northern Bleached Softwood Kraft Pulp, 2020 Data.

## Intended applications
Implementation of regular Product Environmental Footprint (PEF) studies and Organisation Environmental Footprint (OEF) studies exclusively under the specified Product groups and sectors as defined in the Product Environmental Footprint Category Rules (PEFCR) and Organisation Environmental Footprint Sectorial Rules (OEFSR) listed in http://ec.europa.eu/environment/eussd/smgp/PEFCR_OEFSR.htm
