# tape (reflex, seam, rips); production, at plant; 1kg of product

Dataset: ILCD process, Partly terminated system
Geography: GLO
Reference year: 2021
Valid until: 2024
Classification: Systems / Textiles, furnitures and other interiors
LCI method principle: Attributional
LCI method approaches: Allocation - market value
Completeness: All relevant flows quantified
Project: Provision of process-based 3.0 Environmental Footprint-compliant life cycle inventory datasets - Others - contract number 070201/2020/840235/SER/ENV.B.1
Generated by: Metsims Sustainability Consulting
Owner: PRé Sustainability B.V.
Compliance: ILCD Data Network - Entry-level; Suggestions for updating the PEF method 2019; ISO 14040 Environmental Management – Life Cycle Assessment – Principles and Framework, 2006; ISO 14044:2006. Environmental Management – Life Cycle Assessment – Requirements and guidelines.; Environmental Footprint 3.1
Review: Dependent internal review by Avraam Symeonidis, Emilia Moreno Ruiz; Independent review panel by Madhuri Nigam
Data quality: Overall quality: Good; Time representativeness: Very good; Geographical representativeness: Good; Technological representativeness: Good; Precision: Good; Methodological appropriateness and consistency: Not applicable
Amounts: no units in this file; such an amount is in the reference unit of its flow, which a separate flow dataset defines
copyright: true
licenseType: Free of charge for some user types or use types
accessRestrictions: Free of charge for all final users implementing a regular Product Environmental Footprint (PEF) studies and Organisation Environmental Footprint (OEF) studies exclusively under the specified Product groups and sectors as defined in the Product Environmental Footprint Category Rules (PEFCR) and Organisation Environmental Footprint Sectorial Rules (OEFSR) listed in http://ec.europa.eu/environment/eussd/smgp/PEFCR_OEFSR.htm and in accordance with the terms and conditions of the EULA (available at https://ecoinvent.lca-data.com/) exclusively until 31st December 2024. Any use of this dataset or any derivative data not within the specific context of one of the PEF/OEF projects or after the end of 2024 is not permitted.

## General comment
Notice: this data set supersedes the EF3.0-compliant version (see link under "preceding data set version" below calculated with the EF3.0). The life cycle inventory is not changed from the original EF3.0 data set. The LCIA results are calculated based on the EF3.1 methods which provide updated characterisation factors in the following impact categories: Climate Change, Ecotoxicity freshwater, Photochemical Ozone Formation, Acidification, Human Toxicity non-cancer, and Human Toxicity cancer. The review report and the data quality ratings refer to the original results. The data set has been updated by the European Commission on the basis of the original EF3.0 data set delivered by the data provider.Tapes are used for binding, decorative or supoorting material in apparel production. The main raw materials of tapes are cotton, nylon and PET.

## Technology and included processes
Tapes are used for binding, decorative or supoorting material in apparel production. The main raw materials of tapes are cotton, nylon and PET yarns.

After spinning of yarns, tapes are produced by weaving or braiding technique.

This dataset covers raw material production, production of tape and production wastes.

Waste processing model was generated from global waste collection rate. Global waste collection rate is 65%. 75% of waste collected are delivered to recycle facility and, 25% of collected waste are delivered to landfill areas. Uncollected part of waste (35%) was assumed that it is dropped to landfill areas. From production facility to landfill transport was assumed as 70 km.

## Parameters
- R2_PET: 0.309278
  The amount of waste PET produced is 0.343642611683849kg. The assumed percentage of losses of the recycling process is 0.0999999999999999. R2 has been therefore calculated as the original amount of waste minues losses, i.e. 0.309278350515464kg. The value for A has been taken from the default values for the CFF. The default value for plastics is 0.5. Being pre-consumer waste, Qsout/Qp is assumed to be 1. The E*v part of the formula is modelled as a negative input of the relevant virgin material.
- R2_nylon: 0.309278
  The amount of waste nylon produced is 0.343642611683849kg. The assumed percentage of losses of the recycling process is 0.1. R2 has been therefore calculated as the original amount of waste minues losses, i.e. 0.309278350515464kg. The value for A has been taken from the default values for the CFF provided. The default value for plastics is 0.5. Being pre-consumer waste, Qsout/Qp is assumed to be 1. The E*v part of the formula is modelled as a negative input of the relevant virgin material.
- R2_cotton: 0.332618
  The amount of waste cotton produced is 0.39kg. The assumed percentage of losses of the recycling process is 0.15. R2 has been therefore calculated as the original amount of waste minues losses, i.e. 0.33kg. The value for A has been taken from the default values for the implementation of the CFF provided. The default value for textiles is 0.8. Being pre-consumer waste, Qsout/Qp is assumed to be 1. The E*v part of the formula is modelled as a negative input of the relevant virgin material.
- A_cotton: 0.8
  (same comment as for R2_cotton)
- Qsout/Qp_cotton: 1
  (same comment as for R2_cotton)
- CFF_cotton: 0.392157; = R2_cotton*A_cotton
  (same comment as for R2_cotton)
- avoid_cotton: 0.0665236; = CFF_cotton*Qsout/Qp_cotton
  (same comment as for R2_cotton)
- A_nylon: 0.5
  The amount of waste nylon produced is 0.34kg. The assumed percentage of losses of the recycling process is 0.1. R2 has been therefore calculated as the original amount of waste minues losses, i.e. 0.31kg. The value for A has been taken from the default values for the implementation of the CFF provided. The default value for plastics is 0.5. Being pre-consumer waste, Qsout/Qp is assumed to be 1. The E*v part of the formula is modelled as a negative input of the relevant virgin material.
- Qsout/Qp_nylon: 1
  (same comment as for A_nylon)
- CFF_nylon: 0.343643; = R2_nylon*A_nylon
  (same comment as for A_nylon)
- avoid_nylon: 0.154639; = CFF_nylon*Qsout/Qp_nylon
  (same comment as for A_nylon)
- A_PET: 0.5
  The amount of waste PET produced is 0.34kg. The assumed percentage of losses of the recycling process is 0.1. R2 has been therefore calculated as the original amount of waste minues losses, i.e. 0.31kg. The value for A has been taken from the default values for the implementation of the CFF provided. The default value for plastics is 0.5. Being pre-consumer waste, Qsout/Qp is assumed to be 1. The E*v part of the formula is modelled as a negative input of the relevant virgin material.
- Qsout/Qp_PET: 1
  (same comment as for A_PET)
- CFF_PET: 0.343643; = R2_PET*A_PET
  (same comment as for A_PET)
- avoid_PET: 0.154639; = CFF_PET*Qsout/Qp_PET
  (same comment as for A_PET)
- kg_0: 0.392157
  Mass in kg, for cotton fibre // cotton fibre // glo; Articulated lorry transport, Euro 4, Total weight >32 t; EU+EFTA+UK
- km_0: 999.6
  Distance in km, for cotton fibre // cotton fibre // glo; Articulated lorry transport, Euro 4, Total weight >32 t; EU+EFTA+UK
- kg_km_0: 392; = kg_0*km_0
  Transport amount in km*km, for cotton fibre // cotton fibre // glo; Articulated lorry transport, Euro 4, Total weight >32 t; EU+EFTA+UK
- kg_1: 0.171821
  Mass in kg, for nylon 6 // nylon 6 production, fossil fuel-based // glo; Articulated lorry transport, Euro 4, Total weight >32 t; EU+EFTA+UK
- km_1: 1001.04
  Distance in km, for nylon 6 // nylon 6 production, fossil fuel-based // glo; Articulated lorry transport, Euro 4, Total weight >32 t; EU+EFTA+UK
- kg_km_1: 172; = kg_1*km_1
  Transport amount in km*km, for nylon 6 // nylon 6 production, fossil fuel-based // glo; Articulated lorry transport, Euro 4, Total weight >32 t; EU+EFTA+UK
- kg_2: 0.171821
  Mass in kg, for polyamide 6.6 // nylon 6.6 production, fossil fuel-based // glo; Articulated lorry transport, Euro 4, Total weight >32 t; EU+EFTA+UK
- km_2: 1001.04
  Distance in km, for polyamide 6.6 // nylon 6.6 production, fossil fuel-based // glo; Articulated lorry transport, Euro 4, Total weight >32 t; EU+EFTA+UK
- kg_km_2: 172; = kg_2*km_2
  Transport amount in km*km, for polyamide 6.6 // nylon 6.6 production, fossil fuel-based // glo; Articulated lorry transport, Euro 4, Total weight >32 t; EU+EFTA+UK
- kg_3: 0.343643
  Mass in kg, for polyethylene terephthalate, mix // polyethylene terephthalate (pet) production, blend of bio- based and fossil // glo; Articulated lorry transport, Euro 4, Total weight >32 t; EU+EFTA+UK
- km_3: 1001.04
  Distance in km, for polyethylene terephthalate, mix // polyethylene terephthalate (pet) production, blend of bio- based and fossil // glo; Articulated lorry transport, Euro 4, Total weight >32 t; EU+EFTA+UK
- kg_km_3: 344; = kg_3*km_3
  Transport amount in km*km, for polyethylene terephthalate, mix // polyethylene terephthalate (pet) production, blend of bio- based and fossil // glo; Articulated lorry transport, Euro 4, Total weight >32 t; EU+EFTA+UK
- kg_4: 0.0407141
  Mass in kg, for waste (unspecified) // landfill of plastic waste // eu+efta+uk; Articulated lorry transport, Euro 4, Total weight >32 t; EU+EFTA+UK
- km_4: 70
  Distance in km, for waste (unspecified) // landfill of plastic waste // eu+efta+uk; Articulated lorry transport, Euro 4, Total weight >32 t; EU+EFTA+UK
- kg_km_4: 2.84998; = kg_4*km_4
  Transport amount in km*km, for waste (unspecified) // landfill of plastic waste // eu+efta+uk; Articulated lorry transport, Euro 4, Total weight >32 t; EU+EFTA+UK
- kg_5: 0.392157
  Mass in kg, for cotton fibre // cotton fibre // glo; Transoceanic ship, containers; GLO
- km_5: 18003
  Distance in km, for cotton fibre // cotton fibre // glo; Transoceanic ship, containers; GLO
- kg_km_5: 7060; = kg_5*km_5
  Transport amount in km*km, for cotton fibre // cotton fibre // glo; Transoceanic ship, containers; GLO
- kg_6: 0.171821
  Mass in kg, for nylon 6 // nylon 6 production, fossil fuel-based // glo; Transoceanic ship, containers; GLO
- km_6: 17983.8
  Distance in km, for nylon 6 // nylon 6 production, fossil fuel-based // glo; Transoceanic ship, containers; GLO
- kg_km_6: 3090; = kg_6*km_6
  Transport amount in km*km, for nylon 6 // nylon 6 production, fossil fuel-based // glo; Transoceanic ship, containers; GLO
- kg_7: 0.171821
  Mass in kg, for polyamide 6.6 // nylon 6.6 production, fossil fuel-based // glo; Transoceanic ship, containers; GLO
- km_7: 17983.8
  Distance in km, for polyamide 6.6 // nylon 6.6 production, fossil fuel-based // glo; Transoceanic ship, containers; GLO
- kg_km_7: 3090; = kg_7*km_7
  Transport amount in km*km, for polyamide 6.6 // nylon 6.6 production, fossil fuel-based // glo; Transoceanic ship, containers; GLO
- kg_8: 0.343643
  Mass in kg, for polyethylene terephthalate, mix // polyethylene terephthalate (pet) production, blend of bio- based and fossil // glo; Transoceanic ship, containers; GLO
- km_8: 18012.9
  Distance in km, for polyethylene terephthalate, mix // polyethylene terephthalate (pet) production, blend of bio- based and fossil // glo; Transoceanic ship, containers; GLO
- kg_km_8: 6190; = kg_8*km_8
  Transport amount in km*km, for polyethylene terephthalate, mix // polyethylene terephthalate (pet) production, blend of bio- based and fossil // glo; Transoceanic ship, containers; GLO

## Reference product
- tape // tape (reflex, seam, rips) // glo: 1

## Inputs
- Electricity from Electricity grid mix 1kV-60kV - AU: 0.0048
- Electricity from Electricity grid mix 1kV-60kV - EU+EFTA+UK: 0.0714
- Electricity from Electricity grid mix 1kV-60kV - NZ: 0.0009
- Electricity from Electricity grid mix 1kV-60kV - RAF: 0.0156
- Electricity from Electricity grid mix 1kV-60kV - RNA: 0.1044
- Electricity from Electricity grid mix 1kV-60kV - RSA: 0.0354
- Electricity from Electricity grid mix 1kV-60kV - RU: 0.0209
- Transport of cotton fibre // cotton fibre // glo by Articulated lorry transport, Euro 4, Total weight >32 t - EU+EFTA+UK: 392; = kg_km_0
- Transport of nylon 6 // nylon 6 production, fossil fuel-based // glo by Articulated lorry transport, Euro 4, Total weight >32 t - EU+EFTA+UK: 172; = kg_km_1
- Transport of polyamide 6.6 // nylon 6.6 production, fossil fuel-based // glo by Articulated lorry transport, Euro 4, Total weight >32 t - EU+EFTA+UK: 172; = kg_km_2
- Transport of polyethylene terephthalate, mix // polyethylene terephthalate (pet) production, blend of bio- based and fossil // glo by Articulated lorry transport, Euro 4, Total weight >32 t - EU+EFTA+UK: 344; = kg_km_3
- Transport of waste (unspecified) // landfill of plastic waste // eu+efta+uk by Articulated lorry transport, Euro 4, Total weight >32 t - EU+EFTA+UK: 2.84998; = kg_km_4
- Transport of cotton fibre // cotton fibre // glo by Transoceanic ship, containers - GLO: 7060; = kg_km_5
- Transport of nylon 6 // nylon 6 production, fossil fuel-based // glo by Transoceanic ship, containers - GLO: 3090; = kg_km_6
- Transport of polyamide 6.6 // nylon 6.6 production, fossil fuel-based // glo by Transoceanic ship, containers - GLO: 3090; = kg_km_7
- Transport of polyethylene terephthalate, mix // polyethylene terephthalate (pet) production, blend of bio- based and fossil // glo by Transoceanic ship, containers - GLO: 6190; = kg_km_8
- polyethylene terephthalate, recycled, pre-consumer // polyethylene terephthalate (pet) production, recycled, semi-mechanical, pre-consumer // glo: 0.154639; = CFF_PET
- cotton fibre, recycled, pre-consumer // cotton fibre, recycled, pre-consumer // glo: 0.0768935; = CFF_cotton
- Electricity from Electricity grid mix 1kV-60kV - CN: 0.106984
- Electricity from Electricity grid mix 1kV-60kV - RAS w/o CN: 0.117216
- nylon, recycled // nylon production, recycled, mechanical // glo: 0.154639; = CFF_nylon
- tape // tape (reflex, seam, rips) // glo, blackbox: 1
- tape // tape (reflex, seam, rips) // glo, elementary: 1

## Outputs
- avoided product system, cotton from tape (reflex, seam, rips) // avoided product system cotton in tape (reflex, seam, rips) // glo: 0.0768935; = avoid_cotton
- avoided product system, nylon from tape (reflex, seam, rips) // avoided product system nylon in tape (reflex, seam, rips) // glo: 0.154639; = avoid_nylon
- avoided product system, pet from tape (reflex, seam, rips) // avoided product system pet in tape (reflex, seam, rips) // glo: 0.154639; = avoid_PET

## Impact indicators
- Eutrophication marine: 0.0295002
- Ecotoxicity, freshwater: 90.2773
- Land use: 261.114
- Water use: 29.3014
- Resource use, minerals and metals: 0.000183192
- Resource use, fossils: 85.0764
- Climate change: 6.65287
- Ozone depletion: 6.3175e-8
- Human toxicity, cancer: 5.67797e-9
- Human toxicity, non-cancer: 1.20936e-7
- EF-particulate Matter: 1.34662e-6
- Ionising radiation, human health: 0.211736
- Photochemical ozone formation - human health: 0.029364
- Acidification: 0.0601275
- Eutrophication, terrestrial: 0.16856
- Eutrophication, freshwater: 0.00195887

## Deviations from the LCI method principle
The background data use the \xe2\x80\x9cRecycled content cut-off\xe2\x80\x9d approach to allocate end-of-life by-products and secondary materials. This allocation is explained in the description of the recycled content system model (http://www.ecoinvent.org/database/system-models-in-ecoinvent-3/cut-off-system-model/allocation-cut-off-by-classification.html).

## Deviations from the LCI method approaches
Allocation following the ISO 14044 hierarchy.

## Modelling constants
All modelling constants follow the requirements listed in the Tender Specifications ENV.B.1/SER/2016/0038vl. Completeness: All known environmental flows are included. All known resource uses and emissions are listed in the inventory. Water use: water use is modelled at country level using separate flows for water withdrawal, water release and water evaporation. Cut-off: All known environmental flows are included. All known resource uses and emissions are listed in the inventory. Handling multi-functional processes: the following PEF multi- functionality decision hierarchy is applied for resolving all multi- functionality problems: (1) subdivision or system expansion; (2) allocation based on a relevant underlying physical relationship (substitution may apply here); (3) allocation based on some other relationship. Direct land use change: GHG emissions from direct LUC allocated to good/service for 20 years after the LUC occurs, with IPCC default values. Carbon storage and delayed emissions: credits associated with temporary (carbon) storage or delayed emissions up to 300 years are not be considered. Emissions off-setting: are not included. Capital goods (including infrastructures) and their End of life: they are included. System boundaries: system boundaries include all processes linked to the product supply chain (e.g. maintenance). Time period: emissions and removals are modelled as if released or removed at the beginning of the assessment method. Fossil and biogenic carbon emissions and removals: removals and emissions are modelled as follows: All GHG emissions from fossil fuels (including peat and limestone) are modelled consistently with the most updated ILCD list of elementary flows. The non-fossil (biogenic) carbon flows are modelled consistently with the most updated ILCD list of elementary flows.

## Cut-off and completeness
All known environmental flows are included. All known resource uses and emissions are listed in the inventory. The dataset dry mass balance has been checked to ensure the inventory is complete. Capital goods (e.g. infrastructure) and their end-of-life are included.

## Data selection and combination
These datasets include, in both their foreground and background data, links to EF3.0 compliant data.
The relevant background data on energy, transport, and End of Life are from the LCDN data node (http://lcdn.thinkstep.com/Node/).
All other background data in the supply of this product for which no EF3.0 process was available are from ecoinvent v3.7 database (www.ecoinvent.org) or other data sources.

## Data treatment and extrapolations
Several data sources have been used to model the inventory.

## Review details
Internal reviews have been asked to review the plausibility of the unit process, LCIA scores, and DQRs. Internal reviewers have also been asked to review the data for EF compliancy. The consortium is therefore responsible for aspects such as compliancy with the ILCD format, including validation in Look@LCI, and nomenclature.
Internal reviwers have been asked to judge based on the process name, that the unit process models in a complete and representative way the process in the requested location. The review encompassed the plausability of:
- exchanges with nature (elementary flows) as well as exchanges such as product and waste flows.
- meta information (general comment, technology comment, system boundaries, allocation, cut-off rules, etc.). Reviewers were asked to judge if the provided information is enough to understand the content of the process.
- LCIA scores
- DQRs including precision, technology, time and geography. As well as the overall DQR.
External reviewers have been asked to provide their expertise in the field of interest. External reviewers have been asked to review the unit process, including eventual methodological choices, the LCIA scores (provided with contribution scores as well), and DQRs. External reviewers have been provided all the information in a tool developed by the consortium for the purpose of this project.
External reviewers have been asked to judge based on the process name, that the unit process models in a complete and representative way the process in the requested location. The review encompassed:
- Plausability and completeness of exchanges with nature (elementary flows) as well as exchanges such as product and waste flows.
- Review of meta information (general comment, technology comment, system boundaries, allocation, cut-off rules, etc.). Reviewers were asked to judge if the provided information is enough to understand the content of the process.
- Review of properties (biogenic carbon and water content).
- Review of allocation keys.
- Plausability of LCIA scores calculated by the consortium.
- Plausability of DQRs including precision, technology, time and geography. As well as the overall DQR.

## Data sources
- Background Data for Representative products and organisations. EF 3.0 compliant (data stock)
- Shanghai Henghui International Co., Ltd., https://www.alibaba.com/product-detail/Henghui-KBL17-4-90-17-spindle_1663746150.html?spm=a2700.galleryofferlist.normal_offer.d_title.47e72daepPmpUv, Access Date: 05.04.2021
- Ningbo Credit Ocean Machinery & Electron Co., Ltd., https://www.alibaba.com/product-detail/Tape-Machine-Credit-Ocean-32-Carrier_62017390822.html?spm=a2700.7735675.normal_offer.d_title.790726c89zCC4W&s=p, Access Date: 05.04.2021
- V12/15 SHUTTLELESS LOOM RIBBON WEAVING MACHINE, https://www.yongjin-machinery.com/product/High_speed_needle_loom/20171105/42.html, Access Date: 05.04.2021
- Ruian Baosheng Ribbon Co., Ltd., https://www.alibaba.com/product-detail/Tape-Cheap-New-Product-35mm-100_1600210705423.html?spm=a2700.7724857.normal_offer.d_image.3bd629e7FccMQY&s=p, Access Date: 05.04.2021
- Huzhou Beiheng Textile Co., Ltd., https://www.alibaba.com/product-detail/Tape-Printed-Polyester-Tape-Custom-Printed_62140524772.html?spm=a2700.galleryofferlist.normal_offer.d_title.10594db5VT8xfW&s=p, Access Date: 05.04.2021
- Shenzhen Jingye Accessories Co., Ltd., https://www.alibaba.com/product-detail/Tape-38mm-Webbing-High-Quality-38mm_62378256783.html?spm=a2700.galleryofferlist.normal_offer.d_title.10594db5VT8xfW&s=p, Access Date: 05.04.2021
- Vignesh, K. S., Rajadesingu, S., & Arunachalam, K. D. (2021). Challenges, issues, and problems with zero-waste tools. In Concepts of Advanced Zero Waste Tools (pp. 69-90). Elsevier.
- Rosato, D. V. (1998). Blown film. In Extruding Plastics (pp. 305-348). Springer, Boston, MA.
- Altun, S. (2012). Prediction of textile waste profile and recycling opportunities in Turk. Fibres & Textiles in Eastern Europe.

## Intended applications
Implementation of regular Product Environmental Footprint (PEF) studies and Organisation Environmental Footprint (OEF) studies exclusively under the specified Product groups and sectors as defined in the Product Environmental Footprint Category Rules (PEFCR) and Organisation Environmental Footprint Sectorial Rules (OEFSR) listed in http://ec.europa.eu/environment/eussd/smgp/PEFCR_OEFSR.htm
