# cashmere fiber; raw; at rangelands; extensive farming

Dataset: ILCD process, Partly terminated system
Geography: MN
Reference year: 2005
Valid until: 2024
Classification: Materials production / Food and renewable raw materials
LCI method principle: Attributional
LCI method approaches: Allocation - market value
Completeness: All relevant flows quantified
Project: Provision of process-based 3.0 Environmental Footprint-compliant life cycle inventory datasets - Renewable materials - contract number 070201/2020/840085/SER/ENV.B.1
Generated by: ACV Brasil
Owner: Blonk Sustainability Tools
Compliance: ILCD Data Network - Entry-level; Suggestions for updating the PEF method 2019; ISO 14040 Environmental Management – Life Cycle Assessment – Principles and Framework, 2006; ISO 14044:2006. Environmental Management – Life Cycle Assessment – Requirements and guidelines.; Environmental Footprint 3.1
Review: Dependent internal review by Avraam Symeonidis, Emilia Moreno Ruiz; Independent review panel by Philippa Notten
Data quality: Overall quality: Very good; Time representativeness: Very good; Geographical representativeness: Good; Technological representativeness: Very good; Precision: Good; Methodological appropriateness and consistency: Not applicable
Amounts: no units in this file; such an amount is in the reference unit of its flow, which a separate flow dataset defines
copyright: true
licenseType: Free of charge for some user types or use types
accessRestrictions: Free of charge for all final users implementing a regular Product Environmental Footprint (PEF) studies and Organisation Environmental Footprint (OEF) studies exclusively under the specified Product groups and sectors as defined in the Product Environmental Footprint Category Rules (PEFCR) and Organisation Environmental Footprint Sectorial Rules (OEFSR) listed in http://ec.europa.eu/environment/eussd/smgp/PEFCR_OEFSR.htm and in accordance with the terms and conditions of the EULA (available at https://ecoinvent.lca-data.com/) exclusively until 31st December 2024. Any use of this dataset or any derivative data not within the specific context of one of the PEF/OEF projects or after the end of 2024 is not permitted.

## General comment
Notice: this data set supersedes the EF3.0-compliant version (see link under "preceding data set version" below calculated with the EF3.0). The life cycle inventory is not changed from the original EF3.0 data set. The LCIA results are calculated based on the EF3.1 methods which provide updated characterisation factors in the following impact categories: Climate Change, Ecotoxicity freshwater, Photochemical Ozone Formation, Acidification, Human Toxicity non-cancer, and Human Toxicity cancer. The review report and the data quality ratings refer to the original results. The data set has been updated by the European Commission on the basis of the original EF3.0 data set delivered by the data provider.Cashmere is a noble ancient natural fibre extracted from the downy under layer of hair on a goat. Almost all cashmere comes from the Central and East Asian steppe, which provide the ideal cold and dry conditions for producing high-quality fibre (SFA 2021). Mongolia and China are the biggest producers, contributing approximately 85% of the world’s supply (SFA 2021). Cashmere fibre is used to make a variety of fashion and luxury woollen products such as scarves, shawls, pullovers and cardigans (ISHRAT et al. 2018). The value of cashmere to the consumer relates to the properties of the product itself (softness, fineness) and the traditions and practices associated with its production (ISHRAT et al. 2018). In the last few decades, the automation of cashmere manufacturing is fast replacing the centuries-old traditional practices and an increase in demand worldwide, and especially in Europe, is resulting in a rapid expansion of herds in Mongolia (ISHRAT et al. 2018 and UNDP Mongolia 2019). There is an increasing awareness that the rising demand is causing significant environmental degradation mainly due to overgrazed and degraded pastures (SFA 2021 and UNDP Mongolia).
Ishrat S.I., Grigg N.P., Jayamaha N., Pulakanam V. Cashmere Industry: Value Chains and Sustainability. In: Lo C., Ha-Brookshire J. (eds) Sustainability in Luxury Fashion Business. Springer Series in Fashion Business. Springer, Singapore. 2018. https://doi.org/10.1007/978-981-10-8878-0_7
SFA. Sustainable Fiber Alliance. https://sustainablefibre.org/about-cashmere/. 2021.
UNDP Mongolia. Sustainable cashmere from Mongolia: a market assessment. 2019.

## Technology and included processes
This dataset aims at representing the production of herded (raw) cashmere fibre produced in Mongolia. The activity starts with grazing herds by semi-nomadic herders on open, communally owned rangelands. Grazing herds include inputs as feeds, straw, water, as well as the transport of these inputs to the farm; land use; simple housing facilities; the enteric emissions. As far as the herding is extensive, energy, heat and water consumption for the housing facilities and emissions due to the effluent management are not considered. The activity ends with the hair harvested by hand using combs after the spring moult.
The allocation of upstream burdens at the rangeland level among goat outputs leaving the rangeland is retrieved from the Product Envirionmental Footprint Category Rules Guidance – PEFCR Guidance (EC, 2018). The allocation factors have been calculated according to the biophysical approach: Goat milk (73.9%), meat (2.51%) and hair (23.64%).

## Parameters
- kg_0: 8.8017
  Mass in kg, for alfalfa-grass silage; Articulated lorry transport, Euro 4, Total weight >32 t; EU+EFTA+UK
- km_0: 17981.7
  Distance in km, for alfalfa-grass silage; Articulated lorry transport, Euro 4, Total weight >32 t; EU+EFTA+UK
- kg_km_0: 158269; = kg_0*km_0
  Transport amount in km*km, for alfalfa-grass silage; Articulated lorry transport, Euro 4, Total weight >32 t; EU+EFTA+UK
- kg_1: 8.8017
  Mass in kg, for alfalfa-grass silage; Articulated lorry transport, Total weight >32 t, mix Euro 0-5; ROW w/o EU+EFTA
- km_1: 47457.2
  Distance in km, for alfalfa-grass silage; Articulated lorry transport, Total weight >32 t, mix Euro 0-5; ROW w/o EU+EFTA
- kg_km_1: 417704; = kg_1*km_1
  Transport amount in km*km, for alfalfa-grass silage; Articulated lorry transport, Total weight >32 t, mix Euro 0-5; ROW w/o EU+EFTA
- kg_2: 25.9612
  Mass in kg, for hay; Transoceanic ship, containers; GLO
- km_2: 105844
  Distance in km, for hay; Transoceanic ship, containers; GLO
- kg_km_2: 2.74784e6; = kg_2*km_2
  Transport amount in km*km, for hay; Transoceanic ship, containers; GLO
- kg_3: 25.9612
  Mass in kg, for hay; Freight train, diesel traction; EU+EFTA+UK
- km_3: 8172.26
  Distance in km, for hay; Freight train, diesel traction; EU+EFTA+UK
- kg_km_3: 212162; = kg_3*km_3
  Transport amount in km*km, for hay; Freight train, diesel traction; EU+EFTA+UK
- kg_4: 25.9612
  Mass in kg, for hay; Freight train, electricity traction; EU+EFTA+UK
- km_4: 2779.87
  Distance in km, for hay; Freight train, electricity traction; EU+EFTA+UK
- kg_km_4: 72168.8; = kg_4*km_4
  Transport amount in km*km, for hay; Freight train, electricity traction; EU+EFTA+UK
- kg_5: 25.9612
  Mass in kg, for hay; Freight train, average; EU+EFTA+UK
- km_5: 65.5645
  Distance in km, for hay; Freight train, average; EU+EFTA+UK
- kg_km_5: 1702.13; = kg_5*km_5
  Transport amount in km*km, for hay; Freight train, average; EU+EFTA+UK
- kg_6: 25.9612
  Mass in kg, for hay; Barge; EU+EFTA+UK
- km_6: 2258.61
  Distance in km, for hay; Barge; EU+EFTA+UK
- kg_km_6: 58636.2; = kg_6*km_6
  Transport amount in km*km, for hay; Barge; EU+EFTA+UK
- kg_7: 25.9612
  Mass in kg, for hay; Barge; ROW w/o EU+EFTA
- km_7: 4611.98
  Distance in km, for hay; Barge; ROW w/o EU+EFTA
- kg_km_7: 119732; = kg_7*km_7
  Transport amount in km*km, for hay; Barge; ROW w/o EU+EFTA
- kg_8: 25.9612
  Mass in kg, for hay; Articulated lorry transport, Euro 4, Total weight >32 t; EU+EFTA+UK
- km_8: 9468.06
  Distance in km, for hay; Articulated lorry transport, Euro 4, Total weight >32 t; EU+EFTA+UK
- kg_km_8: 245802; = kg_8*km_8
  Transport amount in km*km, for hay; Articulated lorry transport, Euro 4, Total weight >32 t; EU+EFTA+UK
- kg_9: 25.9612
  Mass in kg, for hay; Articulated lorry transport, Total weight >32 t, mix Euro 0-5; ROW w/o EU+EFTA
- km_9: 24988
  Distance in km, for hay; Articulated lorry transport, Total weight >32 t, mix Euro 0-5; ROW w/o EU+EFTA
- kg_km_9: 648719; = kg_9*km_9
  Transport amount in km*km, for hay; Articulated lorry transport, Total weight >32 t, mix Euro 0-5; ROW w/o EU+EFTA
- kg_10: 6.44903
  Mass in kg, for palm oil, refined; Freight train, diesel traction; EU+EFTA+UK
- km_10: 53.1827
  Distance in km, for palm oil, refined; Freight train, diesel traction; EU+EFTA+UK
- kg_km_10: 342.977; = kg_10*km_10
  Transport amount in km*km, for palm oil, refined; Freight train, diesel traction; EU+EFTA+UK
- kg_11: 6.44903
  Mass in kg, for palm oil, refined; Freight train, electricity traction; EU+EFTA+UK
- km_11: 18.0906
  Distance in km, for palm oil, refined; Freight train, electricity traction; EU+EFTA+UK
- kg_km_11: 116.667; = kg_11*km_11
  Transport amount in km*km, for palm oil, refined; Freight train, electricity traction; EU+EFTA+UK
- kg_12: 6.44903
  Mass in kg, for palm oil, refined; Freight train, average; EU+EFTA+UK
- km_12: 0.426675
  Distance in km, for palm oil, refined; Freight train, average; EU+EFTA+UK
- kg_km_12: 2.75164; = kg_12*km_12
  Transport amount in km*km, for palm oil, refined; Freight train, average; EU+EFTA+UK
- kg_13: 6.44903
  Mass in kg, for palm oil, refined; Articulated lorry transport, Total weight <7.5 t, mix Euro 0-5; EU+EFTA+UK
- km_13: 9.03139
  Distance in km, for palm oil, refined; Articulated lorry transport, Total weight <7.5 t, mix Euro 0-5; EU+EFTA+UK
- kg_km_13: 58.2437; = kg_13*km_13
  Transport amount in km*km, for palm oil, refined; Articulated lorry transport, Total weight <7.5 t, mix Euro 0-5; EU+EFTA+UK
- kg_14: 6.44903
  Mass in kg, for palm oil, refined; Articulated lorry transport, Euro 4, Total weight >32 t; EU+EFTA+UK
- km_14: 84.3869
  Distance in km, for palm oil, refined; Articulated lorry transport, Euro 4, Total weight >32 t; EU+EFTA+UK
- kg_km_14: 544.214; = kg_14*km_14
  Transport amount in km*km, for palm oil, refined; Articulated lorry transport, Euro 4, Total weight >32 t; EU+EFTA+UK
- kg_15: 6.44903
  Mass in kg, for palm oil, refined; Articulated lorry transport, Total weight >32 t, mix Euro 0-5; ROW w/o EU+EFTA
- km_15: 222.713
  Distance in km, for palm oil, refined; Articulated lorry transport, Total weight >32 t, mix Euro 0-5; ROW w/o EU+EFTA
- kg_km_15: 1436.28; = kg_15*km_15
  Transport amount in km*km, for palm oil, refined; Articulated lorry transport, Total weight >32 t, mix Euro 0-5; ROW w/o EU+EFTA
- kg_16: 2213.36
  Mass in kg, for alfalfa // alfalfa // glo; Articulated lorry transport, Total weight >32 t, mix Euro 0-5; ROW w/o EU+EFTA
- km_16: 7.00003
  Distance in km, for alfalfa // alfalfa // glo; Articulated lorry transport, Total weight >32 t, mix Euro 0-5; ROW w/o EU+EFTA
- kg_km_16: 15493.6; = kg_16*km_16
  Transport amount in km*km, for alfalfa // alfalfa // glo; Articulated lorry transport, Total weight >32 t, mix Euro 0-5; ROW w/o EU+EFTA
- kg_17: 1370.34
  Mass in kg, for barley grain // barley grain // eu+efta+uk; Articulated lorry transport, Total weight >32 t, mix Euro 0-5; ROW w/o EU+EFTA
- km_17: 7.00003
  Distance in km, for barley grain // barley grain // eu+efta+uk; Articulated lorry transport, Total weight >32 t, mix Euro 0-5; ROW w/o EU+EFTA
- kg_km_17: 9592.4; = kg_17*km_17
  Transport amount in km*km, for barley grain // barley grain // eu+efta+uk; Articulated lorry transport, Total weight >32 t, mix Euro 0-5; ROW w/o EU+EFTA
- kg_18: 81.6877
  Mass in kg, for wheat grain, production mix, at farm // glo; Articulated lorry transport, Total weight >32 t, mix Euro 0-5; ROW w/o EU+EFTA
- km_18: 7.00003
  Distance in km, for wheat grain, production mix, at farm // glo; Articulated lorry transport, Total weight >32 t, mix Euro 0-5; ROW w/o EU+EFTA
- kg_km_18: 571.816; = kg_18*km_18
  Transport amount in km*km, for wheat grain, production mix, at farm // glo; Articulated lorry transport, Total weight >32 t, mix Euro 0-5; ROW w/o EU+EFTA
- kg_19: 1569.05
  Mass in kg, for maize, production mix, at farm // glo; Articulated lorry transport, Total weight >32 t, mix Euro 0-5; ROW w/o EU+EFTA
- km_19: 7.00003
  Distance in km, for maize, production mix, at farm // glo; Articulated lorry transport, Total weight >32 t, mix Euro 0-5; ROW w/o EU+EFTA
- kg_km_19: 10983.4; = kg_19*km_19
  Transport amount in km*km, for maize, production mix, at farm // glo; Articulated lorry transport, Total weight >32 t, mix Euro 0-5; ROW w/o EU+EFTA
- kg_20: 10.7484
  Mass in kg, for oat grain, production mix, at farm // glo; Articulated lorry transport, Total weight >32 t, mix Euro 0-5; ROW w/o EU+EFTA
- km_20: 7.00003
  Distance in km, for oat grain, production mix, at farm // glo; Articulated lorry transport, Total weight >32 t, mix Euro 0-5; ROW w/o EU+EFTA
- kg_km_20: 75.239; = kg_20*km_20
  Transport amount in km*km, for oat grain, production mix, at farm // glo; Articulated lorry transport, Total weight >32 t, mix Euro 0-5; ROW w/o EU+EFTA
- kg_21: 148.328
  Mass in kg, for maize gluten feed, from wet milling (glutenfeed production, with drying), at plant // glo; Articulated lorry transport, Total weight >32 t, mix Euro 0-5; ROW w/o EU+EFTA
- km_21: 7.00003
  Distance in km, for maize gluten feed, from wet milling (glutenfeed production, with drying), at plant // glo; Articulated lorry transport, Total weight >32 t, mix Euro 0-5; ROW w/o EU+EFTA
- kg_km_21: 1038.3; = kg_21*km_21
  Transport amount in km*km, for maize gluten feed, from wet milling (glutenfeed production, with drying), at plant // glo; Articulated lorry transport, Total weight >32 t, mix Euro 0-5; ROW w/o EU+EFTA
- kg_22: 494.426
  Mass in kg, for wheat bran, from dry milling, at plant // glo; Articulated lorry transport, Total weight >32 t, mix Euro 0-5; ROW w/o EU+EFTA
- km_22: 7.00003
  Distance in km, for wheat bran, from dry milling, at plant // glo; Articulated lorry transport, Total weight >32 t, mix Euro 0-5; ROW w/o EU+EFTA
- kg_km_22: 3460.99; = kg_22*km_22
  Transport amount in km*km, for wheat bran, from dry milling, at plant // glo; Articulated lorry transport, Total weight >32 t, mix Euro 0-5; ROW w/o EU+EFTA
- kg_23: 60.191
  Mass in kg, for sugar cane molasses, from sugar production, at plant // glo; Articulated lorry transport, Total weight >32 t, mix Euro 0-5; ROW w/o EU+EFTA
- km_23: 7.00003
  Distance in km, for sugar cane molasses, from sugar production, at plant // glo; Articulated lorry transport, Total weight >32 t, mix Euro 0-5; ROW w/o EU+EFTA
- kg_km_23: 421.338; = kg_23*km_23
  Transport amount in km*km, for sugar cane molasses, from sugar production, at plant // glo; Articulated lorry transport, Total weight >32 t, mix Euro 0-5; ROW w/o EU+EFTA
- kg_24: 81.6877
  Mass in kg, for sugar beet pulp, dried, from pulp drying, at plant // rer; Articulated lorry transport, Total weight >32 t, mix Euro 0-5; ROW w/o EU+EFTA
- km_24: 7.00003
  Distance in km, for sugar beet pulp, dried, from pulp drying, at plant // rer; Articulated lorry transport, Total weight >32 t, mix Euro 0-5; ROW w/o EU+EFTA
- kg_km_24: 571.816; = kg_24*km_24
  Transport amount in km*km, for sugar beet pulp, dried, from pulp drying, at plant // rer; Articulated lorry transport, Total weight >32 t, mix Euro 0-5; ROW w/o EU+EFTA
- kg_25: 2.14968
  Mass in kg, for pea, production mix, at farm // glo; Articulated lorry transport, Total weight >32 t, mix Euro 0-5; ROW w/o EU+EFTA
- km_25: 7.00003
  Distance in km, for pea, production mix, at farm // glo; Articulated lorry transport, Total weight >32 t, mix Euro 0-5; ROW w/o EU+EFTA
- kg_km_25: 15.0478; = kg_25*km_25
  Transport amount in km*km, for pea, production mix, at farm // glo; Articulated lorry transport, Total weight >32 t, mix Euro 0-5; ROW w/o EU+EFTA
- kg_26: 42.9935
  Mass in kg, for groundnut meal, from crushing, at plant // glo; Articulated lorry transport, Total weight >32 t, mix Euro 0-5; ROW w/o EU+EFTA
- km_26: 7.00003
  Distance in km, for groundnut meal, from crushing, at plant // glo; Articulated lorry transport, Total weight >32 t, mix Euro 0-5; ROW w/o EU+EFTA
- kg_km_26: 300.956; = kg_26*km_26
  Transport amount in km*km, for groundnut meal, from crushing, at plant // glo; Articulated lorry transport, Total weight >32 t, mix Euro 0-5; ROW w/o EU+EFTA
- kg_27: 419.187
  Mass in kg, for rapeseed meal, from crushing (solvent), at plant // glo; Articulated lorry transport, Total weight >32 t, mix Euro 0-5; ROW w/o EU+EFTA
- km_27: 7.00003
  Distance in km, for rapeseed meal, from crushing (solvent), at plant // glo; Articulated lorry transport, Total weight >32 t, mix Euro 0-5; ROW w/o EU+EFTA
- kg_km_27: 2934.32; = kg_27*km_27
  Transport amount in km*km, for rapeseed meal, from crushing (solvent), at plant // glo; Articulated lorry transport, Total weight >32 t, mix Euro 0-5; ROW w/o EU+EFTA
- kg_28: 268.71
  Mass in kg, for soybean meal, from crushing (solvent), at plant // glo; Articulated lorry transport, Total weight >32 t, mix Euro 0-5; ROW w/o EU+EFTA
- km_28: 7.00003
  Distance in km, for soybean meal, from crushing (solvent), at plant // glo; Articulated lorry transport, Total weight >32 t, mix Euro 0-5; ROW w/o EU+EFTA
- kg_km_28: 1880.98; = kg_28*km_28
  Transport amount in km*km, for soybean meal, from crushing (solvent), at plant // glo; Articulated lorry transport, Total weight >32 t, mix Euro 0-5; ROW w/o EU+EFTA
- kg_29: 23.6465
  Mass in kg, for sunflower seed meal, from crushing (solvent), at plant // glo; Articulated lorry transport, Total weight >32 t, mix Euro 0-5; ROW w/o EU+EFTA
- km_29: 7.00003
  Distance in km, for sunflower seed meal, from crushing (solvent), at plant // glo; Articulated lorry transport, Total weight >32 t, mix Euro 0-5; ROW w/o EU+EFTA
- kg_km_29: 165.526; = kg_29*km_29
  Transport amount in km*km, for sunflower seed meal, from crushing (solvent), at plant // glo; Articulated lorry transport, Total weight >32 t, mix Euro 0-5; ROW w/o EU+EFTA
- kg_30: 4.29935
  Mass in kg, for soybean, production mix, at farm // glo; Articulated lorry transport, Total weight >32 t, mix Euro 0-5; ROW w/o EU+EFTA
- km_30: 7.00003
  Distance in km, for soybean, production mix, at farm // glo; Articulated lorry transport, Total weight >32 t, mix Euro 0-5; ROW w/o EU+EFTA
- kg_km_30: 30.0956; = kg_30*km_30
  Transport amount in km*km, for soybean, production mix, at farm // glo; Articulated lorry transport, Total weight >32 t, mix Euro 0-5; ROW w/o EU+EFTA
- kg_31: 70.9394
  Mass in kg, for lime fertilizer 5% mgo, per kg substance, production mix, at plant // lime fertilizer 5% mgo, per kg substance // glo; Articulated lorry transport, Total weight >32 t, mix Euro 0-5; ROW w/o EU+EFTA
- km_31: 7.00003
  Distance in km, for lime fertilizer 5% mgo, per kg substance, production mix, at plant // lime fertilizer 5% mgo, per kg substance // glo; Articulated lorry transport, Total weight >32 t, mix Euro 0-5; ROW w/o EU+EFTA
- kg_km_31: 496.577; = kg_31*km_31
  Transport amount in km*km, for lime fertilizer 5% mgo, per kg substance, production mix, at plant // lime fertilizer 5% mgo, per kg substance // glo; Articulated lorry transport, Total weight >32 t, mix Euro 0-5; ROW w/o EU+EFTA
- kg_32: 2.14968
  Mass in kg, for potassium carbonate // potassium carbonate production // eu+efta+uk; Articulated lorry transport, Total weight >32 t, mix Euro 0-5; ROW w/o EU+EFTA
- km_32: 7.00003
  Distance in km, for potassium carbonate // potassium carbonate production // eu+efta+uk; Articulated lorry transport, Total weight >32 t, mix Euro 0-5; ROW w/o EU+EFTA
- kg_km_32: 15.0478; = kg_32*km_32
  Transport amount in km*km, for potassium carbonate // potassium carbonate production // eu+efta+uk; Articulated lorry transport, Total weight >32 t, mix Euro 0-5; ROW w/o EU+EFTA
- kg_33: 17.1974
  Mass in kg, for citrus pulp dried, from drying, at plant // glo; Articulated lorry transport, Total weight >32 t, mix Euro 0-5; ROW w/o EU+EFTA
- km_33: 7.00003
  Distance in km, for citrus pulp dried, from drying, at plant // glo; Articulated lorry transport, Total weight >32 t, mix Euro 0-5; ROW w/o EU+EFTA
- kg_km_33: 120.382; = kg_33*km_33
  Transport amount in km*km, for citrus pulp dried, from drying, at plant // glo; Articulated lorry transport, Total weight >32 t, mix Euro 0-5; ROW w/o EU+EFTA
- kg_34: 21.4968
  Mass in kg, for magnesium oxide // magnesium oxide // glo; Articulated lorry transport, Total weight >32 t, mix Euro 0-5; ROW w/o EU+EFTA
- km_34: 7.00003
  Distance in km, for magnesium oxide // magnesium oxide // glo; Articulated lorry transport, Total weight >32 t, mix Euro 0-5; ROW w/o EU+EFTA
- kg_km_34: 150.478; = kg_34*km_34
  Transport amount in km*km, for magnesium oxide // magnesium oxide // glo; Articulated lorry transport, Total weight >32 t, mix Euro 0-5; ROW w/o EU+EFTA
- kg_35: 3899.05
  Mass in kg, for straw // wheat production // row; Articulated lorry transport, Total weight >32 t, mix Euro 0-5; ROW w/o EU+EFTA
- km_35: 7.00003
  Distance in km, for straw // wheat production // row; Articulated lorry transport, Total weight >32 t, mix Euro 0-5; ROW w/o EU+EFTA
- kg_km_35: 27293.5; = kg_35*km_35
  Transport amount in km*km, for straw // wheat production // row; Articulated lorry transport, Total weight >32 t, mix Euro 0-5; ROW w/o EU+EFTA
- kg_36: 2213.36
  Mass in kg, for alfalfa // alfalfa // glo; Freight train, average; EU+EFTA+UK
- km_36: 4.03202
  Distance in km, for alfalfa // alfalfa // glo; Freight train, average; EU+EFTA+UK
- kg_km_36: 8924.31; = kg_36*km_36
  Transport amount in km*km, for alfalfa // alfalfa // glo; Freight train, average; EU+EFTA+UK
- kg_37: 1370.34
  Mass in kg, for barley grain // barley grain // eu+efta+uk; Freight train, average; EU+EFTA+UK
- km_37: 4.03202
  Distance in km, for barley grain // barley grain // eu+efta+uk; Freight train, average; EU+EFTA+UK
- kg_km_37: 5525.22; = kg_37*km_37
  Transport amount in km*km, for barley grain // barley grain // eu+efta+uk; Freight train, average; EU+EFTA+UK
- kg_38: 81.6877
  Mass in kg, for wheat grain, production mix, at farm // glo; Freight train, average; EU+EFTA+UK
- km_38: 4.03202
  Distance in km, for wheat grain, production mix, at farm // glo; Freight train, average; EU+EFTA+UK
- kg_km_38: 329.366; = kg_38*km_38
  Transport amount in km*km, for wheat grain, production mix, at farm // glo; Freight train, average; EU+EFTA+UK
- kg_39: 1569.05
  Mass in kg, for maize, production mix, at farm // glo; Freight train, average; EU+EFTA+UK
- km_39: 4.03202
  Distance in km, for maize, production mix, at farm // glo; Freight train, average; EU+EFTA+UK
- kg_km_39: 6326.45; = kg_39*km_39
  Transport amount in km*km, for maize, production mix, at farm // glo; Freight train, average; EU+EFTA+UK
- kg_40: 10.7484
  Mass in kg, for oat grain, production mix, at farm // glo; Freight train, average; EU+EFTA+UK
- km_40: 4.03202
  Distance in km, for oat grain, production mix, at farm // glo; Freight train, average; EU+EFTA+UK
- kg_km_40: 43.3377; = kg_40*km_40
  Transport amount in km*km, for oat grain, production mix, at farm // glo; Freight train, average; EU+EFTA+UK
- kg_41: 148.328
  Mass in kg, for maize gluten feed, from wet milling (glutenfeed production, with drying), at plant // glo; Freight train, average; EU+EFTA+UK
- km_41: 4.03202
  Distance in km, for maize gluten feed, from wet milling (glutenfeed production, with drying), at plant // glo; Freight train, average; EU+EFTA+UK
- kg_km_41: 598.06; = kg_41*km_41
  Transport amount in km*km, for maize gluten feed, from wet milling (glutenfeed production, with drying), at plant // glo; Freight train, average; EU+EFTA+UK
- kg_42: 494.426
  Mass in kg, for wheat bran, from dry milling, at plant // glo; Freight train, average; EU+EFTA+UK
- km_42: 4.03202
  Distance in km, for wheat bran, from dry milling, at plant // glo; Freight train, average; EU+EFTA+UK
- kg_km_42: 1993.53; = kg_42*km_42
  Transport amount in km*km, for wheat bran, from dry milling, at plant // glo; Freight train, average; EU+EFTA+UK
- kg_43: 60.191
  Mass in kg, for sugar cane molasses, from sugar production, at plant // glo; Freight train, average; EU+EFTA+UK
- km_43: 4.03202
  Distance in km, for sugar cane molasses, from sugar production, at plant // glo; Freight train, average; EU+EFTA+UK
- kg_km_43: 242.691; = kg_43*km_43
  Transport amount in km*km, for sugar cane molasses, from sugar production, at plant // glo; Freight train, average; EU+EFTA+UK
- kg_44: 81.6877
  Mass in kg, for sugar beet pulp, dried, from pulp drying, at plant // rer; Freight train, average; EU+EFTA+UK
- km_44: 4.03202
  Distance in km, for sugar beet pulp, dried, from pulp drying, at plant // rer; Freight train, average; EU+EFTA+UK
- kg_km_44: 329.366; = kg_44*km_44
  Transport amount in km*km, for sugar beet pulp, dried, from pulp drying, at plant // rer; Freight train, average; EU+EFTA+UK
- kg_45: 2.14968
  Mass in kg, for pea, production mix, at farm // glo; Freight train, average; EU+EFTA+UK
- km_45: 4.03202
  Distance in km, for pea, production mix, at farm // glo; Freight train, average; EU+EFTA+UK
- kg_km_45: 8.66753; = kg_45*km_45
  Transport amount in km*km, for pea, production mix, at farm // glo; Freight train, average; EU+EFTA+UK
- kg_46: 42.9935
  Mass in kg, for groundnut meal, from crushing, at plant // glo; Freight train, average; EU+EFTA+UK
- km_46: 4.03202
  Distance in km, for groundnut meal, from crushing, at plant // glo; Freight train, average; EU+EFTA+UK
- kg_km_46: 173.351; = kg_46*km_46
  Transport amount in km*km, for groundnut meal, from crushing, at plant // glo; Freight train, average; EU+EFTA+UK
- kg_47: 419.187
  Mass in kg, for rapeseed meal, from crushing (solvent), at plant // glo; Freight train, average; EU+EFTA+UK
- km_47: 4.03202
  Distance in km, for rapeseed meal, from crushing (solvent), at plant // glo; Freight train, average; EU+EFTA+UK
- kg_km_47: 1690.17; = kg_47*km_47
  Transport amount in km*km, for rapeseed meal, from crushing (solvent), at plant // glo; Freight train, average; EU+EFTA+UK
- kg_48: 268.71
  Mass in kg, for soybean meal, from crushing (solvent), at plant // glo; Freight train, average; EU+EFTA+UK
- km_48: 4.03202
  Distance in km, for soybean meal, from crushing (solvent), at plant // glo; Freight train, average; EU+EFTA+UK
- kg_km_48: 1083.44; = kg_48*km_48
  Transport amount in km*km, for soybean meal, from crushing (solvent), at plant // glo; Freight train, average; EU+EFTA+UK
- kg_49: 23.6465
  Mass in kg, for sunflower seed meal, from crushing (solvent), at plant // glo; Freight train, average; EU+EFTA+UK
- km_49: 4.03202
  Distance in km, for sunflower seed meal, from crushing (solvent), at plant // glo; Freight train, average; EU+EFTA+UK
- kg_km_49: 95.3429; = kg_49*km_49
  Transport amount in km*km, for sunflower seed meal, from crushing (solvent), at plant // glo; Freight train, average; EU+EFTA+UK
- kg_50: 4.29935
  Mass in kg, for soybean, production mix, at farm // glo; Freight train, average; EU+EFTA+UK
- km_50: 4.03202
  Distance in km, for soybean, production mix, at farm // glo; Freight train, average; EU+EFTA+UK
- kg_km_50: 17.3351; = kg_50*km_50
  Transport amount in km*km, for soybean, production mix, at farm // glo; Freight train, average; EU+EFTA+UK
- kg_51: 70.9394
  Mass in kg, for lime fertilizer 5% mgo, per kg substance, production mix, at plant // lime fertilizer 5% mgo, per kg substance // glo; Freight train, average; EU+EFTA+UK
- km_51: 4.03202
  Distance in km, for lime fertilizer 5% mgo, per kg substance, production mix, at plant // lime fertilizer 5% mgo, per kg substance // glo; Freight train, average; EU+EFTA+UK
- kg_km_51: 286.029; = kg_51*km_51
  Transport amount in km*km, for lime fertilizer 5% mgo, per kg substance, production mix, at plant // lime fertilizer 5% mgo, per kg substance // glo; Freight train, average; EU+EFTA+UK
- kg_52: 2.14968
  Mass in kg, for potassium carbonate // potassium carbonate production // eu+efta+uk; Freight train, average; EU+EFTA+UK
- km_52: 4.03202
  Distance in km, for potassium carbonate // potassium carbonate production // eu+efta+uk; Freight train, average; EU+EFTA+UK
- kg_km_52: 8.66753; = kg_52*km_52
  Transport amount in km*km, for potassium carbonate // potassium carbonate production // eu+efta+uk; Freight train, average; EU+EFTA+UK
- kg_53: 17.1974
  Mass in kg, for citrus pulp dried, from drying, at plant // glo; Freight train, average; EU+EFTA+UK
- km_53: 4.03202
  Distance in km, for citrus pulp dried, from drying, at plant // glo; Freight train, average; EU+EFTA+UK
- kg_km_53: 69.3403; = kg_53*km_53
  Transport amount in km*km, for citrus pulp dried, from drying, at plant // glo; Freight train, average; EU+EFTA+UK
- kg_54: 21.4968
  Mass in kg, for magnesium oxide // magnesium oxide // glo; Freight train, average; EU+EFTA+UK
- km_54: 4.03202
  Distance in km, for magnesium oxide // magnesium oxide // glo; Freight train, average; EU+EFTA+UK
- kg_km_54: 86.6753; = kg_54*km_54
  Transport amount in km*km, for magnesium oxide // magnesium oxide // glo; Freight train, average; EU+EFTA+UK
- kg_55: 3899.05
  Mass in kg, for straw // wheat production // row; Freight train, average; EU+EFTA+UK
- km_55: 4.03202
  Distance in km, for straw // wheat production // row; Freight train, average; EU+EFTA+UK
- kg_km_55: 15721; = kg_55*km_55
  Transport amount in km*km, for straw // wheat production // row; Freight train, average; EU+EFTA+UK
- kg_56: 2213.36
  Mass in kg, for alfalfa // alfalfa // glo; Transoceanic ship, containers; GLO
- km_56: 20.7761
  Distance in km, for alfalfa // alfalfa // glo; Transoceanic ship, containers; GLO
- kg_km_56: 45985; = kg_56*km_56
  Transport amount in km*km, for alfalfa // alfalfa // glo; Transoceanic ship, containers; GLO
- kg_57: 1370.34
  Mass in kg, for barley grain // barley grain // eu+efta+uk; Transoceanic ship, containers; GLO
- km_57: 20.7761
  Distance in km, for barley grain // barley grain // eu+efta+uk; Transoceanic ship, containers; GLO
- kg_km_57: 28470.2; = kg_57*km_57
  Transport amount in km*km, for barley grain // barley grain // eu+efta+uk; Transoceanic ship, containers; GLO
- kg_58: 81.6877
  Mass in kg, for wheat grain, production mix, at farm // glo; Transoceanic ship, containers; GLO
- km_58: 20.7761
  Distance in km, for wheat grain, production mix, at farm // glo; Transoceanic ship, containers; GLO
- kg_km_58: 1697.15; = kg_58*km_58
  Transport amount in km*km, for wheat grain, production mix, at farm // glo; Transoceanic ship, containers; GLO
- kg_59: 1569.05
  Mass in kg, for maize, production mix, at farm // glo; Transoceanic ship, containers; GLO
- km_59: 20.7761
  Distance in km, for maize, production mix, at farm // glo; Transoceanic ship, containers; GLO
- kg_km_59: 32598.8; = kg_59*km_59
  Transport amount in km*km, for maize, production mix, at farm // glo; Transoceanic ship, containers; GLO
- kg_60: 10.7484
  Mass in kg, for oat grain, production mix, at farm // glo; Transoceanic ship, containers; GLO
- km_60: 20.7761
  Distance in km, for oat grain, production mix, at farm // glo; Transoceanic ship, containers; GLO
- kg_km_60: 223.309; = kg_60*km_60
  Transport amount in km*km, for oat grain, production mix, at farm // glo; Transoceanic ship, containers; GLO
- kg_61: 148.328
  Mass in kg, for maize gluten feed, from wet milling (glutenfeed production, with drying), at plant // glo; Transoceanic ship, containers; GLO
- km_61: 20.7761
  Distance in km, for maize gluten feed, from wet milling (glutenfeed production, with drying), at plant // glo; Transoceanic ship, containers; GLO
- kg_km_61: 3081.67; = kg_61*km_61
  Transport amount in km*km, for maize gluten feed, from wet milling (glutenfeed production, with drying), at plant // glo; Transoceanic ship, containers; GLO
- kg_62: 494.426
  Mass in kg, for wheat bran, from dry milling, at plant // glo; Transoceanic ship, containers; GLO
- km_62: 20.7761
  Distance in km, for wheat bran, from dry milling, at plant // glo; Transoceanic ship, containers; GLO
- kg_km_62: 10272.2; = kg_62*km_62
  Transport amount in km*km, for wheat bran, from dry milling, at plant // glo; Transoceanic ship, containers; GLO
- kg_63: 60.191
  Mass in kg, for sugar cane molasses, from sugar production, at plant // glo; Transoceanic ship, containers; GLO
- km_63: 20.7761
  Distance in km, for sugar cane molasses, from sugar production, at plant // glo; Transoceanic ship, containers; GLO
- kg_km_63: 1250.53; = kg_63*km_63
  Transport amount in km*km, for sugar cane molasses, from sugar production, at plant // glo; Transoceanic ship, containers; GLO
- kg_64: 81.6877
  Mass in kg, for sugar beet pulp, dried, from pulp drying, at plant // rer; Transoceanic ship, containers; GLO
- km_64: 20.7761
  Distance in km, for sugar beet pulp, dried, from pulp drying, at plant // rer; Transoceanic ship, containers; GLO
- kg_km_64: 1697.15; = kg_64*km_64
  Transport amount in km*km, for sugar beet pulp, dried, from pulp drying, at plant // rer; Transoceanic ship, containers; GLO
- kg_65: 2.14968
  Mass in kg, for pea, production mix, at farm // glo; Transoceanic ship, containers; GLO
- km_65: 20.7761
  Distance in km, for pea, production mix, at farm // glo; Transoceanic ship, containers; GLO
- kg_km_65: 44.6619; = kg_65*km_65
  Transport amount in km*km, for pea, production mix, at farm // glo; Transoceanic ship, containers; GLO
- kg_66: 42.9935
  Mass in kg, for groundnut meal, from crushing, at plant // glo; Transoceanic ship, containers; GLO
- km_66: 20.7761
  Distance in km, for groundnut meal, from crushing, at plant // glo; Transoceanic ship, containers; GLO
- kg_km_66: 893.237; = kg_66*km_66
  Transport amount in km*km, for groundnut meal, from crushing, at plant // glo; Transoceanic ship, containers; GLO
- kg_67: 419.187
  Mass in kg, for rapeseed meal, from crushing (solvent), at plant // glo; Transoceanic ship, containers; GLO
- km_67: 20.7761
  Distance in km, for rapeseed meal, from crushing (solvent), at plant // glo; Transoceanic ship, containers; GLO
- kg_km_67: 8709.07; = kg_67*km_67
  Transport amount in km*km, for rapeseed meal, from crushing (solvent), at plant // glo; Transoceanic ship, containers; GLO
- kg_68: 268.71
  Mass in kg, for soybean meal, from crushing (solvent), at plant // glo; Transoceanic ship, containers; GLO
- km_68: 20.7761
  Distance in km, for soybean meal, from crushing (solvent), at plant // glo; Transoceanic ship, containers; GLO
- kg_km_68: 5582.73; = kg_68*km_68
  Transport amount in km*km, for soybean meal, from crushing (solvent), at plant // glo; Transoceanic ship, containers; GLO
- kg_69: 23.6465
  Mass in kg, for sunflower seed meal, from crushing (solvent), at plant // glo; Transoceanic ship, containers; GLO
- km_69: 20.7761
  Distance in km, for sunflower seed meal, from crushing (solvent), at plant // glo; Transoceanic ship, containers; GLO
- kg_km_69: 491.281; = kg_69*km_69
  Transport amount in km*km, for sunflower seed meal, from crushing (solvent), at plant // glo; Transoceanic ship, containers; GLO
- kg_70: 4.29935
  Mass in kg, for soybean, production mix, at farm // glo; Transoceanic ship, containers; GLO
- km_70: 20.7761
  Distance in km, for soybean, production mix, at farm // glo; Transoceanic ship, containers; GLO
- kg_km_70: 89.3237; = kg_70*km_70
  Transport amount in km*km, for soybean, production mix, at farm // glo; Transoceanic ship, containers; GLO
- kg_71: 70.9394
  Mass in kg, for lime fertilizer 5% mgo, per kg substance, production mix, at plant // lime fertilizer 5% mgo, per kg substance // glo; Transoceanic ship, containers; GLO
- km_71: 20.7761
  Distance in km, for lime fertilizer 5% mgo, per kg substance, production mix, at plant // lime fertilizer 5% mgo, per kg substance // glo; Transoceanic ship, containers; GLO
- kg_km_71: 1473.84; = kg_71*km_71
  Transport amount in km*km, for lime fertilizer 5% mgo, per kg substance, production mix, at plant // lime fertilizer 5% mgo, per kg substance // glo; Transoceanic ship, containers; GLO
- kg_72: 2.14968
  Mass in kg, for potassium carbonate // potassium carbonate production // eu+efta+uk; Transoceanic ship, containers; GLO
- km_72: 20.7761
  Distance in km, for potassium carbonate // potassium carbonate production // eu+efta+uk; Transoceanic ship, containers; GLO
- kg_km_72: 44.6619; = kg_72*km_72
  Transport amount in km*km, for potassium carbonate // potassium carbonate production // eu+efta+uk; Transoceanic ship, containers; GLO
- kg_73: 17.1974
  Mass in kg, for citrus pulp dried, from drying, at plant // glo; Transoceanic ship, containers; GLO
- km_73: 20.7761
  Distance in km, for citrus pulp dried, from drying, at plant // glo; Transoceanic ship, containers; GLO
- kg_km_73: 357.295; = kg_73*km_73
  Transport amount in km*km, for citrus pulp dried, from drying, at plant // glo; Transoceanic ship, containers; GLO
- kg_74: 21.4968
  Mass in kg, for magnesium oxide // magnesium oxide // glo; Transoceanic ship, containers; GLO
- km_74: 20.7761
  Distance in km, for magnesium oxide // magnesium oxide // glo; Transoceanic ship, containers; GLO
- kg_km_74: 446.619; = kg_74*km_74
  Transport amount in km*km, for magnesium oxide // magnesium oxide // glo; Transoceanic ship, containers; GLO
- kg_75: 3899.05
  Mass in kg, for straw // wheat production // row; Transoceanic ship, containers; GLO
- km_75: 20.7761
  Distance in km, for straw // wheat production // row; Transoceanic ship, containers; GLO
- kg_km_75: 81007; = kg_75*km_75
  Transport amount in km*km, for straw // wheat production // row; Transoceanic ship, containers; GLO

## Reference product
- cashmere fiber (raw), at rangeland // cashmere fiber // mn: 1

## Inputs
- Transport of alfalfa-grass silage by Articulated lorry transport, Euro 4, Total weight >32 t - EU+EFTA+UK: 158269; = kg_km_0
- Transport of alfalfa-grass silage by Articulated lorry transport, Total weight >32 t, mix Euro 0-5 - ROW w/o EU+EFTA: 417704; = kg_km_1
- Electricity from Electricity grid mix 1kV-60kV - AU: 0.2118
- Electricity from Electricity grid mix 1kV-60kV - NZ: 0.0404
- Electricity from Electricity grid mix 1kV-60kV - RAF: 0.6819
- Electricity from Electricity grid mix 1kV-60kV - RAS w/o CN: 9.8053
- Electricity from Electricity grid mix 1kV-60kV - RNA: 4.5665
- Electricity from Electricity grid mix 1kV-60kV - RSA: 1.5495
- Electricity from Electricity grid mix 1kV-60kV - RU: 0.9131
- Transport of hay by Transoceanic ship, containers - GLO: 2.74784e6; = kg_km_2
- Transport of hay by Freight train, diesel traction - EU+EFTA+UK: 212162; = kg_km_3
- Transport of hay by Freight train, electricity traction - EU+EFTA+UK: 72168.8; = kg_km_4
- Transport of hay by Freight train, average - EU+EFTA+UK: 1702.13; = kg_km_5
- Transport of hay by Barge - EU+EFTA+UK: 58636.2; = kg_km_6
- Transport of hay by Barge - ROW w/o EU+EFTA: 119732; = kg_km_7
- Transport of hay by Articulated lorry transport, Euro 4, Total weight >32 t - EU+EFTA+UK: 245802; = kg_km_8
- Transport of hay by Articulated lorry transport, Total weight >32 t, mix Euro 0-5 - ROW w/o EU+EFTA: 648719; = kg_km_9
- Thermal energy (MJ) from Thermal energy from natural gas - ROW: 158.646
- Transport of palm oil, refined by Freight train, diesel traction - EU+EFTA+UK: 342.977; = kg_km_10
- Transport of palm oil, refined by Freight train, electricity traction - EU+EFTA+UK: 116.667; = kg_km_11
- Transport of palm oil, refined by Freight train, average - EU+EFTA+UK: 2.75164; = kg_km_12
- Transport of palm oil, refined by Articulated lorry transport, Total weight <7.5 t, mix Euro 0-5 - EU+EFTA+UK: 58.2437; = kg_km_13
- Transport of palm oil, refined by Articulated lorry transport, Euro 4, Total weight >32 t - EU+EFTA+UK: 544.214; = kg_km_14
- Transport of palm oil, refined by Articulated lorry transport, Total weight >32 t, mix Euro 0-5 - ROW w/o EU+EFTA: 1436.28; = kg_km_15
- Transport of alfalfa // alfalfa // glo by Articulated lorry transport, Total weight >32 t, mix Euro 0-5 - ROW w/o EU+EFTA: 15493.6; = kg_km_16
- Transport of barley grain // barley grain // eu+efta+uk by Articulated lorry transport, Total weight >32 t, mix Euro 0-5 - ROW w/o EU+EFTA: 9592.4; = kg_km_17
- Transport of wheat grain, production mix, at farm // glo by Articulated lorry transport, Total weight >32 t, mix Euro 0-5 - ROW w/o EU+EFTA: 571.816; = kg_km_18
- Transport of maize, production mix, at farm // glo by Articulated lorry transport, Total weight >32 t, mix Euro 0-5 - ROW w/o EU+EFTA: 10983.4; = kg_km_19
- Transport of oat grain, production mix, at farm // glo by Articulated lorry transport, Total weight >32 t, mix Euro 0-5 - ROW w/o EU+EFTA: 75.239; = kg_km_20
- Transport of maize gluten feed, from wet milling (glutenfeed production, with drying), at plant // glo by Articulated lorry transport, Total weight >32 t, mix Euro 0-5 - ROW w/o EU+EFTA: 1038.3; = kg_km_21
- Transport of wheat bran, from dry milling, at plant // glo by Articulated lorry transport, Total weight >32 t, mix Euro 0-5 - ROW w/o EU+EFTA: 3460.99; = kg_km_22
- Transport of sugar cane molasses, from sugar production, at plant // glo by Articulated lorry transport, Total weight >32 t, mix Euro 0-5 - ROW w/o EU+EFTA: 421.338; = kg_km_23
- Transport of sugar beet pulp, dried, from pulp drying, at plant // rer by Articulated lorry transport, Total weight >32 t, mix Euro 0-5 - ROW w/o EU+EFTA: 571.816; = kg_km_24
- Transport of pea, production mix, at farm // glo by Articulated lorry transport, Total weight >32 t, mix Euro 0-5 - ROW w/o EU+EFTA: 15.0478; = kg_km_25
- Transport of groundnut meal, from crushing, at plant // glo by Articulated lorry transport, Total weight >32 t, mix Euro 0-5 - ROW w/o EU+EFTA: 300.956; = kg_km_26
- Transport of rapeseed meal, from crushing (solvent), at plant // glo by Articulated lorry transport, Total weight >32 t, mix Euro 0-5 - ROW w/o EU+EFTA: 2934.32; = kg_km_27
- Transport of soybean meal, from crushing (solvent), at plant // glo by Articulated lorry transport, Total weight >32 t, mix Euro 0-5 - ROW w/o EU+EFTA: 1880.98; = kg_km_28
- Transport of sunflower seed meal, from crushing (solvent), at plant // glo by Articulated lorry transport, Total weight >32 t, mix Euro 0-5 - ROW w/o EU+EFTA: 165.526; = kg_km_29
- Transport of soybean, production mix, at farm // glo by Articulated lorry transport, Total weight >32 t, mix Euro 0-5 - ROW w/o EU+EFTA: 30.0956; = kg_km_30
- Transport of lime fertilizer 5% mgo, per kg substance, production mix, at plant // lime fertilizer 5% mgo, per kg substance // glo by Articulated lorry transport, Total weight >32 t, mix Euro 0-5 - ROW w/o EU+EFTA: 496.577; = kg_km_31
- Transport of potassium carbonate // potassium carbonate production // eu+efta+uk by Articulated lorry transport, Total weight >32 t, mix Euro 0-5 - ROW w/o EU+EFTA: 15.0478; = kg_km_32
- Transport of citrus pulp dried, from drying, at plant // glo by Articulated lorry transport, Total weight >32 t, mix Euro 0-5 - ROW w/o EU+EFTA: 120.382; = kg_km_33
- Transport of magnesium oxide // magnesium oxide // glo by Articulated lorry transport, Total weight >32 t, mix Euro 0-5 - ROW w/o EU+EFTA: 150.478; = kg_km_34
- Transport of straw // wheat production // row by Articulated lorry transport, Total weight >32 t, mix Euro 0-5 - ROW w/o EU+EFTA: 27293.5; = kg_km_35
- Transport of alfalfa // alfalfa // glo by Freight train, average - EU+EFTA+UK: 8924.31; = kg_km_36
- Transport of barley grain // barley grain // eu+efta+uk by Freight train, average - EU+EFTA+UK: 5525.22; = kg_km_37
- Transport of wheat grain, production mix, at farm // glo by Freight train, average - EU+EFTA+UK: 329.366; = kg_km_38
- Transport of maize, production mix, at farm // glo by Freight train, average - EU+EFTA+UK: 6326.45; = kg_km_39
- Transport of oat grain, production mix, at farm // glo by Freight train, average - EU+EFTA+UK: 43.3377; = kg_km_40
- Transport of maize gluten feed, from wet milling (glutenfeed production, with drying), at plant // glo by Freight train, average - EU+EFTA+UK: 598.06; = kg_km_41
- Transport of wheat bran, from dry milling, at plant // glo by Freight train, average - EU+EFTA+UK: 1993.53; = kg_km_42
- Transport of sugar cane molasses, from sugar production, at plant // glo by Freight train, average - EU+EFTA+UK: 242.691; = kg_km_43
- Transport of sugar beet pulp, dried, from pulp drying, at plant // rer by Freight train, average - EU+EFTA+UK: 329.366; = kg_km_44
- Transport of pea, production mix, at farm // glo by Freight train, average - EU+EFTA+UK: 8.66753; = kg_km_45
- Transport of groundnut meal, from crushing, at plant // glo by Freight train, average - EU+EFTA+UK: 173.351; = kg_km_46
- Transport of rapeseed meal, from crushing (solvent), at plant // glo by Freight train, average - EU+EFTA+UK: 1690.17; = kg_km_47
- Transport of soybean meal, from crushing (solvent), at plant // glo by Freight train, average - EU+EFTA+UK: 1083.44; = kg_km_48
- Transport of sunflower seed meal, from crushing (solvent), at plant // glo by Freight train, average - EU+EFTA+UK: 95.3429; = kg_km_49
- Transport of soybean, production mix, at farm // glo by Freight train, average - EU+EFTA+UK: 17.3351; = kg_km_50
- Transport of lime fertilizer 5% mgo, per kg substance, production mix, at plant // lime fertilizer 5% mgo, per kg substance // glo by Freight train, average - EU+EFTA+UK: 286.029; = kg_km_51
- Transport of potassium carbonate // potassium carbonate production // eu+efta+uk by Freight train, average - EU+EFTA+UK: 8.66753; = kg_km_52
- Transport of citrus pulp dried, from drying, at plant // glo by Freight train, average - EU+EFTA+UK: 69.3403; = kg_km_53
- Transport of magnesium oxide // magnesium oxide // glo by Freight train, average - EU+EFTA+UK: 86.6753; = kg_km_54
- Transport of straw // wheat production // row by Freight train, average - EU+EFTA+UK: 15721; = kg_km_55
- Transport of alfalfa // alfalfa // glo by Transoceanic ship, containers - GLO: 45985; = kg_km_56
- Transport of barley grain // barley grain // eu+efta+uk by Transoceanic ship, containers - GLO: 28470.2; = kg_km_57
- Transport of wheat grain, production mix, at farm // glo by Transoceanic ship, containers - GLO: 1697.15; = kg_km_58
- Transport of maize, production mix, at farm // glo by Transoceanic ship, containers - GLO: 32598.8; = kg_km_59
- Transport of oat grain, production mix, at farm // glo by Transoceanic ship, containers - GLO: 223.309; = kg_km_60
- Transport of maize gluten feed, from wet milling (glutenfeed production, with drying), at plant // glo by Transoceanic ship, containers - GLO: 3081.67; = kg_km_61
- Transport of wheat bran, from dry milling, at plant // glo by Transoceanic ship, containers - GLO: 10272.2; = kg_km_62
- Transport of sugar cane molasses, from sugar production, at plant // glo by Transoceanic ship, containers - GLO: 1250.53; = kg_km_63
- Transport of sugar beet pulp, dried, from pulp drying, at plant // rer by Transoceanic ship, containers - GLO: 1697.15; = kg_km_64
- Transport of pea, production mix, at farm // glo by Transoceanic ship, containers - GLO: 44.6619; = kg_km_65
- Transport of groundnut meal, from crushing, at plant // glo by Transoceanic ship, containers - GLO: 893.237; = kg_km_66
- Transport of rapeseed meal, from crushing (solvent), at plant // glo by Transoceanic ship, containers - GLO: 8709.07; = kg_km_67
- Transport of soybean meal, from crushing (solvent), at plant // glo by Transoceanic ship, containers - GLO: 5582.73; = kg_km_68
- Transport of sunflower seed meal, from crushing (solvent), at plant // glo by Transoceanic ship, containers - GLO: 491.281; = kg_km_69
- Transport of soybean, production mix, at farm // glo by Transoceanic ship, containers - GLO: 89.3237; = kg_km_70
- Transport of lime fertilizer 5% mgo, per kg substance, production mix, at plant // lime fertilizer 5% mgo, per kg substance // glo by Transoceanic ship, containers - GLO: 1473.84; = kg_km_71
- Transport of potassium carbonate // potassium carbonate production // eu+efta+uk by Transoceanic ship, containers - GLO: 44.6619; = kg_km_72
- Transport of citrus pulp dried, from drying, at plant // glo by Transoceanic ship, containers - GLO: 357.295; = kg_km_73
- Transport of magnesium oxide // magnesium oxide // glo by Transoceanic ship, containers - GLO: 446.619; = kg_km_74
- Transport of straw // wheat production // row by Transoceanic ship, containers - GLO: 81007; = kg_km_75
- cashmere fiber (raw), at rangeland // cashmere fiber // mn, blackbox: 1
- cashmere fiber (raw), at rangeland // cashmere fiber // mn, elementary: 1

## Impact indicators
- Eutrophication marine: 173.904
- Ecotoxicity, freshwater: 1.28494e6
- Land use: 1.13437e7
- Water use: 21247.2
- Resource use, minerals and metals: 0.0466954
- Resource use, fossils: 51710.9
- Climate change: 20456.4
- Ozone depletion: 2.61197e-5
- Human toxicity, cancer: 4.27736e-6
- Human toxicity, non-cancer: 9.15229e-5
- EF-particulate Matter: 0.00100389
- Ionising radiation, human health: 140.785
- Photochemical ozone formation - human health: 29.3861
- Acidification: 94.9102
- Eutrophication, terrestrial: 402.196
- Eutrophication, freshwater: 2.19373

## Deviations from the LCI method principle
The background data uses:
- the \xe2\x80\x9cRecycled content cut-off\xe2\x80\x9d approach to allocate end-of-life by-products and secondary materials. This allocation is explained in the description of the recycled content system model (http://www.ecoinvent.org/database/system-models-in-ecoinvent-3/cut-off-system-model/allocation-cut-off-by-classification.html).
OR
- EF compliant data

## Deviations from the LCI method approaches
0.0132384524637917 from biophysical allocation: factor calculated based on IPCC (2019) formulas of net energy, considering lowland cashmere goats from Asia, and following the animal class allocation metodology from Koch and Salou (2020)

Background data:
- the \xe2\x80\x9cRecycled content cut-off\xe2\x80\x9d approach to allocate end-of-life by-products and secondary materials. This allocation is explained in the description of the recycled content system model (http://www.ecoinvent.org/database/system-models-in-ecoinvent-3/cut-off-system-model/allocation-cut-off-by-classification.html). The ecoinvent database mostly relies on “Allocation – market values” apart for few exceptions particularly in the energy sector. ecoinvent energy data is replaced with EF3.0 core data as per the EF guidelines version 2.0.
OR
- EF compliant data

## Modelling constants
All modelling constants follow the requirements listed in the Tender Specifications 070201/2020/SER/ENV.B1. Completeness: There are no intentional cut-offs in the inventory no matter how small their contribution to all the EF impact categories is. Eventual cut-offs are in compliance with the Guide for EF compliant data sets (JRC 2020), i.e. only if below the 3% cut-off rule. Water use: water use is modelled at country level using separate flows for water withdrawal, water release and water evaporation. Handling multi-functional processes: the following PEF multi- functionality decision hierarchy is applied for resolving all multi- functionality problems: (1) subdivision or system expansion; (2) allocation based on a relevant underlying physical relationship (substitution may apply here); (3) allocation based on some other relationship. Direct land use change: GHG emissions from direct LUC allocated to good/service for 20 years after the LUC occurs, with IPCC default values. Carbon storage and delayed emissions: credits associated with temporary (carbon) storage or delayed emissions up to 300 years are not be considered. Emissions off-setting: are not included. Capital goods (including infrastructures) and their End of life: they are included. System boundaries: system boundaries include all processes linked to the product supply chain (e.g. maintenance). Time period: emissions and removals are modelled as if released or removed at the beginning of the assessment method. Fossil and biogenic carbon emissions and removals: removals and emissions are modelled as follows: All GHG emissions from fossil fuels (including peat and limestone) are modelled consistently with the most updated ILCD list of elementary flows. The non-fossil (biogenic) carbon flows are modelled consistently with the most updated ILCD list of elementary flows.

## Cut-off and completeness
There are no intentional cut-offs in the inventory no matter how small their contribution to all the EF impact categories is. Eventual cut-offs are in compliance with the Guide for EF compliant data sets (JRC 2020), i.e. only if below the 3% cut-off rule. The dataset dry mass and water balance has been checked to ensure the inventory is complete. Capital goods (e.g. infrastructure) and their end-of-life are included.

## Data selection and combination
These datasets include, in both their foreground and background data, links to EF3.0 compliant data.
The relevant background data on energy, transport, and End of Life are from the LCDN data node (http://lcdn.thinkstep.com/Node/).
All other background data in the supply of this product for which no EF3.0 process was available are from ecoinvent v3.7 database (www.ecoinvent.org) or other data sources.

## Data treatment and extrapolations
Several data sources have been used to model the inventory.

## Review details
Internal reviews have been asked to review the plausibility of the unit process, LCIA scores, and DQRs. Internal reviewers have also been asked to review the data for EF compliancy. The consortium is therefore responsible for aspects such as compliancy with the ILCD format, including validation in Look@LCI, and nomenclature.
Internal reviwers have been asked to judge based on the process name, that the unit process models in a complete and representative way the process in the requested location. The review encompassed the plausability of:
- exchanges with nature (elementary flows) as well as exchanges such as product and waste flows.
- meta information (general comment, technology comment, system boundaries, allocation, cut-off rules, etc.). Reviewers were asked to judge if the provided information is enough to understand the content of the process.
- LCIA scores
- DQRs including precision, technology, time and geography. As well as the overall DQR.
External reviewers have been asked to provide their expertise in the field of interest. External reviewers have been asked to review the unit process, including eventual methodological choices, the LCIA scores (provided with contribution scores as well), and DQRs. External reviewers have been provided all the information in a tool developed by the consortium for the purpose of this project.
External reviewers have been asked to judge based on the process name, that the unit process models in a complete and representative way the process in the requested location. The review encompassed:
- Plausability and completeness of exchanges with nature (elementary flows) as well as exchanges such as product and waste flows.
- Review of meta information (general comment, technology comment, system boundaries, allocation, cut-off rules, etc.). Reviewers were asked to judge if the provided information is enough to understand the content of the process.
- Review of properties (biogenic carbon and water content).
- Review of allocation keys.
- Plausability of LCIA scores calculated by the consortium.
- Plausability of DQRs including precision, technology, time and geography. As well as the overall DQR.

## Data sources
- Background Data for Representative products and organisations. EF 3.0 compliant (data stock)
- Bynie, B. MONGOLIA: THE COUNTRY REFORT ON ANIMAL GENETIC RESOURCES. National Consultative Committee on Animal genetic resources of Mongolia Ulaanbaatar, September 2002.
- Hunter, L. Mohair, Cashmere and other animal hair fibers. In: Kozlowski et al. Handbook of Natural Fibres: Vol. 1: Types, Properties and Factors Affecting Breeding and Cultivation. Ensevier, 2020.
- IPCC (2019). Chapter 10: Emissions from Livestoch and Manure Management. Refinement to the 2006 IPCC Guidelines for National Greenhouse Gas Inventories.
- Jordan et al. Spatio-temporal patterns of herbage availability and livestock movements: A cross-border analysis in the Chinese-Mongolian Altay. Pastoralism volume 6, Article number: 12 (2016).
- Koch, P., Salou, T. AGRIBALYSE® : METHODOLOGY, AGRICULTURAL STAGE. Version 3.0. April 2020.
- SFA. Sustainable Fiber Alliance. https://sustainablefibre.org/about-cashmere/. 2021.
- Product Environmental Footprint Category Rules Guidance – PEFCR Guidance (EC, 2018). Version 6.3. Available in: https://ec.europa.eu/environment/eussd/smgp/pdf/PEFCR_guidance_v6.3.pdf

## Intended applications
Implementation of regular Product Environmental Footprint (PEF) studies and Organisation Environmental Footprint (OEF) studies exclusively under the specified Product groups and sectors as defined in the Product Environmental Footprint Category Rules (PEFCR) and Organisation Environmental Footprint Sectorial Rules (OEFSR) listed in http://ec.europa.eu/environment/eussd/smgp/PEFCR_OEFSR.htm
