# pineapple leaf fibres (palf); technology mix; production mix, at farm; raw fiber

Dataset: ILCD process, Partly terminated system
Geography: GLO
Reference year: 2015
Valid until: 2024
Classification: Materials production / Food and renewable raw materials
LCI method principle: Attributional
LCI method approaches: Allocation - market value
Completeness: All relevant flows quantified
Project: Provision of process-based 3.0 Environmental Footprint-compliant life cycle inventory datasets - Renewable materials - contract number 070201/2020/840085/SER/ENV.B.1
Generated by: ecoinvent
Owner: ecoinvent
Compliance: ILCD Data Network - Entry-level; Suggestions for updating the PEF method 2019; ISO 14040 Environmental Management – Life Cycle Assessment – Principles and Framework, 2006; ISO 14044:2006. Environmental Management – Life Cycle Assessment – Requirements and guidelines.; Environmental Footprint 3.1
Review: Dependent internal review by Lucia Valsasina, Emilia Moreno Ruiz; Independent review panel by Philippa Notten
Data quality: Overall quality: Good; Time representativeness: Very good; Geographical representativeness: Good; Technological representativeness: Good; Precision: Good; Methodological appropriateness and consistency: Not applicable
Amounts: no units in this file; such an amount is in the reference unit of its flow, which a separate flow dataset defines
copyright: true
licenseType: Free of charge for some user types or use types
accessRestrictions: Free of charge for all final users implementing a regular Product Environmental Footprint (PEF) studies and Organisation Environmental Footprint (OEF) studies exclusively under the specified Product groups and sectors as defined in the Product Environmental Footprint Category Rules (PEFCR) and Organisation Environmental Footprint Sectorial Rules (OEFSR) listed in http://ec.europa.eu/environment/eussd/smgp/PEFCR_OEFSR.htm and in accordance with the terms and conditions of the EULA (available at https://ecoinvent.lca-data.com/) exclusively until 31st December 2024. Any use of this dataset or any derivative data not within the specific context of one of the PEF/OEF projects or after the end of 2024 is not permitted.

## General comment
Notice: this data set supersedes the EF3.0-compliant version (see link under "preceding data set version" below calculated with the EF3.0). The life cycle inventory is not changed from the original EF3.0 data set. The LCIA results are calculated based on the EF3.1 methods which provide updated characterisation factors in the following impact categories: Climate Change, Ecotoxicity freshwater, Photochemical Ozone Formation, Acidification, Human Toxicity non-cancer, and Human Toxicity cancer. The review report and the data quality ratings refer to the original results. The data set has been updated by the European Commission on the basis of the original EF3.0 data set delivered by the data provider.This dataset models the production of 1 kg Pineapple Leaf Fibres (PALF), also known as pina fibre. They are natural, very strong, and light-weighted fibres produced from the leaves of the pineapple plantation. They are mostly used in textile applications such as apparels, having potentials to be applied in different industrial textiles, medical textiles, fashion textiles, automotive textile industry, etc.

Reference:

Ramirez C., Yolanda F.S.A., 2019. Piñatex, Pineapple Leaf Textile, Design Life-Cycle, DES40A Available at: http://www.designlife-cycle.com/piatex

Kiron M.I.,2020. Application of Pineapple Leaf Fibre in Automotive Industry, Textile Learner Available at: https://textilelearner.net/application-of-pineapple-leaf-fibre-in-automotive-industry/

## Technology and included processes
Pineapple Leaf Fibres (PALF) is produced as a by-product of pineapple cultivation, sourced from waste pineapple leaves generated during harvesting. The acquisition of raw materials requires no additional energy other than what is already needed for pineapple agriculture. The production process begins with the extraction of the pineapple leaves using a scrapping method. A scrapping machine is used to feed, scratch and serrate the leaves. The yield of the fibre is 3% of the weight of green leaves. The next step includes the retting process, where small bundles of scratched leaves are immersed in a water tank with 1:20 ratio and 0.5% urea for fast retting process. After retting process, fibres are segregated mechanically, through washing in pond water. Extracted fibres are dried in hanging place by air. No infrastructure or wastewater treatment are considered in the dataset because the production process takes place in next to the pineapple cultivation fields.
During the process, 29.4 kg of by-products are produced. These are considered residues, meaning that according to FAO, 2014 for the cut-off modelling approach applied, upstream emissions shall not be attributes to them.

The amount of electricity and water is scaled based based on ecoinvent "fibre production, jute, retting, GLO".

Reference

FAO, 2014. Environmental performance of animal feeds supply chain, Guidelines for quantification, Livestock Environmental Assessment and Performance Partnership (LEAP) Available at: https://www.fao.org/3/mj751e/mj751e.pdf

Asim, M., Abdan, K., Jawaid, M., Nasir, M., Dashtizadeh, Z., Ishak, M.R. and Hoque, M.E., 2015. A review on pineapple leaves fibre and its composites. International Journal of Polymer Science, 2015. Available at: https://www.hindawi.com/journals/ijps/2015/950567/

Ramirez C., Yolanda F.S.A., 2019. Piñatex, Pineapple Leaf Textile, Design Life-Cycle, DES40A Available at: http://www.designlife-cycle.com/piatex

Symeonidis A., fibre production, jute, retting, GLO, Undefined, ecoinvent database version 3.8

## Parameters
- kg_0: 33.3333
  Mass in kg, for pineapple leaf // pineapple leaf // glo; Articulated lorry transport, Euro 4, Total weight >32 t; EU+EFTA+UK
- km_0: 70
  Distance in km, for pineapple leaf // pineapple leaf // glo; Articulated lorry transport, Euro 4, Total weight >32 t; EU+EFTA+UK
- kg_km_0: 2333.33; = kg_0*km_0
  Transport amount in km*km, for pineapple leaf // pineapple leaf // glo; Articulated lorry transport, Euro 4, Total weight >32 t; EU+EFTA+UK
- kg_1: 0.005
  Mass in kg, for urea; Freight train, diesel traction; EU+EFTA+UK
- km_1: 179.708
  Distance in km, for urea; Freight train, diesel traction; EU+EFTA+UK
- kg_km_1: 0.898539; = kg_1*km_1
  Transport amount in km*km, for urea; Freight train, diesel traction; EU+EFTA+UK
- kg_2: 0.005
  Mass in kg, for urea; Freight train, electricity traction; EU+EFTA+UK
- km_2: 94.9991
  Distance in km, for urea; Freight train, electricity traction; EU+EFTA+UK
- kg_km_2: 0.474995; = kg_2*km_2
  Transport amount in km*km, for urea; Freight train, electricity traction; EU+EFTA+UK
- kg_3: 0.005
  Mass in kg, for urea; Articulated lorry transport, Total weight >32 t, mix Euro 0-5; ROW w/o EU+EFTA
- km_3: 148
  Distance in km, for urea; Articulated lorry transport, Total weight >32 t, mix Euro 0-5; ROW w/o EU+EFTA
- kg_km_3: 0.74; = kg_3*km_3
  Transport amount in km*km, for urea; Articulated lorry transport, Total weight >32 t, mix Euro 0-5; ROW w/o EU+EFTA
- kg_4: 0.005
  Mass in kg, for urea; Transoceanic ship, containers; GLO
- km_4: 841
  Distance in km, for urea; Transoceanic ship, containers; GLO
- kg_km_4: 4.205; = kg_4*km_4
  Transport amount in km*km, for urea; Transoceanic ship, containers; GLO
- kg_5: 0.005
  Mass in kg, for urea; Freight train, average; EU+EFTA+UK
- km_5: 1.2931
  Distance in km, for urea; Freight train, average; EU+EFTA+UK
- kg_km_5: 0.0064655; = kg_5*km_5
  Transport amount in km*km, for urea; Freight train, average; EU+EFTA+UK
- kg_6: 0.005
  Mass in kg, for urea; Barge; ROW w/o EU+EFTA
- km_6: 47
  Distance in km, for urea; Barge; ROW w/o EU+EFTA
- kg_km_6: 0.235; = kg_6*km_6
  Transport amount in km*km, for urea; Barge; ROW w/o EU+EFTA

## Reference product
- pineapple leaf fibres (palf) // pineapple leaf fibres (palf) // glo: 1

## Inputs
- Electricity from Electricity grid mix 1kV-60kV - AU: 0.0058
- Electricity from Electricity grid mix 1kV-60kV - EU+EFTA+UK: 0.0861
- Electricity from Electricity grid mix 1kV-60kV - NZ: 0.0011
- Electricity from Electricity grid mix 1kV-60kV - RAF: 0.0188
- Electricity from Electricity grid mix 1kV-60kV - RAS w/o CN: 0.271
- Electricity from Electricity grid mix 1kV-60kV - RNA: 0.126
- Electricity from Electricity grid mix 1kV-60kV - RSA: 0.0428
- Electricity from Electricity grid mix 1kV-60kV - RU: 0.0252
- Transport of pineapple leaf // pineapple leaf // glo by Articulated lorry transport, Euro 4, Total weight >32 t - EU+EFTA+UK: 2333.33; = kg_km_0
- Transport of urea by Freight train, diesel traction - EU+EFTA+UK: 0.898539; = kg_km_1
- Transport of urea by Freight train, electricity traction - EU+EFTA+UK: 0.474995; = kg_km_2
- Transport of urea by Articulated lorry transport, Total weight >32 t, mix Euro 0-5 - ROW w/o EU+EFTA: 0.74; = kg_km_3
- Transport of urea by Transoceanic ship, containers - GLO: 4.205; = kg_km_4
- Transport of urea by Freight train, average - EU+EFTA+UK: 0.0064655; = kg_km_5
- Transport of urea by Barge - ROW w/o EU+EFTA: 0.235; = kg_km_6
- pineapple leaf fibres (palf) // pineapple leaf fibres (palf) // glo, blackbox: 1
- pineapple leaf fibres (palf) // pineapple leaf fibres (palf) // glo, elementary: 1

## Impact indicators
- Eutrophication marine: 0.000563818
- Ecotoxicity, freshwater: 2.14534
- Land use: 1.41349
- Water use: 9.00949
- Resource use, minerals and metals: 1.80929e-7
- Resource use, fossils: 3.81422
- Climate change: 0.267246
- Ozone depletion: 1.48426e-11
- Human toxicity, cancer: 9.44621e-11
- Human toxicity, non-cancer: 1.48881e-9
- EF-particulate Matter: 1.8102e-8
- Ionising radiation, human health: 0.00934284
- Photochemical ozone formation - human health: 0.00121106
- Acidification: 0.00180582
- Eutrophication, terrestrial: 0.00627174
- Eutrophication, freshwater: 1.35958e-6

## Deviations from the LCI method principle
The background data uses:
- the \xe2\x80\x9cRecycled content cut-off\xe2\x80\x9d approach to allocate end-of-life by-products and secondary materials. This allocation is explained in the description of the recycled content system model (http://www.ecoinvent.org/database/system-models-in-ecoinvent-3/cut-off-system-model/allocation-cut-off-by-classification.html).
OR
- EF compliant data

## Deviations from the LCI method approaches
Background data:
- the \xe2\x80\x9cRecycled content cut-off\xe2\x80\x9d approach to allocate end-of-life by-products and secondary materials. This allocation is explained in the description of the recycled content system model (http://www.ecoinvent.org/database/system-models-in-ecoinvent-3/cut-off-system-model/allocation-cut-off-by-classification.html). The ecoinvent database mostly relies on “Allocation – market values” apart for few exceptions particularly in the energy sector. ecoinvent energy data is replaced with EF3.0 core data as per the EF guidelines version 2.0.
OR
- EF compliant data

## Modelling constants
All modelling constants follow the requirements listed in the Tender Specifications 070201/2020/SER/ENV.B1. Completeness: There are no intentional cut-offs in the inventory no matter how small their contribution to all the EF impact categories is. Eventual cut-offs are in compliance with the Guide for EF compliant data sets (JRC 2020), i.e. only if below the 3% cut-off rule. Water use: water use is modelled at country level using separate flows for water withdrawal, water release and water evaporation. Handling multi-functional processes: the following PEF multi- functionality decision hierarchy is applied for resolving all multi- functionality problems: (1) subdivision or system expansion; (2) allocation based on a relevant underlying physical relationship (substitution may apply here); (3) allocation based on some other relationship. Direct land use change: GHG emissions from direct LUC allocated to good/service for 20 years after the LUC occurs, with IPCC default values. Carbon storage and delayed emissions: credits associated with temporary (carbon) storage or delayed emissions up to 300 years are not be considered. Emissions off-setting: are not included. Capital goods (including infrastructures) and their End of life: they are included. System boundaries: system boundaries include all processes linked to the product supply chain (e.g. maintenance). Time period: emissions and removals are modelled as if released or removed at the beginning of the assessment method. Fossil and biogenic carbon emissions and removals: removals and emissions are modelled as follows: All GHG emissions from fossil fuels (including peat and limestone) are modelled consistently with the most updated ILCD list of elementary flows. The non-fossil (biogenic) carbon flows are modelled consistently with the most updated ILCD list of elementary flows.

## Cut-off and completeness
There are no intentional cut-offs in the inventory no matter how small their contribution to all the EF impact categories is. Eventual cut-offs are in compliance with the Guide for EF compliant data sets (JRC 2020), i.e. only if below the 3% cut-off rule. The dataset dry mass and water balance has been checked to ensure the inventory is complete. Capital goods (e.g. infrastructure) and their end-of-life are included.

## Data selection and combination
These datasets include, in both their foreground and background data, links to EF3.0 compliant data.
The relevant background data on energy, transport, and End of Life are from the LCDN data node (http://lcdn.thinkstep.com/Node/).
All other background data in the supply of this product for which no EF3.0 process was available are from ecoinvent v3.7 database (www.ecoinvent.org) or other data sources.

## Data treatment and extrapolations
Several data sources have been used to model the inventory.

## Review details
Internal reviews have been asked to review the plausibility of the unit process, LCIA scores, and DQRs. Internal reviewers have also been asked to review the data for EF compliancy. The consortium is therefore responsible for aspects such as compliancy with the ILCD format, including validation in Look@LCI, and nomenclature.
Internal reviwers have been asked to judge based on the process name, that the unit process models in a complete and representative way the process in the requested location. The review encompassed the plausability of:
- exchanges with nature (elementary flows) as well as exchanges such as product and waste flows.
- meta information (general comment, technology comment, system boundaries, allocation, cut-off rules, etc.). Reviewers were asked to judge if the provided information is enough to understand the content of the process.
- LCIA scores
- DQRs including precision, technology, time and geography. As well as the overall DQR.
External reviewers have been asked to provide their expertise in the field of interest. External reviewers have been asked to review the unit process, including eventual methodological choices, the LCIA scores (provided with contribution scores as well), and DQRs. External reviewers have been provided all the information in a tool developed by the consortium for the purpose of this project.
External reviewers have been asked to judge based on the process name, that the unit process models in a complete and representative way the process in the requested location. The review encompassed:
- Plausability and completeness of exchanges with nature (elementary flows) as well as exchanges such as product and waste flows.
- Review of meta information (general comment, technology comment, system boundaries, allocation, cut-off rules, etc.). Reviewers were asked to judge if the provided information is enough to understand the content of the process.
- Review of properties (biogenic carbon and water content).
- Review of allocation keys.
- Plausability of LCIA scores calculated by the consortium.
- Plausability of DQRs including precision, technology, time and geography. As well as the overall DQR.

## Data sources
- Background Data for Representative products and organisations. EF 3.0 compliant (data stock)
- Asim, M., Abdan, K., Jawaid, M., Nasir, M., Dashtizadeh, Z., Ishak, M.R. and Hoque, M.E., 2015. A review on pineapple leaves fibre and its composites. International Journal of Polymer Science, 2015. Available at: https://www.hindawi.com/journals/ijps/2015/950567/
- Symeonidis A., fibre production, jute, retting, GLO, Undefined, ecoinvent database version 3.8
- Ma et al. (2018) Variations and determinants of carbon content in plants: a global synthesis. Biogeosciences, 15, 693–702, 2018 https://doi.org/10.5194/bg-15-693-2018 Available at: https://www.researchgate.net/publication/322898619_Variations_and_determinants_of_carbon_content_in_plants_A_global_synthesis/fulltext/5a749da345851551207a163e/Variations-and-determinants-of-carbon-content-in-plants-A-global-synthesis.pdf?origin=publication_detail

## Intended applications
Implementation of regular Product Environmental Footprint (PEF) studies and Organisation Environmental Footprint (OEF) studies exclusively under the specified Product groups and sectors as defined in the Product Environmental Footprint Category Rules (PEFCR) and Organisation Environmental Footprint Sectorial Rules (OEFSR) listed in http://ec.europa.eu/environment/eussd/smgp/PEFCR_OEFSR.htm
