# washing, dry cleaning; washing process; production mix, at plant; service

Dataset: ILCD process, Partly terminated system
Geography: EU+EFTA+UK
Reference year: 2021
Valid until: 2024
Classification: Systems / Textiles, furnitures and other interiors
LCI method principle: Attributional
LCI method approaches: Allocation - market value
Completeness: All relevant flows quantified
Project: Provision of process-based 3.0 Environmental Footprint-compliant life cycle inventory datasets - Others - contract number 070201/2020/840235/SER/ENV.B.1
Generated by: Life Cycle Indonesia
Owner: PRé Sustainability B.V.
Compliance: ILCD Data Network - Entry-level; Suggestions for updating the PEF method 2019; ISO 14040 Environmental Management – Life Cycle Assessment – Principles and Framework, 2006; ISO 14044:2006. Environmental Management – Life Cycle Assessment – Requirements and guidelines.; Environmental Footprint 3.1
Review: Dependent internal review by Avraam Symeonidis, Emilia Moreno Ruiz; Independent review panel by Fábio Valebona
Data quality: Overall quality: Good; Time representativeness: Very good; Geographical representativeness: Very good; Technological representativeness: Very good; Precision: Good; Methodological appropriateness and consistency: Not applicable
Amounts: no units in this file; such an amount is in the reference unit of its flow, which a separate flow dataset defines
copyright: true
licenseType: Free of charge for some user types or use types
accessRestrictions: Free of charge for all final users implementing a regular Product Environmental Footprint (PEF) studies and Organisation Environmental Footprint (OEF) studies exclusively under the specified Product groups and sectors as defined in the Product Environmental Footprint Category Rules (PEFCR) and Organisation Environmental Footprint Sectorial Rules (OEFSR) listed in http://ec.europa.eu/environment/eussd/smgp/PEFCR_OEFSR.htm and in accordance with the terms and conditions of the EULA (available at https://ecoinvent.lca-data.com/) exclusively until 31st December 2024. Any use of this dataset or any derivative data not within the specific context of one of the PEF/OEF projects or after the end of 2024 is not permitted.

## General comment
Notice: this data set supersedes the EF3.0-compliant version (see link under "preceding data set version" below calculated with the EF3.0). The life cycle inventory is not changed from the original EF3.0 data set. The LCIA results are calculated based on the EF3.1 methods which provide updated characterisation factors in the following impact categories: Climate Change, Ecotoxicity freshwater, Photochemical Ozone Formation, Acidification, Human Toxicity non-cancer, and Human Toxicity cancer. The review report and the data quality ratings refer to the original results. The data set has been updated by the European Commission on the basis of the original EF3.0 data set delivered by the data provider.Dry cleaning is the cleaning process for clothing and textiles using a chemical solvent other than water. The solvent used is typically toxic, called Tetrachloroethylene (Perchloroethylene), or PERC for short. Other chemical solvents that can be used for dry cleaning
are Trichloroethylene (TCE), Decamethylcylcopentasiloxane (liquid silicone), glycol ethers, hydrocarbons, n-Propyl Bromide and Liquid Carbon Dioxide. It is used in cleaning delicate fabrics that cannot withstand the rough and tumble of a washing machine and clothes dryer. Dry cleaning solvent dissolves grease and oils in a way that water cannot. Natural fibers such as wools and silks dry clean well, but can shrink and lose color when washed in water. Synthetic fibers like polyester also respond well to dry cleaning, but they can retain oily stains after washing.

S, Ramon. 2020. Laundry & Dry Cleaning Business: Learn, Start, & Grow From Anywhere. Nigeria: Independently Published
Laitala, Kirsi et al., (2020). Laundry Care Regimes: Do the Practices of Keeping Clothes Clean Have Different Environmental Impacts Based on the Fibre Content?, www.mdpi.com, Molecular Diversity Preservation International (MDPI) Sustainability Foundation, Basel, Switzerland

## Technology and included processes
A dry-cleaning machine is similar to a combination of a domestic washing machine and clothes dryer. Clothes are placed in the washing or extraction chamber (referred to as the "basket" or "drum"), which constitutes the core of the machine. The washing chamber contains a horizontal, perforated drum that rotates within an outer shell. The shell holds the solvent while the rotating drum holds the clothes load. (S, Ramon., 2020)

In general, the dry cleaning process can be divided into five steps: cleaning in solvent, spinning to extract solvent, drying with hot air and recovery of solvent, deodorisation, and regeneration of used solvent after the clothes have been cleaned. (epa, 2013)

During the wash cycle, the solvent in the chamber (commonly known as the "cage" or "tackle box") is passed through a filtration chamber and then fed back into the "cage". The solvent is then removed and sent to a distillation unit consisting of a boiler and condenser. The condensed solvent is fed into a separator unit where any remaining water is separated from the solvent and then fed into the "clean solvent" tank. At the end of the wash cycle, the machine starts a rinse cycle wherein the fabric load is rinsed with fresh distilled solvent from the pure solvent tank. After the rinse cycle, the machine begins the extraction process, which recovers the solvent for reuse. The extraction cycle begins by draining the solvent from the washing chamber and accelerating the basket to 350–450 rpm, causing much of the solvent to spin free of the fabric. After there are no more solvent to be removed, the machine starts the drying cycle. After the drying cycle is complete, a deodorizing cycle cools the clothes and removes any traces of solvent, by circulating cool air over the. After the aeration cycle, the garments are clean and ready for pressing and finishing. (S, Ramon., 2020)

The activity starts when the raw materials enter the process. Materials entering the process are included as well as energy uses, infrastructure, and chemicals. There is no direct emission to soil, but there is direct emission to air and water from this process such as trichloroethene emission. Chemical agents that are used in the process are emitted through the wastewater, except silica and tetrachloroethylene that also evaporated to air. In this model, the chemical used is tetrachloroethylene (perchloroethylene) solvent in a closed-loop system, however, this solvent is not 100% recycled due to an imperfect filtration process. In addition, the drying process also causes solvent evaporation. The consumption of lubricating oil using an oven bonding machines as a proxy.

S, Ramon. 2020. Laundry & Dry Cleaning Business: Learn, Start, & Grow From Anywhere. Nigeria: Independently Published
EPA. 2013. Best Practice Guidelines for Dry Cleaning Issued to support European Union (Installations and Activities using Solvents) Regulations 2012. Ireland

## Parameters
- kg_0: 0.00195105
  Mass in kg, for tetrachloroethylene; Articulated lorry transport, Euro 4, Total weight >32 t; EU+EFTA+UK
- km_0: 51.4
  Distance in km, for tetrachloroethylene; Articulated lorry transport, Euro 4, Total weight >32 t; EU+EFTA+UK
- kg_km_0: 0.100284; = kg_0*km_0
  Transport amount in km*km, for tetrachloroethylene; Articulated lorry transport, Euro 4, Total weight >32 t; EU+EFTA+UK
- kg_1: 0.00195105
  Mass in kg, for tetrachloroethylene; Freight train, diesel traction; EU+EFTA+UK
- km_1: 5.08292
  Distance in km, for tetrachloroethylene; Freight train, diesel traction; EU+EFTA+UK
- kg_km_1: 0.00991703; = kg_1*km_1
  Transport amount in km*km, for tetrachloroethylene; Freight train, diesel traction; EU+EFTA+UK
- kg_2: 0.00195105
  Mass in kg, for tetrachloroethylene; Freight train, electricity traction; EU+EFTA+UK
- km_2: 8.01708
  Distance in km, for tetrachloroethylene; Freight train, electricity traction; EU+EFTA+UK
- kg_km_2: 0.0156417; = kg_2*km_2
  Transport amount in km*km, for tetrachloroethylene; Freight train, electricity traction; EU+EFTA+UK
- kg_3: 0.003
  Mass in kg, for trichloroethylene // trichloroethylene production // eu+efta+uk; Freight train, average; EU+EFTA+UK
- km_3: 270
  Distance in km, for trichloroethylene // trichloroethylene production // eu+efta+uk; Freight train, average; EU+EFTA+UK
- kg_km_3: 0.81; = kg_3*km_3
  Transport amount in km*km, for trichloroethylene // trichloroethylene production // eu+efta+uk; Freight train, average; EU+EFTA+UK
- kg_4: 0.003
  Mass in kg, for trichloroethylene // trichloroethylene production // eu+efta+uk; Barge; EU+EFTA+UK
- km_4: 130
  Distance in km, for trichloroethylene // trichloroethylene production // eu+efta+uk; Barge; EU+EFTA+UK
- kg_km_4: 0.39; = kg_4*km_4
  Transport amount in km*km, for trichloroethylene // trichloroethylene production // eu+efta+uk; Barge; EU+EFTA+UK
- kg_5: 0.003
  Mass in kg, for trichloroethylene // trichloroethylene production // eu+efta+uk; Articulated lorry transport, Euro 4, Total weight >32 t; EU+EFTA+UK
- km_5: 1000
  Distance in km, for trichloroethylene // trichloroethylene production // eu+efta+uk; Articulated lorry transport, Euro 4, Total weight >32 t; EU+EFTA+UK
- kg_km_5: 3; = kg_5*km_5
  Transport amount in km*km, for trichloroethylene // trichloroethylene production // eu+efta+uk; Articulated lorry transport, Euro 4, Total weight >32 t; EU+EFTA+UK
- kg_6: 0.02
  Mass in kg, for surfactant // surfactant production // glo; Freight train, average; EU+EFTA+UK
- km_6: 270
  Distance in km, for surfactant // surfactant production // glo; Freight train, average; EU+EFTA+UK
- kg_km_6: 5.4; = kg_6*km_6
  Transport amount in km*km, for surfactant // surfactant production // glo; Freight train, average; EU+EFTA+UK
- kg_7: 0.02
  Mass in kg, for surfactant // surfactant production // glo; Barge; EU+EFTA+UK
- km_7: 130
  Distance in km, for surfactant // surfactant production // glo; Barge; EU+EFTA+UK
- kg_km_7: 2.6; = kg_7*km_7
  Transport amount in km*km, for surfactant // surfactant production // glo; Barge; EU+EFTA+UK
- kg_8: 0.02
  Mass in kg, for surfactant // surfactant production // glo; Articulated lorry transport, Euro 4, Total weight >32 t; EU+EFTA+UK
- km_8: 1000
  Distance in km, for surfactant // surfactant production // glo; Articulated lorry transport, Euro 4, Total weight >32 t; EU+EFTA+UK
- kg_km_8: 20; = kg_8*km_8
  Transport amount in km*km, for surfactant // surfactant production // glo; Articulated lorry transport, Euro 4, Total weight >32 t; EU+EFTA+UK
- kg_9: 0.005
  Mass in kg, for resin, hydrogenated petroleum // resin, hydrogenated petroleum production // glo; Freight train, average; EU+EFTA+UK
- km_9: 270
  Distance in km, for resin, hydrogenated petroleum // resin, hydrogenated petroleum production // glo; Freight train, average; EU+EFTA+UK
- kg_km_9: 1.35; = kg_9*km_9
  Transport amount in km*km, for resin, hydrogenated petroleum // resin, hydrogenated petroleum production // glo; Freight train, average; EU+EFTA+UK
- kg_10: 0.005
  Mass in kg, for resin, hydrogenated petroleum // resin, hydrogenated petroleum production // glo; Barge; EU+EFTA+UK
- km_10: 130
  Distance in km, for resin, hydrogenated petroleum // resin, hydrogenated petroleum production // glo; Barge; EU+EFTA+UK
- kg_km_10: 0.65; = kg_10*km_10
  Transport amount in km*km, for resin, hydrogenated petroleum // resin, hydrogenated petroleum production // glo; Barge; EU+EFTA+UK
- kg_11: 0.005
  Mass in kg, for resin, hydrogenated petroleum // resin, hydrogenated petroleum production // glo; Articulated lorry transport, Euro 4, Total weight >32 t; EU+EFTA+UK
- km_11: 1000
  Distance in km, for resin, hydrogenated petroleum // resin, hydrogenated petroleum production // glo; Articulated lorry transport, Euro 4, Total weight >32 t; EU+EFTA+UK
- kg_km_11: 5; = kg_11*km_11
  Transport amount in km*km, for resin, hydrogenated petroleum // resin, hydrogenated petroleum production // glo; Articulated lorry transport, Euro 4, Total weight >32 t; EU+EFTA+UK
- kg_12: 0.002
  Mass in kg, for silica, precipitated // silica production // glo; Freight train, average; EU+EFTA+UK
- km_12: 270
  Distance in km, for silica, precipitated // silica production // glo; Freight train, average; EU+EFTA+UK
- kg_km_12: 0.54; = kg_12*km_12
  Transport amount in km*km, for silica, precipitated // silica production // glo; Freight train, average; EU+EFTA+UK
- kg_13: 0.002
  Mass in kg, for silica, precipitated // silica production // glo; Barge; EU+EFTA+UK
- km_13: 130
  Distance in km, for silica, precipitated // silica production // glo; Barge; EU+EFTA+UK
- kg_km_13: 0.26; = kg_13*km_13
  Transport amount in km*km, for silica, precipitated // silica production // glo; Barge; EU+EFTA+UK
- kg_14: 0.002
  Mass in kg, for silica, precipitated // silica production // glo; Articulated lorry transport, Euro 4, Total weight >32 t; EU+EFTA+UK
- km_14: 1000
  Distance in km, for silica, precipitated // silica production // glo; Articulated lorry transport, Euro 4, Total weight >32 t; EU+EFTA+UK
- kg_km_14: 2; = kg_14*km_14
  Transport amount in km*km, for silica, precipitated // silica production // glo; Articulated lorry transport, Euro 4, Total weight >32 t; EU+EFTA+UK
- kg_15: 0.00113478
  Mass in kg, for lubricating oil // lubricants at refinery // eu+efta+uk; Freight train, average; EU+EFTA+UK
- km_15: 239.695
  Distance in km, for lubricating oil // lubricants at refinery // eu+efta+uk; Freight train, average; EU+EFTA+UK
- kg_km_15: 0.272; = kg_15*km_15
  Transport amount in km*km, for lubricating oil // lubricants at refinery // eu+efta+uk; Freight train, average; EU+EFTA+UK
- kg_16: 0.00113478
  Mass in kg, for lubricating oil // lubricants at refinery // eu+efta+uk; Barge; EU+EFTA+UK
- km_16: 269.656
  Distance in km, for lubricating oil // lubricants at refinery // eu+efta+uk; Barge; EU+EFTA+UK
- kg_km_16: 0.306; = kg_16*km_16
  Transport amount in km*km, for lubricating oil // lubricants at refinery // eu+efta+uk; Barge; EU+EFTA+UK
- kg_17: 0.00113478
  Mass in kg, for lubricating oil // lubricants at refinery // eu+efta+uk; Articulated lorry transport, Euro 4, Total weight >32 t; EU+EFTA+UK
- km_17: 130.422
  Distance in km, for lubricating oil // lubricants at refinery // eu+efta+uk; Articulated lorry transport, Euro 4, Total weight >32 t; EU+EFTA+UK
- kg_km_17: 0.148; = kg_17*km_17
  Transport amount in km*km, for lubricating oil // lubricants at refinery // eu+efta+uk; Articulated lorry transport, Euro 4, Total weight >32 t; EU+EFTA+UK
- kg_18: 0.00031161
  Mass in kg, for washing machine; Transoceanic ship, containers; GLO
- km_18: 737
  Distance in km, for washing machine; Transoceanic ship, containers; GLO
- kg_km_18: 0.229656; = kg_18*km_18
  Transport amount in km*km, for washing machine; Transoceanic ship, containers; GLO
- kg_19: 0.00031161
  Mass in kg, for washing machine; Freight train, diesel traction; EU+EFTA+UK
- km_19: 13.3513
  Distance in km, for washing machine; Freight train, diesel traction; EU+EFTA+UK
- kg_km_19: 0.0041604; = kg_19*km_19
  Transport amount in km*km, for washing machine; Freight train, diesel traction; EU+EFTA+UK
- kg_20: 0.00031161
  Mass in kg, for washing machine; Freight train, electricity traction; EU+EFTA+UK
- km_20: 4.54157
  Distance in km, for washing machine; Freight train, electricity traction; EU+EFTA+UK
- kg_km_20: 0.0014152; = kg_20*km_20
  Transport amount in km*km, for washing machine; Freight train, electricity traction; EU+EFTA+UK
- kg_21: 0.00031161
  Mass in kg, for washing machine; Freight train, average; EU+EFTA+UK
- km_21: 0.107115
  Distance in km, for washing machine; Freight train, average; EU+EFTA+UK
- kg_km_21: 3.33781e-5; = kg_21*km_21
  Transport amount in km*km, for washing machine; Freight train, average; EU+EFTA+UK
- kg_22: 0.00031161
  Mass in kg, for washing machine; Barge; EU+EFTA+UK
- km_22: 0.328736
  Distance in km, for washing machine; Barge; EU+EFTA+UK
- kg_km_22: 0.000102437; = kg_22*km_22
  Transport amount in km*km, for washing machine; Barge; EU+EFTA+UK
- kg_23: 0.00031161
  Mass in kg, for washing machine; Barge; ROW w/o EU+EFTA
- km_23: 0.671264
  Distance in km, for washing machine; Barge; ROW w/o EU+EFTA
- kg_km_23: 0.000209172; = kg_23*km_23
  Transport amount in km*km, for washing machine; Barge; ROW w/o EU+EFTA
- kg_24: 0.00031161
  Mass in kg, for washing machine; Articulated lorry transport, Total weight <7.5 t, mix Euro 0-5; EU+EFTA+UK
- km_24: 9.50673
  Distance in km, for washing machine; Articulated lorry transport, Total weight <7.5 t, mix Euro 0-5; EU+EFTA+UK
- kg_km_24: 0.00296239; = kg_24*km_24
  Transport amount in km*km, for washing machine; Articulated lorry transport, Total weight <7.5 t, mix Euro 0-5; EU+EFTA+UK
- kg_25: 0.00031161
  Mass in kg, for washing machine; Articulated lorry transport, Euro 4, Total weight >32 t; EU+EFTA+UK
- km_25: 86.5577
  Distance in km, for washing machine; Articulated lorry transport, Euro 4, Total weight >32 t; EU+EFTA+UK
- kg_km_25: 0.0269722; = kg_25*km_25
  Transport amount in km*km, for washing machine; Articulated lorry transport, Euro 4, Total weight >32 t; EU+EFTA+UK
- kg_26: 0.00031161
  Mass in kg, for washing machine; Articulated lorry transport, Total weight >32 t, mix Euro 0-5; ROW w/o EU+EFTA
- km_26: 228.442
  Distance in km, for washing machine; Articulated lorry transport, Total weight >32 t, mix Euro 0-5; ROW w/o EU+EFTA
- kg_km_26: 0.0711848; = kg_26*km_26
  Transport amount in km*km, for washing machine; Articulated lorry transport, Total weight >32 t, mix Euro 0-5; ROW w/o EU+EFTA

## Reference product
- washing, dry cleaning // washing, dry cleaning // eu+efta+uk: 1

## Inputs
- Transport of tetrachloroethylene by Articulated lorry transport, Euro 4, Total weight >32 t - EU+EFTA+UK: 0.100284; = kg_km_0
- Transport of tetrachloroethylene by Freight train, diesel traction - EU+EFTA+UK: 0.00991703; = kg_km_1
- Transport of tetrachloroethylene by Freight train, electricity traction - EU+EFTA+UK: 0.0156417; = kg_km_2
- Transport of trichloroethylene // trichloroethylene production // eu+efta+uk by Freight train, average - EU+EFTA+UK: 0.81; = kg_km_3
- Transport of trichloroethylene // trichloroethylene production // eu+efta+uk by Barge - EU+EFTA+UK: 0.39; = kg_km_4
- Transport of trichloroethylene // trichloroethylene production // eu+efta+uk by Articulated lorry transport, Euro 4, Total weight >32 t - EU+EFTA+UK: 3; = kg_km_5
- Transport of surfactant // surfactant production // glo by Freight train, average - EU+EFTA+UK: 5.4; = kg_km_6
- Transport of surfactant // surfactant production // glo by Barge - EU+EFTA+UK: 2.6; = kg_km_7
- Transport of surfactant // surfactant production // glo by Articulated lorry transport, Euro 4, Total weight >32 t - EU+EFTA+UK: 20; = kg_km_8
- Transport of resin, hydrogenated petroleum // resin, hydrogenated petroleum production // glo by Freight train, average - EU+EFTA+UK: 1.35; = kg_km_9
- Transport of resin, hydrogenated petroleum // resin, hydrogenated petroleum production // glo by Barge - EU+EFTA+UK: 0.65; = kg_km_10
- Transport of resin, hydrogenated petroleum // resin, hydrogenated petroleum production // glo by Articulated lorry transport, Euro 4, Total weight >32 t - EU+EFTA+UK: 5; = kg_km_11
- Transport of silica, precipitated // silica production // glo by Freight train, average - EU+EFTA+UK: 0.54; = kg_km_12
- Transport of silica, precipitated // silica production // glo by Barge - EU+EFTA+UK: 0.26; = kg_km_13
- Transport of silica, precipitated // silica production // glo by Articulated lorry transport, Euro 4, Total weight >32 t - EU+EFTA+UK: 2; = kg_km_14
- Transport of lubricating oil // lubricants at refinery // eu+efta+uk by Freight train, average - EU+EFTA+UK: 0.272; = kg_km_15
- Transport of lubricating oil // lubricants at refinery // eu+efta+uk by Barge - EU+EFTA+UK: 0.306; = kg_km_16
- Transport of lubricating oil // lubricants at refinery // eu+efta+uk by Articulated lorry transport, Euro 4, Total weight >32 t - EU+EFTA+UK: 0.148; = kg_km_17
- Electricity from Electricity grid mix 1kV-60kV - EU+EFTA+UK: 1.404
- Transport of washing machine by Transoceanic ship, containers - GLO: 0.229656; = kg_km_18
- Transport of washing machine by Freight train, diesel traction - EU+EFTA+UK: 0.0041604; = kg_km_19
- Transport of washing machine by Freight train, electricity traction - EU+EFTA+UK: 0.0014152; = kg_km_20
- Transport of washing machine by Freight train, average - EU+EFTA+UK: 3.33781e-5; = kg_km_21
- Transport of washing machine by Barge - EU+EFTA+UK: 0.000102437; = kg_km_22
- Transport of washing machine by Barge - ROW w/o EU+EFTA: 0.000209172; = kg_km_23
- Transport of washing machine by Articulated lorry transport, Total weight <7.5 t, mix Euro 0-5 - EU+EFTA+UK: 0.00296239; = kg_km_24
- Transport of washing machine by Articulated lorry transport, Euro 4, Total weight >32 t - EU+EFTA+UK: 0.0269722; = kg_km_25
- Transport of washing machine by Articulated lorry transport, Total weight >32 t, mix Euro 0-5 - ROW w/o EU+EFTA: 0.0711848; = kg_km_26
- washing, dry cleaning // washing, dry cleaning // eu+efta+uk, blackbox: 1
- washing, dry cleaning // washing, dry cleaning // eu+efta+uk, elementary: 1

## Impact indicators
- Eutrophication marine: 0.000505394
- Ecotoxicity, freshwater: 3.43651
- Land use: 3.36329
- Water use: 0.187656
- Resource use, minerals and metals: 6.15568e-7
- Resource use, fossils: 4.34492
- Climate change: 0.271111
- Ozone depletion: 2.20262e-7
- Human toxicity, cancer: 7.77155e-10
- Human toxicity, non-cancer: 4.78636e-9
- EF-particulate Matter: 2.02255e-8
- Ionising radiation, human health: 0.07317
- Photochemical ozone formation - human health: 0.000916934
- Acidification: 0.00134816
- Eutrophication, terrestrial: 0.00340825
- Eutrophication, freshwater: 8.62472e-6

## Deviations from the LCI method principle
The background data uses:
- the \xe2\x80\x9cRecycled content cut-off\xe2\x80\x9d approach to allocate end-of-life by-products and secondary materials. This allocation is explained in the description of the recycled content system model (http://www.ecoinvent.org/database/system-models-in-ecoinvent-3/cut-off-system-model/allocation-cut-off-by-classification.html).
OR
- EF compliant data

## Deviations from the LCI method approaches
Background data:
- the \xe2\x80\x9cRecycled content cut-off\xe2\x80\x9d approach to allocate end-of-life by-products and secondary materials. This allocation is explained in the description of the recycled content system model (http://www.ecoinvent.org/database/system-models-in-ecoinvent-3/cut-off-system-model/allocation-cut-off-by-classification.html). The ecoinvent database mostly relies on “Allocation – market values” apart for few exceptions particularly in the energy sector. ecoinvent energy data is replaced with EF3.0 core data as per the EF guidelines version 2.0.
OR
- EF compliant data

## Modelling constants
All modelling constants follow the requirements listed in the Tender Specifications 070201/2020/SER/ENV.B1. Completeness: There are no intentional cut-offs in the inventory no matter how small their contribution to all the EF impact categories is. Eventual cut-offs are in compliance with the Guide for EF compliant data sets (JRC 2020), i.e. only if below the 3% cut-off rule. Water use: water use is modelled at country level using separate flows for water withdrawal, water release and water evaporation. Handling multi-functional processes: the following PEF multi- functionality decision hierarchy is applied for resolving all multi- functionality problems: (1) subdivision or system expansion; (2) allocation based on a relevant underlying physical relationship (substitution may apply here); (3) allocation based on some other relationship. Direct land use change: GHG emissions from direct LUC allocated to good/service for 20 years after the LUC occurs, with IPCC default values. Carbon storage and delayed emissions: credits associated with temporary (carbon) storage or delayed emissions up to 300 years are not be considered. Emissions off-setting: are not included. Capital goods (including infrastructures) and their End of life: they are included. System boundaries: system boundaries include all processes linked to the product supply chain (e.g. maintenance). Time period: emissions and removals are modelled as if released or removed at the beginning of the assessment method. Fossil and biogenic carbon emissions and removals: removals and emissions are modelled as follows: All GHG emissions from fossil fuels (including peat and limestone) are modelled consistently with the most updated ILCD list of elementary flows. The non-fossil (biogenic) carbon flows are modelled consistently with the most updated ILCD list of elementary flows.

## Cut-off and completeness
There are no intentional cut-offs in the inventory no matter how small their contribution to all the EF impact categories is. Eventual cut-offs are in compliance with the Guide for EF compliant data sets (JRC 2020), i.e. only if below the 3% cut-off rule. The dataset dry mass and water balance has been checked to ensure the inventory is complete. Capital goods (e.g. infrastructure) and their end-of-life are included.

## Data selection and combination
These datasets include, in both their foreground and background data, links to EF3.0 compliant data.
The relevant background data on energy, transport, and End of Life are from the LCDN data node (http://lcdn.thinkstep.com/Node/).
All other background data in the supply of this product for which no EF3.0 process was available are from ecoinvent v3.7 database (www.ecoinvent.org) or other data sources.

## Data treatment and extrapolations
Several data sources have been used to model the inventory.

## Review details
Internal reviews have been asked to review the plausibility of the unit process, LCIA scores, and DQRs. Internal reviewers have also been asked to review the data for EF compliancy. The consortium is therefore responsible for aspects such as compliancy with the ILCD format, including validation in Look@LCI, and nomenclature.
Internal reviwers have been asked to judge based on the process name, that the unit process models in a complete and representative way the process in the requested location. The review encompassed the plausability of:
- exchanges with nature (elementary flows) as well as exchanges such as product and waste flows.
- meta information (general comment, technology comment, system boundaries, allocation, cut-off rules, etc.). Reviewers were asked to judge if the provided information is enough to understand the content of the process.
- LCIA scores
- DQRs including precision, technology, time and geography. As well as the overall DQR.
External reviewers have been asked to provide their expertise in the field of interest. External reviewers have been asked to review the unit process, including eventual methodological choices, the LCIA scores (provided with contribution scores as well), and DQRs. External reviewers have been provided all the information in a tool developed by the consortium for the purpose of this project.
External reviewers have been asked to judge based on the process name, that the unit process models in a complete and representative way the process in the requested location. The review encompassed:
- Plausability and completeness of exchanges with nature (elementary flows) as well as exchanges such as product and waste flows.
- Review of meta information (general comment, technology comment, system boundaries, allocation, cut-off rules, etc.). Reviewers were asked to judge if the provided information is enough to understand the content of the process.
- Review of properties (biogenic carbon and water content).
- Review of allocation keys.
- Plausability of LCIA scores calculated by the consortium.
- Plausability of DQRs including precision, technology, time and geography. As well as the overall DQR.

## Data sources
- Background Data for Representative products and organisations. EF 3.0 compliant (data stock)
- Kirsi Laitala, Ingun Grimstad Klepp, Roy Kettlewell and Stephen Wiedemann (2020). Laundry Care Regimes: Do the Practices of Keeping Clothes Clean Have Different Environmental Impacts Based on the Fibre Content?, www.mdpi.com, Molecular Diversity Preservation International (MDPI) Sustainability Foundation, Basel, Switzerland
- CINET (2013) Safe and Sustainable use of Tetrachloroethylene in Professional Textile Cleaning by Best Practice Approach, https://www.cinet-online.com/uploads/files/CINET_Safe%20and%20sustainable%20processing%20with%20PERC.pdf, Comité International De L`Entretien du Textile, Ophemert, The Netherlands
- CINET (2012) European Legislation Perc, https://www.cinet-online.com/uploads/files/CINET_European%20Legislation%20PERC.pdf, Comité International De L`Entretien du Textile, Ophemert, The Netherlands
- Lebon (2021) Nonwoven Oven Machine, Catalog and Company Messages, Qingdao Lebon Industry Co., Ltd., China
- Lindus (2021) Dry Cleaning Machine, http://www.lindus-srl.com/, Bergparma, Parma, Italy
- epa (2006) National Perchloroethylene Air Emission Standards for Dry Cleaning Facilities, Environmental Protection Agency Office of Environmental Enforcement (OEE), Wexford, Ireland
- Kirsi Laitala, Ingun G. Klepp and Beverley Henry (2017). Global laundering practices-Alternatives to machine washing. Oslo and Akershus University College of Applied Sciences, Oslo, Norway.
- epa (2013) Best Practice Guidelines for Dry Cleaning Issued to support European Union (Installations and Activities using Solvents) Regulations 2012, https://www.epa.ie/, Environmental Protection Agency Office of Environmental Enforcement (OEE), Wexford, Ireland
- J. Räisänen , R. Niemelä & C. Rosenberg (2001) Tetrachloroethylene Emissions and Exposure in Dry Cleaning, Journal of the Air & Waste Management Association, Finnish Institute of Occupational Health, Helsinki, Finland

## Intended applications
Implementation of regular Product Environmental Footprint (PEF) studies and Organisation Environmental Footprint (OEF) studies exclusively under the specified Product groups and sectors as defined in the Product Environmental Footprint Category Rules (PEFCR) and Organisation Environmental Footprint Sectorial Rules (OEFSR) listed in http://ec.europa.eu/environment/eussd/smgp/PEFCR_OEFSR.htm
