# extrusion and melt-spinning, continuous filament, with texturing (80 to 500 dtex- 72 to 450 den-125 to 20 nm), elementary; technology mix; production mix, at plant; service, Synthetic texturised flament yarn

Dataset: ILCD process, Unit process, single operation
Geography: GLO
Reference year: 2021
Valid until: 2024
Classification: Other Services / Other services
LCI method principle: Attributional
LCI method approaches: Allocation - market value
Completeness: All relevant flows quantified
Project: Provision of process-based 3.0 Environmental Footprint-compliant life cycle inventory datasets - Apparel 1 - contract number 070201/2020/840291/SER/ENV.B.1
Generated by: Metsims Sustainability Consulting
Owner: PRé Sustainability B.V.
Compliance: Environmental Footprint non-primary supporting data set; Environmental Footprint 3.1
Amounts: no units in this file; such an amount is in the reference unit of its flow, which a separate flow dataset defines
copyright: true
licenseType: Free of charge for some user types or use types
accessRestrictions: Free of charge for all final users implementing a regular Product Environmental Footprint (PEF) studies and Organisation Environmental Footprint (OEF) studies exclusively under the specified Product groups and sectors as defined in the Product Environmental Footprint Category Rules (PEFCR) and Organisation Environmental Footprint Sectorial Rules (OEFSR) listed in http://ec.europa.eu/environment/eussd/smgp/PEFCR_OEFSR.htm and in accordance with the terms and conditions of the EULA (available at https://ecoinvent.lca-data.com/) exclusively until 31st December 2024. Any use of this dataset or any derivative data not within the specific context of one of the PEF/OEF projects or after the end of 2024 is not permitted.

## General comment
Notice: this data set supersedes the EF3.0-compliant version (see link under "preceding data set version" below calculated with the EF3.0). The life cycle inventory is not changed from the original EF3.0 data set. The LCIA results are calculated based on the EF3.1 methods which provide updated characterisation factors in the following impact categories: Climate Change, Ecotoxicity freshwater, Photochemical Ozone Formation, Acidification, Human Toxicity non-cancer, and Human Toxicity cancer. The review report and the data quality ratings refer to the original results. The data set has been updated by the European Commission on the basis of the original EF3.0 data set delivered by the data provider.This sub-process has limited documentation only. For all detailed documentation of the full model to which this data set belongs (such as DQRs, review reports and other technical documentation), please see this process: extrusion and melt-spinning, continuous filament, with texturing (80 to 500 dtex- 72 to 450 den-125 to 20 nm) - GLO []

## Technology and included processes
The process covers extrusion and melt spinning of synthetic filament yarn production. Synthetic raw materials in granule shape are extruded into yarn form in melt form. After spinning yarns are coagulated by cold air.

Process emissions and energy consumption are modelled according to the most commonly used polymers (PET, nylon and elastane) based on global consumption of textile raw materials.

Inputs and outputs were directly taken from scientific paper of Roos (2019) without any calculation.

In melt spinning, thermoplastic polymer granules are fed into an extruder and then the polymer melt is pumped through a spinneret under pressure. The extruded polymer is cooled down with cold air to solidify into filaments. After then, spin finish oil-lubricant is applied to spinned yarn to enhance performance of yarn at further textile production processes. The function of spinfinish oil is completed once the yarn is weaved or knitted. Spinfinish oil is then removed from fabric by washing treatment. The loss of spinfinish oil into wastewater after washing is taken into account.. Due to the lack of data on the wastewater treatment around the globe, EU wastewater treatment as a proxy is used.

After getting fibres from yarn production process, texturizing step is applied. Air-jet texturing technology uses air turbulence to give fibers natural like curves.

1.03 kg of material is used to produce 1 kg of yarn. 0.03 kg of waste amount shall also be added into the model. The nature of the recycling and/or disposal of this waste should be considered . The user is also responsible for accounting transportation expenditures for all extra input and output materials that need to be modelled alongside this service.*

*Ref: Altun, S. (2012). Prediction of textile waste profile and recycling opportunities in Turk. Fibres & Textiles in Eastern Europe.

References:
- Rawal, A., & Mukhopadhyay, S. (2014). Melt spinning of synthetic polymeric filaments. In Advances in filament yarn spinning of Textiles and Polymers (pp. 75-99). Woodhead Publishing.
- Bernholz, W. F., Redston, J. P., & Schlatter, C. (1974). Spin-Finish Usage and Compounding for Man-Made Fibers.
- www.korteks.com.tr, Access Date: 26.02.2021

## Reference product
- synthetic flament yarn, textured // extrusion and melt-spinning, continuous filament, with texturing (80 to 500 dtex- 72 to 450 den-125 to 20 nm) // glo, elementary: 1

## Outputs
- hexamethylene diamine, Emissions to air, unspecified: 4.5e-7
- caprolactam, Emissions to air, unspecified: 4.5e-7
- dimethyl terephthalate, Emissions to air, unspecified: 9.4e-6
- adipic acid, compound with hexane-1,6-diamine (1:1), Emissions to air, unspecified: 4.5e-7
- adipic acid, Emissions to air, unspecified: 4.5e-7

## Impact indicators
- Ecotoxicity, freshwater: 0.000142615
- Human toxicity, non-cancer: 1.00222e-12
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
## Deviations from the LCI method principle
The background data uses:
- the \xe2\x80\x9cRecycled content cut-off\xe2\x80\x9d approach to allocate end-of-life by-products and secondary materials. This allocation is explained in the description of the recycled content system model (http://www.ecoinvent.org/database/system-models-in-ecoinvent-3/cut-off-system-model/allocation-cut-off-by-classification.html).
OR
- EF compliant data

## Deviations from the LCI method approaches
Background data:
- the \xe2\x80\x9cRecycled content cut-off\xe2\x80\x9d approach to allocate end-of-life by-products and secondary materials. This allocation is explained in the description of the recycled content system model (http://www.ecoinvent.org/database/system-models-in-ecoinvent-3/cut-off-system-model/allocation-cut-off-by-classification.html). The ecoinvent database mostly relies on “Allocation – market values” apart for few exceptions particularly in the energy sector. ecoinvent energy data is replaced with EF3.0 core data as per the EF guidelines version 2.0.
OR
- EF compliant data

## Modelling constants
All modelling constants follow the requirements listed in the Tender Specifications 070201/2020/SER/ENV.B1. Completeness: There are no intentional cut-offs in the inventory no matter how small their contribution to all the EF impact categories is. Eventual cut-offs are in compliance with the Guide for EF compliant data sets (JRC 2020), i.e. only if below the 3% cut-off rule. Water use: water use is modelled at country level using separate flows for water withdrawal, water release and water evaporation. Handling multi-functional processes: the following PEF multi- functionality decision hierarchy is applied for resolving all multi- functionality problems: (1) subdivision or system expansion; (2) allocation based on a relevant underlying physical relationship (substitution may apply here); (3) allocation based on some other relationship. Direct land use change: GHG emissions from direct LUC allocated to good/service for 20 years after the LUC occurs, with IPCC default values. Carbon storage and delayed emissions: credits associated with temporary (carbon) storage or delayed emissions up to 300 years are not be considered. Emissions off-setting: are not included. Capital goods (including infrastructures) and their End of life: they are included. System boundaries: system boundaries include all processes linked to the product supply chain (e.g. maintenance). Time period: emissions and removals are modelled as if released or removed at the beginning of the assessment method. Fossil and biogenic carbon emissions and removals: removals and emissions are modelled as follows: All GHG emissions from fossil fuels (including peat and limestone) are modelled consistently with the most updated ILCD list of elementary flows. The non-fossil (biogenic) carbon flows are modelled consistently with the most updated ILCD list of elementary flows.

## Cut-off and completeness
There are no intentional cut-offs in the inventory no matter how small their contribution to all the EF impact categories is. Eventual cut-offs are in compliance with the Guide for EF compliant data sets (JRC 2020), i.e. only if below the 3% cut-off rule. The dataset dry mass and water balance has been checked to ensure the inventory is complete. Capital goods (e.g. infrastructure) and their end-of-life are included.

## Data selection and combination
These datasets include, in both their foreground and background data, links to EF3.0 compliant data.
The relevant background data on energy, transport, and End of Life are from the LCDN data node (http://lcdn.thinkstep.com/Node/).
All other background data in the supply of this product for which no EF3.0 process was available are from ecoinvent v3.7 database (www.ecoinvent.org) or other data sources.

## Data treatment and extrapolations
Several data sources have been used to model the inventory.

## Use advice
This data set is a supporting sub-data set and must be used exclusively as sub-data set of its corresponding level-1 partly disaggregated data set (see “General comment” field for exact name and UUID).

## Data sources
- Background Data for Representative products and organisations. EF 3.0 compliant (data stock)
- Roos, S., Jönsson, C., Posner, S., Arvidsson, R., & Svanström, M. (2019). An inventory framework for inclusion of textile chemicals in life cycle assessment. The International Journal of Life Cycle Assessment, 24(5), 838-847.
- http://cisscomachinery.com/ATY_YARN_AIR_TEXTURED_YARN_MACHINE, Acces Date: 26.02.2021
- www.korteks.com.tr, Access Date: 26.02.2021
- Rawal, A., & Mukhopadhyay, S. (2014). Melt spinning of synthetic polymeric filaments. In Advances in filament yarn spinning of Textiles and Polymers (pp. 75-99). Woodhead Publishing.
- Bernholz, W. F., Redston, J. P., & Schlatter, C. (1974). Spin-Finish Usage and Compounding for Man-Made Fibers.
- Freitas A., Zhang G., Mathews R., (2017), Waterfootprint Assessment of Polyester and Viscose and Comparison to Cotton, Water Footprint Network

## Intended applications
Implementation of regular Product Environmental Footprint (PEF) studies and Organisation Environmental Footprint (OEF) studies exclusively under the specified Product groups and sectors as defined in the Product Environmental Footprint Category Rules (PEFCR) and Organisation Environmental Footprint Sectorial Rules (OEFSR) listed in http://ec.europa.eu/environment/eussd/smgp/PEFCR_OEFSR.htm
