# hardboard; including raw materials; production mix, at plant; 956 kg/m3

Dataset: ILCD process, Partly terminated system
Geography: EU+EFTA+UK
Reference year: 2012
Valid until: 2024
Classification: Materials production / Wood
LCI method principle: Attributional
LCI method approaches: Allocation - market value
Completeness: All relevant flows quantified
Project: Provision of process-based 3.0 Environmental Footprint-compliant life cycle inventory datasets - Renewable materials - contract number 070201/2020/840085/SER/ENV.B.1
Generated by: ecoinvent
Owner: ecoinvent
Compliance: ILCD Data Network - Entry-level; Suggestions for updating the PEF method 2019; ISO 14040 Environmental Management – Life Cycle Assessment – Principles and Framework, 2006; ISO 14044:2006. Environmental Management – Life Cycle Assessment – Requirements and guidelines.; Environmental Footprint 3.1
Review: Dependent internal review by Emilia Moreno Ruiz, Marisa Vieira; Independent review panel by Laura Batlle Bayer
Data quality: Overall quality: Very good; Time representativeness: Very good; Geographical representativeness: Very good; Technological representativeness: Very good; Precision: Good; Methodological appropriateness and consistency: Not applicable
Amounts: no units in this file; such an amount is in the reference unit of its flow, which a separate flow dataset defines
copyright: true
licenseType: Free of charge for some user types or use types
accessRestrictions: Free of charge for all final users implementing a regular Product Environmental Footprint (PEF) studies and Organisation Environmental Footprint (OEF) studies exclusively under the specified Product groups and sectors as defined in the Product Environmental Footprint Category Rules (PEFCR) and Organisation Environmental Footprint Sectorial Rules (OEFSR) listed in http://ec.europa.eu/environment/eussd/smgp/PEFCR_OEFSR.htm and in accordance with the terms and conditions of the EULA (available at https://ecoinvent.lca-data.com/) exclusively until 31st December 2024. Any use of this dataset or any derivative data not within the specific context of one of the PEF/OEF projects or after the end of 2024 is not permitted.

## General comment
Notice: this data set supersedes the EF3.0-compliant version (see link under "preceding data set version" below calculated with the EF3.0). The life cycle inventory is not changed from the original EF3.0 data set. The LCIA results are calculated based on the EF3.1 methods which provide updated characterisation factors in the following impact categories: Climate Change, Ecotoxicity freshwater, Photochemical Ozone Formation, Acidification, Human Toxicity non-cancer, and Human Toxicity cancer. The review report and the data quality ratings refer to the original results. The data set has been updated by the European Commission on the basis of the original EF3.0 data set delivered by the data provider.This activity represent the production of 1 m3 of hardboard which is an engineered wood product made out of highly compressed exploded wood fibre. The produced hardboard has a density of 956 kg/m3.

## Technology and included processes
The dataset represents hardboard produced in the wet process. The process includes transport of raw materials, direct emissions, energy use, ancillary products, and waste treatment. This dataset is modelled according to the activity ‘fibreboard production, hard-RER', published in the ecoinvent database 3.7.1. Data is based on a survey among member companies of the European Panel Federation

## Parameters
- kg_0: 0.58154
  Mass in kg, for aluminium sulphate powder // aluminium sulphate powder production // eu+efta+uk; Freight train, average; EU+EFTA+UK
- km_0: 240.74
  Distance in km, for aluminium sulphate powder // aluminium sulphate powder production // eu+efta+uk; Freight train, average; EU+EFTA+UK
- kg_km_0: 140; = kg_0*km_0
  Transport amount in km*km, for aluminium sulphate powder // aluminium sulphate powder production // eu+efta+uk; Freight train, average; EU+EFTA+UK
- kg_1: 0.58154
  Mass in kg, for aluminium sulphate powder // aluminium sulphate powder production // eu+efta+uk; Barge; EU+EFTA+UK
- km_1: 269.973
  Distance in km, for aluminium sulphate powder // aluminium sulphate powder production // eu+efta+uk; Barge; EU+EFTA+UK
- kg_km_1: 157; = kg_1*km_1
  Transport amount in km*km, for aluminium sulphate powder // aluminium sulphate powder production // eu+efta+uk; Barge; EU+EFTA+UK
- kg_2: 0.58154
  Mass in kg, for aluminium sulphate powder // aluminium sulphate powder production // eu+efta+uk; Articulated lorry transport, Euro 4, Total weight >32 t; EU+EFTA+UK
- km_2: 130
  Distance in km, for aluminium sulphate powder // aluminium sulphate powder production // eu+efta+uk; Articulated lorry transport, Euro 4, Total weight >32 t; EU+EFTA+UK
- kg_km_2: 75.6; = kg_2*km_2
  Transport amount in km*km, for aluminium sulphate powder // aluminium sulphate powder production // eu+efta+uk; Articulated lorry transport, Euro 4, Total weight >32 t; EU+EFTA+UK
- kg_3: 0.304711
  Mass in kg, for lubricating oil // lubricants at refinery // eu+efta+uk; Freight train, average; EU+EFTA+UK
- km_3: 239.899
  Distance in km, for lubricating oil // lubricants at refinery // eu+efta+uk; Freight train, average; EU+EFTA+UK
- kg_km_3: 73.1; = kg_3*km_3
  Transport amount in km*km, for lubricating oil // lubricants at refinery // eu+efta+uk; Freight train, average; EU+EFTA+UK
- kg_4: 0.304711
  Mass in kg, for lubricating oil // lubricants at refinery // eu+efta+uk; Barge; EU+EFTA+UK
- km_4: 270.092
  Distance in km, for lubricating oil // lubricants at refinery // eu+efta+uk; Barge; EU+EFTA+UK
- kg_km_4: 82.3; = kg_4*km_4
  Transport amount in km*km, for lubricating oil // lubricants at refinery // eu+efta+uk; Barge; EU+EFTA+UK
- kg_5: 0.304711
  Mass in kg, for lubricating oil // lubricants at refinery // eu+efta+uk; Articulated lorry transport, Euro 4, Total weight >32 t; EU+EFTA+UK
- km_5: 129.959
  Distance in km, for lubricating oil // lubricants at refinery // eu+efta+uk; Articulated lorry transport, Euro 4, Total weight >32 t; EU+EFTA+UK
- kg_km_5: 39.6; = kg_5*km_5
  Transport amount in km*km, for lubricating oil // lubricants at refinery // eu+efta+uk; Articulated lorry transport, Euro 4, Total weight >32 t; EU+EFTA+UK
- kg_6: 9.25087
  Mass in kg, for wax // wax production // eu+efta+uk; Freight train, average; EU+EFTA+UK
- km_6: 239.977
  Distance in km, for wax // wax production // eu+efta+uk; Freight train, average; EU+EFTA+UK
- kg_km_6: 2220; = kg_6*km_6
  Transport amount in km*km, for wax // wax production // eu+efta+uk; Freight train, average; EU+EFTA+UK
- kg_7: 9.25087
  Mass in kg, for wax // wax production // eu+efta+uk; Barge; EU+EFTA+UK
- km_7: 270.245
  Distance in km, for wax // wax production // eu+efta+uk; Barge; EU+EFTA+UK
- kg_km_7: 2500; = kg_7*km_7
  Transport amount in km*km, for wax // wax production // eu+efta+uk; Barge; EU+EFTA+UK
- kg_8: 9.25087
  Mass in kg, for wax // wax production // eu+efta+uk; Articulated lorry transport, Euro 4, Total weight >32 t; EU+EFTA+UK
- km_8: 129.718
  Distance in km, for wax // wax production // eu+efta+uk; Articulated lorry transport, Euro 4, Total weight >32 t; EU+EFTA+UK
- kg_km_8: 1200; = kg_8*km_8
  Transport amount in km*km, for wax // wax production // eu+efta+uk; Articulated lorry transport, Euro 4, Total weight >32 t; EU+EFTA+UK
- kg_9: 1101.9
  Mass in kg, for softwood under bark // softwood forestry // eu+efta+uk; Freight train, average; EU+EFTA+UK
- km_9: 239.585
  Distance in km, for softwood under bark // softwood forestry // eu+efta+uk; Freight train, average; EU+EFTA+UK
- kg_km_9: 264000; = kg_9*km_9
  Transport amount in km*km, for softwood under bark // softwood forestry // eu+efta+uk; Freight train, average; EU+EFTA+UK
- kg_10: 1101.9
  Mass in kg, for softwood under bark // softwood forestry // eu+efta+uk; Barge; EU+EFTA+UK
- km_10: 270.441
  Distance in km, for softwood under bark // softwood forestry // eu+efta+uk; Barge; EU+EFTA+UK
- kg_km_10: 298000; = kg_10*km_10
  Transport amount in km*km, for softwood under bark // softwood forestry // eu+efta+uk; Barge; EU+EFTA+UK
- kg_11: 1101.9
  Mass in kg, for softwood under bark // softwood forestry // eu+efta+uk; Articulated lorry transport, Euro 4, Total weight >32 t; EU+EFTA+UK
- km_11: 129.775
  Distance in km, for softwood under bark // softwood forestry // eu+efta+uk; Articulated lorry transport, Euro 4, Total weight >32 t; EU+EFTA+UK
- kg_km_11: 143000; = kg_11*km_11
  Transport amount in km*km, for softwood under bark // softwood forestry // eu+efta+uk; Articulated lorry transport, Euro 4, Total weight >32 t; EU+EFTA+UK
- kg_12: 483.679
  Mass in kg, for hardwood under bark // hardwood forestry // eu+efta+uk; Freight train, average; EU+EFTA+UK
- km_12: 239.828
  Distance in km, for hardwood under bark // hardwood forestry // eu+efta+uk; Freight train, average; EU+EFTA+UK
- kg_km_12: 116000; = kg_12*km_12
  Transport amount in km*km, for hardwood under bark // hardwood forestry // eu+efta+uk; Freight train, average; EU+EFTA+UK
- kg_13: 483.679
  Mass in kg, for hardwood under bark // hardwood forestry // eu+efta+uk; Barge; EU+EFTA+UK
- km_13: 270.841
  Distance in km, for hardwood under bark // hardwood forestry // eu+efta+uk; Barge; EU+EFTA+UK
- kg_km_13: 131000; = kg_13*km_13
  Transport amount in km*km, for hardwood under bark // hardwood forestry // eu+efta+uk; Barge; EU+EFTA+UK
- kg_14: 483.679
  Mass in kg, for hardwood under bark // hardwood forestry // eu+efta+uk; Articulated lorry transport, Euro 4, Total weight >32 t; EU+EFTA+UK
- km_14: 130.045
  Distance in km, for hardwood under bark // hardwood forestry // eu+efta+uk; Articulated lorry transport, Euro 4, Total weight >32 t; EU+EFTA+UK
- kg_km_14: 62900; = kg_14*km_14
  Transport amount in km*km, for hardwood under bark // hardwood forestry // eu+efta+uk; Articulated lorry transport, Euro 4, Total weight >32 t; EU+EFTA+UK
- kg_15: 6.50319
  Mass in kg, for sawdust hardwood, loose, wet, measured as dry mass // sawdust hardwood, loose, wet, measured as dry mass // eu+efta+uk; Freight train, average; EU+EFTA+UK
- km_15: 239.882
  Distance in km, for sawdust hardwood, loose, wet, measured as dry mass // sawdust hardwood, loose, wet, measured as dry mass // eu+efta+uk; Freight train, average; EU+EFTA+UK
- kg_km_15: 1560; = kg_15*km_15
  Transport amount in km*km, for sawdust hardwood, loose, wet, measured as dry mass // sawdust hardwood, loose, wet, measured as dry mass // eu+efta+uk; Freight train, average; EU+EFTA+UK
- kg_16: 6.50319
  Mass in kg, for sawdust hardwood, loose, wet, measured as dry mass // sawdust hardwood, loose, wet, measured as dry mass // eu+efta+uk; Barge; EU+EFTA+UK
- km_16: 270.636
  Distance in km, for sawdust hardwood, loose, wet, measured as dry mass // sawdust hardwood, loose, wet, measured as dry mass // eu+efta+uk; Barge; EU+EFTA+UK
- kg_km_16: 1760; = kg_16*km_16
  Transport amount in km*km, for sawdust hardwood, loose, wet, measured as dry mass // sawdust hardwood, loose, wet, measured as dry mass // eu+efta+uk; Barge; EU+EFTA+UK
- kg_17: 6.50319
  Mass in kg, for sawdust hardwood, loose, wet, measured as dry mass // sawdust hardwood, loose, wet, measured as dry mass // eu+efta+uk; Articulated lorry transport, Euro 4, Total weight >32 t; EU+EFTA+UK
- km_17: 129.936
  Distance in km, for sawdust hardwood, loose, wet, measured as dry mass // sawdust hardwood, loose, wet, measured as dry mass // eu+efta+uk; Articulated lorry transport, Euro 4, Total weight >32 t; EU+EFTA+UK
- kg_km_17: 845; = kg_17*km_17
  Transport amount in km*km, for sawdust hardwood, loose, wet, measured as dry mass // sawdust hardwood, loose, wet, measured as dry mass // eu+efta+uk; Articulated lorry transport, Euro 4, Total weight >32 t; EU+EFTA+UK
- kg_18: 13.2035
  Mass in kg, for sawdust softwood, loose, wet, measured as dry mass // sawdust softwood, loose, wet, measured as dry mass // eu+efta+uk; Freight train, average; EU+EFTA+UK
- km_18: 240.089
  Distance in km, for sawdust softwood, loose, wet, measured as dry mass // sawdust softwood, loose, wet, measured as dry mass // eu+efta+uk; Freight train, average; EU+EFTA+UK
- kg_km_18: 3170; = kg_18*km_18
  Transport amount in km*km, for sawdust softwood, loose, wet, measured as dry mass // sawdust softwood, loose, wet, measured as dry mass // eu+efta+uk; Freight train, average; EU+EFTA+UK
- kg_19: 13.2035
  Mass in kg, for sawdust softwood, loose, wet, measured as dry mass // sawdust softwood, loose, wet, measured as dry mass // eu+efta+uk; Barge; EU+EFTA+UK
- km_19: 269.626
  Distance in km, for sawdust softwood, loose, wet, measured as dry mass // sawdust softwood, loose, wet, measured as dry mass // eu+efta+uk; Barge; EU+EFTA+UK
- kg_km_19: 3560; = kg_19*km_19
  Transport amount in km*km, for sawdust softwood, loose, wet, measured as dry mass // sawdust softwood, loose, wet, measured as dry mass // eu+efta+uk; Barge; EU+EFTA+UK
- kg_20: 13.2035
  Mass in kg, for sawdust softwood, loose, wet, measured as dry mass // sawdust softwood, loose, wet, measured as dry mass // eu+efta+uk; Articulated lorry transport, Euro 4, Total weight >32 t; EU+EFTA+UK
- km_20: 130.269
  Distance in km, for sawdust softwood, loose, wet, measured as dry mass // sawdust softwood, loose, wet, measured as dry mass // eu+efta+uk; Articulated lorry transport, Euro 4, Total weight >32 t; EU+EFTA+UK
- kg_km_20: 1720; = kg_20*km_20
  Transport amount in km*km, for sawdust softwood, loose, wet, measured as dry mass // sawdust softwood, loose, wet, measured as dry mass // eu+efta+uk; Articulated lorry transport, Euro 4, Total weight >32 t; EU+EFTA+UK
- kg_21: 0.00896209
  Mass in kg, for sodium hydroxide // sodium hydroxide production // eu+efta+uk; Freight train, average; EU+EFTA+UK
- km_21: 239.899
  Distance in km, for sodium hydroxide // sodium hydroxide production // eu+efta+uk; Freight train, average; EU+EFTA+UK
- kg_km_21: 2.15; = kg_21*km_21
  Transport amount in km*km, for sodium hydroxide // sodium hydroxide production // eu+efta+uk; Freight train, average; EU+EFTA+UK
- kg_22: 0.00896209
  Mass in kg, for sodium hydroxide // sodium hydroxide production // eu+efta+uk; Barge; EU+EFTA+UK
- km_22: 270.026
  Distance in km, for sodium hydroxide // sodium hydroxide production // eu+efta+uk; Barge; EU+EFTA+UK
- kg_km_22: 2.42; = kg_22*km_22
  Transport amount in km*km, for sodium hydroxide // sodium hydroxide production // eu+efta+uk; Barge; EU+EFTA+UK
- kg_23: 0.00896209
  Mass in kg, for sodium hydroxide // sodium hydroxide production // eu+efta+uk; Articulated lorry transport, Euro 4, Total weight >32 t; EU+EFTA+UK
- km_23: 130.55
  Distance in km, for sodium hydroxide // sodium hydroxide production // eu+efta+uk; Articulated lorry transport, Euro 4, Total weight >32 t; EU+EFTA+UK
- kg_km_23: 1.17; = kg_23*km_23
  Transport amount in km*km, for sodium hydroxide // sodium hydroxide production // eu+efta+uk; Articulated lorry transport, Euro 4, Total weight >32 t; EU+EFTA+UK
- kg_24: 155.582
  Mass in kg, for wood chips, softwood // wood chips, softwood // eu+efta+uk; Freight train, average; EU+EFTA+UK
- km_24: 239.745
  Distance in km, for wood chips, softwood // wood chips, softwood // eu+efta+uk; Freight train, average; EU+EFTA+UK
- kg_km_24: 37300; = kg_24*km_24
  Transport amount in km*km, for wood chips, softwood // wood chips, softwood // eu+efta+uk; Freight train, average; EU+EFTA+UK
- kg_25: 155.582
  Mass in kg, for wood chips, softwood // wood chips, softwood // eu+efta+uk; Barge; EU+EFTA+UK
- km_25: 269.954
  Distance in km, for wood chips, softwood // wood chips, softwood // eu+efta+uk; Barge; EU+EFTA+UK
- kg_km_25: 42000; = kg_25*km_25
  Transport amount in km*km, for wood chips, softwood // wood chips, softwood // eu+efta+uk; Barge; EU+EFTA+UK
- kg_26: 155.582
  Mass in kg, for wood chips, softwood // wood chips, softwood // eu+efta+uk; Articulated lorry transport, Euro 4, Total weight >32 t; EU+EFTA+UK
- km_26: 129.835
  Distance in km, for wood chips, softwood // wood chips, softwood // eu+efta+uk; Articulated lorry transport, Euro 4, Total weight >32 t; EU+EFTA+UK
- kg_km_26: 20200; = kg_26*km_26
  Transport amount in km*km, for wood chips, softwood // wood chips, softwood // eu+efta+uk; Articulated lorry transport, Euro 4, Total weight >32 t; EU+EFTA+UK
- kg_27: 91.3735
  Mass in kg, for wood chips, hardwood // wood chips, hardwood // eu+efta+uk; Freight train, average; EU+EFTA+UK
- km_27: 239.676
  Distance in km, for wood chips, hardwood // wood chips, hardwood // eu+efta+uk; Freight train, average; EU+EFTA+UK
- kg_km_27: 21900; = kg_27*km_27
  Transport amount in km*km, for wood chips, hardwood // wood chips, hardwood // eu+efta+uk; Freight train, average; EU+EFTA+UK
- kg_28: 91.3735
  Mass in kg, for wood chips, hardwood // wood chips, hardwood // eu+efta+uk; Barge; EU+EFTA+UK
- km_28: 270.319
  Distance in km, for wood chips, hardwood // wood chips, hardwood // eu+efta+uk; Barge; EU+EFTA+UK
- kg_km_28: 24700; = kg_28*km_28
  Transport amount in km*km, for wood chips, hardwood // wood chips, hardwood // eu+efta+uk; Barge; EU+EFTA+UK
- kg_29: 91.3735
  Mass in kg, for wood chips, hardwood // wood chips, hardwood // eu+efta+uk; Articulated lorry transport, Euro 4, Total weight >32 t; EU+EFTA+UK
- km_29: 130.235
  Distance in km, for wood chips, hardwood // wood chips, hardwood // eu+efta+uk; Articulated lorry transport, Euro 4, Total weight >32 t; EU+EFTA+UK
- kg_km_29: 11900; = kg_29*km_29
  Transport amount in km*km, for wood chips, hardwood // wood chips, hardwood // eu+efta+uk; Articulated lorry transport, Euro 4, Total weight >32 t; EU+EFTA+UK
- kg_30: 93.6041
  Mass in kg, for biodegradable waste to landfill // landfill of biodegradable waste // eu+efta+uk; Articulated lorry transport, Euro 4, Total weight >32 t; EU+EFTA+UK
- km_30: 77
  Distance in km, for biodegradable waste to landfill // landfill of biodegradable waste // eu+efta+uk; Articulated lorry transport, Euro 4, Total weight >32 t; EU+EFTA+UK
- kg_km_30: 7207.51; = kg_30*km_30
  Transport amount in km*km, for biodegradable waste to landfill // landfill of biodegradable waste // eu+efta+uk; Articulated lorry transport, Euro 4, Total weight >32 t; EU+EFTA+UK
- kg_31: 2.47038
  Mass in kg, for waste (unspecified) // landfill of inert material (other materials) // eu+efta+uk; Articulated lorry transport, Euro 4, Total weight >32 t; EU+EFTA+UK
- km_31: 77
  Distance in km, for waste (unspecified) // landfill of inert material (other materials) // eu+efta+uk; Articulated lorry transport, Euro 4, Total weight >32 t; EU+EFTA+UK
- kg_km_31: 190.219; = kg_31*km_31
  Transport amount in km*km, for waste (unspecified) // landfill of inert material (other materials) // eu+efta+uk; Articulated lorry transport, Euro 4, Total weight >32 t; EU+EFTA+UK

## Reference product
- hardboard including raw materials // hardboard // eu+efta+uk: 1

## Inputs
- Electricity from Electricity grid mix 1kV-60kV - AT: 61.5516
- Electricity from Electricity grid mix 1kV-60kV - DE: 1218.36
- Electricity from Electricity grid mix 1kV-60kV - FR: 77.8447
- Electricity from Electricity grid mix 1kV-60kV - HU: 103.19
- Electricity from Electricity grid mix 1kV-60kV - PL: 97.7585
- Electricity from Electricity grid mix 1kV-60kV - PT: 57.931
- Electricity from Electricity grid mix 1kV-60kV - EU+EFTA+UK: 193.707
- Thermal energy (MJ) from Thermal energy from natural gas - EU+EFTA+UK: 0.0263647
- Thermal energy (MJ) from Thermal energy from hard coal - EU+EFTA+UK: 3428.36
- Thermal energy (MJ) from Thermal energy from biogas - EU+EFTA+UK: 18.9674
- Transport of aluminium sulphate powder // aluminium sulphate powder production // eu+efta+uk by Freight train, average - EU+EFTA+UK: 140; = kg_km_0
- Transport of aluminium sulphate powder // aluminium sulphate powder production // eu+efta+uk by Barge - EU+EFTA+UK: 157; = kg_km_1
- Transport of aluminium sulphate powder // aluminium sulphate powder production // eu+efta+uk by Articulated lorry transport, Euro 4, Total weight >32 t - EU+EFTA+UK: 75.6; = kg_km_2
- Transport of lubricating oil // lubricants at refinery // eu+efta+uk by Freight train, average - EU+EFTA+UK: 73.1; = kg_km_3
- Transport of lubricating oil // lubricants at refinery // eu+efta+uk by Barge - EU+EFTA+UK: 82.3; = kg_km_4
- Transport of lubricating oil // lubricants at refinery // eu+efta+uk by Articulated lorry transport, Euro 4, Total weight >32 t - EU+EFTA+UK: 39.6; = kg_km_5
- Transport of wax // wax production // eu+efta+uk by Freight train, average - EU+EFTA+UK: 2220; = kg_km_6
- Transport of wax // wax production // eu+efta+uk by Barge - EU+EFTA+UK: 2500; = kg_km_7
- Transport of wax // wax production // eu+efta+uk by Articulated lorry transport, Euro 4, Total weight >32 t - EU+EFTA+UK: 1200; = kg_km_8
- Transport of softwood under bark // softwood forestry // eu+efta+uk by Freight train, average - EU+EFTA+UK: 264000; = kg_km_9
- Transport of softwood under bark // softwood forestry // eu+efta+uk by Barge - EU+EFTA+UK: 298000; = kg_km_10
- Transport of softwood under bark // softwood forestry // eu+efta+uk by Articulated lorry transport, Euro 4, Total weight >32 t - EU+EFTA+UK: 143000; = kg_km_11
- Transport of hardwood under bark // hardwood forestry // eu+efta+uk by Freight train, average - EU+EFTA+UK: 116000; = kg_km_12
- Transport of hardwood under bark // hardwood forestry // eu+efta+uk by Barge - EU+EFTA+UK: 131000; = kg_km_13
- Transport of hardwood under bark // hardwood forestry // eu+efta+uk by Articulated lorry transport, Euro 4, Total weight >32 t - EU+EFTA+UK: 62900; = kg_km_14
- Transport of sawdust hardwood, loose, wet, measured as dry mass // sawdust hardwood, loose, wet, measured as dry mass // eu+efta+uk by Freight train, average - EU+EFTA+UK: 1560; = kg_km_15
- Transport of sawdust hardwood, loose, wet, measured as dry mass // sawdust hardwood, loose, wet, measured as dry mass // eu+efta+uk by Barge - EU+EFTA+UK: 1760; = kg_km_16
- Transport of sawdust hardwood, loose, wet, measured as dry mass // sawdust hardwood, loose, wet, measured as dry mass // eu+efta+uk by Articulated lorry transport, Euro 4, Total weight >32 t - EU+EFTA+UK: 845; = kg_km_17
- Transport of sawdust softwood, loose, wet, measured as dry mass // sawdust softwood, loose, wet, measured as dry mass // eu+efta+uk by Freight train, average - EU+EFTA+UK: 3170; = kg_km_18
- Transport of sawdust softwood, loose, wet, measured as dry mass // sawdust softwood, loose, wet, measured as dry mass // eu+efta+uk by Barge - EU+EFTA+UK: 3560; = kg_km_19
- Transport of sawdust softwood, loose, wet, measured as dry mass // sawdust softwood, loose, wet, measured as dry mass // eu+efta+uk by Articulated lorry transport, Euro 4, Total weight >32 t - EU+EFTA+UK: 1720; = kg_km_20
- Transport of sodium hydroxide // sodium hydroxide production // eu+efta+uk by Freight train, average - EU+EFTA+UK: 2.15; = kg_km_21
- Transport of sodium hydroxide // sodium hydroxide production // eu+efta+uk by Barge - EU+EFTA+UK: 2.42; = kg_km_22
- Transport of sodium hydroxide // sodium hydroxide production // eu+efta+uk by Articulated lorry transport, Euro 4, Total weight >32 t - EU+EFTA+UK: 1.17; = kg_km_23
- Transport of wood chips, softwood // wood chips, softwood // eu+efta+uk by Freight train, average - EU+EFTA+UK: 37300; = kg_km_24
- Transport of wood chips, softwood // wood chips, softwood // eu+efta+uk by Barge - EU+EFTA+UK: 42000; = kg_km_25
- Transport of wood chips, softwood // wood chips, softwood // eu+efta+uk by Articulated lorry transport, Euro 4, Total weight >32 t - EU+EFTA+UK: 20200; = kg_km_26
- Transport of wood chips, hardwood // wood chips, hardwood // eu+efta+uk by Freight train, average - EU+EFTA+UK: 21900; = kg_km_27
- Transport of wood chips, hardwood // wood chips, hardwood // eu+efta+uk by Barge - EU+EFTA+UK: 24700; = kg_km_28
- Transport of wood chips, hardwood // wood chips, hardwood // eu+efta+uk by Articulated lorry transport, Euro 4, Total weight >32 t - EU+EFTA+UK: 11900; = kg_km_29
- Transport of biodegradable waste to landfill // landfill of biodegradable waste // eu+efta+uk by Articulated lorry transport, Euro 4, Total weight >32 t - EU+EFTA+UK: 7207.51; = kg_km_30
- Transport of waste (unspecified) // landfill of inert material (other materials) // eu+efta+uk by Articulated lorry transport, Euro 4, Total weight >32 t - EU+EFTA+UK: 190.219; = kg_km_31
- hardboard including raw materials // hardboard // eu+efta+uk, blackbox: 1
- hardboard including raw materials // hardboard // eu+efta+uk, elementary: 1

## Impact indicators
- Eutrophication marine: 1.26273
- Ecotoxicity, freshwater: 8115.32
- Land use: 305909
- Water use: 173.221
- Resource use, minerals and metals: 0.000569152
- Resource use, fossils: 10709.9
- Climate change: 871.53
- Ozone depletion: 1.08337e-6
- Human toxicity, cancer: 9.12902e-7
- Human toxicity, non-cancer: 4.61114e-6
- EF-particulate Matter: 9.40844e-5
- Ionising radiation, human health: 58.7814
- Photochemical ozone formation - human health: 4.262
- Acidification: 3.17866
- Eutrophication, terrestrial: 9.43909
- Eutrophication, freshwater: 0.0261375

## Deviations from the LCI method principle
The background data uses:
- the \xe2\x80\x9cRecycled content cut-off\xe2\x80\x9d approach to allocate end-of-life by-products and secondary materials. This allocation is explained in the description of the recycled content system model (http://www.ecoinvent.org/database/system-models-in-ecoinvent-3/cut-off-system-model/allocation-cut-off-by-classification.html).
OR
- EF compliant data

## Deviations from the LCI method approaches
Background data:
- the \xe2\x80\x9cRecycled content cut-off\xe2\x80\x9d approach to allocate end-of-life by-products and secondary materials. This allocation is explained in the description of the recycled content system model (http://www.ecoinvent.org/database/system-models-in-ecoinvent-3/cut-off-system-model/allocation-cut-off-by-classification.html). The ecoinvent database mostly relies on “Allocation – market values” apart for few exceptions particularly in the energy sector. ecoinvent energy data is replaced with EF3.0 core data as per the EF guidelines version 2.0.
OR
- EF compliant data

## Modelling constants
All modelling constants follow the requirements listed in the Tender Specifications 070201/2020/SER/ENV.B1. Completeness: There are no intentional cut-offs in the inventory no matter how small their contribution to all the EF impact categories is. Eventual cut-offs are in compliance with the Guide for EF compliant data sets (JRC 2020), i.e. only if below the 3% cut-off rule. Water use: water use is modelled at country level using separate flows for water withdrawal, water release and water evaporation. Handling multi-functional processes: the following PEF multi- functionality decision hierarchy is applied for resolving all multi- functionality problems: (1) subdivision or system expansion; (2) allocation based on a relevant underlying physical relationship (substitution may apply here); (3) allocation based on some other relationship. Direct land use change: GHG emissions from direct LUC allocated to good/service for 20 years after the LUC occurs, with IPCC default values. Carbon storage and delayed emissions: credits associated with temporary (carbon) storage or delayed emissions up to 300 years are not be considered. Emissions off-setting: are not included. Capital goods (including infrastructures) and their End of life: they are included. System boundaries: system boundaries include all processes linked to the product supply chain (e.g. maintenance). Time period: emissions and removals are modelled as if released or removed at the beginning of the assessment method. Fossil and biogenic carbon emissions and removals: removals and emissions are modelled as follows: All GHG emissions from fossil fuels (including peat and limestone) are modelled consistently with the most updated ILCD list of elementary flows. The non-fossil (biogenic) carbon flows are modelled consistently with the most updated ILCD list of elementary flows.

## Cut-off and completeness
There are no intentional cut-offs in the inventory no matter how small their contribution to all the EF impact categories is. Eventual cut-offs are in compliance with the Guide for EF compliant data sets (JRC 2020), i.e. only if below the 3% cut-off rule. The dataset dry mass and water balance has been checked to ensure the inventory is complete. Capital goods (e.g. infrastructure) and their end-of-life are included.

## Data selection and combination
These datasets include, in both their foreground and background data, links to EF3.0 compliant data.
The relevant background data on energy, transport, and End of Life are from the LCDN data node (http://lcdn.thinkstep.com/Node/).
All other background data in the supply of this product for which no EF3.0 process was available are from ecoinvent v3.7 database (www.ecoinvent.org) or other data sources.

## Data treatment and extrapolations
Several data sources have been used to model the inventory.

## Review details
Internal reviews have been asked to review the plausibility of the unit process, LCIA scores, and DQRs. Internal reviewers have also been asked to review the data for EF compliancy. The consortium is therefore responsible for aspects such as compliancy with the ILCD format, including validation in Look@LCI, and nomenclature.
Internal reviwers have been asked to judge based on the process name, that the unit process models in a complete and representative way the process in the requested location. The review encompassed the plausability of:
- exchanges with nature (elementary flows) as well as exchanges such as product and waste flows.
- meta information (general comment, technology comment, system boundaries, allocation, cut-off rules, etc.). Reviewers were asked to judge if the provided information is enough to understand the content of the process.
- LCIA scores
- DQRs including precision, technology, time and geography. As well as the overall DQR.
External reviewers have been asked to provide their expertise in the field of interest. External reviewers have been asked to review the unit process, including eventual methodological choices, the LCIA scores (provided with contribution scores as well), and DQRs. External reviewers have been provided all the information in a tool developed by the consortium for the purpose of this project.
External reviewers have been asked to judge based on the process name, that the unit process models in a complete and representative way the process in the requested location. The review encompassed:
- Plausability and completeness of exchanges with nature (elementary flows) as well as exchanges such as product and waste flows.
- Review of meta information (general comment, technology comment, system boundaries, allocation, cut-off rules, etc.). Reviewers were asked to judge if the provided information is enough to understand the content of the process.
- Review of properties (biogenic carbon and water content).
- Review of allocation keys.
- Plausability of LCIA scores calculated by the consortium.
- Plausability of DQRs including precision, technology, time and geography. As well as the overall DQR.

## Data sources
- Background Data for Representative products and organisations. EF 3.0 compliant (data stock)
- Werner F., fibreboard production, hard, RER, Allocation, cut-off by classification, ecoinvent database version 3.7.1
- Survey among member companies of the European Panel Federation; emissions profile per MJ wood input from PSI (2014)

## Intended applications
Implementation of regular Product Environmental Footprint (PEF) studies and Organisation Environmental Footprint (OEF) studies exclusively under the specified Product groups and sectors as defined in the Product Environmental Footprint Category Rules (PEFCR) and Organisation Environmental Footprint Sectorial Rules (OEFSR) listed in http://ec.europa.eu/environment/eussd/smgp/PEFCR_OEFSR.htm
