# scouring, synthetic fibers, elementary; technology mix; production mix, at plant; service (raw materials excluded)

Dataset: ILCD process, Unit process, single operation
Geography: GLO
Reference year: 2021
Valid until: 2024
Classification: Other Services / Other services
LCI method principle: Attributional
LCI method approaches: Allocation - market value
Completeness: All relevant flows quantified
Project: Provision of process-based 3.0 Environmental Footprint-compliant life cycle inventory datasets - Apparel 1 - contract number 070201/2020/840291/SER/ENV.B.1
Generated by: Life Cycle Indonesia
Owner: PRé Sustainability B.V.
Compliance: Environmental Footprint non-primary supporting data set; Environmental Footprint 3.1
Amounts: no units in this file; such an amount is in the reference unit of its flow, which a separate flow dataset defines
copyright: true
licenseType: Free of charge for some user types or use types
accessRestrictions: Free of charge for all final users implementing a regular Product Environmental Footprint (PEF) studies and Organisation Environmental Footprint (OEF) studies exclusively under the specified Product groups and sectors as defined in the Product Environmental Footprint Category Rules (PEFCR) and Organisation Environmental Footprint Sectorial Rules (OEFSR) listed in http://ec.europa.eu/environment/eussd/smgp/PEFCR_OEFSR.htm and in accordance with the terms and conditions of the EULA (available at https://ecoinvent.lca-data.com/) exclusively until 31st December 2024. Any use of this dataset or any derivative data not within the specific context of one of the PEF/OEF projects or after the end of 2024 is not permitted.

## General comment
Notice: this data set supersedes the EF3.0-compliant version (see link under "preceding data set version" below calculated with the EF3.0). The life cycle inventory is not changed from the original EF3.0 data set. The LCIA results are calculated based on the EF3.1 methods which provide updated characterisation factors in the following impact categories: Climate Change, Ecotoxicity freshwater, Photochemical Ozone Formation, Acidification, Human Toxicity non-cancer, and Human Toxicity cancer. The review report and the data quality ratings refer to the original results. The data set has been updated by the European Commission on the basis of the original EF3.0 data set delivered by the data provider.This sub-process has limited documentation only. For all detailed documentation of the full model to which this data set belongs (such as DQRs, review reports and other technical documentation), please see this process: scouring, synthetic fibers - GLO []

## Technology and included processes
Polyamide and polyester fibres are generally adequately scoured using an alkyl polyoxyethylene sulphate and sodium carbonate. For polyamides or nylons, non-ionic synthetic detergents along with an alkali (sodium carbonate or trisodium phosphate) are suitable. Anionic detergents such as fatty alcohol sulphonates behave like acid dyes and are adsorbed by the fibre. (Clark, 2011)

It is not always necessary to scour polyester fibre materials before dyeing. Loose stock, slubbing and some types of yarns are supplied in clean state and usually bear low quantities of processing aids which are compatible with disperse dyes. Such products can be simply washed with water or may even be allowed to remain in the dyebath. However, some products are heavily soiled, waxed or sized. Some may contain cationic processing aids. These must be removed before dyeing. For most normal purposes, the scouring bath should have anionic synthetic detergent or soap (alone or admixture with non-ionic surfactant) and soda ash. (Clark, 2011)

The activity starts when the raw materials enter the process. Materials entering the process are included as well as energy uses, water and chemicals. There is no direct emission to soil, but there is direct emission to water from this process such as BOD. Chemical agents that are used in the process are emitted through the wastewater. Meanwhile some of the water is emitted to air and the rest will become the wastewater. In the model, the 3 different varieties of synthetic fabrics (polyamide, nylon, and polyester) are pre-treated using the average value of 4 types of machines (kier boiler, jet, winch, and jigger). The consumption of lubricating oil using an oven bonding machines as a proxy.

Clark, M. 2011. Handbook of Textile and Industrial Dyeing Vol. 1. Cambidge: Woodhead Publishing Limited, pp118-121

## Reference product
- scouring, synthetic fibers // scouring, synthetic fibers // glo, elementary: 1

## Outputs
- Water, Emissions to air, unspecified: 0.004
- biological oxygen demand, Emissions to water, unspecified: 0.0127184

## Impact indicators
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
## Deviations from the LCI method principle
The background data uses:
- the \xe2\x80\x9cRecycled content cut-off\xe2\x80\x9d approach to allocate end-of-life by-products and secondary materials. This allocation is explained in the description of the recycled content system model (http://www.ecoinvent.org/database/system-models-in-ecoinvent-3/cut-off-system-model/allocation-cut-off-by-classification.html).
OR
- EF compliant data

## Deviations from the LCI method approaches
Background data:
- the \xe2\x80\x9cRecycled content cut-off\xe2\x80\x9d approach to allocate end-of-life by-products and secondary materials. This allocation is explained in the description of the recycled content system model (http://www.ecoinvent.org/database/system-models-in-ecoinvent-3/cut-off-system-model/allocation-cut-off-by-classification.html). The ecoinvent database mostly relies on “Allocation – market values” apart for few exceptions particularly in the energy sector. ecoinvent energy data is replaced with EF3.0 core data as per the EF guidelines version 2.0.
OR
- EF compliant data

## Modelling constants
All modelling constants follow the requirements listed in the Tender Specifications 070201/2020/SER/ENV.B1. Completeness: There are no intentional cut-offs in the inventory no matter how small their contribution to all the EF impact categories is. Eventual cut-offs are in compliance with the Guide for EF compliant data sets (JRC 2020), i.e. only if below the 3% cut-off rule. Water use: water use is modelled at country level using separate flows for water withdrawal, water release and water evaporation. Handling multi-functional processes: the following PEF multi- functionality decision hierarchy is applied for resolving all multi- functionality problems: (1) subdivision or system expansion; (2) allocation based on a relevant underlying physical relationship (substitution may apply here); (3) allocation based on some other relationship. Direct land use change: GHG emissions from direct LUC allocated to good/service for 20 years after the LUC occurs, with IPCC default values. Carbon storage and delayed emissions: credits associated with temporary (carbon) storage or delayed emissions up to 300 years are not be considered. Emissions off-setting: are not included. Capital goods (including infrastructures) and their End of life: they are included. System boundaries: system boundaries include all processes linked to the product supply chain (e.g. maintenance). Time period: emissions and removals are modelled as if released or removed at the beginning of the assessment method. Fossil and biogenic carbon emissions and removals: removals and emissions are modelled as follows: All GHG emissions from fossil fuels (including peat and limestone) are modelled consistently with the most updated ILCD list of elementary flows. The non-fossil (biogenic) carbon flows are modelled consistently with the most updated ILCD list of elementary flows.

## Cut-off and completeness
There are no intentional cut-offs in the inventory no matter how small their contribution to all the EF impact categories is. Eventual cut-offs are in compliance with the Guide for EF compliant data sets (JRC 2020), i.e. only if below the 3% cut-off rule. The dataset dry mass and water balance has been checked to ensure the inventory is complete. Capital goods (e.g. infrastructure) and their end-of-life are included.

## Data selection and combination
These datasets include, in both their foreground and background data, links to EF3.0 compliant data.
The relevant background data on energy, transport, and End of Life are from the LCDN data node (http://lcdn.thinkstep.com/Node/).
All other background data in the supply of this product for which no EF3.0 process was available are from ecoinvent v3.7 database (www.ecoinvent.org) or other data sources.

## Data treatment and extrapolations
Several data sources have been used to model the inventory.

## Use advice
This data set is a supporting sub-data set and must be used exclusively as sub-data set of its corresponding level-1 partly disaggregated data set (see “General comment” field for exact name and UUID).

## Data sources
- Background Data for Representative products and organisations. EF 3.0 compliant (data stock)
- Mathews Kolanjikombil, (2019). Handbook of Textile Processors Series Pretreatment of Textile Substrates. WOODHEAD PUBLISHING INDIA PVT LTD, New Delhi, India
- M. Clark (2011). Handbook of textile and industrial dyeing Volume 1: Principles, processes and types of dyes. Woodhead Publishing Limited, Cambridge, UK
- Lebon (2021) Nonwoven Oven Machine, Catalog and Company Messages, Qingdao Lebon Industry Co., Ltd., China
- UN Data (2018) Statistics Data for Lubricants Productions, http://data.un.org/Data.aspx?q=Lubricants&d=EDATA&f=cmID%3aLU, United Nations Statistics Division, Global.
- Heshan (2021) High Temperature High Pressure Dyeing Machines, http://www.hsperfect.com/cgi/search-en.cgi?f=company_en_1_+product_en_1_&t=product_en_1_&id=92839, Heshan Perfect Dyeing Equipment Factory Co.,Ltd., China
- Buentex (2021) Jet Dyeing Machine, https://buentex.com/en/product/high-temperature-jet-dyeing-machine.html, Buentex Machinery Trading Co.,Ltd, China
- Buentex (2021) Low Liquor Ratio Dyeing Machine, https://buentex.com/en/product/low-liquor-ratio-dyeing-machine.html, Buetex Machinery Trading Co.,Ltd, China
- Zen (2021) Jigger Machine, https://www.zenindustrialengineers.com/automatic-dyeing-jigger.html, Zen Industrial Engineers, Gujarat, India
- Md. Shahiduzzaman Shuvo (2014). Waste Water From Textile Industry (Characteristics & Source). Daffodil International University, Dhaka, Bangladesh

## Intended applications
Implementation of regular Product Environmental Footprint (PEF) studies and Organisation Environmental Footprint (OEF) studies exclusively under the specified Product groups and sectors as defined in the Product Environmental Footprint Category Rules (PEFCR) and Organisation Environmental Footprint Sectorial Rules (OEFSR) listed in http://ec.europa.eu/environment/eussd/smgp/PEFCR_OEFSR.htm
