# hydrohpilisation; hydrophilization process; Production, at plant; Hydrohpilised Fabric

Dataset: ILCD process, Partly terminated system
Geography: GLO
Reference year: 2021
Valid until: 2024
Classification: Systems / Textiles, furnitures and other interiors
LCI method principle: Attributional
LCI method approaches: Allocation - market value
Completeness: All relevant flows quantified
Project: Provision of process-based 3.0 Environmental Footprint-compliant life cycle inventory datasets - Apparel 1 - contract number 070201/2020/840291/SER/ENV.B.1
Generated by: Metsims Sustainability Consulting
Owner: PRé Sustainability B.V.
Compliance: ILCD Data Network - Entry-level; Suggestions for updating the PEF method 2019; ISO 14040 Environmental Management – Life Cycle Assessment – Principles and Framework, 2006; ISO 14044:2006. Environmental Management – Life Cycle Assessment – Requirements and guidelines.; Environmental Footprint 3.1
Review: Dependent internal review by Avraam Symeonidis, Emilia Moreno Ruiz; Independent review panel by Fábio Valebona
Data quality: Overall quality: Good; Time representativeness: Very good; Geographical representativeness: Fair; Technological representativeness: Very good; Precision: Good; Methodological appropriateness and consistency: Not applicable
Amounts: no units in this file; such an amount is in the reference unit of its flow, which a separate flow dataset defines
copyright: true
licenseType: Free of charge for some user types or use types
accessRestrictions: Free of charge for all final users implementing a regular Product Environmental Footprint (PEF) studies and Organisation Environmental Footprint (OEF) studies exclusively under the specified Product groups and sectors as defined in the Product Environmental Footprint Category Rules (PEFCR) and Organisation Environmental Footprint Sectorial Rules (OEFSR) listed in http://ec.europa.eu/environment/eussd/smgp/PEFCR_OEFSR.htm and in accordance with the terms and conditions of the EULA (available at https://ecoinvent.lca-data.com/) exclusively until 31st December 2024. Any use of this dataset or any derivative data not within the specific context of one of the PEF/OEF projects or after the end of 2024 is not permitted.

## General comment
Notice: this data set supersedes the EF3.0-compliant version (see link under "preceding data set version" below calculated with the EF3.0). The life cycle inventory is not changed from the original EF3.0 data set. The LCIA results are calculated based on the EF3.1 methods which provide updated characterisation factors in the following impact categories: Climate Change, Ecotoxicity freshwater, Photochemical Ozone Formation, Acidification, Human Toxicity non-cancer, and Human Toxicity cancer. The review report and the data quality ratings refer to the original results. The data set has been updated by the European Commission on the basis of the original EF3.0 data set delivered by the data provider.Hydrophilization is a process that fabrics is turned into hydrophilic chemical structure from hydrophobic in textile industry. Hydrophilization is a chemical process and, chemicals are applied to fabric in water. After hydrophilization of fabrics, wastewater occurs and this wastewater must be treated.

For 1000 production, 1 kg fabric waste is assumed.

## Technology and included processes
In some cases, textiles should be hydrophobic (water repellent), while other applications require hydrophilic (hygroscopic) properties. Textile fabric is turned into from hydrophobic to hydrophilic by hydrophilization process.

While hydrophilization of textiles; electricity, chemicals, thermal energy and water are consumed. As a result of water and chemical use waste water occurs needs to be treated in apropriate way.

Electricity, chemcal, thermal energy and water use were included to data set.

A user employing this service within their models should use it along with an 1.001 kg of material to produce an 1 kg of yarn. 0.001 kg of waste shall also be added. A user is responsible for defining the nature of the recycling and/or disposal of this waste. Additionally, a user is responsible for accounting transportation expenditures for all extra input and output materials that need to be modelled alongside this service.*

*Waste rate is assumed.

## Parameters
- kg_0: 0.05
  Mass in kg, for sodium hydroxide, without water, in 50% solution state; Transoceanic ship, containers; GLO
- km_0: 599
  Distance in km, for sodium hydroxide, without water, in 50% solution state; Transoceanic ship, containers; GLO
- kg_km_0: 29.95; = kg_0*km_0
  Transport amount in km*km, for sodium hydroxide, without water, in 50% solution state; Transoceanic ship, containers; GLO
- kg_1: 0.05
  Mass in kg, for sodium hydroxide, without water, in 50% solution state; Freight train, diesel traction; EU+EFTA+UK
- km_1: 229.272
  Distance in km, for sodium hydroxide, without water, in 50% solution state; Freight train, diesel traction; EU+EFTA+UK
- kg_km_1: 11.4636; = kg_1*km_1
  Transport amount in km*km, for sodium hydroxide, without water, in 50% solution state; Freight train, diesel traction; EU+EFTA+UK
- kg_2: 0.05
  Mass in kg, for sodium hydroxide, without water, in 50% solution state; Freight train, electricity traction; EU+EFTA+UK
- km_2: 77.9889
  Distance in km, for sodium hydroxide, without water, in 50% solution state; Freight train, electricity traction; EU+EFTA+UK
- kg_km_2: 3.89944; = kg_2*km_2
  Transport amount in km*km, for sodium hydroxide, without water, in 50% solution state; Freight train, electricity traction; EU+EFTA+UK
- kg_3: 0.05
  Mass in kg, for sodium hydroxide, without water, in 50% solution state; Freight train, average; EU+EFTA+UK
- km_3: 1.8394
  Distance in km, for sodium hydroxide, without water, in 50% solution state; Freight train, average; EU+EFTA+UK
- kg_km_3: 0.0919702; = kg_3*km_3
  Transport amount in km*km, for sodium hydroxide, without water, in 50% solution state; Freight train, average; EU+EFTA+UK
- kg_4: 0.05
  Mass in kg, for sodium hydroxide, without water, in 50% solution state; Barge; EU+EFTA+UK
- km_4: 8.08691
  Distance in km, for sodium hydroxide, without water, in 50% solution state; Barge; EU+EFTA+UK
- kg_km_4: 0.404345; = kg_4*km_4
  Transport amount in km*km, for sodium hydroxide, without water, in 50% solution state; Barge; EU+EFTA+UK
- kg_5: 0.05
  Mass in kg, for sodium hydroxide, without water, in 50% solution state; Barge; ROW w/o EU+EFTA
- km_5: 16.5131
  Distance in km, for sodium hydroxide, without water, in 50% solution state; Barge; ROW w/o EU+EFTA
- kg_km_5: 0.825655; = kg_5*km_5
  Transport amount in km*km, for sodium hydroxide, without water, in 50% solution state; Barge; ROW w/o EU+EFTA
- kg_6: 0.05
  Mass in kg, for sodium hydroxide, without water, in 50% solution state; Articulated lorry transport, Euro 4, Total weight >32 t; EU+EFTA+UK
- km_6: 57.3754
  Distance in km, for sodium hydroxide, without water, in 50% solution state; Articulated lorry transport, Euro 4, Total weight >32 t; EU+EFTA+UK
- kg_km_6: 2.86877; = kg_6*km_6
  Transport amount in km*km, for sodium hydroxide, without water, in 50% solution state; Articulated lorry transport, Euro 4, Total weight >32 t; EU+EFTA+UK
- kg_7: 0.05
  Mass in kg, for sodium hydroxide, without water, in 50% solution state; Articulated lorry transport, Total weight >32 t, mix Euro 0-5; ROW w/o EU+EFTA
- km_7: 151.425
  Distance in km, for sodium hydroxide, without water, in 50% solution state; Articulated lorry transport, Total weight >32 t, mix Euro 0-5; ROW w/o EU+EFTA
- kg_km_7: 7.57123; = kg_7*km_7
  Transport amount in km*km, for sodium hydroxide, without water, in 50% solution state; Articulated lorry transport, Total weight >32 t, mix Euro 0-5; ROW w/o EU+EFTA
- kg_8: 0.015
  Mass in kg, for edta // edta production // eu+efta+uk; Articulated lorry transport, Euro 4, Total weight >32 t; EU+EFTA+UK
- km_8: 1000
  Distance in km, for edta // edta production // eu+efta+uk; Articulated lorry transport, Euro 4, Total weight >32 t; EU+EFTA+UK
- kg_km_8: 15; = kg_8*km_8
  Transport amount in km*km, for edta // edta production // eu+efta+uk; Articulated lorry transport, Euro 4, Total weight >32 t; EU+EFTA+UK
- kg_9: 0.0175
  Mass in kg, for surfactant // surfactant production // glo; Articulated lorry transport, Euro 4, Total weight >32 t; EU+EFTA+UK
- km_9: 1000
  Distance in km, for surfactant // surfactant production // glo; Articulated lorry transport, Euro 4, Total weight >32 t; EU+EFTA+UK
- kg_km_9: 17.5; = kg_9*km_9
  Transport amount in km*km, for surfactant // surfactant production // glo; Articulated lorry transport, Euro 4, Total weight >32 t; EU+EFTA+UK
- kg_10: 0.015
  Mass in kg, for edta // edta production // eu+efta+uk; Transoceanic ship, containers; GLO
- km_10: 18000
  Distance in km, for edta // edta production // eu+efta+uk; Transoceanic ship, containers; GLO
- kg_km_10: 270; = kg_10*km_10
  Transport amount in km*km, for edta // edta production // eu+efta+uk; Transoceanic ship, containers; GLO
- kg_11: 0.0175
  Mass in kg, for surfactant // surfactant production // glo; Transoceanic ship, containers; GLO
- km_11: 18000
  Distance in km, for surfactant // surfactant production // glo; Transoceanic ship, containers; GLO
- kg_km_11: 315; = kg_11*km_11
  Transport amount in km*km, for surfactant // surfactant production // glo; Transoceanic ship, containers; GLO

## Reference product
- hydrohpilised fabric // hydrohpilisation // glo: 1

## Inputs
- Electricity from Electricity grid mix 1kV-60kV - AU: 0.0011
- Electricity from Electricity grid mix 1kV-60kV - EU+EFTA+UK: 0.0161
- Electricity from Electricity grid mix 1kV-60kV - NZ: 0.0002
- Electricity from Electricity grid mix 1kV-60kV - RAF: 0.0035
- Electricity from Electricity grid mix 1kV-60kV - RNA: 0.0236
- Electricity from Electricity grid mix 1kV-60kV - RSA: 0.008
- Electricity from Electricity grid mix 1kV-60kV - RU: 0.0047
- Transport of sodium hydroxide, without water, in 50% solution state by Transoceanic ship, containers - GLO: 29.95; = kg_km_0
- Transport of sodium hydroxide, without water, in 50% solution state by Freight train, diesel traction - EU+EFTA+UK: 11.4636; = kg_km_1
- Transport of sodium hydroxide, without water, in 50% solution state by Freight train, electricity traction - EU+EFTA+UK: 3.89944; = kg_km_2
- Transport of sodium hydroxide, without water, in 50% solution state by Freight train, average - EU+EFTA+UK: 0.0919702; = kg_km_3
- Transport of sodium hydroxide, without water, in 50% solution state by Barge - EU+EFTA+UK: 0.404345; = kg_km_4
- Transport of sodium hydroxide, without water, in 50% solution state by Barge - ROW w/o EU+EFTA: 0.825655; = kg_km_5
- Transport of sodium hydroxide, without water, in 50% solution state by Articulated lorry transport, Euro 4, Total weight >32 t - EU+EFTA+UK: 2.86877; = kg_km_6
- Transport of sodium hydroxide, without water, in 50% solution state by Articulated lorry transport, Total weight >32 t, mix Euro 0-5 - ROW w/o EU+EFTA: 7.57123; = kg_km_7
- Thermal energy (MJ) from Thermal energy from hard coal - ROW: 3.7125
- Thermal energy (MJ) from Thermal energy from heavy fuel oil (HFO) - ROW: 0.0825
- Thermal energy (MJ) from Thermal energy from light fuel oil (LFO) - ROW: 1.155
- Thermal energy (MJ) from Thermal energy from natural gas - ROW: 3.3
- Transport of edta // edta production // eu+efta+uk by Articulated lorry transport, Euro 4, Total weight >32 t - EU+EFTA+UK: 15; = kg_km_8
- Transport of surfactant // surfactant production // glo by Articulated lorry transport, Euro 4, Total weight >32 t - EU+EFTA+UK: 17.5; = kg_km_9
- Transport of edta // edta production // eu+efta+uk by Transoceanic ship, containers - GLO: 270; = kg_km_10
- Transport of surfactant // surfactant production // glo by Transoceanic ship, containers - GLO: 315; = kg_km_11
- Electricity from Electricity grid mix 1kV-60kV - CN: 0.0241931
- Electricity from Electricity grid mix 1kV-60kV - RAS w/o CN: 0.0265069
- hydrohpilised fabric // hydrohpilisation // glo, blackbox: 1
- hydrohpilised fabric // hydrohpilisation // glo, elementary: 1

## Impact indicators
- Eutrophication marine: 0.0014352
- Ecotoxicity, freshwater: 9.23465
- Land use: 1.41216
- Water use: 0.406388
- Resource use, minerals and metals: 1.48793e-6
- Resource use, fossils: 12.5645
- Climate change: 0.993073
- Ozone depletion: 4.56813e-8
- Human toxicity, cancer: 1.35161e-9
- Human toxicity, non-cancer: 9.93058e-9
- EF-particulate Matter: 2.35561e-7
- Ionising radiation, human health: 0.0145824
- Photochemical ozone formation - human health: 0.00270503
- Acidification: 0.00457606
- Eutrophication, terrestrial: 0.0102332
- Eutrophication, freshwater: 5.41244e-5

## Deviations from the LCI method principle
The background data uses:
- the \xe2\x80\x9cRecycled content cut-off\xe2\x80\x9d approach to allocate end-of-life by-products and secondary materials. This allocation is explained in the description of the recycled content system model (http://www.ecoinvent.org/database/system-models-in-ecoinvent-3/cut-off-system-model/allocation-cut-off-by-classification.html).
OR
- EF compliant data

## Deviations from the LCI method approaches
Background data:
- the \xe2\x80\x9cRecycled content cut-off\xe2\x80\x9d approach to allocate end-of-life by-products and secondary materials. This allocation is explained in the description of the recycled content system model (http://www.ecoinvent.org/database/system-models-in-ecoinvent-3/cut-off-system-model/allocation-cut-off-by-classification.html). The ecoinvent database mostly relies on “Allocation – market values” apart for few exceptions particularly in the energy sector. ecoinvent energy data is replaced with EF3.0 core data as per the EF guidelines version 2.0.
OR
- EF compliant data

## Modelling constants
All modelling constants follow the requirements listed in the Tender Specifications 070201/2020/SER/ENV.B1. Completeness: There are no intentional cut-offs in the inventory no matter how small their contribution to all the EF impact categories is. Eventual cut-offs are in compliance with the Guide for EF compliant data sets (JRC 2020), i.e. only if below the 3% cut-off rule. Water use: water use is modelled at country level using separate flows for water withdrawal, water release and water evaporation. Handling multi-functional processes: the following PEF multi- functionality decision hierarchy is applied for resolving all multi- functionality problems: (1) subdivision or system expansion; (2) allocation based on a relevant underlying physical relationship (substitution may apply here); (3) allocation based on some other relationship. Direct land use change: GHG emissions from direct LUC allocated to good/service for 20 years after the LUC occurs, with IPCC default values. Carbon storage and delayed emissions: credits associated with temporary (carbon) storage or delayed emissions up to 300 years are not be considered. Emissions off-setting: are not included. Capital goods (including infrastructures) and their End of life: they are included. System boundaries: system boundaries include all processes linked to the product supply chain (e.g. maintenance). Time period: emissions and removals are modelled as if released or removed at the beginning of the assessment method. Fossil and biogenic carbon emissions and removals: removals and emissions are modelled as follows: All GHG emissions from fossil fuels (including peat and limestone) are modelled consistently with the most updated ILCD list of elementary flows. The non-fossil (biogenic) carbon flows are modelled consistently with the most updated ILCD list of elementary flows.

## Cut-off and completeness
There are no intentional cut-offs in the inventory no matter how small their contribution to all the EF impact categories is. Eventual cut-offs are in compliance with the Guide for EF compliant data sets (JRC 2020), i.e. only if below the 3% cut-off rule. The dataset dry mass and water balance has been checked to ensure the inventory is complete. Capital goods (e.g. infrastructure) and their end-of-life are included.

## Data selection and combination
These datasets include, in both their foreground and background data, links to EF3.0 compliant data.
The relevant background data on energy, transport, and End of Life are from the LCDN data node (http://lcdn.thinkstep.com/Node/).
All other background data in the supply of this product for which no EF3.0 process was available are from ecoinvent v3.7 database (www.ecoinvent.org) or other data sources.

## Data treatment and extrapolations
Several data sources have been used to model the inventory.

## Review details
Internal reviews have been asked to review the plausibility of the unit process, LCIA scores, and DQRs. Internal reviewers have also been asked to review the data for EF compliancy. The consortium is therefore responsible for aspects such as compliancy with the ILCD format, including validation in Look@LCI, and nomenclature.
Internal reviwers have been asked to judge based on the process name, that the unit process models in a complete and representative way the process in the requested location. The review encompassed the plausability of:
- exchanges with nature (elementary flows) as well as exchanges such as product and waste flows.
- meta information (general comment, technology comment, system boundaries, allocation, cut-off rules, etc.). Reviewers were asked to judge if the provided information is enough to understand the content of the process.
- LCIA scores
- DQRs including precision, technology, time and geography. As well as the overall DQR.
External reviewers have been asked to provide their expertise in the field of interest. External reviewers have been asked to review the unit process, including eventual methodological choices, the LCIA scores (provided with contribution scores as well), and DQRs. External reviewers have been provided all the information in a tool developed by the consortium for the purpose of this project.
External reviewers have been asked to judge based on the process name, that the unit process models in a complete and representative way the process in the requested location. The review encompassed:
- Plausability and completeness of exchanges with nature (elementary flows) as well as exchanges such as product and waste flows.
- Review of meta information (general comment, technology comment, system boundaries, allocation, cut-off rules, etc.). Reviewers were asked to judge if the provided information is enough to understand the content of the process.
- Review of properties (biogenic carbon and water content).
- Review of allocation keys.
- Plausability of LCIA scores calculated by the consortium.
- Plausability of DQRs including precision, technology, time and geography. As well as the overall DQR.

## Data sources
- Background Data for Representative products and organisations. EF 3.0 compliant (data stock)
- Resource Efficiency Guide for Finishing Textile Products, 2018, Tübitak Marmara Research Center (Original Language: Tekstil Ürünlerinin Bitirilmesi Kaynak Verimliliği Rehberi, 2018, Tübitak Marmara Araştırma Merkezi )

## Intended applications
Implementation of regular Product Environmental Footprint (PEF) studies and Organisation Environmental Footprint (OEF) studies exclusively under the specified Product groups and sectors as defined in the Product Environmental Footprint Category Rules (PEFCR) and Organisation Environmental Footprint Sectorial Rules (OEFSR) listed in http://ec.europa.eu/environment/eussd/smgp/PEFCR_OEFSR.htm
