# unbleached kraft pulp, softwood; technology mix; production mix, at plant; dry mass 0.89, carbon content, non-fossil 0.494

Dataset: ILCD process, Partly terminated system
Geography: WORLD (WITHOUT EU+EFTA+UK, US AND CA)
Reference year: 2020
Valid until: 2024
Classification: Materials production / Paper and cardboards
LCI method principle: Attributional
LCI method approaches: Allocation - market value
Completeness: All relevant flows quantified
Project: Provision of process-based 3.0 Environmental Footprint-compliant life cycle inventory datasets - Renewable materials - contract number 070201/2020/840085/SER/ENV.B.1
Generated by: EPIS
Owner: EPIS
Compliance: ILCD Data Network - Entry-level; Suggestions for updating the PEF method 2019; ISO 14040 Environmental Management – Life Cycle Assessment – Principles and Framework, 2006; ISO 14044:2006. Environmental Management – Life Cycle Assessment – Requirements and guidelines.; Environmental Footprint 3.1
Review: Dependent internal review by Marisa Vieira, Emilia Moreno Ruiz; Independent review panel by Michael Sturges
Data quality: Overall quality: Very good; Time representativeness: Very good; Geographical representativeness: Very good; Technological representativeness: Very good; Precision: Good; Methodological appropriateness and consistency: Not applicable
Amounts: no units in this file; such an amount is in the reference unit of its flow, which a separate flow dataset defines
copyright: true
licenseType: Free of charge for some user types or use types
accessRestrictions: Free of charge for all final users implementing a regular Product Environmental Footprint (PEF) studies and Organisation Environmental Footprint (OEF) studies exclusively under the specified Product groups and sectors as defined in the Product Environmental Footprint Category Rules (PEFCR) and Organisation Environmental Footprint Sectorial Rules (OEFSR) listed in http://ec.europa.eu/environment/eussd/smgp/PEFCR_OEFSR.htm and in accordance with the terms and conditions of the EULA (available at https://ecoinvent.lca-data.com/) exclusively until 31st December 2024. Any use of this dataset or any derivative data not within the specific context of one of the PEF/OEF projects or after the end of 2024 is not permitted.

## General comment
Notice: this data set supersedes the EF3.0-compliant version (see link under "preceding data set version" below calculated with the EF3.0). The life cycle inventory is not changed from the original EF3.0 data set. The LCIA results are calculated based on the EF3.1 methods which provide updated characterisation factors in the following impact categories: Climate Change, Ecotoxicity freshwater, Photochemical Ozone Formation, Acidification, Human Toxicity non-cancer, and Human Toxicity cancer. The review report and the data quality ratings refer to the original results. The data set has been updated by the European Commission on the basis of the original EF3.0 data set delivered by the data provider.This dataset represents the production of unbleached softwood kraft pulp for the geography World (without EU+EFTA+UK, US and CA) for the year 2020.
Pulp is a clean, wood-based, renewable and biodegradable raw material to make different paper, board and other products. Main end uses for market pulp are tissue (toilet paper), graphic papers, specialty products, packaging, fluff pulp, viscose, CMC etc. Softwood pulp is made from coniferous trees, most typically from different species of pine and spruce. Softwood fibres are long and slender and are used to give the paper and board products their strength properties.
This activity starts with the transport of raw material to the pulp factory. The activity ends when the kraft pulp is ready to be sold.
Due to a lack of data, this dataset was extrapolated from industry data for Europe and Latin America which was provided by the European Pulp Industry Sector Association AISBL (EPIS). The industry data represents a weighted average of 4 corresponding pulp mills. In 2020, total production of the 4 pulp mills corresponded to 29% of the global market capacity.
The dataset has been allocated based on the following products: Unbleached kraft pulp, softwood // Unbleached kraft pulp, softwood // World (without EU+EFTA+UK, US and CA) with allocation factor of 96.5445%, tall oil, crude with allocation factor of 2.4855%, Turpentine with allocation factor of 0.3428%, Bark with allocation factor of 0.5073%, sawdust, wet, measured as dry mass with allocation factor of 0.12%.

## Technology and included processes
The pulp, or fibres from the wood are separated in a kraft cooking process in a so-called fibre line. In a recovery line, the chemicals used in the cooking process are recovered to be used again and energy is produced. The third process is effluent treatment where gaseous and liquid discharges to the environment are continuously minimized and monitored.

The process includes transports to the pulp mill, wood handling, chemical pulping, drying process, energy production on-site, recovery cycles of chemicals and internal waste water treatment.

The following air emissions were reported in the study:
CO2 (fossil and biogenic) and NOx. Next to these key emissions, additional emissions from on-site energy production from external and internal fuels were calculated, using emission profiles from ecoinvent combustion processes. Internal biogenic fuels are represented by the calculated emissions but do not have the corresponding fuel input from technosphere, because they are supplied from within the system boundaries. The amounts of internal fuels used in the process are: Bark (2.68E+03MJ/t) and Black liquor(1.95E+04MJ/t).

The following ecoinvent combustion processes were used to estimate additional air emissions:

Biofuel - Bark (wet weight): heat production, wood chips from industry, at furnace 1000kW, CH; Biofuel - Black liquor: not included; Tall oil pitch: not included; Heavy fuel oil: heat production, heavy fuel oil, at industrial furnace 1MW, Europe without Switzerland; Light fuel oil: heat production, light fuel oil, at industrial furnace 1MW, Europe without Switzerland;

Black liquor and tall oil pitch (external fuel) were not included in the emissions calculations because no specific emission profiles, e.g. for the black liquor recovery process, were available. Emissions from these internal energy generation processes are therefore only reflected in the key emission factors provided by the industry, other emissions constitute a data gap.
The amount of infrastructure (pulp factory) was taken from the dataset “The European Pulp Industry Sector Association AISBL, sulfate pulp production, from softwood, unbleached, RER, Undefined, ecoinvent database version 3.7.1”

## Parameters
- kg_0: 0.00608024
  Mass in kg, for methanol, from biomass; Freight train, diesel traction; EU+EFTA+UK
- km_0: 32.6956
  Distance in km, for methanol, from biomass; Freight train, diesel traction; EU+EFTA+UK
- kg_km_0: 0.198797; = kg_0*km_0
  Transport amount in km*km, for methanol, from biomass; Freight train, diesel traction; EU+EFTA+UK
- kg_1: 0.00608024
  Mass in kg, for methanol, from biomass; Freight train, electricity traction; EU+EFTA+UK
- km_1: 11.042
  Distance in km, for methanol, from biomass; Freight train, electricity traction; EU+EFTA+UK
- kg_km_1: 0.0671383; = kg_1*km_1
  Transport amount in km*km, for methanol, from biomass; Freight train, electricity traction; EU+EFTA+UK
- kg_2: 0.00608024
  Mass in kg, for methanol, from biomass; Freight train, average; EU+EFTA+UK
- km_2: 0.262339
  Distance in km, for methanol, from biomass; Freight train, average; EU+EFTA+UK
- kg_km_2: 0.00159508; = kg_2*km_2
  Transport amount in km*km, for methanol, from biomass; Freight train, average; EU+EFTA+UK
- kg_3: 0.00608024
  Mass in kg, for methanol, from biomass; Barge; EU+EFTA+UK
- km_3: 10.6781
  Distance in km, for methanol, from biomass; Barge; EU+EFTA+UK
- kg_km_3: 0.0649256; = kg_3*km_3
  Transport amount in km*km, for methanol, from biomass; Barge; EU+EFTA+UK
- kg_4: 0.00608024
  Mass in kg, for methanol, from biomass; Articulated lorry transport, Total weight >32 t, mix Euro 0-5; ROW w/o EU+EFTA
- km_4: 56.7
  Distance in km, for methanol, from biomass; Articulated lorry transport, Total weight >32 t, mix Euro 0-5; ROW w/o EU+EFTA
- kg_km_4: 0.34475; = kg_4*km_4
  Transport amount in km*km, for methanol, from biomass; Articulated lorry transport, Total weight >32 t, mix Euro 0-5; ROW w/o EU+EFTA
- kg_5: 0.00608024
  Mass in kg, for methanol, from biomass; Articulated lorry transport, Total weight <7.5 t, mix Euro 0-5; EU+EFTA+UK
- km_5: 1.71121
  Distance in km, for methanol, from biomass; Articulated lorry transport, Total weight <7.5 t, mix Euro 0-5; EU+EFTA+UK
- kg_km_5: 0.0104046; = kg_5*km_5
  Transport amount in km*km, for methanol, from biomass; Articulated lorry transport, Total weight <7.5 t, mix Euro 0-5; EU+EFTA+UK
- kg_6: 0.00608024
  Mass in kg, for methanol, from biomass; Barge; ROW w/o EU+EFTA
- km_6: 21.6219
  Distance in km, for methanol, from biomass; Barge; ROW w/o EU+EFTA
- kg_km_6: 0.131466; = kg_6*km_6
  Transport amount in km*km, for methanol, from biomass; Barge; ROW w/o EU+EFTA
- kg_7: 3.08176
  Mass in kg, for softwood under bark // softwood forestry // world (without eu+efta+uk, us and ca); Articulated lorry transport, Euro 4, Total weight >32 t; EU+EFTA+UK
- km_7: 73.223
  Distance in km, for softwood under bark // softwood forestry // world (without eu+efta+uk, us and ca); Articulated lorry transport, Euro 4, Total weight >32 t; EU+EFTA+UK
- kg_km_7: 225.655; = kg_7*km_7
  Transport amount in km*km, for softwood under bark // softwood forestry // world (without eu+efta+uk, us and ca); Articulated lorry transport, Euro 4, Total weight >32 t; EU+EFTA+UK
- kg_8: 3.08176
  Mass in kg, for softwood under bark // softwood forestry // world (without eu+efta+uk, us and ca); Freight train, average; EU+EFTA+UK
- km_8: 66.4783
  Distance in km, for softwood under bark // softwood forestry // world (without eu+efta+uk, us and ca); Freight train, average; EU+EFTA+UK
- kg_km_8: 204.87; = kg_8*km_8
  Transport amount in km*km, for softwood under bark // softwood forestry // world (without eu+efta+uk, us and ca); Freight train, average; EU+EFTA+UK
- kg_9: 0.234061
  Mass in kg, for wood chips, softwood // wood chips, softwood // world (without eu+efta+uk, us and ca); Articulated lorry transport, Euro 4, Total weight >32 t; EU+EFTA+UK
- km_9: 4.4226
  Distance in km, for wood chips, softwood // wood chips, softwood // world (without eu+efta+uk, us and ca); Articulated lorry transport, Euro 4, Total weight >32 t; EU+EFTA+UK
- kg_km_9: 1.03516; = kg_9*km_9
  Transport amount in km*km, for wood chips, softwood // wood chips, softwood // world (without eu+efta+uk, us and ca); Articulated lorry transport, Euro 4, Total weight >32 t; EU+EFTA+UK
- kg_10: 0.234061
  Mass in kg, for wood chips, softwood // wood chips, softwood // world (without eu+efta+uk, us and ca); Freight train, average; EU+EFTA+UK
- km_10: 23.9148
  Distance in km, for wood chips, softwood // wood chips, softwood // world (without eu+efta+uk, us and ca); Freight train, average; EU+EFTA+UK
- kg_km_10: 5.59752; = kg_10*km_10
  Transport amount in km*km, for wood chips, softwood // wood chips, softwood // world (without eu+efta+uk, us and ca); Freight train, average; EU+EFTA+UK
- kg_11: 0.00146709
  Mass in kg, for heavy fuel oil (1.0 wt.% s) // heavy fuel oil at refinery // in; Articulated lorry transport, Euro 4, Total weight >32 t; EU+EFTA+UK
- km_11: 1000.26
  Distance in km, for heavy fuel oil (1.0 wt.% s) // heavy fuel oil at refinery // in; Articulated lorry transport, Euro 4, Total weight >32 t; EU+EFTA+UK
- kg_km_11: 1.46748; = kg_11*km_11
  Transport amount in km*km, for heavy fuel oil (1.0 wt.% s) // heavy fuel oil at refinery // in; Articulated lorry transport, Euro 4, Total weight >32 t; EU+EFTA+UK
- kg_12: 0.00146709
  Mass in kg, for heavy fuel oil (1.0 wt.% s) // heavy fuel oil at refinery // in; Transoceanic ship, containers; GLO
- km_12: 18031
  Distance in km, for heavy fuel oil (1.0 wt.% s) // heavy fuel oil at refinery // in; Transoceanic ship, containers; GLO
- kg_km_12: 26.4532; = kg_12*km_12
  Transport amount in km*km, for heavy fuel oil (1.0 wt.% s) // heavy fuel oil at refinery // in; Transoceanic ship, containers; GLO
- kg_13: 0.00248277
  Mass in kg, for heavy fuel oil (1.0 wt.% s) // heavy fuel oil at refinery // jp; Articulated lorry transport, Euro 4, Total weight >32 t; EU+EFTA+UK
- km_13: 999.364
  Distance in km, for heavy fuel oil (1.0 wt.% s) // heavy fuel oil at refinery // jp; Articulated lorry transport, Euro 4, Total weight >32 t; EU+EFTA+UK
- kg_km_13: 2.48119; = kg_13*km_13
  Transport amount in km*km, for heavy fuel oil (1.0 wt.% s) // heavy fuel oil at refinery // jp; Articulated lorry transport, Euro 4, Total weight >32 t; EU+EFTA+UK
- kg_14: 0.00248277
  Mass in kg, for heavy fuel oil (1.0 wt.% s) // heavy fuel oil at refinery // jp; Transoceanic ship, containers; GLO
- km_14: 18004.1
  Distance in km, for heavy fuel oil (1.0 wt.% s) // heavy fuel oil at refinery // jp; Transoceanic ship, containers; GLO
- kg_km_14: 44.7001; = kg_14*km_14
  Transport amount in km*km, for heavy fuel oil (1.0 wt.% s) // heavy fuel oil at refinery // jp; Transoceanic ship, containers; GLO
- kg_15: 0.0150095
  Mass in kg, for heavy fuel oil (1.0 wt.% s) // heavy fuel oil at refinery // ras w/o cn; Articulated lorry transport, Euro 4, Total weight >32 t; EU+EFTA+UK
- km_15: 996.996
  Distance in km, for heavy fuel oil (1.0 wt.% s) // heavy fuel oil at refinery // ras w/o cn; Articulated lorry transport, Euro 4, Total weight >32 t; EU+EFTA+UK
- kg_km_15: 14.9644; = kg_15*km_15
  Transport amount in km*km, for heavy fuel oil (1.0 wt.% s) // heavy fuel oil at refinery // ras w/o cn; Articulated lorry transport, Euro 4, Total weight >32 t; EU+EFTA+UK
- kg_16: 0.0150095
  Mass in kg, for heavy fuel oil (1.0 wt.% s) // heavy fuel oil at refinery // ras w/o cn; Transoceanic ship, containers; GLO
- km_16: 18010.3
  Distance in km, for heavy fuel oil (1.0 wt.% s) // heavy fuel oil at refinery // ras w/o cn; Transoceanic ship, containers; GLO
- kg_km_16: 270.324; = kg_16*km_16
  Transport amount in km*km, for heavy fuel oil (1.0 wt.% s) // heavy fuel oil at refinery // ras w/o cn; Transoceanic ship, containers; GLO
- kg_17: 0.000150471
  Mass in kg, for heavy fuel oil (1.0 wt.% s) // heavy fuel oil at refinery // au; Articulated lorry transport, Euro 4, Total weight >32 t; EU+EFTA+UK
- km_17: 1000.92
  Distance in km, for heavy fuel oil (1.0 wt.% s) // heavy fuel oil at refinery // au; Articulated lorry transport, Euro 4, Total weight >32 t; EU+EFTA+UK
- kg_km_17: 0.150609; = kg_17*km_17
  Transport amount in km*km, for heavy fuel oil (1.0 wt.% s) // heavy fuel oil at refinery // au; Articulated lorry transport, Euro 4, Total weight >32 t; EU+EFTA+UK
- kg_18: 0.000150471
  Mass in kg, for heavy fuel oil (1.0 wt.% s) // heavy fuel oil at refinery // au; Transoceanic ship, containers; GLO
- km_18: 18029.4
  Distance in km, for heavy fuel oil (1.0 wt.% s) // heavy fuel oil at refinery // au; Transoceanic ship, containers; GLO
- kg_km_18: 2.7129; = kg_18*km_18
  Transport amount in km*km, for heavy fuel oil (1.0 wt.% s) // heavy fuel oil at refinery // au; Transoceanic ship, containers; GLO
- kg_19: 0.00154233
  Mass in kg, for heavy fuel oil (1.0 wt.% s) // heavy fuel oil at refinery // cn; Articulated lorry transport, Euro 4, Total weight >32 t; EU+EFTA+UK
- km_19: 1001.55
  Distance in km, for heavy fuel oil (1.0 wt.% s) // heavy fuel oil at refinery // cn; Articulated lorry transport, Euro 4, Total weight >32 t; EU+EFTA+UK
- kg_km_19: 1.54471; = kg_19*km_19
  Transport amount in km*km, for heavy fuel oil (1.0 wt.% s) // heavy fuel oil at refinery // cn; Articulated lorry transport, Euro 4, Total weight >32 t; EU+EFTA+UK
- kg_20: 0.00154233
  Mass in kg, for heavy fuel oil (1.0 wt.% s) // heavy fuel oil at refinery // cn; Transoceanic ship, containers; GLO
- km_20: 18027.8
  Distance in km, for heavy fuel oil (1.0 wt.% s) // heavy fuel oil at refinery // cn; Transoceanic ship, containers; GLO
- kg_km_20: 27.8048; = kg_20*km_20
  Transport amount in km*km, for heavy fuel oil (1.0 wt.% s) // heavy fuel oil at refinery // cn; Transoceanic ship, containers; GLO
- kg_21: 0.00771164
  Mass in kg, for heavy fuel oil (1.0 wt.% s) // heavy fuel oil at refinery // ru; Articulated lorry transport, Euro 4, Total weight >32 t; EU+EFTA+UK
- km_21: 1000.29
  Distance in km, for heavy fuel oil (1.0 wt.% s) // heavy fuel oil at refinery // ru; Articulated lorry transport, Euro 4, Total weight >32 t; EU+EFTA+UK
- kg_km_21: 7.7139; = kg_21*km_21
  Transport amount in km*km, for heavy fuel oil (1.0 wt.% s) // heavy fuel oil at refinery // ru; Articulated lorry transport, Euro 4, Total weight >32 t; EU+EFTA+UK
- kg_22: 0.00771164
  Mass in kg, for heavy fuel oil (1.0 wt.% s) // heavy fuel oil at refinery // ru; Transoceanic ship, containers; GLO
- km_22: 18027.8
  Distance in km, for heavy fuel oil (1.0 wt.% s) // heavy fuel oil at refinery // ru; Transoceanic ship, containers; GLO
- kg_km_22: 139.024; = kg_22*km_22
  Transport amount in km*km, for heavy fuel oil (1.0 wt.% s) // heavy fuel oil at refinery // ru; Transoceanic ship, containers; GLO
- kg_23: 0.0027461
  Mass in kg, for heavy fuel oil (1.0 wt.% s) // heavy fuel oil at refinery // raf; Articulated lorry transport, Euro 4, Total weight >32 t; EU+EFTA+UK
- km_23: 998.459
  Distance in km, for heavy fuel oil (1.0 wt.% s) // heavy fuel oil at refinery // raf; Articulated lorry transport, Euro 4, Total weight >32 t; EU+EFTA+UK
- kg_km_23: 2.74186; = kg_23*km_23
  Transport amount in km*km, for heavy fuel oil (1.0 wt.% s) // heavy fuel oil at refinery // raf; Articulated lorry transport, Euro 4, Total weight >32 t; EU+EFTA+UK
- kg_24: 0.0027461
  Mass in kg, for heavy fuel oil (1.0 wt.% s) // heavy fuel oil at refinery // raf; Transoceanic ship, containers; GLO
- km_24: 18000.4
  Distance in km, for heavy fuel oil (1.0 wt.% s) // heavy fuel oil at refinery // raf; Transoceanic ship, containers; GLO
- kg_km_24: 49.4308; = kg_24*km_24
  Transport amount in km*km, for heavy fuel oil (1.0 wt.% s) // heavy fuel oil at refinery // raf; Transoceanic ship, containers; GLO
- kg_25: 0.00131662
  Mass in kg, for heavy fuel oil (1.0 wt.% s) // heavy fuel oil at refinery // br; Articulated lorry transport, Euro 4, Total weight >32 t; EU+EFTA+UK
- km_25: 997.253
  Distance in km, for heavy fuel oil (1.0 wt.% s) // heavy fuel oil at refinery // br; Articulated lorry transport, Euro 4, Total weight >32 t; EU+EFTA+UK
- kg_km_25: 1.313; = kg_25*km_25
  Transport amount in km*km, for heavy fuel oil (1.0 wt.% s) // heavy fuel oil at refinery // br; Articulated lorry transport, Euro 4, Total weight >32 t; EU+EFTA+UK
- kg_26: 0.00131662
  Mass in kg, for heavy fuel oil (1.0 wt.% s) // heavy fuel oil at refinery // br; Transoceanic ship, containers; GLO
- km_26: 17965.2
  Distance in km, for heavy fuel oil (1.0 wt.% s) // heavy fuel oil at refinery // br; Transoceanic ship, containers; GLO
- kg_km_26: 23.6534; = kg_26*km_26
  Transport amount in km*km, for heavy fuel oil (1.0 wt.% s) // heavy fuel oil at refinery // br; Transoceanic ship, containers; GLO
- kg_27: 0.00522887
  Mass in kg, for heavy fuel oil (1.0 wt.% s) // heavy fuel oil at refinery // rsa; Articulated lorry transport, Euro 4, Total weight >32 t; EU+EFTA+UK
- km_27: 1000.74
  Distance in km, for heavy fuel oil (1.0 wt.% s) // heavy fuel oil at refinery // rsa; Articulated lorry transport, Euro 4, Total weight >32 t; EU+EFTA+UK
- kg_km_27: 5.23271; = kg_27*km_27
  Transport amount in km*km, for heavy fuel oil (1.0 wt.% s) // heavy fuel oil at refinery // rsa; Articulated lorry transport, Euro 4, Total weight >32 t; EU+EFTA+UK
- kg_28: 0.00522887
  Mass in kg, for heavy fuel oil (1.0 wt.% s) // heavy fuel oil at refinery // rsa; Transoceanic ship, containers; GLO
- km_28: 18002.2
  Distance in km, for heavy fuel oil (1.0 wt.% s) // heavy fuel oil at refinery // rsa; Transoceanic ship, containers; GLO
- kg_km_28: 94.1309; = kg_28*km_28
  Transport amount in km*km, for heavy fuel oil (1.0 wt.% s) // heavy fuel oil at refinery // rsa; Transoceanic ship, containers; GLO
- kg_29: 1.79483e-6
  Mass in kg, for light fuel oil // light fuel oil at refinery // in; Articulated lorry transport, Euro 4, Total weight >32 t; EU+EFTA+UK
- km_29: 1000.5
  Distance in km, for light fuel oil // light fuel oil at refinery // in; Articulated lorry transport, Euro 4, Total weight >32 t; EU+EFTA+UK
- kg_km_29: 0.00179573; = kg_29*km_29
  Transport amount in km*km, for light fuel oil // light fuel oil at refinery // in; Articulated lorry transport, Euro 4, Total weight >32 t; EU+EFTA+UK
- kg_30: 1.79483e-6
  Mass in kg, for light fuel oil // light fuel oil at refinery // in; Transoceanic ship, containers; GLO
- km_30: 18019.7
  Distance in km, for light fuel oil // light fuel oil at refinery // in; Transoceanic ship, containers; GLO
- kg_km_30: 0.0323424; = kg_30*km_30
  Transport amount in km*km, for light fuel oil // light fuel oil at refinery // in; Transoceanic ship, containers; GLO
- kg_31: 8.89875e-7
  Mass in kg, for light fuel oil // light fuel oil at refinery // jp; Articulated lorry transport, Euro 4, Total weight >32 t; EU+EFTA+UK
- km_31: 1000.3
  Distance in km, for light fuel oil // light fuel oil at refinery // jp; Articulated lorry transport, Euro 4, Total weight >32 t; EU+EFTA+UK
- kg_km_31: 0.00089014; = kg_31*km_31
  Transport amount in km*km, for light fuel oil // light fuel oil at refinery // jp; Articulated lorry transport, Euro 4, Total weight >32 t; EU+EFTA+UK
- kg_32: 8.89875e-7
  Mass in kg, for light fuel oil // light fuel oil at refinery // jp; Transoceanic ship, containers; GLO
- km_32: 18009.7
  Distance in km, for light fuel oil // light fuel oil at refinery // jp; Transoceanic ship, containers; GLO
- kg_km_32: 0.0160264; = kg_32*km_32
  Transport amount in km*km, for light fuel oil // light fuel oil at refinery // jp; Transoceanic ship, containers; GLO
- kg_33: 4.84152e-6
  Mass in kg, for light fuel oil // light fuel oil at refinery // ras w/o cn; Articulated lorry transport, Euro 4, Total weight >32 t; EU+EFTA+UK
- km_33: 999.04
  Distance in km, for light fuel oil // light fuel oil at refinery // ras w/o cn; Articulated lorry transport, Euro 4, Total weight >32 t; EU+EFTA+UK
- kg_km_33: 0.00483688; = kg_33*km_33
  Transport amount in km*km, for light fuel oil // light fuel oil at refinery // ras w/o cn; Articulated lorry transport, Euro 4, Total weight >32 t; EU+EFTA+UK
- kg_34: 4.84152e-6
  Mass in kg, for light fuel oil // light fuel oil at refinery // ras w/o cn; Transoceanic ship, containers; GLO
- km_34: 18006.7
  Distance in km, for light fuel oil // light fuel oil at refinery // ras w/o cn; Transoceanic ship, containers; GLO
- kg_km_34: 0.0871796; = kg_34*km_34
  Transport amount in km*km, for light fuel oil // light fuel oil at refinery // ras w/o cn; Transoceanic ship, containers; GLO
- kg_35: 2.56405e-7
  Mass in kg, for light fuel oil // light fuel oil at refinery // au; Articulated lorry transport, Euro 4, Total weight >32 t; EU+EFTA+UK
- km_35: 1001.57
  Distance in km, for light fuel oil // light fuel oil at refinery // au; Articulated lorry transport, Euro 4, Total weight >32 t; EU+EFTA+UK
- kg_km_35: 0.000256808; = kg_35*km_35
  Transport amount in km*km, for light fuel oil // light fuel oil at refinery // au; Articulated lorry transport, Euro 4, Total weight >32 t; EU+EFTA+UK
- kg_36: 2.56405e-7
  Mass in kg, for light fuel oil // light fuel oil at refinery // au; Transoceanic ship, containers; GLO
- km_36: 17998.2
  Distance in km, for light fuel oil // light fuel oil at refinery // au; Transoceanic ship, containers; GLO
- kg_km_36: 0.00461483; = kg_36*km_36
  Transport amount in km*km, for light fuel oil // light fuel oil at refinery // au; Transoceanic ship, containers; GLO
- kg_37: 3.33326e-6
  Mass in kg, for light fuel oil // light fuel oil at refinery // cn; Articulated lorry transport, Euro 4, Total weight >32 t; EU+EFTA+UK
- km_37: 999.257
  Distance in km, for light fuel oil // light fuel oil at refinery // cn; Articulated lorry transport, Euro 4, Total weight >32 t; EU+EFTA+UK
- kg_km_37: 0.00333078; = kg_37*km_37
  Transport amount in km*km, for light fuel oil // light fuel oil at refinery // cn; Articulated lorry transport, Euro 4, Total weight >32 t; EU+EFTA+UK
- kg_38: 3.33326e-6
  Mass in kg, for light fuel oil // light fuel oil at refinery // cn; Transoceanic ship, containers; GLO
- km_38: 17986.6
  Distance in km, for light fuel oil // light fuel oil at refinery // cn; Transoceanic ship, containers; GLO
- kg_km_38: 0.0599541; = kg_38*km_38
  Transport amount in km*km, for light fuel oil // light fuel oil at refinery // cn; Transoceanic ship, containers; GLO
- kg_39: 1.37252e-6
  Mass in kg, for light fuel oil // light fuel oil at refinery // ru; Articulated lorry transport, Euro 4, Total weight >32 t; EU+EFTA+UK
- km_39: 998.843
  Distance in km, for light fuel oil // light fuel oil at refinery // ru; Articulated lorry transport, Euro 4, Total weight >32 t; EU+EFTA+UK
- kg_km_39: 0.00137093; = kg_39*km_39
  Transport amount in km*km, for light fuel oil // light fuel oil at refinery // ru; Articulated lorry transport, Euro 4, Total weight >32 t; EU+EFTA+UK
- kg_40: 1.37252e-6
  Mass in kg, for light fuel oil // light fuel oil at refinery // ru; Transoceanic ship, containers; GLO
- km_40: 18007.3
  Distance in km, for light fuel oil // light fuel oil at refinery // ru; Transoceanic ship, containers; GLO
- kg_km_40: 0.0247154; = kg_40*km_40
  Transport amount in km*km, for light fuel oil // light fuel oil at refinery // ru; Transoceanic ship, containers; GLO
- kg_41: 6.18388e-7
  Mass in kg, for light fuel oil // light fuel oil at refinery // raf; Articulated lorry transport, Euro 4, Total weight >32 t; EU+EFTA+UK
- km_41: 1000.75
  Distance in km, for light fuel oil // light fuel oil at refinery // raf; Articulated lorry transport, Euro 4, Total weight >32 t; EU+EFTA+UK
- kg_km_41: 0.00061885; = kg_41*km_41
  Transport amount in km*km, for light fuel oil // light fuel oil at refinery // raf; Articulated lorry transport, Euro 4, Total weight >32 t; EU+EFTA+UK
- kg_42: 6.18388e-7
  Mass in kg, for light fuel oil // light fuel oil at refinery // raf; Transoceanic ship, containers; GLO
- km_42: 17954.1
  Distance in km, for light fuel oil // light fuel oil at refinery // raf; Transoceanic ship, containers; GLO
- kg_km_42: 0.0111026; = kg_42*km_42
  Transport amount in km*km, for light fuel oil // light fuel oil at refinery // raf; Transoceanic ship, containers; GLO
- kg_43: 7.99379e-7
  Mass in kg, for light fuel oil // light fuel oil at refinery // br; Articulated lorry transport, Euro 4, Total weight >32 t; EU+EFTA+UK
- km_43: 1000.01
  Distance in km, for light fuel oil // light fuel oil at refinery // br; Articulated lorry transport, Euro 4, Total weight >32 t; EU+EFTA+UK
- kg_km_43: 0.000799388; = kg_43*km_43
  Transport amount in km*km, for light fuel oil // light fuel oil at refinery // br; Articulated lorry transport, Euro 4, Total weight >32 t; EU+EFTA+UK
- kg_44: 7.99379e-7
  Mass in kg, for light fuel oil // light fuel oil at refinery // br; Transoceanic ship, containers; GLO
- km_44: 17995.4
  Distance in km, for light fuel oil // light fuel oil at refinery // br; Transoceanic ship, containers; GLO
- kg_km_44: 0.0143851; = kg_44*km_44
  Transport amount in km*km, for light fuel oil // light fuel oil at refinery // br; Transoceanic ship, containers; GLO
- kg_45: 1.16136e-6
  Mass in kg, for light fuel oil // light fuel oil at refinery // rsa; Articulated lorry transport, Euro 4, Total weight >32 t; EU+EFTA+UK
- km_45: 997.564
  Distance in km, for light fuel oil // light fuel oil at refinery // rsa; Articulated lorry transport, Euro 4, Total weight >32 t; EU+EFTA+UK
- kg_km_45: 0.00115853; = kg_45*km_45
  Transport amount in km*km, for light fuel oil // light fuel oil at refinery // rsa; Articulated lorry transport, Euro 4, Total weight >32 t; EU+EFTA+UK
- kg_46: 1.16136e-6
  Mass in kg, for light fuel oil // light fuel oil at refinery // rsa; Transoceanic ship, containers; GLO
- km_46: 18039.3
  Distance in km, for light fuel oil // light fuel oil at refinery // rsa; Transoceanic ship, containers; GLO
- kg_km_46: 0.0209501; = kg_46*km_46
  Transport amount in km*km, for light fuel oil // light fuel oil at refinery // rsa; Transoceanic ship, containers; GLO
- kg_47: 0.00775413
  Mass in kg, for sodium hydroxide // sodium hydroxide production // eu+efta+uk; Articulated lorry transport, Euro 4, Total weight >32 t; EU+EFTA+UK
- km_47: 999.793
  Distance in km, for sodium hydroxide // sodium hydroxide production // eu+efta+uk; Articulated lorry transport, Euro 4, Total weight >32 t; EU+EFTA+UK
- kg_km_47: 7.75252; = kg_47*km_47
  Transport amount in km*km, for sodium hydroxide // sodium hydroxide production // eu+efta+uk; Articulated lorry transport, Euro 4, Total weight >32 t; EU+EFTA+UK
- kg_48: 0.00775413
  Mass in kg, for sodium hydroxide // sodium hydroxide production // eu+efta+uk; Transoceanic ship, containers; GLO
- km_48: 18053.5
  Distance in km, for sodium hydroxide // sodium hydroxide production // eu+efta+uk; Transoceanic ship, containers; GLO
- kg_km_48: 139.989; = kg_48*km_48
  Transport amount in km*km, for sodium hydroxide // sodium hydroxide production // eu+efta+uk; Transoceanic ship, containers; GLO
- kg_49: 0.0104796
  Mass in kg, for sulphuric acid // sulphuric acid production // eu+efta+uk; Articulated lorry transport, Euro 4, Total weight >32 t; EU+EFTA+UK
- km_49: 1004.18
  Distance in km, for sulphuric acid // sulphuric acid production // eu+efta+uk; Articulated lorry transport, Euro 4, Total weight >32 t; EU+EFTA+UK
- kg_km_49: 10.5233; = kg_49*km_49
  Transport amount in km*km, for sulphuric acid // sulphuric acid production // eu+efta+uk; Articulated lorry transport, Euro 4, Total weight >32 t; EU+EFTA+UK
- kg_50: 0.0104796
  Mass in kg, for sulphuric acid // sulphuric acid production // eu+efta+uk; Transoceanic ship, containers; GLO
- km_50: 17964.6
  Distance in km, for sulphuric acid // sulphuric acid production // eu+efta+uk; Transoceanic ship, containers; GLO
- kg_km_50: 188.262; = kg_50*km_50
  Transport amount in km*km, for sulphuric acid // sulphuric acid production // eu+efta+uk; Transoceanic ship, containers; GLO
- kg_51: 0.00245798
  Mass in kg, for hydrogen peroxide, 100% // hydrogen peroxide, 100% production // eu+efta+uk; Articulated lorry transport, Euro 4, Total weight >32 t; EU+EFTA+UK
- km_51: 1001.59
  Distance in km, for hydrogen peroxide, 100% // hydrogen peroxide, 100% production // eu+efta+uk; Articulated lorry transport, Euro 4, Total weight >32 t; EU+EFTA+UK
- kg_km_51: 2.46188; = kg_51*km_51
  Transport amount in km*km, for hydrogen peroxide, 100% // hydrogen peroxide, 100% production // eu+efta+uk; Articulated lorry transport, Euro 4, Total weight >32 t; EU+EFTA+UK
- kg_52: 0.00245798
  Mass in kg, for hydrogen peroxide, 100% // hydrogen peroxide, 100% production // eu+efta+uk; Transoceanic ship, containers; GLO
- km_52: 17989.3
  Distance in km, for hydrogen peroxide, 100% // hydrogen peroxide, 100% production // eu+efta+uk; Transoceanic ship, containers; GLO
- kg_km_52: 44.2174; = kg_52*km_52
  Transport amount in km*km, for hydrogen peroxide, 100% // hydrogen peroxide, 100% production // eu+efta+uk; Transoceanic ship, containers; GLO
- kg_53: 0.000559382
  Mass in kg, for oxygen // oxygen production // eu+efta+uk; Articulated lorry transport, Euro 4, Total weight >32 t; EU+EFTA+UK
- km_53: 999.304
  Distance in km, for oxygen // oxygen production // eu+efta+uk; Articulated lorry transport, Euro 4, Total weight >32 t; EU+EFTA+UK
- kg_km_53: 0.558992; = kg_53*km_53
  Transport amount in km*km, for oxygen // oxygen production // eu+efta+uk; Articulated lorry transport, Euro 4, Total weight >32 t; EU+EFTA+UK
- kg_54: 0.000559382
  Mass in kg, for oxygen // oxygen production // eu+efta+uk; Transoceanic ship, containers; GLO
- km_54: 17949.5
  Distance in km, for oxygen // oxygen production // eu+efta+uk; Transoceanic ship, containers; GLO
- kg_km_54: 10.0406; = kg_54*km_54
  Transport amount in km*km, for oxygen // oxygen production // eu+efta+uk; Transoceanic ship, containers; GLO
- kg_55: 0.00912265
  Mass in kg, for precipitated calcium carbonate // precipitated calcium carbonate production // eu+efta+uk; Articulated lorry transport, Euro 4, Total weight >32 t; EU+EFTA+UK
- km_55: 1000.09
  Distance in km, for precipitated calcium carbonate // precipitated calcium carbonate production // eu+efta+uk; Articulated lorry transport, Euro 4, Total weight >32 t; EU+EFTA+UK
- kg_km_55: 9.12345; = kg_55*km_55
  Transport amount in km*km, for precipitated calcium carbonate // precipitated calcium carbonate production // eu+efta+uk; Articulated lorry transport, Euro 4, Total weight >32 t; EU+EFTA+UK
- kg_56: 0.00912265
  Mass in kg, for precipitated calcium carbonate // precipitated calcium carbonate production // eu+efta+uk; Transoceanic ship, containers; GLO
- km_56: 17991
  Distance in km, for precipitated calcium carbonate // precipitated calcium carbonate production // eu+efta+uk; Transoceanic ship, containers; GLO
- kg_km_56: 164.126; = kg_56*km_56
  Transport amount in km*km, for precipitated calcium carbonate // precipitated calcium carbonate production // eu+efta+uk; Transoceanic ship, containers; GLO
- kg_57: 0.0226298
  Mass in kg, for biodegradable waste to landfill // landfill of biodegradable waste // eu+efta+uk; Articulated lorry transport, Euro 4, Total weight >32 t; EU+EFTA+UK
- km_57: 77
  Distance in km, for biodegradable waste to landfill // landfill of biodegradable waste // eu+efta+uk; Articulated lorry transport, Euro 4, Total weight >32 t; EU+EFTA+UK
- kg_km_57: 1.74249; = kg_57*km_57
  Transport amount in km*km, for biodegradable waste to landfill // landfill of biodegradable waste // eu+efta+uk; Articulated lorry transport, Euro 4, Total weight >32 t; EU+EFTA+UK

## Reference product
- unbleached kraft pulp, softwood // unbleached kraft pulp, softwood // world (without eu+efta+uk, us and ca): 1

## Inputs
- Transport of methanol, from biomass by Freight train, diesel traction - EU+EFTA+UK: 0.198797; = kg_km_0
- Transport of methanol, from biomass by Freight train, electricity traction - EU+EFTA+UK: 0.0671383; = kg_km_1
- Transport of methanol, from biomass by Freight train, average - EU+EFTA+UK: 0.00159508; = kg_km_2
- Transport of methanol, from biomass by Barge - EU+EFTA+UK: 0.0649256; = kg_km_3
- Transport of methanol, from biomass by Articulated lorry transport, Total weight >32 t, mix Euro 0-5 - ROW w/o EU+EFTA: 0.34475; = kg_km_4
- Transport of methanol, from biomass by Articulated lorry transport, Total weight <7.5 t, mix Euro 0-5 - EU+EFTA+UK: 0.0104046; = kg_km_5
- Transport of methanol, from biomass by Barge - ROW w/o EU+EFTA: 0.131466; = kg_km_6
- Transport of softwood under bark // softwood forestry // world (without eu+efta+uk, us and ca) by Articulated lorry transport, Euro 4, Total weight >32 t - EU+EFTA+UK: 225.655; = kg_km_7
- Transport of softwood under bark // softwood forestry // world (without eu+efta+uk, us and ca) by Freight train, average - EU+EFTA+UK: 204.87; = kg_km_8
- Transport of wood chips, softwood // wood chips, softwood // world (without eu+efta+uk, us and ca) by Articulated lorry transport, Euro 4, Total weight >32 t - EU+EFTA+UK: 1.03516; = kg_km_9
- Transport of wood chips, softwood // wood chips, softwood // world (without eu+efta+uk, us and ca) by Freight train, average - EU+EFTA+UK: 5.59752; = kg_km_10
- Transport of heavy fuel oil (1.0 wt.% s) // heavy fuel oil at refinery // in by Articulated lorry transport, Euro 4, Total weight >32 t - EU+EFTA+UK: 1.46748; = kg_km_11
- Transport of heavy fuel oil (1.0 wt.% s) // heavy fuel oil at refinery // in by Transoceanic ship, containers - GLO: 26.4532; = kg_km_12
- Transport of heavy fuel oil (1.0 wt.% s) // heavy fuel oil at refinery // jp by Articulated lorry transport, Euro 4, Total weight >32 t - EU+EFTA+UK: 2.48119; = kg_km_13
- Transport of heavy fuel oil (1.0 wt.% s) // heavy fuel oil at refinery // jp by Transoceanic ship, containers - GLO: 44.7001; = kg_km_14
- Transport of heavy fuel oil (1.0 wt.% s) // heavy fuel oil at refinery // ras w/o cn by Articulated lorry transport, Euro 4, Total weight >32 t - EU+EFTA+UK: 14.9644; = kg_km_15
- Transport of heavy fuel oil (1.0 wt.% s) // heavy fuel oil at refinery // ras w/o cn by Transoceanic ship, containers - GLO: 270.324; = kg_km_16
- Transport of heavy fuel oil (1.0 wt.% s) // heavy fuel oil at refinery // au by Articulated lorry transport, Euro 4, Total weight >32 t - EU+EFTA+UK: 0.150609; = kg_km_17
- Transport of heavy fuel oil (1.0 wt.% s) // heavy fuel oil at refinery // au by Transoceanic ship, containers - GLO: 2.7129; = kg_km_18
- Transport of heavy fuel oil (1.0 wt.% s) // heavy fuel oil at refinery // cn by Articulated lorry transport, Euro 4, Total weight >32 t - EU+EFTA+UK: 1.54471; = kg_km_19
- Transport of heavy fuel oil (1.0 wt.% s) // heavy fuel oil at refinery // cn by Transoceanic ship, containers - GLO: 27.8048; = kg_km_20
- Transport of heavy fuel oil (1.0 wt.% s) // heavy fuel oil at refinery // ru by Articulated lorry transport, Euro 4, Total weight >32 t - EU+EFTA+UK: 7.7139; = kg_km_21
- Transport of heavy fuel oil (1.0 wt.% s) // heavy fuel oil at refinery // ru by Transoceanic ship, containers - GLO: 139.024; = kg_km_22
- Transport of heavy fuel oil (1.0 wt.% s) // heavy fuel oil at refinery // raf by Articulated lorry transport, Euro 4, Total weight >32 t - EU+EFTA+UK: 2.74186; = kg_km_23
- Transport of heavy fuel oil (1.0 wt.% s) // heavy fuel oil at refinery // raf by Transoceanic ship, containers - GLO: 49.4308; = kg_km_24
- Transport of heavy fuel oil (1.0 wt.% s) // heavy fuel oil at refinery // br by Articulated lorry transport, Euro 4, Total weight >32 t - EU+EFTA+UK: 1.313; = kg_km_25
- Transport of heavy fuel oil (1.0 wt.% s) // heavy fuel oil at refinery // br by Transoceanic ship, containers - GLO: 23.6534; = kg_km_26
- Transport of heavy fuel oil (1.0 wt.% s) // heavy fuel oil at refinery // rsa by Articulated lorry transport, Euro 4, Total weight >32 t - EU+EFTA+UK: 5.23271; = kg_km_27
- Transport of heavy fuel oil (1.0 wt.% s) // heavy fuel oil at refinery // rsa by Transoceanic ship, containers - GLO: 94.1309; = kg_km_28
- Transport of light fuel oil // light fuel oil at refinery // in by Articulated lorry transport, Euro 4, Total weight >32 t - EU+EFTA+UK: 0.00179573; = kg_km_29
- Transport of light fuel oil // light fuel oil at refinery // in by Transoceanic ship, containers - GLO: 0.0323424; = kg_km_30
- Transport of light fuel oil // light fuel oil at refinery // jp by Articulated lorry transport, Euro 4, Total weight >32 t - EU+EFTA+UK: 0.00089014; = kg_km_31
- Transport of light fuel oil // light fuel oil at refinery // jp by Transoceanic ship, containers - GLO: 0.0160264; = kg_km_32
- Transport of light fuel oil // light fuel oil at refinery // ras w/o cn by Articulated lorry transport, Euro 4, Total weight >32 t - EU+EFTA+UK: 0.00483688; = kg_km_33
- Transport of light fuel oil // light fuel oil at refinery // ras w/o cn by Transoceanic ship, containers - GLO: 0.0871796; = kg_km_34
- Transport of light fuel oil // light fuel oil at refinery // au by Articulated lorry transport, Euro 4, Total weight >32 t - EU+EFTA+UK: 0.000256808; = kg_km_35
- Transport of light fuel oil // light fuel oil at refinery // au by Transoceanic ship, containers - GLO: 0.00461483; = kg_km_36
- Transport of light fuel oil // light fuel oil at refinery // cn by Articulated lorry transport, Euro 4, Total weight >32 t - EU+EFTA+UK: 0.00333078; = kg_km_37
- Transport of light fuel oil // light fuel oil at refinery // cn by Transoceanic ship, containers - GLO: 0.0599541; = kg_km_38
- Transport of light fuel oil // light fuel oil at refinery // ru by Articulated lorry transport, Euro 4, Total weight >32 t - EU+EFTA+UK: 0.00137093; = kg_km_39
- Transport of light fuel oil // light fuel oil at refinery // ru by Transoceanic ship, containers - GLO: 0.0247154; = kg_km_40
- Transport of light fuel oil // light fuel oil at refinery // raf by Articulated lorry transport, Euro 4, Total weight >32 t - EU+EFTA+UK: 0.00061885; = kg_km_41
- Transport of light fuel oil // light fuel oil at refinery // raf by Transoceanic ship, containers - GLO: 0.0111026; = kg_km_42
- Transport of light fuel oil // light fuel oil at refinery // br by Articulated lorry transport, Euro 4, Total weight >32 t - EU+EFTA+UK: 0.000799388; = kg_km_43
- Transport of light fuel oil // light fuel oil at refinery // br by Transoceanic ship, containers - GLO: 0.0143851; = kg_km_44
- Transport of light fuel oil // light fuel oil at refinery // rsa by Articulated lorry transport, Euro 4, Total weight >32 t - EU+EFTA+UK: 0.00115853; = kg_km_45
- Transport of light fuel oil // light fuel oil at refinery // rsa by Transoceanic ship, containers - GLO: 0.0209501; = kg_km_46
- Transport of sodium hydroxide // sodium hydroxide production // eu+efta+uk by Articulated lorry transport, Euro 4, Total weight >32 t - EU+EFTA+UK: 7.75252; = kg_km_47
- Transport of sodium hydroxide // sodium hydroxide production // eu+efta+uk by Transoceanic ship, containers - GLO: 139.989; = kg_km_48
- Transport of sulphuric acid // sulphuric acid production // eu+efta+uk by Articulated lorry transport, Euro 4, Total weight >32 t - EU+EFTA+UK: 10.5233; = kg_km_49
- Transport of sulphuric acid // sulphuric acid production // eu+efta+uk by Transoceanic ship, containers - GLO: 188.262; = kg_km_50
- Transport of hydrogen peroxide, 100% // hydrogen peroxide, 100% production // eu+efta+uk by Articulated lorry transport, Euro 4, Total weight >32 t - EU+EFTA+UK: 2.46188; = kg_km_51
- Transport of hydrogen peroxide, 100% // hydrogen peroxide, 100% production // eu+efta+uk by Transoceanic ship, containers - GLO: 44.2174; = kg_km_52
- Transport of oxygen // oxygen production // eu+efta+uk by Articulated lorry transport, Euro 4, Total weight >32 t - EU+EFTA+UK: 0.558992; = kg_km_53
- Transport of oxygen // oxygen production // eu+efta+uk by Transoceanic ship, containers - GLO: 10.0406; = kg_km_54
- Transport of precipitated calcium carbonate // precipitated calcium carbonate production // eu+efta+uk by Articulated lorry transport, Euro 4, Total weight >32 t - EU+EFTA+UK: 9.12345; = kg_km_55
- Transport of precipitated calcium carbonate // precipitated calcium carbonate production // eu+efta+uk by Transoceanic ship, containers - GLO: 164.126; = kg_km_56
- Electricity from Electricity grid mix 1kV-60kV - AU: 0.00328251
- Electricity from Electricity grid mix 1kV-60kV - NZ: 0.000579267
- Electricity from Electricity grid mix 1kV-60kV - RU: 0.0140955
- Electricity from Electricity grid mix 1kV-60kV - RAF: 0.0105233
- Electricity from Electricity grid mix 1kV-60kV - RSA: 0.023943
- Transport of biodegradable waste to landfill // landfill of biodegradable waste // eu+efta+uk by Articulated lorry transport, Euro 4, Total weight >32 t - EU+EFTA+UK: 1.74249; = kg_km_57
- Electricity from Electricity grid mix 1kV-60kV - CN: 0.0723748
- Electricity from Electricity grid mix 1kV-60kV - RAS w/o CN: 0.0792966
- unbleached kraft pulp, softwood // unbleached kraft pulp, softwood // world (without eu+efta+uk, us and ca), blackbox: 1
- unbleached kraft pulp, softwood // unbleached kraft pulp, softwood // world (without eu+efta+uk, us and ca), elementary: 1

## Impact indicators
- Eutrophication marine: 0.00120945
- Ecotoxicity, freshwater: 2.11639
- Land use: 423.664
- Water use: 0.66354
- Resource use, minerals and metals: 2.0543e-6
- Resource use, fossils: 2.10139
- Climate change: 0.18195
- Ozone depletion: 5.55582e-9
- Human toxicity, cancer: 1.87913e-10
- Human toxicity, non-cancer: 2.16058e-9
- EF-particulate Matter: 2.44864e-8
- Ionising radiation, human health: 0.00686885
- Photochemical ozone formation - human health: 0.00310532
- Acidification: 0.00203157
- Eutrophication, terrestrial: 0.0116384
- Eutrophication, freshwater: 3.53106e-5

## Deviations from the LCI method principle
The background data uses:
- the \xe2\x80\x9cRecycled content cut-off\xe2\x80\x9d approach to allocate end-of-life by-products and secondary materials. This allocation is explained in the description of the recycled content system model (http://www.ecoinvent.org/database/system-models-in-ecoinvent-3/cut-off-system-model/allocation-cut-off-by-classification.html).
OR
- EF compliant data

## Deviations from the LCI method approaches
Background data:
- the \xe2\x80\x9cRecycled content cut-off\xe2\x80\x9d approach to allocate end-of-life by-products and secondary materials. This allocation is explained in the description of the recycled content system model (http://www.ecoinvent.org/database/system-models-in-ecoinvent-3/cut-off-system-model/allocation-cut-off-by-classification.html). The ecoinvent database mostly relies on “Allocation – market values” apart for few exceptions particularly in the energy sector. ecoinvent energy data is replaced with EF3.0 core data as per the EF guidelines version 2.0.
OR
- EF compliant data

## Modelling constants
All modelling constants follow the requirements listed in the Tender Specifications 070201/2020/SER/ENV.B1. Completeness: There are no intentional cut-offs in the inventory no matter how small their contribution to all the EF impact categories is. Eventual cut-offs are in compliance with the Guide for EF compliant data sets (JRC 2020), i.e. only if below the 3% cut-off rule. Water use: water use is modelled at country level using separate flows for water withdrawal, water release and water evaporation. Handling multi-functional processes: the following PEF multi- functionality decision hierarchy is applied for resolving all multi- functionality problems: (1) subdivision or system expansion; (2) allocation based on a relevant underlying physical relationship (substitution may apply here); (3) allocation based on some other relationship. Direct land use change: GHG emissions from direct LUC allocated to good/service for 20 years after the LUC occurs, with IPCC default values. Carbon storage and delayed emissions: credits associated with temporary (carbon) storage or delayed emissions up to 300 years are not be considered. Emissions off-setting: are not included. Capital goods (including infrastructures) and their End of life: they are included. System boundaries: system boundaries include all processes linked to the product supply chain (e.g. maintenance). Time period: emissions and removals are modelled as if released or removed at the beginning of the assessment method. Fossil and biogenic carbon emissions and removals: removals and emissions are modelled as follows: All GHG emissions from fossil fuels (including peat and limestone) are modelled consistently with the most updated ILCD list of elementary flows. The non-fossil (biogenic) carbon flows are modelled consistently with the most updated ILCD list of elementary flows.

## Cut-off and completeness
There are no intentional cut-offs in the inventory no matter how small their contribution to all the EF impact categories is. Eventual cut-offs are in compliance with the Guide for EF compliant data sets (JRC 2020), i.e. only if below the 3% cut-off rule. The dataset dry mass and water balance has been checked to ensure the inventory is complete. Capital goods (e.g. infrastructure) and their end-of-life are included.

## Data selection and combination
These datasets include, in both their foreground and background data, links to EF3.0 compliant data.
The relevant background data on energy, transport, and End of Life are from the LCDN data node (http://lcdn.thinkstep.com/Node/).
All other background data in the supply of this product for which no EF3.0 process was available are from ecoinvent v3.7 database (www.ecoinvent.org) or other data sources.

## Data treatment and extrapolations
Several data sources have been used to model the inventory.

## Review details
Internal reviews have been asked to review the plausibility of the unit process, LCIA scores, and DQRs. Internal reviewers have also been asked to review the data for EF compliancy. The consortium is therefore responsible for aspects such as compliancy with the ILCD format, including validation in Look@LCI, and nomenclature.
Internal reviwers have been asked to judge based on the process name, that the unit process models in a complete and representative way the process in the requested location. The review encompassed the plausability of:
- exchanges with nature (elementary flows) as well as exchanges such as product and waste flows.
- meta information (general comment, technology comment, system boundaries, allocation, cut-off rules, etc.). Reviewers were asked to judge if the provided information is enough to understand the content of the process.
- LCIA scores
- DQRs including precision, technology, time and geography. As well as the overall DQR.
External reviewers have been asked to provide their expertise in the field of interest. External reviewers have been asked to review the unit process, including eventual methodological choices, the LCIA scores (provided with contribution scores as well), and DQRs. External reviewers have been provided all the information in a tool developed by the consortium for the purpose of this project.
External reviewers have been asked to judge based on the process name, that the unit process models in a complete and representative way the process in the requested location. The review encompassed:
- Plausability and completeness of exchanges with nature (elementary flows) as well as exchanges such as product and waste flows.
- Review of meta information (general comment, technology comment, system boundaries, allocation, cut-off rules, etc.). Reviewers were asked to judge if the provided information is enough to understand the content of the process.
- Review of properties (biogenic carbon and water content).
- Review of allocation keys.
- Plausability of LCIA scores calculated by the consortium.
- Plausability of DQRs including precision, technology, time and geography. As well as the overall DQR.

## Data sources
- Background Data for Representative products and organisations. EF 3.0 compliant (data stock)
- The European Pulp Industry Sector Association AISBL (EPIS), (2020). EPIS Life Cycle Inventory data for Unbleached Softwood Kraft Pulp, 2020 Data.

## Intended applications
Implementation of regular Product Environmental Footprint (PEF) studies and Organisation Environmental Footprint (OEF) studies exclusively under the specified Product groups and sectors as defined in the Product Environmental Footprint Category Rules (PEFCR) and Organisation Environmental Footprint Sectorial Rules (OEFSR) listed in http://ec.europa.eu/environment/eussd/smgp/PEFCR_OEFSR.htm
