# eucalyptus forestry, elementary; technology mix; production mix, at plantation; 1 kg of DM (average basic wood density 500 kg/m³)

Dataset: ILCD process, Unit process, single operation
Geography: EU+EFTA+UK
Reference year: 2018
Valid until: 2024
Classification: Other Services / Other services
LCI method principle: Attributional
LCI method approaches: Allocation - market value
Completeness: All relevant flows quantified
Project: Provision of process-based 3.0 Environmental Footprint-compliant life cycle inventory datasets - Renewable materials - contract number 070201/2020/840085/SER/ENV.B.1
Generated by: ACV Brasil
Owner: ecoinvent
Compliance: Environmental Footprint non-primary supporting data set; Environmental Footprint 3.1
Amounts: no units in this file; such an amount is in the reference unit of its flow, which a separate flow dataset defines
copyright: true
licenseType: Free of charge for some user types or use types
accessRestrictions: Free of charge for all final users implementing a regular Product Environmental Footprint (PEF) studies and Organisation Environmental Footprint (OEF) studies exclusively under the specified Product groups and sectors as defined in the Product Environmental Footprint Category Rules (PEFCR) and Organisation Environmental Footprint Sectorial Rules (OEFSR) listed in http://ec.europa.eu/environment/eussd/smgp/PEFCR_OEFSR.htm and in accordance with the terms and conditions of the EULA (available at https://ecoinvent.lca-data.com/) exclusively until 31st December 2024. Any use of this dataset or any derivative data not within the specific context of one of the PEF/OEF projects or after the end of 2024 is not permitted.

## General comment
Notice: this data set supersedes the EF3.0-compliant version (see link under "preceding data set version" below calculated with the EF3.0). The life cycle inventory is not changed from the original EF3.0 data set. The LCIA results are calculated based on the EF3.1 methods which provide updated characterisation factors in the following impact categories: Climate Change, Ecotoxicity freshwater, Photochemical Ozone Formation, Acidification, Human Toxicity non-cancer, and Human Toxicity cancer. The review report and the data quality ratings refer to the original results. The data set has been updated by the European Commission on the basis of the original EF3.0 data set delivered by the data provider.This sub-process has limited documentation only. For all detailed documentation of the full model to which this data set belongs (such as DQRs, review reports and other technical documentation), please see this process: eucalyptus forestry - EU+EFTA+UK []

## Technology and included processes
The production of Eucalyptus starts with the cultivation of seedlings in greenhouses, which are transplanted to the plantation area. Machines are used for site preparation. Eucalyptus cultivation is enhanced by means of herbicides, pesticides and fertilizers, especially in the first years of growth. After a growing period of eleven years, machines are used for thinning and clear cut of the trees (Cardellini et al., 2018).
This activity includes the seedling production, the inputs of fertilizers, herbicides and pesticides as well as the fuel burned in the machines.
References:
Cardellini, G., Valada, T., Cornillier, C., Vial, E., Dragoi, M., Goudiaby, V., Muys, B. (2018). EFO-LCI: A new life cycle inventory database of forestry operations in Europe. Environmental Management, 61(6), 1031-1047.

## Reference product
- eucalyptus forestry // eucalyptus forestry // eu+efta+uk, elementary: 1

## Inputs
- freshwater, Renewable material resources from water: 8.46286e-9
- carbon dioxide (biogenic), Renewable material resources from air: 1.79667
- forest, intensive, Land occupation: 0.000797779
- to forest, intensive, Land transformation: 7.25254e-5
- Energy, gross calorific value, in biomass, primary forest, Renewable energy resources from biosphere: 20.456
- Wood, soft, standing, Renewable material resources from biosphere: 0.002
- forest, intensive, Land occupation [DE]: 0.183223
- to forest, intensive, Land transformation [DE]: 0.0166566
- from forest, intensive, Land transformation [DE]: 0.0166566
- freshwater, Renewable material resources from water [AT]: 2.15147e-7
- freshwater, Renewable material resources from water [BA]: 2.08168e-8
- freshwater, Renewable material resources from water [BE]: 2.58962e-7
- freshwater, Renewable material resources from water [BG]: 6.63121e-8
- freshwater, Renewable material resources from water [CH]: 2.56598e-7
- freshwater, Renewable material resources from water [CZ]: 1.78591e-7
- freshwater, Renewable material resources from water [DE]: 1.94363e-6
- freshwater, Renewable material resources from water [DK]: 1.40936e-7
- freshwater, Renewable material resources from water [EE]: 1.9245e-8
- freshwater, Renewable material resources from water [ES]: 8.34068e-7
- freshwater, Renewable material resources from water [FI]: 1.20215e-7
- freshwater, Renewable material resources from water [FR]: 1.37104e-6
- freshwater, Renewable material resources from water [GB]: 1.36248e-6
- freshwater, Renewable material resources from water [GR]: 1.5499e-7
- freshwater, Renewable material resources from water [HU]: 1.30641e-7
- freshwater, Renewable material resources from water [IE]: 1.40726e-7
- freshwater, Renewable material resources from water [IS]: 8.03025e-9
- freshwater, Renewable material resources from water [IT]: 1.17303e-6
- freshwater, Renewable material resources from water [LT]: 4.10913e-8
- freshwater, Renewable material resources from water [LU]: 2.85257e-8
- freshwater, Renewable material resources from water [LV]: 2.423e-8
- freshwater, Renewable material resources from water [MK]: 1.42647e-8
- freshwater, Renewable material resources from water [NL]: 4.34826e-7
- freshwater, Renewable material resources from water [NO]: 1.64595e-7
- freshwater, Renewable material resources from water [PL]: 5.00435e-7
- freshwater, Renewable material resources from water [PT]: 1.57905e-7
- freshwater, Renewable material resources from water [RO]: 2.19223e-7
- freshwater, Renewable material resources from water [RS]: 5.4401e-8
- freshwater, Renewable material resources from water [SE]: 2.37508e-7
- freshwater, Renewable material resources from water [SI]: 3.36345e-8
- freshwater, Renewable material resources from water [SK]: 7.89453e-8
- freshwater, Renewable material resources from water [UA]: 2.31468e-7
- from forest, intensive, Land transformation: 7.25254e-5
- forest, intensive, Land occupation [SE]: 0.0223894
- to forest, intensive, Land transformation [SE]: 0.0020354
- from forest, intensive, Land transformation [SE]: 0.0020354
- freshwater, Renewable material resources from water [AL]: 1.66983e-8
- freshwater, Renewable material resources from water [BY]: 8.61051e-8
- freshwater, Renewable material resources from water [HR]: 4.98346e-8
- freshwater, Renewable material resources from water [MD]: 1.28206e-8
- freshwater, Renewable material resources from water [ME]: 5.16484e-9
- freshwater, Renewable material resources from water [MT]: 7.89104e-9
- freshwater, Renewable material resources from water [SM]: 9.82552e-10
- forest, intensive, Land occupation [FI]: 0.0113325
- to forest, intensive, Land transformation [FI]: 0.00103023
- from forest, intensive, Land transformation [FI]: 0.00103023
- forest, intensive, Land occupation [AL]: 0.00157412
- forest, intensive, Land occupation [AT]: 0.0202815
- forest, intensive, Land occupation [BA]: 0.00196236
- forest, intensive, Land occupation [BE]: 0.0244119
- forest, intensive, Land occupation [BG]: 0.00625112
- forest, intensive, Land occupation [BY]: 0.00811698
- forest, intensive, Land occupation [CH]: 0.0241891
- forest, intensive, Land occupation [CZ]: 0.0168354
- forest, intensive, Land occupation [DK]: 0.0132858
- forest, intensive, Land occupation [EE]: 0.00181419
- forest, intensive, Land occupation [ES]: 0.0786262
- forest, intensive, Land occupation [FR]: 0.129245
- forest, intensive, Land occupation [GB]: 0.128438
- forest, intensive, Land occupation [GR]: 0.0146107
- forest, intensive, Land occupation [HR]: 0.00469782
- forest, intensive, Land occupation [HU]: 0.0123153
- forest, intensive, Land occupation [IE]: 0.013266
- forest, intensive, Land occupation [IS]: 0.000756998
- forest, intensive, Land occupation [IT]: 0.11058
- forest, intensive, Land occupation [LT]: 0.00387361
- forest, intensive, Land occupation [LU]: 0.00268907
- forest, intensive, Land occupation [LV]: 0.00228412
- forest, intensive, Land occupation [MD]: 0.00120857
- forest, intensive, Land occupation [ME]: 0.000486881
- forest, intensive, Land occupation [MK]: 0.00134471
- forest, intensive, Land occupation [MT]: 0.000743874
- forest, intensive, Land occupation [NL]: 0.0409902
- forest, intensive, Land occupation [NO]: 0.015516
- forest, intensive, Land occupation [PL]: 0.0471751
- forest, intensive, Land occupation [PT]: 0.0148855
- forest, intensive, Land occupation [RO]: 0.0206658
- forest, intensive, Land occupation [RS]: 0.00512829
- forest, intensive, Land occupation [SI]: 0.00317067
- forest, intensive, Land occupation [SK]: 0.00744203
- forest, intensive, Land occupation [SM]: 9.26234e-5
- forest, intensive, Land occupation [UA]: 0.0218201
- to forest, intensive, Land transformation [AL]: 0.000143102
- to forest, intensive, Land transformation [AT]: 0.00184377
- to forest, intensive, Land transformation [BA]: 0.000178396
- to forest, intensive, Land transformation [BE]: 0.00221927
- to forest, intensive, Land transformation [BG]: 0.000568284
- to forest, intensive, Land transformation [BY]: 0.000737907
- to forest, intensive, Land transformation [CH]: 0.00219901
- to forest, intensive, Land transformation [CZ]: 0.00153049
- to forest, intensive, Land transformation [DK]: 0.0012078
- to forest, intensive, Land transformation [EE]: 0.000164926
- to forest, intensive, Land transformation [ES]: 0.00714783
- to forest, intensive, Land transformation [FR]: 0.0117496
- to forest, intensive, Land transformation [GB]: 0.0116762
- to forest, intensive, Land transformation [GR]: 0.00132824
- to forest, intensive, Land transformation [HR]: 0.000427075
- to forest, intensive, Land transformation [HU]: 0.00111958
- to forest, intensive, Land transformation [IE]: 0.001206
- to forest, intensive, Land transformation [IS]: 6.8818e-5
- to forest, intensive, Land transformation [IT]: 0.0100527
- to forest, intensive, Land transformation [LT]: 0.000352146
- to forest, intensive, Land transformation [LU]: 0.000244461
- to forest, intensive, Land transformation [LV]: 0.000207648
- to forest, intensive, Land transformation [MD]: 0.00010987
- to forest, intensive, Land transformation [ME]: 4.42619e-5
- to forest, intensive, Land transformation [MK]: 0.000122246
- to forest, intensive, Land transformation [MT]: 6.76249e-5
- to forest, intensive, Land transformation [NL]: 0.00372639
- to forest, intensive, Land transformation [NO]: 0.00141055
- to forest, intensive, Land transformation [PL]: 0.00428865
- to forest, intensive, Land transformation [PT]: 0.00135322
- to forest, intensive, Land transformation [RO]: 0.00187871
- to forest, intensive, Land transformation [RS]: 0.000466208
- to forest, intensive, Land transformation [SI]: 0.000288243
- to forest, intensive, Land transformation [SK]: 0.000676548
- to forest, intensive, Land transformation [SM]: 8.42031e-6
- to forest, intensive, Land transformation [UA]: 0.00198365
- from forest, intensive, Land transformation [AL]: 0.000143102
- from forest, intensive, Land transformation [AT]: 0.00184377
- from forest, intensive, Land transformation [BA]: 0.000178396
- from forest, intensive, Land transformation [BE]: 0.00221927
- from forest, intensive, Land transformation [BG]: 0.000568284
- from forest, intensive, Land transformation [BY]: 0.000737907
- from forest, intensive, Land transformation [CH]: 0.00219901
- from forest, intensive, Land transformation [CZ]: 0.00153049
- from forest, intensive, Land transformation [DK]: 0.0012078
- from forest, intensive, Land transformation [EE]: 0.000164926
- from forest, intensive, Land transformation [ES]: 0.00714783
- from forest, intensive, Land transformation [FR]: 0.0117496
- from forest, intensive, Land transformation [GB]: 0.0116762
- from forest, intensive, Land transformation [GR]: 0.00132824
- from forest, intensive, Land transformation [HR]: 0.000427075
- from forest, intensive, Land transformation [HU]: 0.00111958
- from forest, intensive, Land transformation [IE]: 0.001206
- from forest, intensive, Land transformation [IS]: 6.8818e-5
- from forest, intensive, Land transformation [IT]: 0.0100527
- from forest, intensive, Land transformation [LT]: 0.000352146
- from forest, intensive, Land transformation [LU]: 0.000244461
- from forest, intensive, Land transformation [LV]: 0.000207648
- from forest, intensive, Land transformation [MD]: 0.00010987
- from forest, intensive, Land transformation [ME]: 4.42619e-5
- from forest, intensive, Land transformation [MK]: 0.000122246
- from forest, intensive, Land transformation [MT]: 6.76249e-5
- from forest, intensive, Land transformation [NL]: 0.00372639
- from forest, intensive, Land transformation [NO]: 0.00141055
- from forest, intensive, Land transformation [PL]: 0.00428865
- from forest, intensive, Land transformation [PT]: 0.00135322
- from forest, intensive, Land transformation [RO]: 0.00187871
- from forest, intensive, Land transformation [RS]: 0.000466208
- from forest, intensive, Land transformation [SI]: 0.000288243
- from forest, intensive, Land transformation [SK]: 0.000676548
- from forest, intensive, Land transformation [SM]: 8.42031e-6
- from forest, intensive, Land transformation [UA]: 0.00198365

## Outputs
- carbon dioxide (fossil), Emissions to air, unspecified: 0.00237554
- nitrous oxide, Emissions to air, unspecified: 5.1593e-6
- ammonia, Emissions to air, unspecified [AL]: 1.04401e-7
- ammonia, Emissions to air, unspecified [AT]: 1.34514e-6
- ammonia, Emissions to air, unspecified [BA]: 1.3015e-7
- ammonia, Emissions to air, unspecified [BE]: 1.61908e-6
- ammonia, Emissions to air, unspecified [BG]: 4.14595e-7
- ammonia, Emissions to air, unspecified [BY]: 5.38345e-7
- ammonia, Emissions to air, unspecified [CH]: 1.6043e-6
- ammonia, Emissions to air, unspecified [CZ]: 1.11658e-6
- ammonia, Emissions to air, unspecified [DE]: 1.2152e-5
- ammonia, Emissions to air, unspecified [DK]: 8.81156e-7
- ammonia, Emissions to air, unspecified [EE]: 1.20323e-7
- ammonia, Emissions to air, unspecified [ES]: 5.21475e-6
- ammonia, Emissions to air, unspecified [FI]: 7.51608e-7
- ammonia, Emissions to air, unspecified [FR]: 8.57197e-6
- ammonia, Emissions to air, unspecified [GB]: 8.51846e-6
- ammonia, Emissions to air, unspecified: 5.31014e-7
- ammonia, Emissions to air, unspecified [GR]: 9.69029e-7
- ammonia, Emissions to air, unspecified [HR]: 3.11575e-7
- ammonia, Emissions to air, unspecified [HU]: 8.16793e-7
- ammonia, Emissions to air, unspecified [IE]: 8.79846e-7
- ammonia, Emissions to air, unspecified [IT]: 7.33401e-6
- ammonia, Emissions to air, unspecified [LT]: 2.5691e-7
- ammonia, Emissions to air, unspecified [LU]: 1.78348e-7
- ammonia, Emissions to air, unspecified [LV]: 1.51491e-7
- ammonia, Emissions to air, unspecified [MD]: 8.01565e-8
- ammonia, Emissions to air, unspecified [MK]: 8.91855e-8
- ammonia, Emissions to air, unspecified [NL]: 2.71861e-6
- ammonia, Emissions to air, unspecified [NO]: 1.02907e-6
- ammonia, Emissions to air, unspecified [PL]: 3.12881e-6
- ammonia, Emissions to air, unspecified [PT]: 9.87252e-7
- ammonia, Emissions to air, unspecified [RO]: 1.37062e-6
- ammonia, Emissions to air, unspecified [SE]: 1.48494e-6
- ammonia, Emissions to air, unspecified [SI]: 2.10289e-7
- ammonia, Emissions to air, unspecified [SK]: 4.9358e-7
- ammonia, Emissions to air, unspecified [UA]: 1.44718e-6
- Phosphorus, Emissions to water, unspecified: 1.06364e-5
- nitrate, Emissions to water, unspecified: 7.77715e-5
- isoxaflutole, Emissions to agricultural soil: 1.07487e-6
- flumioxazin, Emissions to agricultural soil: 1.32083e-6
- Nitrogen oxides, Emissions to air, unspecified: 1.33358e-7
- glyphosate, Emissions to agricultural soil: 2.6193e-5
- carfentrazone-ethyl, Emissions to agricultural soil: 5.39831e-7
- Nitrogen oxides, Emissions to air, unspecified [AL]: 2.6219e-8
- Nitrogen oxides, Emissions to air, unspecified [AT]: 3.37815e-7
- Nitrogen oxides, Emissions to air, unspecified [BA]: 3.26857e-8
- Nitrogen oxides, Emissions to air, unspecified [BE]: 4.06613e-7
- Nitrogen oxides, Emissions to air, unspecified [BG]: 1.04121e-7
- Nitrogen oxides, Emissions to air, unspecified [BY]: 1.35199e-7
- Nitrogen oxides, Emissions to air, unspecified [CH]: 4.02901e-7
- Nitrogen oxides, Emissions to air, unspecified [CZ]: 2.80416e-7
- Nitrogen oxides, Emissions to air, unspecified [DE]: 3.05182e-6
- Nitrogen oxides, Emissions to air, unspecified [DK]: 2.21292e-7
- Nitrogen oxides, Emissions to air, unspecified [EE]: 3.02177e-8
- Nitrogen oxides, Emissions to air, unspecified [ES]: 1.30962e-6
- Nitrogen oxides, Emissions to air, unspecified [FI]: 1.88758e-7
- Nitrogen oxides, Emissions to air, unspecified [FR]: 2.15275e-6
- Nitrogen oxides, Emissions to air, unspecified [GB]: 2.13931e-6
- Nitrogen oxides, Emissions to air, unspecified [GR]: 2.4336e-7
- Nitrogen oxides, Emissions to air, unspecified [HR]: 7.82484e-8
- Nitrogen oxides, Emissions to air, unspecified [HU]: 2.05128e-7
- Nitrogen oxides, Emissions to air, unspecified [IE]: 2.20963e-7
- Nitrogen oxides, Emissions to air, unspecified [IT]: 1.84185e-6
- Nitrogen oxides, Emissions to air, unspecified [LT]: 6.452e-8
- Nitrogen oxides, Emissions to air, unspecified [LU]: 4.479e-8
- Nitrogen oxides, Emissions to air, unspecified [LV]: 3.80451e-8
- Nitrogen oxides, Emissions to air, unspecified [MD]: 2.01304e-8
- Nitrogen oxides, Emissions to air, unspecified [MK]: 2.23979e-8
- Nitrogen oxides, Emissions to air, unspecified [NL]: 6.82747e-7
- Nitrogen oxides, Emissions to air, unspecified [NO]: 2.5844e-7
- Nitrogen oxides, Emissions to air, unspecified [PL]: 7.85765e-7
- Nitrogen oxides, Emissions to air, unspecified [PT]: 2.47937e-7
- Nitrogen oxides, Emissions to air, unspecified [RO]: 3.44216e-7
- Nitrogen oxides, Emissions to air, unspecified [SE]: 3.72926e-7
- Nitrogen oxides, Emissions to air, unspecified [SI]: 5.28117e-8
- Nitrogen oxides, Emissions to air, unspecified [SK]: 1.23957e-7
- Nitrogen oxides, Emissions to air, unspecified [UA]: 3.63443e-7
- Herbicides, unspecified, Emissions to agricultural soil: 0.000713815
- Naphthalenesulfonic acids, Emissions to agricultural soil: 9.43906e-10
- diethylamine, Emissions to agricultural soil: 9.43906e-10

## Impact indicators
- Eutrophication marine: 3.03904e-5
- Ecotoxicity, freshwater: 50.3773
- Land use: 59.2285
- Water use: 0.000171158
- Resource use, minerals and metals: 0
- Resource use, fossils: 0
- Climate change: 0.00378403
- Ozone depletion: 0
- Human toxicity, cancer: 0
- Human toxicity, non-cancer: 9.68947e-9
- EF-particulate Matter: 1.44573e-9
- Ionising radiation, human health: 0
- Photochemical ozone formation - human health: 1.69648e-5
- Acidification: 0.000144623
- Eutrophication, terrestrial: 0.000575605
- Eutrophication, freshwater: 1.06364e-5

## Deviations from the LCI method principle
The background data uses:
- the \xe2\x80\x9cRecycled content cut-off\xe2\x80\x9d approach to allocate end-of-life by-products and secondary materials. This allocation is explained in the description of the recycled content system model (http://www.ecoinvent.org/database/system-models-in-ecoinvent-3/cut-off-system-model/allocation-cut-off-by-classification.html).
OR
- EF compliant data

## Deviations from the LCI method approaches
Background data:
- the \xe2\x80\x9cRecycled content cut-off\xe2\x80\x9d approach to allocate end-of-life by-products and secondary materials. This allocation is explained in the description of the recycled content system model (http://www.ecoinvent.org/database/system-models-in-ecoinvent-3/cut-off-system-model/allocation-cut-off-by-classification.html). The ecoinvent database mostly relies on “Allocation – market values” apart for few exceptions particularly in the energy sector. ecoinvent energy data is replaced with EF3.0 core data as per the EF guidelines version 2.0.
OR
- EF compliant data

## Modelling constants
All modelling constants follow the requirements listed in the Tender Specifications 070201/2020/SER/ENV.B1. Completeness: There are no intentional cut-offs in the inventory no matter how small their contribution to all the EF impact categories is. Eventual cut-offs are in compliance with the Guide for EF compliant data sets (JRC 2020), i.e. only if below the 3% cut-off rule. Water use: water use is modelled at country level using separate flows for water withdrawal, water release and water evaporation. Handling multi-functional processes: the following PEF multi- functionality decision hierarchy is applied for resolving all multi- functionality problems: (1) subdivision or system expansion; (2) allocation based on a relevant underlying physical relationship (substitution may apply here); (3) allocation based on some other relationship. Direct land use change: GHG emissions from direct LUC allocated to good/service for 20 years after the LUC occurs, with IPCC default values. Carbon storage and delayed emissions: credits associated with temporary (carbon) storage or delayed emissions up to 300 years are not be considered. Emissions off-setting: are not included. Capital goods (including infrastructures) and their End of life: they are included. System boundaries: system boundaries include all processes linked to the product supply chain (e.g. maintenance). Time period: emissions and removals are modelled as if released or removed at the beginning of the assessment method. Fossil and biogenic carbon emissions and removals: removals and emissions are modelled as follows: All GHG emissions from fossil fuels (including peat and limestone) are modelled consistently with the most updated ILCD list of elementary flows. The non-fossil (biogenic) carbon flows are modelled consistently with the most updated ILCD list of elementary flows.

## Cut-off and completeness
There are no intentional cut-offs in the inventory no matter how small their contribution to all the EF impact categories is. Eventual cut-offs are in compliance with the Guide for EF compliant data sets (JRC 2020), i.e. only if below the 3% cut-off rule. The dataset dry mass and water balance has been checked to ensure the inventory is complete. Capital goods (e.g. infrastructure) and their end-of-life are included.

## Data selection and combination
These datasets include, in both their foreground and background data, links to EF3.0 compliant data.
The relevant background data on energy, transport, and End of Life are from the LCDN data node (http://lcdn.thinkstep.com/Node/).
All other background data in the supply of this product for which no EF3.0 process was available are from ecoinvent v3.7 database (www.ecoinvent.org) or other data sources.

## Data treatment and extrapolations
Several data sources have been used to model the inventory.

## Use advice
This data set is a supporting sub-data set and must be used exclusively as sub-data set of its corresponding level-1 partly disaggregated data set (see “General comment” field for exact name and UUID).

## Data sources
- Background Data for Representative products and organisations. EF 3.0 compliant (data stock)
- Cardellini, G., Valada, T., Cornillier, C., Vial, E., Dragoi, M., Goudiaby, V., Muys, B. (2018). EFO-LCI: A new life cycle inventory database of forestry operations in Europe. Environmental Management, 61(6), 1031-1047.
- Novais & Smyth (1999) Fósforo em solo e planta em condições tropicais. Viçosa: Universidade Federal de Viçosa, p. 399.
- Nemecek, T.; Schnetzer, J (2011). Methods of assessment of direct field emissions for LCIs of agricultural production systems, Data v3.0 (2011): http://www.ecoinvent.org/fileadmin/talkpages/pages/01-01-crop-production/01_crop_production_-_direct_field_emissions___natural_resources_v1.1.pdf.

## Intended applications
Implementation of regular Product Environmental Footprint (PEF) studies and Organisation Environmental Footprint (OEF) studies exclusively under the specified Product groups and sectors as defined in the Product Environmental Footprint Category Rules (PEFCR) and Organisation Environmental Footprint Sectorial Rules (OEFSR) listed in http://ec.europa.eu/environment/eussd/smgp/PEFCR_OEFSR.htm
