# olive stone granulate; technology mix; production mix, at plant

Dataset: ILCD process, Partly terminated system
Geography: ES
Reference year: 2019
Valid until: 2024
Classification: Materials production / Food and renewable raw materials
LCI method principle: Attributional
LCI method approaches: Allocation - market value
Completeness: All relevant flows quantified
Project: Provision of process-based 3.0 Environmental Footprint-compliant life cycle inventory datasets - Renewable materials - contract number 070201/2020/840085/SER/ENV.B.1
Generated by: Blonk Sustainability Tools
Owner: Blonk Sustainability Tools
Compliance: ILCD Data Network - Entry-level; Suggestions for updating the PEF method 2019; ISO 14040 Environmental Management – Life Cycle Assessment – Principles and Framework, 2006; ISO 14044:2006. Environmental Management – Life Cycle Assessment – Requirements and guidelines.; Environmental Footprint 3.1
Review: Dependent internal review by Hans Blonk, Emilia Moreno Ruiz; Independent review panel by Laura Batlle Bayer
Data quality: Overall quality: Good; Time representativeness: Very good; Geographical representativeness: Very good; Technological representativeness: Very good; Precision: Fair; Methodological appropriateness and consistency: Not applicable
Amounts: no units in this file; such an amount is in the reference unit of its flow, which a separate flow dataset defines
copyright: true
licenseType: Free of charge for some user types or use types
accessRestrictions: Free of charge for all final users implementing a regular Product Environmental Footprint (PEF) studies and Organisation Environmental Footprint (OEF) studies exclusively under the specified Product groups and sectors as defined in the Product Environmental Footprint Category Rules (PEFCR) and Organisation Environmental Footprint Sectorial Rules (OEFSR) listed in http://ec.europa.eu/environment/eussd/smgp/PEFCR_OEFSR.htm and in accordance with the terms and conditions of the EULA (available at https://ecoinvent.lca-data.com/) exclusively until 31st December 2024. Any use of this dataset or any derivative data not within the specific context of one of the PEF/OEF projects or after the end of 2024 is not permitted.

## General comment
Notice: this data set supersedes the EF3.0-compliant version (see link under "preceding data set version" below calculated with the EF3.0). The life cycle inventory is not changed from the original EF3.0 data set. The LCIA results are calculated based on the EF3.1 methods which provide updated characterisation factors in the following impact categories: Climate Change, Ecotoxicity freshwater, Photochemical Ozone Formation, Acidification, Human Toxicity non-cancer, and Human Toxicity cancer. The review report and the data quality ratings refer to the original results. The data set has been updated by the European Commission on the basis of the original EF3.0 data set delivered by the data provider.Olive stone granulates is the result of a complex treatment process of olive oil production residues. It has many uses from fertilizers, to fuel, to additives in cosmetics and health products.

## Technology and included processes
System boundaries include olive farming, olive oil extraction with pomace as a co-product and pomace oil extraction from pomace with olive stones granulate as a co-product. For the olive oil extraction, 2 phase centrifugation is used. On the other hand, solvent extraction is used in the pomace oil mill. Economical allocation was used in the olive oil extraction and mass allocation was used in the pomace oil extraction.

## Parameters
- kg_0: 0.0251533
  Mass in kg, for hexane; Freight train, diesel traction; EU+EFTA+UK
- km_0: 97.9096
  Distance in km, for hexane; Freight train, diesel traction; EU+EFTA+UK
- kg_km_0: 2.46275; = kg_0*km_0
  Transport amount in km*km, for hexane; Freight train, diesel traction; EU+EFTA+UK
- kg_1: 0.0251533
  Mass in kg, for hexane; Freight train, electricity traction; EU+EFTA+UK
- km_1: 33.3049
  Distance in km, for hexane; Freight train, electricity traction; EU+EFTA+UK
- kg_km_1: 0.837728; = kg_1*km_1
  Transport amount in km*km, for hexane; Freight train, electricity traction; EU+EFTA+UK
- kg_2: 0.0251533
  Mass in kg, for hexane; Freight train, average; EU+EFTA+UK
- km_2: 0.785511
  Distance in km, for hexane; Freight train, average; EU+EFTA+UK
- kg_km_2: 0.0197582; = kg_2*km_2
  Transport amount in km*km, for hexane; Freight train, average; EU+EFTA+UK
- kg_3: 0.0251533
  Mass in kg, for hexane; Barge; EU+EFTA+UK
- km_3: 32.0344
  Distance in km, for hexane; Barge; EU+EFTA+UK
- kg_km_3: 0.805772; = kg_3*km_3
  Transport amount in km*km, for hexane; Barge; EU+EFTA+UK
- kg_4: 0.0251533
  Mass in kg, for hexane; Barge; ROW w/o EU+EFTA
- km_4: 64.8656
  Distance in km, for hexane; Barge; ROW w/o EU+EFTA
- kg_km_4: 1.63159; = kg_4*km_4
  Transport amount in km*km, for hexane; Barge; ROW w/o EU+EFTA
- kg_5: 0.0251533
  Mass in kg, for hexane; Articulated lorry transport, Total weight <7.5 t, mix Euro 0-5; EU+EFTA+UK
- km_5: 5.13363
  Distance in km, for hexane; Articulated lorry transport, Total weight <7.5 t, mix Euro 0-5; EU+EFTA+UK
- kg_km_5: 0.129128; = kg_5*km_5
  Transport amount in km*km, for hexane; Articulated lorry transport, Total weight <7.5 t, mix Euro 0-5; EU+EFTA+UK
- kg_6: 0.0251533
  Mass in kg, for hexane; Articulated lorry transport, Euro 4, Total weight >32 t; EU+EFTA+UK
- km_6: 46.7411
  Distance in km, for hexane; Articulated lorry transport, Euro 4, Total weight >32 t; EU+EFTA+UK
- kg_km_6: 1.1757; = kg_6*km_6
  Transport amount in km*km, for hexane; Articulated lorry transport, Euro 4, Total weight >32 t; EU+EFTA+UK
- kg_7: 0.0251533
  Mass in kg, for hexane; Articulated lorry transport, Total weight >32 t, mix Euro 0-5; ROW w/o EU+EFTA
- km_7: 123.359
  Distance in km, for hexane; Articulated lorry transport, Total weight >32 t, mix Euro 0-5; ROW w/o EU+EFTA
- kg_km_7: 3.10289; = kg_7*km_7
  Transport amount in km*km, for hexane; Articulated lorry transport, Total weight >32 t, mix Euro 0-5; ROW w/o EU+EFTA

## Reference product
- olive stone granulate, virgin // olive stone granulate // es: 1

## Inputs
- Transport of hexane by Freight train, diesel traction - EU+EFTA+UK: 2.46275; = kg_km_0
- Transport of hexane by Freight train, electricity traction - EU+EFTA+UK: 0.837728; = kg_km_1
- Transport of hexane by Freight train, average - EU+EFTA+UK: 0.0197582; = kg_km_2
- Transport of hexane by Barge - EU+EFTA+UK: 0.805772; = kg_km_3
- Transport of hexane by Barge - ROW w/o EU+EFTA: 1.63159; = kg_km_4
- Transport of hexane by Articulated lorry transport, Total weight <7.5 t, mix Euro 0-5 - EU+EFTA+UK: 0.129128; = kg_km_5
- Transport of hexane by Articulated lorry transport, Euro 4, Total weight >32 t - EU+EFTA+UK: 1.1757; = kg_km_6
- Transport of hexane by Articulated lorry transport, Total weight >32 t, mix Euro 0-5 - ROW w/o EU+EFTA: 3.10289; = kg_km_7
- Electricity from Electricity grid mix 1kV-60kV - ES: 9.1728
- olive stone granulate, virgin // olive stone granulate // es, blackbox: 1
- olive stone granulate, virgin // olive stone granulate // es, elementary: 1

## Impact indicators
- Eutrophication marine: 0.00833264
- Ecotoxicity, freshwater: 650.278
- Land use: 332.455
- Water use: 17.4771
- Resource use, minerals and metals: 2.12613e-6
- Resource use, fossils: 26.2823
- Climate change: 1.67718
- Ozone depletion: 4.63501e-8
- Human toxicity, cancer: 5.36341e-10
- Human toxicity, non-cancer: 4.7676e-8
- EF-particulate Matter: 1.52563e-7
- Ionising radiation, human health: 0.228755
- Photochemical ozone formation - human health: 0.00553841
- Acidification: 0.0115139
- Eutrophication, terrestrial: 0.0431293
- Eutrophication, freshwater: 0.00014275

## Deviations from the LCI method principle
The background data uses:
- the \xe2\x80\x9cRecycled content cut-off\xe2\x80\x9d approach to allocate end-of-life by-products and secondary materials. This allocation is explained in the description of the recycled content system model (http://www.ecoinvent.org/database/system-models-in-ecoinvent-3/cut-off-system-model/allocation-cut-off-by-classification.html).
OR
- EF compliant data

## Deviations from the LCI method approaches
Background data:
- the \xe2\x80\x9cRecycled content cut-off\xe2\x80\x9d approach to allocate end-of-life by-products and secondary materials. This allocation is explained in the description of the recycled content system model (http://www.ecoinvent.org/database/system-models-in-ecoinvent-3/cut-off-system-model/allocation-cut-off-by-classification.html). The ecoinvent database mostly relies on “Allocation – market values” apart for few exceptions particularly in the energy sector. ecoinvent energy data is replaced with EF3.0 core data as per the EF guidelines version 2.0.
OR
- EF compliant data

Economical allocation was used in the olive oil extraction and mass allocation was used in the pomace oil extraction.

## Modelling constants
All modelling constants follow the requirements listed in the Tender Specifications 070201/2020/SER/ENV.B1. Completeness: There are no intentional cut-offs in the inventory no matter how small their contribution to all the EF impact categories is. Eventual cut-offs are in compliance with the Guide for EF compliant data sets (JRC 2020), i.e. only if below the 3% cut-off rule. Water use: water use is modelled at country level using separate flows for water withdrawal, water release and water evaporation. Handling multi-functional processes: the following PEF multi- functionality decision hierarchy is applied for resolving all multi- functionality problems: (1) subdivision or system expansion; (2) allocation based on a relevant underlying physical relationship (substitution may apply here); (3) allocation based on some other relationship. Direct land use change: GHG emissions from direct LUC allocated to good/service for 20 years after the LUC occurs, with IPCC default values. Carbon storage and delayed emissions: credits associated with temporary (carbon) storage or delayed emissions up to 300 years are not be considered. Emissions off-setting: are not included. Capital goods (including infrastructures) and their End of life: they are included. System boundaries: system boundaries include all processes linked to the product supply chain (e.g. maintenance). Time period: emissions and removals are modelled as if released or removed at the beginning of the assessment method. Fossil and biogenic carbon emissions and removals: removals and emissions are modelled as follows: All GHG emissions from fossil fuels (including peat and limestone) are modelled consistently with the most updated ILCD list of elementary flows. The non-fossil (biogenic) carbon flows are modelled consistently with the most updated ILCD list of elementary flows.

## Cut-off and completeness
There are no intentional cut-offs in the inventory no matter how small their contribution to all the EF impact categories is. Eventual cut-offs are in compliance with the Guide for EF compliant data sets (JRC 2020), i.e. only if below the 3% cut-off rule. The dataset dry mass and water balance has been checked to ensure the inventory is complete. Capital goods (e.g. infrastructure) and their end-of-life are included.

## Data selection and combination
These datasets include, in both their foreground and background data, links to EF3.0 compliant data.
The relevant background data on energy, transport, and End of Life are from the LCDN data node (http://lcdn.thinkstep.com/Node/).
All other background data in the supply of this product for which no EF3.0 process was available are from ecoinvent v3.7 database (www.ecoinvent.org) or other data sources.

## Data treatment and extrapolations
Several data sources have been used to model the inventory.

## Review details
Internal reviews have been asked to review the plausibility of the unit process, LCIA scores, and DQRs. Internal reviewers have also been asked to review the data for EF compliancy. The consortium is therefore responsible for aspects such as compliancy with the ILCD format, including validation in Look@LCI, and nomenclature.
Internal reviwers have been asked to judge based on the process name, that the unit process models in a complete and representative way the process in the requested location. The review encompassed the plausability of:
- exchanges with nature (elementary flows) as well as exchanges such as product and waste flows.
- meta information (general comment, technology comment, system boundaries, allocation, cut-off rules, etc.). Reviewers were asked to judge if the provided information is enough to understand the content of the process.
- LCIA scores
- DQRs including precision, technology, time and geography. As well as the overall DQR.
External reviewers have been asked to provide their expertise in the field of interest. External reviewers have been asked to review the unit process, including eventual methodological choices, the LCIA scores (provided with contribution scores as well), and DQRs. External reviewers have been provided all the information in a tool developed by the consortium for the purpose of this project.
External reviewers have been asked to judge based on the process name, that the unit process models in a complete and representative way the process in the requested location. The review encompassed:
- Plausability and completeness of exchanges with nature (elementary flows) as well as exchanges such as product and waste flows.
- Review of meta information (general comment, technology comment, system boundaries, allocation, cut-off rules, etc.). Reviewers were asked to judge if the provided information is enough to understand the content of the process.
- Review of properties (biogenic carbon and water content).
- Review of allocation keys.
- Plausability of LCIA scores calculated by the consortium.
- Plausability of DQRs including precision, technology, time and geography. As well as the overall DQR.

## Data sources
- Background Data for Representative products and organisations. EF 3.0 compliant (data stock)
- Federación Andaluza de Empresas Cooperativas Agrarias (FAECA)., (2010). Manual de ahorro y eficiencia energética del sector almazaras.
- Centro de Actividades Regionales para la Producción Limpia (CAR/PL)., (2000). Prevención de la contaminación en la producción de aceite de oliva.
- Technical Secretariat of the olive oil PEF pilot., (2016). PRODUCT ENVIRONMENTAL FOOTPRINT CATEGORY RULES FOR OLIVE OIL - 3RD DRAFT.
- IFA., (2019). IFAstat. Fertilizer Consumption Statistics.
- Vellinga T., Blonk H., Marinussen M., Zeist WJ VanBoer IJM De ., Starmans D., (2013). Methodology used in feedprint: a tool quantifying greenhouse gas emissions of feed production and utilization (Issue March). http://www.wageningenur.nl/nl/show/Feedprint.htm
- Marinussen M., Kernebeek H ., van Broekema R., Groen E., Kool A., van Zeist WJ., Dolman M., Blonk, H., (2012). LCI data for the calculation tool Feedprint for greenhouse gas emissions of feed production and utilization: Cultivation oil seeds and oil fruits. Blonk Consultants and WUR Livestock Research
- Blonk Consultants., (2019). Agrifootprint database v5.0
- Blonk Consultants. (2018). The Direct Land Use Change Assessment Tool v.2018
- IPCC., (2006). IPCC Guidelines for National Greenhouse Gas Inventories. http://www.ipcc-nggip.iges.or.jp/public/2006gl/index.html
- Nemecek T., Schnetzer J., (2012). Methods of assessment of direct field emissions for LCIs of agricultural production systems.
- PRé consultants, Radboud University Nijmegen, Leiden University, & RIVM. (2013). ReCiPe 1.08: Characterisation factors spreadsheet. http://www.lcia-recipe.net/characterisation-and-normalisation-factors
- European Environment Agency., (2013). EMEP/EEA Air Pollutant Emission Inventory Guidebook 2013. 12. http://www.eea.europa.eu/publications/emep-eea-guidebook-2013
- Mekonnen M., Hoekstra A. (2010). The green, blue and grey water footprint of crops and derived crop products - Volume 1: Main Report volume 1.(41)

## Intended applications
Implementation of regular Product Environmental Footprint (PEF) studies and Organisation Environmental Footprint (OEF) studies exclusively under the specified Product groups and sectors as defined in the Product Environmental Footprint Category Rules (PEFCR) and Organisation Environmental Footprint Sectorial Rules (OEFSR) listed in http://ec.europa.eu/environment/eussd/smgp/PEFCR_OEFSR.htm
