# Polyethylene (PE) foam, bio-based; foam extrusion; production mix, at plant; bio-based

Dataset: ILCD process, Partly terminated system
Geography: GLO
Reference year: 2016
Valid until: 2024
Classification: Materials production / Plastics
LCI method principle: Attributional
LCI method approaches: Allocation - market value
Completeness: All relevant flows quantified
Project: Provision of process-based 3.0 Environmental Footprint-compliant life cycle inventory datasets - Apparel 2 - contract number 070201/2020/840292/SER/ENV.B.1
Generated by: ecoinvent
Owner: PRé Sustainability B.V.
Compliance: ILCD Data Network - Entry-level; Suggestions for updating the PEF method 2019; ISO 14040 Environmental Management – Life Cycle Assessment – Principles and Framework, 2006; ISO 14044:2006. Environmental Management – Life Cycle Assessment – Requirements and guidelines.; Environmental Footprint 3.1
Review: Dependent internal review by Lucia Valsasina, Avraam Symeonidis; Independent review panel by Philippa Notten
Data quality: Overall quality: Good; Time representativeness: Good; Geographical representativeness: Very good; Technological representativeness: Very good; Precision: Good; Methodological appropriateness and consistency: Not applicable
Amounts: no units in this file; such an amount is in the reference unit of its flow, which a separate flow dataset defines
copyright: true
licenseType: Free of charge for some user types or use types
accessRestrictions: Free of charge for all final users implementing a regular Product Environmental Footprint (PEF) studies and Organisation Environmental Footprint (OEF) studies exclusively under the specified Product groups and sectors as defined in the Product Environmental Footprint Category Rules (PEFCR) and Organisation Environmental Footprint Sectorial Rules (OEFSR) listed in http://ec.europa.eu/environment/eussd/smgp/PEFCR_OEFSR.htm and in accordance with the terms and conditions of the EULA (available at https://ecoinvent.lca-data.com/) exclusively until 31st December 2024. Any use of this dataset or any derivative data not within the specific context of one of the PEF/OEF projects or after the end of 2024 is not permitted.

## General comment
Notice: this data set supersedes the EF3.0-compliant version (see link under "preceding data set version" below calculated with the EF3.0). The life cycle inventory is not changed from the original EF3.0 data set. The LCIA results are calculated based on the EF3.1 methods which provide updated characterisation factors in the following impact categories: Climate Change, Ecotoxicity freshwater, Photochemical Ozone Formation, Acidification, Human Toxicity non-cancer, and Human Toxicity cancer. The review report and the data quality ratings refer to the original results. The data set has been updated by the European Commission on the basis of the original EF3.0 data set delivered by the data provider.The dataset models the production of 1 kg of polyethylene (PE) foam, biobased. A typical formulation of PE foam includes the use of low-density PE (LDPE) resin. LDPE seems to be the best choice for foam production because of its low density, high elasticity, water resistance, low cost and higher extensional viscosities needed for bubble stabilization during the foam expansion process. The density of the foam can range 16 kg/m3 to 160 kg/m3. It is used for the production of protective packaging, sports and leisure, construction, surface protection, automotive, sound absorption, medical, marine, and furniture wrapping applications.
References:
Spalding, Mark A. Chatterjee, Ananda M., (2018). Handbook of Industrial Polyethylene and Technology - Definitive Guide to Manufacturing, Properties, Processing, Applications and Markets - 20. Polyethylene Foam Extrus

## Technology and included processes
Polyethylene (PE) foam biogenic is produced from a direct foam extrusion process which is cross-linked. A typical formulation includes the use of biobased low-density PE (LDPE) resin, nucleating agent, permeation modifier, and a blowing agent to expand the polymer matrix. Biobased PE foam is manufactured as with conventional petrochemical process in terms of the extrusion process (temperature, pressure, polymer concentration, blowing agent, etc.). The only significant difference lies in the feedstock or the process route. The feedstock for the biogenic PE could come from sugar (sugar beets, sugar crane, molasse, etc), starch (potato, corn, wheat, etc), vegetable oil or second-generation feedstock like lignocellulosic biomass (agricultural wastes, wood, and grasses).
The process is performed in a batch reactor in order to produce moulded, cross-linked foam. In this method, preformed polyethylene boards containing cross-linking agents are placed in a mould and exposed to the blowing agent, azodicarbonamide, at ca. 38 MPa and 180 °C. After cooling and careful pressure reduction, the blowing agent remains dissolved in the melt. When heated to 100 – 130 °C, the partially cross-linked board foams to yield a foamed plastic. Its cells are very fine (0.1 mm), and its density is 24 – 70 kg/m3. The gel is removed from the mould rapidly while it is still hot and somewhat larger cells result. Depending on the application the foam will be used for, a number of additives are also being added to the formulation to control its properties, density and cell-size

References:
Wagemann, K. and Tippkötter, N. eds., 2019. Biorefineries. Springer.
Wiley-VCH. (2016). Ullmann's Polymers and Plastics - Products and Processes, 4 Volume Set. John Wiley & Sons

## Parameters
- kg_0: 0.15
  Mass in kg, for stearic acid; Transoceanic ship, containers; GLO
- km_0: 599
  Distance in km, for stearic acid; Transoceanic ship, containers; GLO
- kg_km_0: 89.85; = kg_0*km_0
  Transport amount in km*km, for stearic acid; Transoceanic ship, containers; GLO
- kg_1: 0.15
  Mass in kg, for stearic acid; Freight train, diesel traction; EU+EFTA+UK
- km_1: 229.272
  Distance in km, for stearic acid; Freight train, diesel traction; EU+EFTA+UK
- kg_km_1: 34.3908; = kg_1*km_1
  Transport amount in km*km, for stearic acid; Freight train, diesel traction; EU+EFTA+UK
- kg_2: 0.15
  Mass in kg, for stearic acid; Freight train, electricity traction; EU+EFTA+UK
- km_2: 77.9889
  Distance in km, for stearic acid; Freight train, electricity traction; EU+EFTA+UK
- kg_km_2: 11.6983; = kg_2*km_2
  Transport amount in km*km, for stearic acid; Freight train, electricity traction; EU+EFTA+UK
- kg_3: 0.15
  Mass in kg, for stearic acid; Freight train, average; EU+EFTA+UK
- km_3: 1.8394
  Distance in km, for stearic acid; Freight train, average; EU+EFTA+UK
- kg_km_3: 0.275911; = kg_3*km_3
  Transport amount in km*km, for stearic acid; Freight train, average; EU+EFTA+UK
- kg_4: 0.15
  Mass in kg, for stearic acid; Barge; EU+EFTA+UK
- km_4: 8.08691
  Distance in km, for stearic acid; Barge; EU+EFTA+UK
- kg_km_4: 1.21304; = kg_4*km_4
  Transport amount in km*km, for stearic acid; Barge; EU+EFTA+UK
- kg_5: 0.15
  Mass in kg, for stearic acid; Barge; ROW w/o EU+EFTA
- km_5: 16.5131
  Distance in km, for stearic acid; Barge; ROW w/o EU+EFTA
- kg_km_5: 2.47696; = kg_5*km_5
  Transport amount in km*km, for stearic acid; Barge; ROW w/o EU+EFTA
- kg_6: 0.15
  Mass in kg, for stearic acid; Articulated lorry transport, Euro 4, Total weight >32 t; EU+EFTA+UK
- km_6: 57.3754
  Distance in km, for stearic acid; Articulated lorry transport, Euro 4, Total weight >32 t; EU+EFTA+UK
- kg_km_6: 8.60631; = kg_6*km_6
  Transport amount in km*km, for stearic acid; Articulated lorry transport, Euro 4, Total weight >32 t; EU+EFTA+UK
- kg_7: 0.15
  Mass in kg, for stearic acid; Articulated lorry transport, Total weight >32 t, mix Euro 0-5; ROW w/o EU+EFTA
- km_7: 151.425
  Distance in km, for stearic acid; Articulated lorry transport, Total weight >32 t, mix Euro 0-5; ROW w/o EU+EFTA
- kg_km_7: 22.7137; = kg_7*km_7
  Transport amount in km*km, for stearic acid; Articulated lorry transport, Total weight >32 t, mix Euro 0-5; ROW w/o EU+EFTA
- kg_8: 1.00251
  Mass in kg, for low density polyethylene, bio-based, mix // low density polyethylene (ldpe) production, bio-based, mix // glo; Articulated lorry transport, Euro 4, Total weight >32 t; EU+EFTA+UK
- km_8: 997.5
  Distance in km, for low density polyethylene, bio-based, mix // low density polyethylene (ldpe) production, bio-based, mix // glo; Articulated lorry transport, Euro 4, Total weight >32 t; EU+EFTA+UK
- kg_km_8: 1000; = kg_8*km_8
  Transport amount in km*km, for low density polyethylene, bio-based, mix // low density polyethylene (ldpe) production, bio-based, mix // glo; Articulated lorry transport, Euro 4, Total weight >32 t; EU+EFTA+UK
- kg_9: 0.0501253
  Mass in kg, for azodicarbonamide // azodicarbonamide production // eu+efta+uk; Articulated lorry transport, Euro 4, Total weight >32 t; EU+EFTA+UK
- km_9: 999.495
  Distance in km, for azodicarbonamide // azodicarbonamide production // eu+efta+uk; Articulated lorry transport, Euro 4, Total weight >32 t; EU+EFTA+UK
- kg_km_9: 50.1; = kg_9*km_9
  Transport amount in km*km, for azodicarbonamide // azodicarbonamide production // eu+efta+uk; Articulated lorry transport, Euro 4, Total weight >32 t; EU+EFTA+UK
- kg_10: 0.04
  Mass in kg, for zinc oxide // zinc oxide production // eu+efta+uk; Articulated lorry transport, Euro 4, Total weight >32 t; EU+EFTA+UK
- km_10: 10000
  Distance in km, for zinc oxide // zinc oxide production // eu+efta+uk; Articulated lorry transport, Euro 4, Total weight >32 t; EU+EFTA+UK
- kg_km_10: 400; = kg_10*km_10
  Transport amount in km*km, for zinc oxide // zinc oxide production // eu+efta+uk; Articulated lorry transport, Euro 4, Total weight >32 t; EU+EFTA+UK
- kg_11: 1.00251
  Mass in kg, for low density polyethylene, bio-based, mix // low density polyethylene (ldpe) production, bio-based, mix // glo; Transoceanic ship, containers; GLO
- km_11: 17955
  Distance in km, for low density polyethylene, bio-based, mix // low density polyethylene (ldpe) production, bio-based, mix // glo; Transoceanic ship, containers; GLO
- kg_km_11: 18000; = kg_11*km_11
  Transport amount in km*km, for low density polyethylene, bio-based, mix // low density polyethylene (ldpe) production, bio-based, mix // glo; Transoceanic ship, containers; GLO
- kg_12: 0.0501253
  Mass in kg, for azodicarbonamide // azodicarbonamide production // eu+efta+uk; Transoceanic ship, containers; GLO
- km_12: 17994.9
  Distance in km, for azodicarbonamide // azodicarbonamide production // eu+efta+uk; Transoceanic ship, containers; GLO
- kg_km_12: 902; = kg_12*km_12
  Transport amount in km*km, for azodicarbonamide // azodicarbonamide production // eu+efta+uk; Transoceanic ship, containers; GLO
- kg_13: 0.04
  Mass in kg, for zinc oxide // zinc oxide production // eu+efta+uk; Transoceanic ship, containers; GLO
- km_13: 180000
  Distance in km, for zinc oxide // zinc oxide production // eu+efta+uk; Transoceanic ship, containers; GLO
- kg_km_13: 7200; = kg_13*km_13
  Transport amount in km*km, for zinc oxide // zinc oxide production // eu+efta+uk; Transoceanic ship, containers; GLO

## Reference product
- polyethylene (pe) foam, bio-based // polyethylene (pe) foam production, bio-based // glo: 1

## Inputs
- Electricity from Electricity grid mix 1kV-60kV - AU: 0.0137
- Electricity from Electricity grid mix 1kV-60kV - EU+EFTA+UK: 0.2016
- Electricity from Electricity grid mix 1kV-60kV - NZ: 0.0026
- Electricity from Electricity grid mix 1kV-60kV - RAF: 0.0441
- Electricity from Electricity grid mix 1kV-60kV - RNA: 0.295
- Electricity from Electricity grid mix 1kV-60kV - RSA: 0.1001
- Electricity from Electricity grid mix 1kV-60kV - RU: 0.059
- Transport of stearic acid by Transoceanic ship, containers - GLO: 89.85; = kg_km_0
- Transport of stearic acid by Freight train, diesel traction - EU+EFTA+UK: 34.3908; = kg_km_1
- Transport of stearic acid by Freight train, electricity traction - EU+EFTA+UK: 11.6983; = kg_km_2
- Transport of stearic acid by Freight train, average - EU+EFTA+UK: 0.275911; = kg_km_3
- Transport of stearic acid by Barge - EU+EFTA+UK: 1.21304; = kg_km_4
- Transport of stearic acid by Barge - ROW w/o EU+EFTA: 2.47696; = kg_km_5
- Transport of stearic acid by Articulated lorry transport, Euro 4, Total weight >32 t - EU+EFTA+UK: 8.60631; = kg_km_6
- Transport of stearic acid by Articulated lorry transport, Total weight >32 t, mix Euro 0-5 - ROW w/o EU+EFTA: 22.7137; = kg_km_7
- Thermal energy (MJ) from Thermal energy from natural gas - ROW: 1.89
- Transport of low density polyethylene, bio-based, mix // low density polyethylene (ldpe) production, bio-based, mix // glo by Articulated lorry transport, Euro 4, Total weight >32 t - EU+EFTA+UK: 1000; = kg_km_8
- Transport of azodicarbonamide // azodicarbonamide production // eu+efta+uk by Articulated lorry transport, Euro 4, Total weight >32 t - EU+EFTA+UK: 50.1; = kg_km_9
- Transport of zinc oxide // zinc oxide production // eu+efta+uk by Articulated lorry transport, Euro 4, Total weight >32 t - EU+EFTA+UK: 400; = kg_km_10
- Transport of low density polyethylene, bio-based, mix // low density polyethylene (ldpe) production, bio-based, mix // glo by Transoceanic ship, containers - GLO: 18000; = kg_km_11
- Transport of azodicarbonamide // azodicarbonamide production // eu+efta+uk by Transoceanic ship, containers - GLO: 902; = kg_km_12
- Transport of zinc oxide // zinc oxide production // eu+efta+uk by Transoceanic ship, containers - GLO: 7200; = kg_km_13
- Electricity from Electricity grid mix 1kV-60kV - CN: 0.302295
- Electricity from Electricity grid mix 1kV-60kV - RAS w/o CN: 0.331205
- polyethylene (pe) foam, bio-based // polyethylene (pe) foam production, bio-based // glo, blackbox: 1
- polyethylene (pe) foam, bio-based // polyethylene (pe) foam production, bio-based // glo, elementary: 1

## Impact indicators
- Eutrophication marine: 0.0221465
- Ecotoxicity, freshwater: 294.364
- Land use: 174.076
- Water use: 21.2667
- Resource use, minerals and metals: 3.81736e-5
- Resource use, fossils: 48.3475
- Climate change: 4.65906
- Ozone depletion: 1.37089e-7
- Human toxicity, cancer: 4.32799e-9
- Human toxicity, non-cancer: 5.21043e-8
- EF-particulate Matter: 8.09465e-7
- Ionising radiation, human health: 0.13724
- Photochemical ozone formation - human health: 0.0261099
- Acidification: 0.0456338
- Eutrophication, terrestrial: 0.142215
- Eutrophication, freshwater: 0.000437553

## Deviations from the LCI method principle
The background data use the \xe2\x80\x9cRecycled content cut-off\xe2\x80\x9d approach to allocate end-of-life by-products and secondary materials. This allocation is explained in the description of the recycled content system model (http://www.ecoinvent.org/database/system-models-in-ecoinvent-3/cut-off-system-model/allocation-cut-off-by-classification.html).

## Deviations from the LCI method approaches
Background data:
- the \xe2\x80\x9cRecycled content cut-off\xe2\x80\x9d approach to allocate end-of-life by-products and secondary materials. This allocation is explained in the description of the recycled content system model (http://www.ecoinvent.org/database/system-models-in-ecoinvent-3/cut-off-system-model/allocation-cut-off-by-classification.html). The ecoinvent database mostly relies on “Allocation – market values” apart for few exceptions particularly in the energy sector. ecoinvent energy data is replaced with EF3.0 core data as per the EF guidelines version 2.0.
OR
- EF compliant data

## Modelling constants
All modelling constants follow the requirements listed in the Tender Specifications ENV.B.1/SER/2016/0038vl. Completeness: All known environmental flows are included. All known resource uses and emissions are listed in the inventory. Water use: water use is modelled at country level using separate flows for water withdrawal, water release and water evaporation. Cut-off: All known environmental flows are included. All known resource uses and emissions are listed in the inventory. Handling multi-functional processes: the following PEF multi- functionality decision hierarchy is applied for resolving all multi- functionality problems: (1) subdivision or system expansion; (2) allocation based on a relevant underlying physical relationship (substitution may apply here); (3) allocation based on some other relationship. Direct land use change: GHG emissions from direct LUC allocated to good/service for 20 years after the LUC occurs, with IPCC default values. Carbon storage and delayed emissions: credits associated with temporary (carbon) storage or delayed emissions up to 300 years are not be considered. Emissions off-setting: are not included. Capital goods (including infrastructures) and their End of life: they are included. System boundaries: system boundaries include all processes linked to the product supply chain (e.g. maintenance). Time period: emissions and removals are modelled as if released or removed at the beginning of the assessment method. Fossil and biogenic carbon emissions and removals: removals and emissions are modelled as follows: All GHG emissions from fossil fuels (including peat and limestone) are modelled consistently with the most updated ILCD list of elementary flows. The non-fossil (biogenic) carbon flows are modelled consistently with the most updated ILCD list of elementary flows.

## Cut-off and completeness
All known environmental flows are included. All known resource uses and emissions are listed in the inventory. The dataset dry mass balance has been checked to ensure the inventory is complete. Capital goods (e.g. infrastructure) and their end-of-life are included.

## Data selection and combination
These datasets include, in both their foreground and background data, links to EF3.0 compliant data.
The relevant background data on energy, transport, and End of Life are from the LCDN data node (http://lcdn.thinkstep.com/Node/).
All other background data in the supply of this product for which no EF3.0 process was available are from ecoinvent v3.7 database (www.ecoinvent.org) or other data sources.

## Data treatment and extrapolations
Several data sources have been used to model the inventory.

## Review details
Internal reviews have been asked to review the plausibility of the unit process, LCIA scores, and DQRs. Internal reviewers have also been asked to review the data for EF compliancy. The consortium is therefore responsible for aspects such as compliancy with the ILCD format, including validation in Look@LCI, and nomenclature.
Internal reviwers have been asked to judge based on the process name, that the unit process models in a complete and representative way the process in the requested location. The review encompassed the plausability of:
- exchanges with nature (elementary flows) as well as exchanges such as product and waste flows.
- meta information (general comment, technology comment, system boundaries, allocation, cut-off rules, etc.). Reviewers were asked to judge if the provided information is enough to understand the content of the process.
- LCIA scores
- DQRs including precision, technology, time and geography. As well as the overall DQR.
External reviewers have been asked to provide their expertise in the field of interest. External reviewers have been asked to review the unit process, including eventual methodological choices, the LCIA scores (provided with contribution scores as well), and DQRs. External reviewers have been provided all the information in a tool developed by the consortium for the purpose of this project.
External reviewers have been asked to judge based on the process name, that the unit process models in a complete and representative way the process in the requested location. The review encompassed:
- Plausability and completeness of exchanges with nature (elementary flows) as well as exchanges such as product and waste flows.
- Review of meta information (general comment, technology comment, system boundaries, allocation, cut-off rules, etc.). Reviewers were asked to judge if the provided information is enough to understand the content of the process.
- Review of properties (biogenic carbon and water content).
- Review of allocation keys.
- Plausability of LCIA scores calculated by the consortium.
- Plausability of DQRs including precision, technology, time and geography. As well as the overall DQR.

## Data sources
- Background Data for Representative products and organisations. EF 3.0 compliant (data stock)
- Laguna-Gutierrez, E., Saiz-Arroyo, C., Velasco, J.I. and Rodriguez-Perez, M.A., 2016. Low density polyethylenesilica nanocomposite foams. Relationship between chemical composition, particle dispersion, cellular struc
- Gendorf, 2020, Umwelterkärung, www.gendorf.de
- Trocellen, 2021. TR-EECell – Bio-based XL PE Available at: https://tr-eecell.trocellen.com/
- ecoinvent (2017-2020). azodicarbonamide production, GLO, 4decedaa-9cc7-468f-a01d-758628e8d55d, 03.00.008. ecoinvent (2017) Data on the Production of Chemicals created for the EU Product Environmental Footprint (PEF) pilot phase implementation, www.ecoinvent.org, ecoinvent Association, Zürich, Switzerland. Restricted use. Download from http://ecoinvent.lcadata.com/
- ecoinvent (2017-2020). zinc oxide production, GLO, 3a02fc65-8a9b-476e-b1b6-49cbced95117, 03.00.008. ecoinvent (2017) Data on the Production of Chemicals created for the EU Product Environmental Footprint (PEF) pilot phase implementation, www.ecoinvent.org, ecoinvent Association, Zürich, Switzerland. Restricted use. Download from http://ecoinvent.lcadata.com/

## Intended applications
Implementation of regular Product Environmental Footprint (PEF) studies and Organisation Environmental Footprint (OEF) studies exclusively under the specified Product groups and sectors as defined in the Product Environmental Footprint Category Rules (PEFCR) and Organisation Environmental Footprint Sectorial Rules (OEFSR) listed in http://ec.europa.eu/environment/eussd/smgp/PEFCR_OEFSR.htm
