# Rail transport of fresh food products - Diesel, average, gross weight 1,000t / 726t payload; diesel driven, fresh food, diesel cooling system; consumption mix, to consumer; average train, gross tonne weight 1,000t / 726t payload capacity

Dataset: ILCD process, Unit process, single operation
Geography: GLO
Reference year: 2020
Valid until: 2024
Classification: Transport services / Rail
LCI method principle: Attributional
Completeness: All relevant flows quantified
Share of supply or production covered: 95 %
Method details: GaBi Refinery Modelling Principles; GaBi Modelling Principles; GaBi Water Modelling Principles; GaBi Agriculture Model Documentation; GaBi Land Use Change Model Documentation; GaBi Energy Modelling Principles; Suggestions for updating the PEF method 2019; Guide for EF compliant data sets; GaBi Agrarian Modelling Principles
Project: Provision of product environmental footprint-compliant life cycle inventory datasets. Contract number N° 09.029901/2021/846457/SER/ENV.B.1
Generated by: Sphera Solutions GmbH
Owner: Sphera Solutions GmbH
Compliance: ILCD Data Network - Entry-level; Suggestions for updating the PEF method 2019; ISO 14040 Environmental Management – Life Cycle Assessment – Principles and Framework, 2006; ISO 14044:2006. Environmental Management – Life Cycle Assessment – Requirements and guidelines.; Environmental Footprint 3.1
Review: Independent internal review by Sphera Solutions GmbH, Dr. Michael Baumann, Sphera Solutions GmbH, Dr. Stefan Eckert
Data quality: Technological representativeness: Fair; Time representativeness: Good; Geographical representativeness: Good; Completeness: Not evaluated / unknown; Precision: Good; Methodological appropriateness and consistency: Not evaluated / unknown; Overall quality: Good
Amounts: no units in this file; such an amount is in the reference unit of its flow, which a separate flow dataset defines
copyright: true
licenseType: Free of charge for some user types or use types
accessRestrictions: Datasets can only be used in accordance with the terms and conditions of this EULA exclusively until 31st December 2024 (PERMITTED USE).

## General comment
The data set covers all relevant process steps / technologies over the rail transport cargo system with a good overall data quality. The inventory is based on industry and literature data.

## Geography
represents a global and unified applied technology that can be adjusted to a region by setting the emission standard parameter (em_standard) to the one applicable in the considered region. According to EcoTransit World (see data sources) the following attribution of emission standard to specific regions can be done:
1 = UIC 1 -> developing countries, international standard for old locomotives manufactured before 2002
2 = UIC 2 -> Europe and Global default, international standard for locomotives manufactured 2003-2008
3 = Stage IIIb -> Europe, for locomotives manufactured after 2012
4 = Tier 2 -> North America, for locomotives manufactured 2005 - 2011
5 = Tier 4 -> North America, for locomotives manufactured after 2015
6 = DB -> Germany, for mix of locomotives running in 2016

## Time period
annual average

## Technology and included processes
Rail transport via diesel cargo train. Variable parameters are: distance, ppm_sulfur, share_CO2_bio, utilisation, number of cooled containers and em_standard. The utilisation factor depends on the type of cargo. It also includes the average share of empty runnings. Train production, end-of-life treatment of the train and upstream processes for fuel production (e.g. exploration and production of fuels, refinery, transport) are not included in the data set.

## Technical purpose
Standard transport of bulk or volume goods with a payload of up to 726 tonnes for rail transport.

## Model description
The open parameters in this processes enable the user to adjust the model to their individual circumstances. The description of the parameters is given alongside the parameters in the comments section.

For mathematical model details concerning the implementation of the CCF formula see:
http://www.gabi-software.com/fileadmin/GaBi_Databases/PEF_CFF_model_description.pdf

## Parameters
- average_v: 90
  [km/h] average velocity [default = 90 km/h]
- cool_h: 1.2
  [l/h] diesel consumption für cooling
- Cool_Leakage_dr: 1.22098e-6; = ((Cool_Leakage_ra * number_TEU_cool) / km_year) * distance / (payload * utilisation * 1000)
  [kg] Calculated leakage rate per km driven per year
- Cool_Leakage_ra: 0.76
  [kg/year] Coolant leakage
- diesel_cool: 0.776533; = (number_TEU_cool * cool_h * 0.832) / average_v
  [kg/km] diesel consumption for cooling
- distance: 1000; = 1000
  [km] distance start - end, default = 100 km
- em_standard: 2; min 1; max 6
  [-] Emission standard, default = 2 (1=UIC 1; 2=UIC 2; 3=Stage IIIb; 4=Tier 2; 5=Tier 4; 6=DB)
- gr_tonne_weight: 1000; = 1000
  [t] gross tonne weight of train, default = 1000 t
- km_year: 150000; = service_life / lifetime_train
  [km/year] Calculated km per year
- Lifetime_train: 30
  [Years] Assumed lifetime of train (assumed 30 years)
- number_TEU_cool: 70
  [-] number of cooled TEU containers [default = 70]
- payload: 726.19; = 61 / (61 + 23) * gr_tonne_weight
  [t] average wagon: empty weight: 23 t, payload capacity: 61 t
- ppm_sulfur: 10; max 2000
  [ppm] sulphur content in diesel, default Europe since 2003 = 10 ppm
- rel_nt_gt: 0.514768; = utilisation / (utilisation + 23 / 61)
  [net tonne/gross tonne]
- service_life: 4.5e6
  [km] total service life of the lorry, default 4.500.000 km, used for allocation of capital goods
- share_CO2_bio: 0.05; max 1
  [-] share of biogenic C in fuel
- spec_CH4: 0.000718727; = 0.086 * spec_diesel
  [gCH4/kg] CH4 emission
- spec_CO: 0.0994517; = if(em_standard=1;14.3*spec_diesel;if(em_standard=6;5.8*spec_diesel;if(em_standard=3;16.67*spec_diesel;if(em_standard=4;9.3*spec_diesel;if(em_standard=5;9.3*spec_diesel;11.9*spec_diesel)))))
  [gCO/kg] CO emission
- spec_CO2_bio: 0.00132672; = share_CO2_bio * 3.175 * spec_diesel
  [kgCO2/kg] CO2 emission, biogenic CO2 share of CO2 emission
- spec_CO2_fos: 0.0252077; = (1 - share_CO2_bio) * 3.175 * spec_diesel
  [kgCO2/kg] CO2 emission, fossil CO2 share of CO2 emission
- spec_diesel: 0.00835729; = (1/42.96)*3.6*(0.001)^2*(1/0.37)*(1/rel_nt_gt)*if(gr_tonne_weight<=2200;1200*gr_tonne_weight^-0.62*distance;1200*2200^-0.62*distance)+(diesel_cool*distance)/(payload*1000)
  [kgdiesel/kg] diesel consumption
- spec_N2O: 0.000359363; = 0.043 * spec_diesel
  [gN2O/kg] N2O emission
- spec_NMVOC: 0.0317577; = if(em_standard=1;3.8*spec_diesel;if(em_standard=6;2.6*spec_diesel;if(em_standard=3;1.0*spec_diesel;if(em_standard=4;2.2*spec_diesel;if(em_standard=5;0.5*spec_diesel;3.8*spec_diesel)))))
  [gNMVOC/kg] NMVOC emission (without benzene)
- spec_NO: 0.377749; = if(em_standard=1;57.1*spec_diesel;if(em_standard=6;42*spec_diesel;if(em_standard=3;18.1*spec_diesel;if(em_standard=4;30.2*spec_diesel;if(em_standard=5;4.8*spec_diesel;45.2*spec_diesel)))))
  [gNO/kg] NOx emission
- spec_part: 0.00994517; = if(em_standard=1;1.56*spec_diesel;if(em_standard=6;0.96*spec_diesel;if(em_standard=3;0.12*spec_diesel;if(em_standard=4;0.48*spec_diesel;if(em_standard=5;0.11*spec_diesel;1.19*spec_diesel)))))
  [gparticle/kg] particle emission
- spec_SO2: 1.67146e-7; = (ppm_sulfur / 1000000) * 2 * spec_diesel
  [kgSO2/kg] SO2 emission
- utilisation: 0.4; max 1
  [-] utilisation by mass, default average goods = 0.40 (bulk=0.56, volume goods=0.25)

## Reference product
- Transporting capacity: 1000; estimated

## Inputs
- Diesel: 0.00835729; = spec_diesel; estimated
- Cargotrain (piece): 1.4e-9; estimated
  5000 locomotives 30a 117E9 tkm
- Railway: 5e-6; estimated
  117E9tkm transport, 73000km railway track, allocation of 93% to transport via weight transported, 100a

## Outputs
- methane (fossil) [Emissions to air, unspecified]: 7.18727e-7; = 0.001 * spec_CH4; estimated
- carbon dioxide (biogenic) [Emissions to air, unspecified]: 0.00132672; = spec_CO2_bio; calculated
- nitrous oxide [Emissions to air, unspecified]: 3.59363e-7; = 0.001 * spec_N2O; estimated
- sulfur dioxide [Emissions to air, unspecified]: 1.67146e-7; = spec_SO2; estimated
- particles (PM2.5) [Emissions to air, unspecified]: 9.94517e-6; = 0.001 * spec_part; estimated
- HFC-125 [Emissions to air, unspecified]: 5.37233e-7; = 0.44 * Cool_Leakage_dr; calculated
- 1,1,1-trifluoroethane [Emissions to air, unspecified]: 6.34911e-7; = 0.52 * Cool_Leakage_dr; calculated
- non-methane volatile organic compounds [Emissions to air, unspecified]: 3.17577e-5; = 0.001 * spec_NMVOC; estimated
- carbon monoxide [Emissions to air, unspecified]: 9.94517e-5; = 0.001 * spec_CO; estimated
- carbon dioxide (fossil) [Emissions to air, unspecified]: 0.0252077; = spec_CO2_fos; calculated
- nitrogen oxides [Emissions to air, unspecified]: 0.000377749; = 0.001 * spec_NO; estimated
- HFC-134a [Emissions to air, unspecified]: 4.88393e-8; = 0.04 * Cool_Leakage_dr; calculated

## Impact indicators
- Acidification: 0.000279754
- Climate change: 0.0311
- Ecotoxicity, freshwater: 0.000276031
- Eutrophication marine: 0.000146945
- Eutrophication, terrestrial: 0.00160921
- Human toxicity, cancer: 5.72788e-16
- Human toxicity, non-cancer: 2.01629e-12
- EF-particulate Matter: 2.97763e-9
- Photochemical ozone formation - human health: 0.000414063
- Climate change-Fossil: 0.0310538
- Ecotoxicity, freshwater_inorganics: 2.27078e-6
- Ecotoxicity, freshwater_organics: 0.00027376
- Human toxicity, cancer_organics: 5.72788e-16
- Human toxicity, non-cancer_inorganics: 1.07358e-10
- Human toxicity, non-cancer_organics: 2.01629e-12
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
## Modelling constants
Direct land use change: GHG emissions from direct LUC allocated to good/service for 20 years after the LUC occurs.
Carbon storage and delayed emissions: credits associated with temporary (carbon) storage or delayed emissions are not considered in the calculation of the EF for the default impact categories.
Emissions off-setting: not included
Fossil and biogenic carbon emissions and removals: removals and emissions are modelled as follows: All GHG emissions from fossil fuels (including peat and limestone) are modelled consistently with the ILCD list of elementary flows. In the case that the emissions refer to the molecules CO2 and CH4, they are modelled as ‘carbon dioxide (fossil)’ and ‘methane (fossil)’. Biogenic uptake and emissions are modelled separately. For land use change, all carbon emissions and uptakes are inventoried separately for each of the elementary flows. Soil carbon accumulation (uptake) via improved agricultural management is excluded from the model.

## Cut-off and completeness
A cut-off rule based on mass or energy flow or the level of environmental significance of max. 3% is applied and confirmed by the reviewer. An active cut-off within the system has not been applied, no data gaps are known and all elementary flows of environmental effect are included in the inventory.

Capital goods (including infrastructures) and their end of life are included unless the exclusion is clearly documented and conform with the cut-off principles.

System boundaries include all known processes linked to the product supply chain.

## Data selection and combination
Data sources for the transport system are sufficiently consistent. LCI modelling is fully consistent.

## Data treatment and extrapolations
For details please see the document "GaBi Databases Modelling Principles"

## Data collection period
2010-2011

## Use advice
Notice: this data set supersedes the EF3.0-compliant version (see link under "preceding data set version" below calculated with the EF3.0). The life cycle inventory is not changed from the original EF3.0 data set. The LCIA results are calculated based on the EF3.1 methods which provide updated characterisation factors in the following impact categories: Climate Change, Ecotoxicity freshwater, Photochemical Ozone Formation, Acidification, Human Toxicity non-cancer, and Human Toxicity cancer. The review report and the data quality ratings refer to the original results. The data set has been updated by the European Commission on the basis of the original EF3.0 data set delivered by the data provider.

Life Cycle Inventory (LCI) datasets to be used for implementing regular Product Environmental Footprint (PEF) studies and Organisation Environmental Footprint (OEF) studies exclusively under the specified Product groups and sectors as defined in the Product Environmental Footprint Category Rules (PEFCR) and Organisation Environmental Footprint Sectorial Rules (OEFSR) listed in https://ec.europa.eu/environment/eussd/smgp/ef_transition.htm
The datasets are specifically designed for these methodological requirements (see above) and the related LCIA methods (listed below) recommended in EF.

## Review details
The dataset is compliant to "Zampori L., Pant R.: Suggestions for updating the Product Environmental Footprint (PEF) method, 2019 and Fazio S., Zampori L., De Schryver A. et al.: Guide for EF compliant data sets, Version 2.0, 2020.
In the PEF context the fields "Methodological appropriateness and consistency" and "completeness" are not evaluated by the review since their good quality is defined as mandatory.

## Other review details
Good overall quality (2,25) interpreted into "good quality" in the PEF quality validation scheme. The quality indicator for completeness was not requested to be quantified as a single DQI for all tenders. If a value “Not evaluated / unknown” completeness is given, this indicates that a single DQI was not explicitly requested but the completeness is still to be understood as very good.
The Data Quality Indicator Results are conservative expert judgements, confirmed or - if necessary - corrected by the reviewers, based on their methodological as well as process understanding and considering semi-quantitatively the contribution of the DQIs of the used EF energy and transport datasets and of EF-related DQIs provided and reviewed within the GaBi databases. The overall DQIs of the datasets take into account primarily the quality and representativeness of the foreground technology information and that of the key upstream processes. If datasets are e.g. energy and transport intensive - or gain credits from energy recovery - the DQIs of the used EF energy and transport datasets influence the overall DQI significantly and have stronger been taken into account, via expert judgement. Analogous applies for other key background datasets. For the DQIs of the mentioned GaBi secondary datasets, similar DQIs had already been assigned to those datasets and were considered by the reviewers via expert judgement when assigning of the overall DQIs. In case of doubt, lower (i.e. lower quality) DQIs were assigned.

## Data sources
- EcoTransIT World, Ecolog.Transport Information Tool for Worldwide Transports: Methodology and Data

## Intended applications
Life Cycle Inventory (LCI) datasets to be used in Product Environmental Footprint Category Rules (PEFCRs) and Organisation Environmental Footprint Sectoral Rules (OEFSRs) developed in the context of the Environmental Footprint transition phase launched by the Commission in 2018.
