# containerboard production, fluting medium, semichemical; technology mix; production mix, at plant; 1000 kg

Dataset: ILCD process, Partly terminated system
Geography: EU+EFTA+UK
Reference year: 2018
Valid until: 2024
Classification: Materials production / Paper and cardboards
LCI method principle: Attributional
LCI method approaches: Allocation - market value
Completeness: All relevant flows quantified
Project: Provision of process-based 3.0 Environmental Footprint-compliant life cycle inventory datasets - Renewable materials - contract number 070201/2020/840085/SER/ENV.B.1
Generated by: FEFCO
Owner: FEFCO
Compliance: ILCD Data Network - Entry-level; Suggestions for updating the PEF method 2019; ISO 14040 Environmental Management – Life Cycle Assessment – Principles and Framework, 2006; ISO 14044:2006. Environmental Management – Life Cycle Assessment – Requirements and guidelines.; Environmental Footprint 3.1
Review: Dependent internal review by Emilia Moreno Ruiz, Katarzyna Cenian; Independent review panel by Laura Batlle Bayer
Data quality: Overall quality: Very good; Time representativeness: Good; Geographical representativeness: Very good; Technological representativeness: Very good; Precision: Very good; Methodological appropriateness and consistency: Not applicable
Amounts: no units in this file; such an amount is in the reference unit of its flow, which a separate flow dataset defines
copyright: true
licenseType: Free of charge for some user types or use types
accessRestrictions: Free of charge for all final users implementing a regular Product Environmental Footprint (PEF) studies and Organisation Environmental Footprint (OEF) studies exclusively under the specified Product groups and sectors as defined in the Product Environmental Footprint Category Rules (PEFCR) and Organisation Environmental Footprint Sectorial Rules (OEFSR) listed in http://ec.europa.eu/environment/eussd/smgp/PEFCR_OEFSR.htm and in accordance with the terms and conditions of the EULA (available at https://ecoinvent.lca-data.com/) exclusively until 31st December 2024. Any use of this dataset or any derivative data not within the specific context of one of the PEF/OEF projects or after the end of 2024 is not permitted.

## General comment
Notice: this data set supersedes the EF3.0-compliant version (see link under "preceding data set version" below calculated with the EF3.0). The life cycle inventory is not changed from the original EF3.0 data set. The LCIA results are calculated based on the EF3.1 methods which provide updated characterisation factors in the following impact categories: Climate Change, Ecotoxicity freshwater, Photochemical Ozone Formation, Acidification, Human Toxicity non-cancer, and Human Toxicity cancer. The review report and the data quality ratings refer to the original results. The data set has been updated by the European Commission on the basis of the original EF3.0 data set delivered by the data provider.The activity describes the production of semichemical fluting medium.
Semichemical fluting medium is a grade of corrugated base paper, which forms the corrugated middle layer in the production of corrugated board, where it is covered between two outer layers of linerboard (e.g. kraftliner or testliner). Semichemical fluting is made from virgin material as opposed to “wellenstoff”, which is used interchangeably with semichemical fluting but is made from recycled material, i.e. uses recovered paper as raw material.
The process for the production of semichemical fluting starts with the reception of wood and wood chips at the mill gate.
The process ends with the production of semichemical fluting medium.

The data is based on the report “European Database for Corrugated Board Life Cycle Studies, 2018” issued by FEFCO (European Federation of Corrugated Board Manufacturers) and CCB (Cepi ContainerBoard). In the study, the data for Semi Chemical Fluting and Kraftliner represent about 85% of the total annual production of corrugated base papers from primary fibres in Europe. The data for Semi Chemical Fluting and Kraftliner also represent about 90% of the total consumption of these grades for corrugated board production in Europe. These paper grades are produced in large mills, located in Austria, Finland, France, Germany, Portugal, Poland, and Sweden. Their total production was 5,438,000 tonnes net saleable paper in 2017. The mills each have an annual production of 94,000-1,128,000 tonnes net saleable paper.
Reference: CCB & FEFCO. 2018. European Database for Corrugated Board Life Cycle Studies. Accessible online at < https://www.fefco.org/download/file/fid/2626 >
The dataset has been allocated based on the following products: fluting medium, semichemical // containerboard production, fluting medium, semichemical // EU+EFTA+UK with allocation factor of 0.9918, tall oil, crude with allocation factor of 0.0064, Turpentine with allocation factor of 0.0018.

## Technology and included processes
Processes include chipping, screening of chips, cooking of the chips to pulp by the semichemical cooking process, which is a slightly alkaline cooking process with sodium sulphite and sodium carbonate as active cooking chemicals with a pulp yield of around 80%. The pulp produced is defiberized in refiners, screened and washed before being sent to the paper mill. Semichemical fluting is a one ply product and therefore requires a paper machine with one head box and one wire.

Sold electricity is not reported as a sold product and the associated input and output data are not included in the inventory. The fuel consumption and emissions to air associated with the total heat production and the net electricity used on site were allocated to the paper production.

Apart from external fuel inputs, internal fuels such as bark, black liquor and sludge are generated during the process and supply process energy. Internal fuels are represented by the calculated emissions but do not have the corresponding fuel input from Technosphere, because they are supplied from within the system boundaries. The amounts of internal fuels used in the process are: Black liquor (4.85 GJ/t), Bark (1.6 GJ/t), Wood (0.04 GJ/t), Biogas (0.05GJ/t).
The following air emissions were reported in the study (FEFCO, 2018): Dust, CO2 (fossil and biogenic), CO, NOx, TRS, and SOx. The listed emissions include emissions from external and internal fuels at the production site.
For a more complete air emission profile, additional air emissions (beyond the ones listed above) were added for the combustion of the external and internal fuels using ecoinvent LCI datasets for combustion of different fuels as proxy. Proxies for the air emissions were calculated based on: Heavy fuel oil: "heat production, heavy fuel oil, at industrial furnace 1MW” Light fuel oil and diesel: "heat production, light fuel oil, at industrial furnace 1MW” Natural gas: "heat production, natural gas, at industrial furnace >100kW”, Peat: "heat production, lignite briquette, at stove 5-15kW” Biofuels, wood and bark: "heat production, wood chips from industry, at furnace 1000kW”, coal: “heat production, at hard coal industrial furnace 1-10MW, Europe without Switzerland”
Emissions of stemming from biogas were approximated with the combustion of natural gas, whereby CO2, CO and CH4 emissions stemming from biogas were modelled as non-fossil.
No proxy was available for the combustion of black liquor. Emissions from this internal energy generation process are therefore only reflected in the key emission factors provided by the industry

Amount of infrastructure taken from dataset “de Beaufort, A containerboard production, fluting medium, semichemical, RER, Undefined, ecoinvent database version 3.7.1.”

The following chemicals were excluded from the inventory: Alum, biocides, defoamer, magnesium oxide, sulphur, sulphur dioxide, sizing agents, and polymer and retention agents. The listed chemicals are not defined as mandatory in the PEFCR for intermediate paper products and have a total mass of below 1% of the paper weight. Further packaging materials (paper, board, and PE) were excluded.
The production of paper based fully or partly on paper for recycling takes place in integrated processes for almost all cases. The share of recycled pulp in non-integrated mills (so recycled pulp produced dried and transported to a paper mill for making recycled paper) is around 3%. In the INTERMEDIATE PAPER PRODUCT PEFCR (2018) it is set that: "The PEF profile shall be calculated and reported using A equal to 1.". This dataset is therefore modelled as such.

## Parameters
- kg_0: 12.2192
  Mass in kg, for ammonia, as 100% nh3 // ammonia, as 100% nh3 production // eu+efta+uk; Freight train, average; EU+EFTA+UK
- km_0: 240.26
  Distance in km, for ammonia, as 100% nh3 // ammonia, as 100% nh3 production // eu+efta+uk; Freight train, average; EU+EFTA+UK
- kg_km_0: 2935.79; = kg_0*km_0
  Transport amount in km*km, for ammonia, as 100% nh3 // ammonia, as 100% nh3 production // eu+efta+uk; Freight train, average; EU+EFTA+UK
- kg_1: 12.2192
  Mass in kg, for ammonia, as 100% nh3 // ammonia, as 100% nh3 production // eu+efta+uk; Barge; EU+EFTA+UK
- km_1: 270.292
  Distance in km, for ammonia, as 100% nh3 // ammonia, as 100% nh3 production // eu+efta+uk; Barge; EU+EFTA+UK
- kg_km_1: 3302.76; = kg_1*km_1
  Transport amount in km*km, for ammonia, as 100% nh3 // ammonia, as 100% nh3 production // eu+efta+uk; Barge; EU+EFTA+UK
- kg_2: 12.2192
  Mass in kg, for ammonia, as 100% nh3 // ammonia, as 100% nh3 production // eu+efta+uk; Articulated lorry transport, Euro 4, Total weight >32 t; EU+EFTA+UK
- km_2: 129.87
  Distance in km, for ammonia, as 100% nh3 // ammonia, as 100% nh3 production // eu+efta+uk; Articulated lorry transport, Euro 4, Total weight >32 t; EU+EFTA+UK
- kg_km_2: 1586.91; = kg_2*km_2
  Transport amount in km*km, for ammonia, as 100% nh3 // ammonia, as 100% nh3 production // eu+efta+uk; Articulated lorry transport, Euro 4, Total weight >32 t; EU+EFTA+UK
- kg_3: 142.939
  Mass in kg, for wood chips, hardwood // wood chips, hardwood // eu+efta+uk; Freight train, average; EU+EFTA+UK
- km_3: 240.082
  Distance in km, for wood chips, hardwood // wood chips, hardwood // eu+efta+uk; Freight train, average; EU+EFTA+UK
- kg_km_3: 34317; = kg_3*km_3
  Transport amount in km*km, for wood chips, hardwood // wood chips, hardwood // eu+efta+uk; Freight train, average; EU+EFTA+UK
- kg_4: 142.939
  Mass in kg, for wood chips, hardwood // wood chips, hardwood // eu+efta+uk; Barge; EU+EFTA+UK
- km_4: 269.918
  Distance in km, for wood chips, hardwood // wood chips, hardwood // eu+efta+uk; Barge; EU+EFTA+UK
- kg_km_4: 38581.8; = kg_4*km_4
  Transport amount in km*km, for wood chips, hardwood // wood chips, hardwood // eu+efta+uk; Barge; EU+EFTA+UK
- kg_5: 142.939
  Mass in kg, for wood chips, hardwood // wood chips, hardwood // eu+efta+uk; Articulated lorry transport, Euro 4, Total weight >32 t; EU+EFTA+UK
- km_5: 129.755
  Distance in km, for wood chips, hardwood // wood chips, hardwood // eu+efta+uk; Articulated lorry transport, Euro 4, Total weight >32 t; EU+EFTA+UK
- kg_km_5: 18547.1; = kg_5*km_5
  Transport amount in km*km, for wood chips, hardwood // wood chips, hardwood // eu+efta+uk; Articulated lorry transport, Euro 4, Total weight >32 t; EU+EFTA+UK
- kg_6: 73.5114
  Mass in kg, for wood chips, softwood // wood chips, softwood // eu+efta+uk; Freight train, average; EU+EFTA+UK
- km_6: 240.159
  Distance in km, for wood chips, softwood // wood chips, softwood // eu+efta+uk; Freight train, average; EU+EFTA+UK
- kg_km_6: 17654.4; = kg_6*km_6
  Transport amount in km*km, for wood chips, softwood // wood chips, softwood // eu+efta+uk; Freight train, average; EU+EFTA+UK
- kg_7: 73.5114
  Mass in kg, for wood chips, softwood // wood chips, softwood // eu+efta+uk; Barge; EU+EFTA+UK
- km_7: 269.841
  Distance in km, for wood chips, softwood // wood chips, softwood // eu+efta+uk; Barge; EU+EFTA+UK
- kg_km_7: 19836.4; = kg_7*km_7
  Transport amount in km*km, for wood chips, softwood // wood chips, softwood // eu+efta+uk; Barge; EU+EFTA+UK
- kg_8: 73.5114
  Mass in kg, for wood chips, softwood // wood chips, softwood // eu+efta+uk; Articulated lorry transport, Euro 4, Total weight >32 t; EU+EFTA+UK
- km_8: 130.063
  Distance in km, for wood chips, softwood // wood chips, softwood // eu+efta+uk; Articulated lorry transport, Euro 4, Total weight >32 t; EU+EFTA+UK
- kg_km_8: 9561.15; = kg_8*km_8
  Transport amount in km*km, for wood chips, softwood // wood chips, softwood // eu+efta+uk; Articulated lorry transport, Euro 4, Total weight >32 t; EU+EFTA+UK
- kg_9: 0.222465
  Mass in kg, for diesel // diesel mix at refinery // eu+efta+uk; Freight train, average; EU+EFTA+UK
- km_9: 239.858
  Distance in km, for diesel // diesel mix at refinery // eu+efta+uk; Freight train, average; EU+EFTA+UK
- kg_km_9: 53.36; = kg_9*km_9
  Transport amount in km*km, for diesel // diesel mix at refinery // eu+efta+uk; Freight train, average; EU+EFTA+UK
- kg_10: 0.222465
  Mass in kg, for diesel // diesel mix at refinery // eu+efta+uk; Barge; EU+EFTA+UK
- km_10: 270.175
  Distance in km, for diesel // diesel mix at refinery // eu+efta+uk; Barge; EU+EFTA+UK
- kg_km_10: 60.1044; = kg_10*km_10
  Transport amount in km*km, for diesel // diesel mix at refinery // eu+efta+uk; Barge; EU+EFTA+UK
- kg_11: 0.222465
  Mass in kg, for diesel // diesel mix at refinery // eu+efta+uk; Articulated lorry transport, Euro 4, Total weight >32 t; EU+EFTA+UK
- km_11: 130.183
  Distance in km, for diesel // diesel mix at refinery // eu+efta+uk; Articulated lorry transport, Euro 4, Total weight >32 t; EU+EFTA+UK
- kg_km_11: 28.9612; = kg_11*km_11
  Transport amount in km*km, for diesel // diesel mix at refinery // eu+efta+uk; Articulated lorry transport, Euro 4, Total weight >32 t; EU+EFTA+UK
- kg_12: 12.9108
  Mass in kg, for hard coal, at consumer eu+efta // hard coal mix // eu+efta+uk; Freight train, average; EU+EFTA+UK
- km_12: 239.681
  Distance in km, for hard coal, at consumer eu+efta // hard coal mix // eu+efta+uk; Freight train, average; EU+EFTA+UK
- kg_km_12: 3094.48; = kg_12*km_12
  Transport amount in km*km, for hard coal, at consumer eu+efta // hard coal mix // eu+efta+uk; Freight train, average; EU+EFTA+UK
- kg_13: 12.9108
  Mass in kg, for hard coal, at consumer eu+efta // hard coal mix // eu+efta+uk; Barge; EU+EFTA+UK
- km_13: 269.641
  Distance in km, for hard coal, at consumer eu+efta // hard coal mix // eu+efta+uk; Barge; EU+EFTA+UK
- kg_km_13: 3481.29; = kg_13*km_13
  Transport amount in km*km, for hard coal, at consumer eu+efta // hard coal mix // eu+efta+uk; Barge; EU+EFTA+UK
- kg_14: 12.9108
  Mass in kg, for hard coal, at consumer eu+efta // hard coal mix // eu+efta+uk; Articulated lorry transport, Euro 4, Total weight >32 t; EU+EFTA+UK
- km_14: 129.827
  Distance in km, for hard coal, at consumer eu+efta // hard coal mix // eu+efta+uk; Articulated lorry transport, Euro 4, Total weight >32 t; EU+EFTA+UK
- kg_km_14: 1676.18; = kg_14*km_14
  Transport amount in km*km, for hard coal, at consumer eu+efta // hard coal mix // eu+efta+uk; Articulated lorry transport, Euro 4, Total weight >32 t; EU+EFTA+UK
- kg_15: 1399.46
  Mass in kg, for hardwood under bark // hardwood forestry // eu+efta+uk; Freight train, average; EU+EFTA+UK
- km_15: 4.2523
  Distance in km, for hardwood under bark // hardwood forestry // eu+efta+uk; Freight train, average; EU+EFTA+UK
- kg_km_15: 5950.93; = kg_15*km_15
  Transport amount in km*km, for hardwood under bark // hardwood forestry // eu+efta+uk; Freight train, average; EU+EFTA+UK
- kg_16: 1399.46
  Mass in kg, for hardwood under bark // hardwood forestry // eu+efta+uk; Articulated lorry transport, Euro 4, Total weight >32 t; EU+EFTA+UK
- km_16: 411.056
  Distance in km, for hardwood under bark // hardwood forestry // eu+efta+uk; Articulated lorry transport, Euro 4, Total weight >32 t; EU+EFTA+UK
- kg_km_16: 575256; = kg_16*km_16
  Transport amount in km*km, for hardwood under bark // hardwood forestry // eu+efta+uk; Articulated lorry transport, Euro 4, Total weight >32 t; EU+EFTA+UK
- kg_17: 4.56671
  Mass in kg, for heavy fuel oil (1.0 wt.% s) // heavy fuel oil at refinery // eu+efta+uk; Freight train, average; EU+EFTA+UK
- km_17: 241.075
  Distance in km, for heavy fuel oil (1.0 wt.% s) // heavy fuel oil at refinery // eu+efta+uk; Freight train, average; EU+EFTA+UK
- kg_km_17: 1100.92; = kg_17*km_17
  Transport amount in km*km, for heavy fuel oil (1.0 wt.% s) // heavy fuel oil at refinery // eu+efta+uk; Freight train, average; EU+EFTA+UK
- kg_18: 4.56671
  Mass in kg, for heavy fuel oil (1.0 wt.% s) // heavy fuel oil at refinery // eu+efta+uk; Barge; EU+EFTA+UK
- km_18: 269.309
  Distance in km, for heavy fuel oil (1.0 wt.% s) // heavy fuel oil at refinery // eu+efta+uk; Barge; EU+EFTA+UK
- kg_km_18: 1229.86; = kg_18*km_18
  Transport amount in km*km, for heavy fuel oil (1.0 wt.% s) // heavy fuel oil at refinery // eu+efta+uk; Barge; EU+EFTA+UK
- kg_19: 4.56671
  Mass in kg, for heavy fuel oil (1.0 wt.% s) // heavy fuel oil at refinery // eu+efta+uk; Articulated lorry transport, Euro 4, Total weight >32 t; EU+EFTA+UK
- km_19: 130.094
  Distance in km, for heavy fuel oil (1.0 wt.% s) // heavy fuel oil at refinery // eu+efta+uk; Articulated lorry transport, Euro 4, Total weight >32 t; EU+EFTA+UK
- kg_km_19: 594.101; = kg_19*km_19
  Transport amount in km*km, for heavy fuel oil (1.0 wt.% s) // heavy fuel oil at refinery // eu+efta+uk; Articulated lorry transport, Euro 4, Total weight >32 t; EU+EFTA+UK
- kg_20: 0.433049
  Mass in kg, for light fuel oil // light fuel oil at refinery // eu+efta+uk; Freight train, average; EU+EFTA+UK
- km_20: 240.484
  Distance in km, for light fuel oil // light fuel oil at refinery // eu+efta+uk; Freight train, average; EU+EFTA+UK
- kg_km_20: 104.141; = kg_20*km_20
  Transport amount in km*km, for light fuel oil // light fuel oil at refinery // eu+efta+uk; Freight train, average; EU+EFTA+UK
- kg_21: 0.433049
  Mass in kg, for light fuel oil // light fuel oil at refinery // eu+efta+uk; Barge; EU+EFTA+UK
- km_21: 270.258
  Distance in km, for light fuel oil // light fuel oil at refinery // eu+efta+uk; Barge; EU+EFTA+UK
- kg_km_21: 117.035; = kg_21*km_21
  Transport amount in km*km, for light fuel oil // light fuel oil at refinery // eu+efta+uk; Barge; EU+EFTA+UK
- kg_22: 0.433049
  Mass in kg, for light fuel oil // light fuel oil at refinery // eu+efta+uk; Articulated lorry transport, Euro 4, Total weight >32 t; EU+EFTA+UK
- km_22: 130.09
  Distance in km, for light fuel oil // light fuel oil at refinery // eu+efta+uk; Articulated lorry transport, Euro 4, Total weight >32 t; EU+EFTA+UK
- kg_km_22: 56.3354; = kg_22*km_22
  Transport amount in km*km, for light fuel oil // light fuel oil at refinery // eu+efta+uk; Articulated lorry transport, Euro 4, Total weight >32 t; EU+EFTA+UK
- kg_23: 189.029
  Mass in kg, for lignite eu+efta // lignite mix // eu+efta+uk; Freight train, average; EU+EFTA+UK
- km_23: 239.784
  Distance in km, for lignite eu+efta // lignite mix // eu+efta+uk; Freight train, average; EU+EFTA+UK
- kg_km_23: 45326.2; = kg_23*km_23
  Transport amount in km*km, for lignite eu+efta // lignite mix // eu+efta+uk; Freight train, average; EU+EFTA+UK
- kg_24: 189.029
  Mass in kg, for lignite eu+efta // lignite mix // eu+efta+uk; Barge; EU+EFTA+UK
- km_24: 270.216
  Distance in km, for lignite eu+efta // lignite mix // eu+efta+uk; Barge; EU+EFTA+UK
- kg_km_24: 51078.8; = kg_24*km_24
  Transport amount in km*km, for lignite eu+efta // lignite mix // eu+efta+uk; Barge; EU+EFTA+UK
- kg_25: 189.029
  Mass in kg, for lignite eu+efta // lignite mix // eu+efta+uk; Articulated lorry transport, Euro 4, Total weight >32 t; EU+EFTA+UK
- km_25: 130.123
  Distance in km, for lignite eu+efta // lignite mix // eu+efta+uk; Articulated lorry transport, Euro 4, Total weight >32 t; EU+EFTA+UK
- kg_km_25: 24597.2; = kg_25*km_25
  Transport amount in km*km, for lignite eu+efta // lignite mix // eu+efta+uk; Articulated lorry transport, Euro 4, Total weight >32 t; EU+EFTA+UK
- kg_26: 97.5952
  Mass in kg, for waste paper, sorted // sorting waste paper, unsorted // eu+efta+uk; Freight train, average; EU+EFTA+UK
- km_26: 1.46341
  Distance in km, for waste paper, sorted // sorting waste paper, unsorted // eu+efta+uk; Freight train, average; EU+EFTA+UK
- kg_km_26: 142.822; = kg_26*km_26
  Transport amount in km*km, for waste paper, sorted // sorting waste paper, unsorted // eu+efta+uk; Freight train, average; EU+EFTA+UK
- kg_27: 97.5952
  Mass in kg, for waste paper, sorted // sorting waste paper, unsorted // eu+efta+uk; Barge; EU+EFTA+UK
- km_27: 1.64634
  Distance in km, for waste paper, sorted // sorting waste paper, unsorted // eu+efta+uk; Barge; EU+EFTA+UK
- kg_km_27: 160.675; = kg_27*km_27
  Transport amount in km*km, for waste paper, sorted // sorting waste paper, unsorted // eu+efta+uk; Barge; EU+EFTA+UK
- kg_28: 12.2688
  Mass in kg, for soda // soda production // eu+efta+uk; Freight train, average; EU+EFTA+UK
- km_28: 240.097
  Distance in km, for soda // soda production // eu+efta+uk; Freight train, average; EU+EFTA+UK
- kg_km_28: 2945.71; = kg_28*km_28
  Transport amount in km*km, for soda // soda production // eu+efta+uk; Freight train, average; EU+EFTA+UK
- kg_29: 12.2688
  Mass in kg, for soda // soda production // eu+efta+uk; Barge; EU+EFTA+UK
- km_29: 270.008
  Distance in km, for soda // soda production // eu+efta+uk; Barge; EU+EFTA+UK
- kg_km_29: 3312.68; = kg_29*km_29
  Transport amount in km*km, for soda // soda production // eu+efta+uk; Barge; EU+EFTA+UK
- kg_30: 12.2688
  Mass in kg, for soda // soda production // eu+efta+uk; Articulated lorry transport, Euro 4, Total weight >32 t; EU+EFTA+UK
- km_30: 130.154
  Distance in km, for soda // soda production // eu+efta+uk; Articulated lorry transport, Euro 4, Total weight >32 t; EU+EFTA+UK
- kg_km_30: 1596.83; = kg_30*km_30
  Transport amount in km*km, for soda // soda production // eu+efta+uk; Articulated lorry transport, Euro 4, Total weight >32 t; EU+EFTA+UK
- kg_31: 7.02209
  Mass in kg, for sodium hydroxide // sodium hydroxide production // eu+efta+uk; Freight train, average; EU+EFTA+UK
- km_31: 240.113
  Distance in km, for sodium hydroxide // sodium hydroxide production // eu+efta+uk; Freight train, average; EU+EFTA+UK
- kg_km_31: 1686.1; = kg_31*km_31
  Transport amount in km*km, for sodium hydroxide // sodium hydroxide production // eu+efta+uk; Freight train, average; EU+EFTA+UK
- kg_32: 7.02209
  Mass in kg, for sodium hydroxide // sodium hydroxide production // eu+efta+uk; Barge; EU+EFTA+UK
- km_32: 269.774
  Distance in km, for sodium hydroxide // sodium hydroxide production // eu+efta+uk; Barge; EU+EFTA+UK
- kg_km_32: 1894.38; = kg_32*km_32
  Transport amount in km*km, for sodium hydroxide // sodium hydroxide production // eu+efta+uk; Barge; EU+EFTA+UK
- kg_33: 7.02209
  Mass in kg, for sodium hydroxide // sodium hydroxide production // eu+efta+uk; Articulated lorry transport, Euro 4, Total weight >32 t; EU+EFTA+UK
- km_33: 129.944
  Distance in km, for sodium hydroxide // sodium hydroxide production // eu+efta+uk; Articulated lorry transport, Euro 4, Total weight >32 t; EU+EFTA+UK
- kg_km_33: 912.475; = kg_33*km_33
  Transport amount in km*km, for sodium hydroxide // sodium hydroxide production // eu+efta+uk; Articulated lorry transport, Euro 4, Total weight >32 t; EU+EFTA+UK
- kg_34: 0.247955
  Mass in kg, for sulphuric acid // sulphuric acid production // eu+efta+uk; Freight train, average; EU+EFTA+UK
- km_34: 240
  Distance in km, for sulphuric acid // sulphuric acid production // eu+efta+uk; Freight train, average; EU+EFTA+UK
- kg_km_34: 59.5093; = kg_34*km_34
  Transport amount in km*km, for sulphuric acid // sulphuric acid production // eu+efta+uk; Freight train, average; EU+EFTA+UK
- kg_35: 0.247955
  Mass in kg, for sulphuric acid // sulphuric acid production // eu+efta+uk; Barge; EU+EFTA+UK
- km_35: 270
  Distance in km, for sulphuric acid // sulphuric acid production // eu+efta+uk; Barge; EU+EFTA+UK
- kg_km_35: 66.9479; = kg_35*km_35
  Transport amount in km*km, for sulphuric acid // sulphuric acid production // eu+efta+uk; Barge; EU+EFTA+UK
- kg_36: 0.247955
  Mass in kg, for sulphuric acid // sulphuric acid production // eu+efta+uk; Articulated lorry transport, Euro 4, Total weight >32 t; EU+EFTA+UK
- km_36: 130
  Distance in km, for sulphuric acid // sulphuric acid production // eu+efta+uk; Articulated lorry transport, Euro 4, Total weight >32 t; EU+EFTA+UK
- kg_km_36: 32.2342; = kg_36*km_36
  Transport amount in km*km, for sulphuric acid // sulphuric acid production // eu+efta+uk; Articulated lorry transport, Euro 4, Total weight >32 t; EU+EFTA+UK
- kg_37: 97.5952
  Mass in kg, for waste paper, sorted // sorting waste paper, unsorted // eu+efta+uk; Articulated lorry transport, Euro 4, Total weight >32 t; EU+EFTA+UK
- km_37: 153.232
  Distance in km, for waste paper, sorted // sorting waste paper, unsorted // eu+efta+uk; Articulated lorry transport, Euro 4, Total weight >32 t; EU+EFTA+UK
- kg_km_37: 14954.7; = kg_37*km_37
  Transport amount in km*km, for waste paper, sorted // sorting waste paper, unsorted // eu+efta+uk; Articulated lorry transport, Euro 4, Total weight >32 t; EU+EFTA+UK
- kg_38: 11.9415
  Mass in kg, for biodegradable waste to landfill // landfill of biodegradable waste // eu+efta+uk; Articulated lorry transport, Euro 4, Total weight >32 t; EU+EFTA+UK
- km_38: 77
  Distance in km, for biodegradable waste to landfill // landfill of biodegradable waste // eu+efta+uk; Articulated lorry transport, Euro 4, Total weight >32 t; EU+EFTA+UK
- kg_km_38: 919.497; = kg_38*km_38
  Transport amount in km*km, for biodegradable waste to landfill // landfill of biodegradable waste // eu+efta+uk; Articulated lorry transport, Euro 4, Total weight >32 t; EU+EFTA+UK
- kg_39: 11.9415
  Mass in kg, for biowaste // enclosed composting // eu+efta+uk; Articulated lorry transport, Euro 4, Total weight >32 t; EU+EFTA+UK
- km_39: 77
  Distance in km, for biowaste // enclosed composting // eu+efta+uk; Articulated lorry transport, Euro 4, Total weight >32 t; EU+EFTA+UK
- kg_km_39: 919.497; = kg_39*km_39
  Transport amount in km*km, for biowaste // enclosed composting // eu+efta+uk; Articulated lorry transport, Euro 4, Total weight >32 t; EU+EFTA+UK
- kg_40: 0.621659
  Mass in kg, for industrial waste, average, not hazardous, to residual landfill // industrial waste, average, not hazardous, to residual landfill // eu+efta+uk; Articulated lorry transport, Euro 4, Total weight >32 t; EU+EFTA+UK
- km_40: 77
  Distance in km, for industrial waste, average, not hazardous, to residual landfill // industrial waste, average, not hazardous, to residual landfill // eu+efta+uk; Articulated lorry transport, Euro 4, Total weight >32 t; EU+EFTA+UK
- kg_km_40: 47.8678; = kg_40*km_40
  Transport amount in km*km, for industrial waste, average, not hazardous, to residual landfill // industrial waste, average, not hazardous, to residual landfill // eu+efta+uk; Articulated lorry transport, Euro 4, Total weight >32 t; EU+EFTA+UK
- kg_41: 2.62089
  Mass in kg, for waste (unspecified) // landfill of plastic waste // eu+efta+uk; Articulated lorry transport, Euro 4, Total weight >32 t; EU+EFTA+UK
- km_41: 77
  Distance in km, for waste (unspecified) // landfill of plastic waste // eu+efta+uk; Articulated lorry transport, Euro 4, Total weight >32 t; EU+EFTA+UK
- kg_km_41: 201.808; = kg_41*km_41
  Transport amount in km*km, for waste (unspecified) // landfill of plastic waste // eu+efta+uk; Articulated lorry transport, Euro 4, Total weight >32 t; EU+EFTA+UK

## Reference product
- fluting medium, semichemical // containerboard production, fluting medium, semichemical // eu+efta+uk: 1

## Inputs
- Transport of ammonia, as 100% nh3 // ammonia, as 100% nh3 production // eu+efta+uk by Freight train, average - EU+EFTA+UK: 2935.79; = kg_km_0
- Transport of ammonia, as 100% nh3 // ammonia, as 100% nh3 production // eu+efta+uk by Barge - EU+EFTA+UK: 3302.76; = kg_km_1
- Transport of ammonia, as 100% nh3 // ammonia, as 100% nh3 production // eu+efta+uk by Articulated lorry transport, Euro 4, Total weight >32 t - EU+EFTA+UK: 1586.91; = kg_km_2
- Transport of wood chips, hardwood // wood chips, hardwood // eu+efta+uk by Freight train, average - EU+EFTA+UK: 34317; = kg_km_3
- Transport of wood chips, hardwood // wood chips, hardwood // eu+efta+uk by Barge - EU+EFTA+UK: 38581.8; = kg_km_4
- Transport of wood chips, hardwood // wood chips, hardwood // eu+efta+uk by Articulated lorry transport, Euro 4, Total weight >32 t - EU+EFTA+UK: 18547.1; = kg_km_5
- Transport of wood chips, softwood // wood chips, softwood // eu+efta+uk by Freight train, average - EU+EFTA+UK: 17654.4; = kg_km_6
- Transport of wood chips, softwood // wood chips, softwood // eu+efta+uk by Barge - EU+EFTA+UK: 19836.4; = kg_km_7
- Transport of wood chips, softwood // wood chips, softwood // eu+efta+uk by Articulated lorry transport, Euro 4, Total weight >32 t - EU+EFTA+UK: 9561.15; = kg_km_8
- Transport of diesel // diesel mix at refinery // eu+efta+uk by Freight train, average - EU+EFTA+UK: 53.36; = kg_km_9
- Transport of diesel // diesel mix at refinery // eu+efta+uk by Barge - EU+EFTA+UK: 60.1044; = kg_km_10
- Transport of diesel // diesel mix at refinery // eu+efta+uk by Articulated lorry transport, Euro 4, Total weight >32 t - EU+EFTA+UK: 28.9612; = kg_km_11
- Transport of hard coal, at consumer eu+efta // hard coal mix // eu+efta+uk by Freight train, average - EU+EFTA+UK: 3094.48; = kg_km_12
- Transport of hard coal, at consumer eu+efta // hard coal mix // eu+efta+uk by Barge - EU+EFTA+UK: 3481.29; = kg_km_13
- Transport of hard coal, at consumer eu+efta // hard coal mix // eu+efta+uk by Articulated lorry transport, Euro 4, Total weight >32 t - EU+EFTA+UK: 1676.18; = kg_km_14
- Transport of hardwood under bark // hardwood forestry // eu+efta+uk by Freight train, average - EU+EFTA+UK: 5950.93; = kg_km_15
- Transport of hardwood under bark // hardwood forestry // eu+efta+uk by Articulated lorry transport, Euro 4, Total weight >32 t - EU+EFTA+UK: 575256; = kg_km_16
- Transport of heavy fuel oil (1.0 wt.% s) // heavy fuel oil at refinery // eu+efta+uk by Freight train, average - EU+EFTA+UK: 1100.92; = kg_km_17
- Transport of heavy fuel oil (1.0 wt.% s) // heavy fuel oil at refinery // eu+efta+uk by Barge - EU+EFTA+UK: 1229.86; = kg_km_18
- Transport of heavy fuel oil (1.0 wt.% s) // heavy fuel oil at refinery // eu+efta+uk by Articulated lorry transport, Euro 4, Total weight >32 t - EU+EFTA+UK: 594.101; = kg_km_19
- Transport of light fuel oil // light fuel oil at refinery // eu+efta+uk by Freight train, average - EU+EFTA+UK: 104.141; = kg_km_20
- Transport of light fuel oil // light fuel oil at refinery // eu+efta+uk by Barge - EU+EFTA+UK: 117.035; = kg_km_21
- Transport of light fuel oil // light fuel oil at refinery // eu+efta+uk by Articulated lorry transport, Euro 4, Total weight >32 t - EU+EFTA+UK: 56.3354; = kg_km_22
- Transport of lignite eu+efta // lignite mix // eu+efta+uk by Freight train, average - EU+EFTA+UK: 45326.2; = kg_km_23
- Transport of lignite eu+efta // lignite mix // eu+efta+uk by Barge - EU+EFTA+UK: 51078.8; = kg_km_24
- Transport of lignite eu+efta // lignite mix // eu+efta+uk by Articulated lorry transport, Euro 4, Total weight >32 t - EU+EFTA+UK: 24597.2; = kg_km_25
- Transport of waste paper, sorted // sorting waste paper, unsorted // eu+efta+uk by Freight train, average - EU+EFTA+UK: 142.822; = kg_km_26
- Transport of waste paper, sorted // sorting waste paper, unsorted // eu+efta+uk by Barge - EU+EFTA+UK: 160.675; = kg_km_27
- Transport of soda // soda production // eu+efta+uk by Freight train, average - EU+EFTA+UK: 2945.71; = kg_km_28
- Transport of soda // soda production // eu+efta+uk by Barge - EU+EFTA+UK: 3312.68; = kg_km_29
- Transport of soda // soda production // eu+efta+uk by Articulated lorry transport, Euro 4, Total weight >32 t - EU+EFTA+UK: 1596.83; = kg_km_30
- Transport of sodium hydroxide // sodium hydroxide production // eu+efta+uk by Freight train, average - EU+EFTA+UK: 1686.1; = kg_km_31
- Transport of sodium hydroxide // sodium hydroxide production // eu+efta+uk by Barge - EU+EFTA+UK: 1894.38; = kg_km_32
- Transport of sodium hydroxide // sodium hydroxide production // eu+efta+uk by Articulated lorry transport, Euro 4, Total weight >32 t - EU+EFTA+UK: 912.475; = kg_km_33
- Transport of sulphuric acid // sulphuric acid production // eu+efta+uk by Freight train, average - EU+EFTA+UK: 59.5093; = kg_km_34
- Transport of sulphuric acid // sulphuric acid production // eu+efta+uk by Barge - EU+EFTA+UK: 66.9479; = kg_km_35
- Transport of sulphuric acid // sulphuric acid production // eu+efta+uk by Articulated lorry transport, Euro 4, Total weight >32 t - EU+EFTA+UK: 32.2342; = kg_km_36
- Transport of waste paper, sorted // sorting waste paper, unsorted // eu+efta+uk by Articulated lorry transport, Euro 4, Total weight >32 t - EU+EFTA+UK: 14954.7; = kg_km_37
- Electricity from Electricity grid mix 1kV-60kV - EU+EFTA+UK: 725.021
- Transport of biodegradable waste to landfill // landfill of biodegradable waste // eu+efta+uk by Articulated lorry transport, Euro 4, Total weight >32 t - EU+EFTA+UK: 919.497; = kg_km_38
- Transport of biowaste // enclosed composting // eu+efta+uk by Articulated lorry transport, Euro 4, Total weight >32 t - EU+EFTA+UK: 919.497; = kg_km_39
- Transport of industrial waste, average, not hazardous, to residual landfill // industrial waste, average, not hazardous, to residual landfill // eu+efta+uk by Articulated lorry transport, Euro 4, Total weight >32 t - EU+EFTA+UK: 47.8678; = kg_km_40
- Transport of waste (unspecified) // landfill of plastic waste // eu+efta+uk by Articulated lorry transport, Euro 4, Total weight >32 t - EU+EFTA+UK: 201.808; = kg_km_41
- fluting medium, semichemical // containerboard production, fluting medium, semichemical // eu+efta+uk, blackbox: 1
- fluting medium, semichemical // containerboard production, fluting medium, semichemical // eu+efta+uk, elementary: 1

## Impact indicators
- Eutrophication marine: 0.827742
- Ecotoxicity, freshwater: 2955.49
- Land use: 134135
- Water use: 186.252
- Resource use, minerals and metals: 0.00192324
- Resource use, fossils: 5737.1
- Climate change: 574.254
- Ozone depletion: 4.87315e-6
- Human toxicity, cancer: 5.03679e-7
- Human toxicity, non-cancer: 6.66921e-6
- EF-particulate Matter: 7.12404e-5
- Ionising radiation, human health: 40.3432
- Photochemical ozone formation - human health: 2.78722
- Acidification: 2.27145
- Eutrophication, terrestrial: 5.85304
- Eutrophication, freshwater: 0.0286615

## Deviations from the LCI method principle
The background data uses:
- the \xe2\x80\x9cRecycled content cut-off\xe2\x80\x9d approach to allocate end-of-life by-products and secondary materials. This allocation is explained in the description of the recycled content system model (http://www.ecoinvent.org/database/system-models-in-ecoinvent-3/cut-off-system-model/allocation-cut-off-by-classification.html).
OR
- EF compliant data

## Deviations from the LCI method approaches
Background data:
- the \xe2\x80\x9cRecycled content cut-off\xe2\x80\x9d approach to allocate end-of-life by-products and secondary materials. This allocation is explained in the description of the recycled content system model (http://www.ecoinvent.org/database/system-models-in-ecoinvent-3/cut-off-system-model/allocation-cut-off-by-classification.html). The ecoinvent database mostly relies on “Allocation – market values” apart for few exceptions particularly in the energy sector. ecoinvent energy data is replaced with EF3.0 core data as per the EF guidelines version 2.0.
OR
- EF compliant data

## Modelling constants
All modelling constants follow the requirements listed in the Tender Specifications 070201/2020/SER/ENV.B1. Completeness: There are no intentional cut-offs in the inventory no matter how small their contribution to all the EF impact categories is. Eventual cut-offs are in compliance with the Guide for EF compliant data sets (JRC 2020), i.e. only if below the 3% cut-off rule. Water use: water use is modelled at country level using separate flows for water withdrawal, water release and water evaporation. Handling multi-functional processes: the following PEF multi- functionality decision hierarchy is applied for resolving all multi- functionality problems: (1) subdivision or system expansion; (2) allocation based on a relevant underlying physical relationship (substitution may apply here); (3) allocation based on some other relationship. Direct land use change: GHG emissions from direct LUC allocated to good/service for 20 years after the LUC occurs, with IPCC default values. Carbon storage and delayed emissions: credits associated with temporary (carbon) storage or delayed emissions up to 300 years are not be considered. Emissions off-setting: are not included. Capital goods (including infrastructures) and their End of life: they are included. System boundaries: system boundaries include all processes linked to the product supply chain (e.g. maintenance). Time period: emissions and removals are modelled as if released or removed at the beginning of the assessment method. Fossil and biogenic carbon emissions and removals: removals and emissions are modelled as follows: All GHG emissions from fossil fuels (including peat and limestone) are modelled consistently with the most updated ILCD list of elementary flows. The non-fossil (biogenic) carbon flows are modelled consistently with the most updated ILCD list of elementary flows.

## Cut-off and completeness
There are no intentional cut-offs in the inventory no matter how small their contribution to all the EF impact categories is. Eventual cut-offs are in compliance with the Guide for EF compliant data sets (JRC 2020), i.e. only if below the 3% cut-off rule. The dataset dry mass and water balance has been checked to ensure the inventory is complete. Capital goods (e.g. infrastructure) and their end-of-life are included.

## Data selection and combination
These datasets include, in both their foreground and background data, links to EF3.0 compliant data.
The relevant background data on energy, transport, and End of Life are from the LCDN data node (http://lcdn.thinkstep.com/Node/).
All other background data in the supply of this product for which no EF3.0 process was available are from ecoinvent v3.7 database (www.ecoinvent.org) or other data sources.

## Data treatment and extrapolations
Several data sources have been used to model the inventory.

## Review details
Internal reviews have been asked to review the plausibility of the unit process, LCIA scores, and DQRs. Internal reviewers have also been asked to review the data for EF compliancy. The consortium is therefore responsible for aspects such as compliancy with the ILCD format, including validation in Look@LCI, and nomenclature.
Internal reviwers have been asked to judge based on the process name, that the unit process models in a complete and representative way the process in the requested location. The review encompassed the plausability of:
- exchanges with nature (elementary flows) as well as exchanges such as product and waste flows.
- meta information (general comment, technology comment, system boundaries, allocation, cut-off rules, etc.). Reviewers were asked to judge if the provided information is enough to understand the content of the process.
- LCIA scores
- DQRs including precision, technology, time and geography. As well as the overall DQR.
External reviewers have been asked to provide their expertise in the field of interest. External reviewers have been asked to review the unit process, including eventual methodological choices, the LCIA scores (provided with contribution scores as well), and DQRs. External reviewers have been provided all the information in a tool developed by the consortium for the purpose of this project.
External reviewers have been asked to judge based on the process name, that the unit process models in a complete and representative way the process in the requested location. The review encompassed:
- Plausability and completeness of exchanges with nature (elementary flows) as well as exchanges such as product and waste flows.
- Review of meta information (general comment, technology comment, system boundaries, allocation, cut-off rules, etc.). Reviewers were asked to judge if the provided information is enough to understand the content of the process.
- Review of properties (biogenic carbon and water content).
- Review of allocation keys.
- Plausability of LCIA scores calculated by the consortium.
- Plausability of DQRs including precision, technology, time and geography. As well as the overall DQR.

## Data sources
- Background Data for Representative products and organisations. EF 3.0 compliant (data stock)
- The European Federation of Corrugated Board Manufacturers (FEFCO), (2018). European Database for Corrugated Board Life Cycle Studies 2018", available at https://www.fefco.org/lca

## Intended applications
Implementation of regular Product Environmental Footprint (PEF) studies and Organisation Environmental Footprint (OEF) studies exclusively under the specified Product groups and sectors as defined in the Product Environmental Footprint Category Rules (PEFCR) and Organisation Environmental Footprint Sectorial Rules (OEFSR) listed in http://ec.europa.eu/environment/eussd/smgp/PEFCR_OEFSR.htm
