# recovered fibre for packaging grades - corrugated grades and cartonboard grades, elementary; technology mix; production mix, at plant; Erec/ErecEoL, dry mass

Dataset: ILCD process, Unit process, single operation
Geography: EU+EFTA+UK
Reference year: 2021
Valid until: 2024
Classification: Other Services / Other services
LCI method principle: Attributional
LCI method approaches: Allocation - market value
Completeness: All relevant flows quantified
Project: Provision of process-based 3.0 Environmental Footprint-compliant life cycle inventory datasets - Renewable materials - contract number 070201/2020/840085/SER/ENV.B.1
Generated by: RISE
Owner: CEPI
Compliance: Environmental Footprint non-primary supporting data set; Environmental Footprint 3.1
Amounts: no units in this file; such an amount is in the reference unit of its flow, which a separate flow dataset defines
copyright: true
licenseType: Free of charge for some user types or use types
accessRestrictions: Free of charge for all final users implementing a regular Product Environmental Footprint (PEF) studies and Organisation Environmental Footprint (OEF) studies exclusively under the specified Product groups and sectors as defined in the Product Environmental Footprint Category Rules (PEFCR) and Organisation Environmental Footprint Sectorial Rules (OEFSR) listed in http://ec.europa.eu/environment/eussd/smgp/PEFCR_OEFSR.htm and in accordance with the terms and conditions of the EULA (available at https://ecoinvent.lca-data.com/) exclusively until 31st December 2024. Any use of this dataset or any derivative data not within the specific context of one of the PEF/OEF projects or after the end of 2024 is not permitted.

## General comment
Notice: this data set supersedes the EF3.0-compliant version (see link under "preceding data set version" below calculated with the EF3.0). The life cycle inventory is not changed from the original EF3.0 data set. The LCIA results are calculated based on the EF3.1 methods which provide updated characterisation factors in the following impact categories: Climate Change, Ecotoxicity freshwater, Photochemical Ozone Formation, Acidification, Human Toxicity non-cancer, and Human Toxicity cancer. The review report and the data quality ratings refer to the original results. The data set has been updated by the European Commission on the basis of the original EF3.0 data set delivered by the data provider.This sub-process has limited documentation only. For all detailed documentation of the full model to which this data set belongs (such as DQRs, review reports and other technical documentation), please see this process: recovered fibre for packaging grades - corrugated grades and cartonboard grades - EU+EFTA+UK []

## Technology and included processes
This dataset was established to compare the production of virgin pulp with the production of pulp from recovered fibres. Production takes place as integrated production of recovered pulp and paper. This dataset represents inputs to and outputs from the theoretical recovered pulp production process covering the pulp production phase, plus the share of the integrated mill services (power plant, wastewater treatment) allocated to recovered pulp production.

The dataset represents the recycling process, the dataset can therefore be used to model the CFF formula (Erecycled/ErecyclingEoL) as the data does not include any burdens/credits for the material being recycled but represents the recycling process itself.

## Reference product
- recovered fibre for packaging grades - corrugated grades and cartonboard grades // recovered fibre for packaging grades - corrugated grades and cartonboard grades // eu+efta+uk, elementary: 1

## Outputs
- Water, Emissions to fresh water [AL]: 5.34742e-6
- Water, Emissions to fresh water [AT]: 6.88981e-5
- Water, Emissions to fresh water [BA]: 6.66631e-6
- Water, Emissions to fresh water [BE]: 8.29296e-5
- Water, Emissions to fresh water [BG]: 2.12356e-5
- Water, Emissions to fresh water [BY]: 2.75741e-5
- Water, Emissions to fresh water [CH]: 8.21724e-5
- Water, Emissions to fresh water [CZ]: 5.71914e-5
- Water, Emissions to fresh water [DE]: 0.000622425
- Water, Emissions to fresh water [DK]: 4.51329e-5
- Water, Emissions to fresh water [EE]: 6.16296e-6
- Water, Emissions to fresh water [ES]: 0.0002671
- Water, Emissions to fresh water [FI]: 3.84975e-5
- Water, Emissions to fresh water [FR]: 0.000439058
- Water, Emissions to fresh water [GB]: 0.000436317
- Water, Emissions to fresh water: 2.71013e-6
- Water, Emissions to fresh water [GR]: 4.96338e-5
- Water, Emissions to fresh water [HR]: 1.59589e-5
- Water, Emissions to fresh water [HU]: 4.18363e-5
- Water, Emissions to fresh water [IE]: 4.50659e-5
- Water, Emissions to fresh water [IS]: 2.57159e-6
- Water, Emissions to fresh water [IT]: 0.000375649
- Water, Emissions to fresh water [LT]: 1.3159e-5
- Water, Emissions to fresh water [LU]: 9.13501e-6
- Water, Emissions to fresh water [LV]: 7.75938e-6
- Water, Emissions to fresh water [MD]: 4.10563e-6
- Water, Emissions to fresh water [ME]: 1.65398e-6
- Water, Emissions to fresh water [MK]: 4.5681e-6
- Water, Emissions to fresh water [MT]: 2.52701e-6
- Water, Emissions to fresh water [NL]: 0.000139248
- Water, Emissions to fresh water [NO]: 5.27094e-5
- Water, Emissions to fresh water [PL]: 0.000160258
- Water, Emissions to fresh water [PT]: 5.05672e-5
- Water, Emissions to fresh water [RO]: 7.02035e-5
- Water, Emissions to fresh water [RS]: 1.74213e-5
- Water, Emissions to fresh water [SE]: 7.6059e-5
- Water, Emissions to fresh water [SI]: 1.07711e-5
- Water, Emissions to fresh water [SK]: 2.52813e-5
- Water, Emissions to fresh water [SM]: 3.1465e-7
- Water, Emissions to fresh water [UA]: 7.41249e-5
- carbon dioxide (fossil), Emissions to air, unspecified: 0.0600364
- particles (PM2.5), Emissions to air, unspecified: 1.90286e-7
- total organic carbon, Emissions to water, unspecified: 0.0002085
- particles (PM10), Emissions to air, unspecified: 6.66857e-7
- carbon monoxide (fossil), Emissions to air, unspecified: 1.54073e-5
- nitrogen dioxide, Emissions to air, unspecified: 6.0641e-7
- biological oxygen demand, Emissions to fresh water: 0.000123
- chemical oxygen demand, Emissions to fresh water: 0.00044
- carbon dioxide (biogenic), Emissions to air, unspecified: 0.00676286
- nitrogen, total (excluding N2), Emissions to fresh water: 3.2e-5
- adsorbable organic halogen compounds, Emissions to fresh water: 3e-7
- Suspended solids, unspecified, Emissions to water, unspecified: 0.000215
- sulfur dioxide, Emissions to air, unspecified (long-term): 1.16229e-7
- carbon monoxide (biogenic), Emissions to air, unspecified: 1.73557e-6
- phosphorus, total, Emissions to fresh water: 3.25e-6
- sulfur dioxide, Emissions to air, unspecified (long-term) [AL]: 2.28513e-8
- sulfur dioxide, Emissions to air, unspecified (long-term) [AT]: 2.94424e-7
- sulfur dioxide, Emissions to air, unspecified (long-term) [BA]: 2.84873e-8
- sulfur dioxide, Emissions to air, unspecified (long-term) [BE]: 3.54385e-7
- sulfur dioxide, Emissions to air, unspecified (long-term) [BG]: 9.07468e-8
- sulfur dioxide, Emissions to air, unspecified (long-term) [BY]: 1.17833e-7
- sulfur dioxide, Emissions to air, unspecified (long-term) [CH]: 3.5115e-7
- sulfur dioxide, Emissions to air, unspecified (long-term) [CZ]: 2.44398e-7
- sulfur dioxide, Emissions to air, unspecified (long-term) [DE]: 2.65983e-6
- sulfur dioxide, Emissions to air, unspecified (long-term) [DK]: 1.92868e-7
- sulfur dioxide, Emissions to air, unspecified (long-term) [EE]: 2.63364e-8
- sulfur dioxide, Emissions to air, unspecified (long-term) [ES]: 1.14141e-6
- sulfur dioxide, Emissions to air, unspecified (long-term) [FI]: 1.64512e-7
- sulfur dioxide, Emissions to air, unspecified (long-term) [FR]: 1.87624e-6
- sulfur dioxide, Emissions to air, unspecified (long-term) [GB]: 1.86452e-6
- sulfur dioxide, Emissions to air, unspecified (long-term) [GR]: 2.12102e-7
- sulfur dioxide, Emissions to air, unspecified (long-term) [HR]: 6.81977e-8
- sulfur dioxide, Emissions to air, unspecified (long-term) [HU]: 1.7878e-7
- sulfur dioxide, Emissions to air, unspecified (long-term) [IE]: 1.92581e-7
- sulfur dioxide, Emissions to air, unspecified (long-term) [IT]: 1.60527e-6
- sulfur dioxide, Emissions to air, unspecified (long-term) [LT]: 5.62327e-8
- sulfur dioxide, Emissions to air, unspecified (long-term) [LU]: 3.90369e-8
- sulfur dioxide, Emissions to air, unspecified (long-term) [LV]: 3.31584e-8
- sulfur dioxide, Emissions to air, unspecified (long-term) [MD]: 1.75447e-8
- sulfur dioxide, Emissions to air, unspecified (long-term) [MK]: 1.9521e-8
- sulfur dioxide, Emissions to air, unspecified (long-term) [NL]: 5.95051e-7
- sulfur dioxide, Emissions to air, unspecified (long-term) [NO]: 2.25244e-7
- sulfur dioxide, Emissions to air, unspecified (long-term) [PL]: 6.84836e-7
- sulfur dioxide, Emissions to air, unspecified (long-term) [PT]: 2.1609e-7
- sulfur dioxide, Emissions to air, unspecified (long-term) [RO]: 3.00003e-7
- sulfur dioxide, Emissions to air, unspecified (long-term) [SE]: 3.25025e-7
- sulfur dioxide, Emissions to air, unspecified (long-term) [SI]: 4.60282e-8
- sulfur dioxide, Emissions to air, unspecified (long-term) [SK]: 1.08035e-7
- sulfur dioxide, Emissions to air, unspecified (long-term) [UA]: 3.1676e-7
- nitrogen dioxide, Emissions to air, unspecified [AL]: 1.19224e-7
- nitrogen dioxide, Emissions to air, unspecified [AT]: 1.53613e-6
- nitrogen dioxide, Emissions to air, unspecified [BA]: 1.4863e-7
- nitrogen dioxide, Emissions to air, unspecified [BE]: 1.84897e-6
- nitrogen dioxide, Emissions to air, unspecified [BG]: 4.73462e-7
- nitrogen dioxide, Emissions to air, unspecified [BY]: 6.14782e-7
- nitrogen dioxide, Emissions to air, unspecified [CH]: 1.83209e-6
- nitrogen dioxide, Emissions to air, unspecified [CZ]: 1.27512e-6
- nitrogen dioxide, Emissions to air, unspecified [DE]: 1.38774e-5
- nitrogen dioxide, Emissions to air, unspecified [DK]: 1.00627e-6
- nitrogen dioxide, Emissions to air, unspecified [EE]: 1.37407e-7
- nitrogen dioxide, Emissions to air, unspecified [ES]: 5.95517e-6
- nitrogen dioxide, Emissions to air, unspecified [FI]: 8.58325e-7
- nitrogen dioxide, Emissions to air, unspecified [FR]: 9.78906e-6
- nitrogen dioxide, Emissions to air, unspecified [GB]: 9.72795e-6
- nitrogen dioxide, Emissions to air, unspecified [GR]: 1.10662e-6
- nitrogen dioxide, Emissions to air, unspecified [HR]: 3.55814e-7
- nitrogen dioxide, Emissions to air, unspecified [HU]: 9.32766e-7
- nitrogen dioxide, Emissions to air, unspecified [IE]: 1.00477e-6
- nitrogen dioxide, Emissions to air, unspecified [IT]: 8.37533e-6
- nitrogen dioxide, Emissions to air, unspecified [LT]: 2.93388e-7
- nitrogen dioxide, Emissions to air, unspecified [LU]: 2.03671e-7
- nitrogen dioxide, Emissions to air, unspecified [LV]: 1.73e-7
- nitrogen dioxide, Emissions to air, unspecified [MD]: 9.15375e-8
- nitrogen dioxide, Emissions to air, unspecified [MK]: 1.01849e-7
- nitrogen dioxide, Emissions to air, unspecified [NL]: 3.10461e-6
- nitrogen dioxide, Emissions to air, unspecified [NO]: 1.17519e-6
- nitrogen dioxide, Emissions to air, unspecified [PL]: 3.57306e-6
- nitrogen dioxide, Emissions to air, unspecified [PT]: 1.12743e-6
- nitrogen dioxide, Emissions to air, unspecified [RO]: 1.56523e-6
- nitrogen dioxide, Emissions to air, unspecified [SE]: 1.69578e-6
- nitrogen dioxide, Emissions to air, unspecified [SI]: 2.40147e-7
- nitrogen dioxide, Emissions to air, unspecified [SK]: 5.63661e-7
- nitrogen dioxide, Emissions to air, unspecified [UA]: 1.65266e-6

## Impact indicators
- Eutrophication marine: 6.20086e-5
- Ecotoxicity, freshwater: 0.00110715
- Water use: -0.0548112
- Climate change: 0.0600364
- Human toxicity, non-cancer: 1.3344e-13
- EF-particulate Matter: 3.23677e-10
- Photochemical ozone formation - human health: 7.90446e-5
- Acidification: 5.35951e-5
- Eutrophication, terrestrial: 0.000146547
- Eutrophication, freshwater: 3.25e-6
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
## Deviations from the LCI method principle
The background data use the \xe2\x80\x9cRecycled content cut-off\xe2\x80\x9d approach to allocate end-of-life by-products and secondary materials. This allocation is explained in the description of the recycled content system model (http://www.ecoinvent.org/database/system-models-in-ecoinvent-3/cut-off-system-model/allocation-cut-off-by-classification.html).

## Deviations from the LCI method approaches
Background data:
- the \xe2\x80\x9cRecycled content cut-off\xe2\x80\x9d approach to allocate end-of-life by-products and secondary materials. This allocation is explained in the description of the recycled content system model (http://www.ecoinvent.org/database/system-models-in-ecoinvent-3/cut-off-system-model/allocation-cut-off-by-classification.html). The ecoinvent database mostly relies on “Allocation – market values” apart for few exceptions particularly in the energy sector. ecoinvent energy data is replaced with EF3.0 core data as per the EF guidelines version 2.0.
OR
- EF compliant data

## Modelling constants
All modelling constants follow the requirements listed in the Tender Specifications ENV.B.1/SER/2016/0038vl. Completeness: All known environmental flows are included. All known resource uses and emissions are listed in the inventory. Water use: water use is modelled at country level using separate flows for water withdrawal, water release and water evaporation. Cut-off: All known environmental flows are included. All known resource uses and emissions are listed in the inventory. Handling multi-functional processes: the following PEF multi- functionality decision hierarchy is applied for resolving all multi- functionality problems: (1) subdivision or system expansion; (2) allocation based on a relevant underlying physical relationship (substitution may apply here); (3) allocation based on some other relationship. Direct land use change: GHG emissions from direct LUC allocated to good/service for 20 years after the LUC occurs, with IPCC default values. Carbon storage and delayed emissions: credits associated with temporary (carbon) storage or delayed emissions up to 300 years are not be considered. Emissions off-setting: are not included. Capital goods (including infrastructures) and their End of life: they are included. System boundaries: system boundaries include all processes linked to the product supply chain (e.g. maintenance). Time period: emissions and removals are modelled as if released or removed at the beginning of the assessment method. Fossil and biogenic carbon emissions and removals: removals and emissions are modelled as follows: All GHG emissions from fossil fuels (including peat and limestone) are modelled consistently with the most updated ILCD list of elementary flows. The non-fossil (biogenic) carbon flows are modelled consistently with the most updated ILCD list of elementary flows.

## Cut-off and completeness
All known environmental flows are included. All known resource uses and emissions are listed in the inventory. The dataset dry mass balance has been checked to ensure the inventory is complete. Capital goods (e.g. infrastructure) and their end-of-life are included.

## Data selection and combination
These datasets include, in both their foreground and background data, links to EF3.0 compliant data.
The relevant background data on energy, transport, and End of Life are from the LCDN data node (http://lcdn.thinkstep.com/Node/).
All other background data in the supply of this product for which no EF3.0 process was available are from ecoinvent v3.7 database (www.ecoinvent.org) or other data sources.

## Data treatment and extrapolations
Several data sources have been used to model the inventory.

## Use advice
This data set is a supporting sub-data set and must be used exclusively as sub-data set of its corresponding level-1 partly disaggregated data set (see “General comment” field for exact name and UUID).

## Data sources
- Background Data for Representative products and organisations. EF 3.0 compliant (data stock)
- RISE Research Institutes of Sweden
- Personal communication with industry reference groups (2021)

## Intended applications
Implementation of regular Product Environmental Footprint (PEF) studies and Organisation Environmental Footprint (OEF) studies exclusively under the specified Product groups and sectors as defined in the Product Environmental Footprint Category Rules (PEFCR) and Organisation Environmental Footprint Sectorial Rules (OEFSR) listed in http://ec.europa.eu/environment/eussd/smgp/PEFCR_OEFSR.htm
