# emerizing; sueding; production mix, at plant; service

Dataset: ILCD process, Partly terminated system
Geography: GLO
Reference year: 2021
Valid until: 2024
Classification: Systems / Textiles, furnitures and other interiors
LCI method principle: Attributional
LCI method approaches: Allocation - market value
Completeness: All relevant flows quantified
Project: Provision of process-based 3.0 Environmental Footprint-compliant life cycle inventory datasets - Apparel 2 - contract number 070201/2020/840292/SER/ENV.B.1
Generated by: Life Cycle Indonesia
Owner: PRé Sustainability B.V.
Compliance: ILCD Data Network - Entry-level; Suggestions for updating the PEF method 2019; ISO 14040 Environmental Management – Life Cycle Assessment – Principles and Framework, 2006; ISO 14044:2006. Environmental Management – Life Cycle Assessment – Requirements and guidelines.; Environmental Footprint 3.1
Review: Dependent internal review by Avraam Symeonidis, Emilia Moreno Ruiz; Independent review panel by Fábio Valebona
Data quality: Overall quality: Good; Time representativeness: Very good; Geographical representativeness: Good; Technological representativeness: Good; Precision: Good; Methodological appropriateness and consistency: Not applicable
Amounts: no units in this file; such an amount is in the reference unit of its flow, which a separate flow dataset defines
copyright: true
licenseType: Free of charge for some user types or use types
accessRestrictions: Free of charge for all final users implementing a regular Product Environmental Footprint (PEF) studies and Organisation Environmental Footprint (OEF) studies exclusively under the specified Product groups and sectors as defined in the Product Environmental Footprint Category Rules (PEFCR) and Organisation Environmental Footprint Sectorial Rules (OEFSR) listed in http://ec.europa.eu/environment/eussd/smgp/PEFCR_OEFSR.htm and in accordance with the terms and conditions of the EULA (available at https://ecoinvent.lca-data.com/) exclusively until 31st December 2024. Any use of this dataset or any derivative data not within the specific context of one of the PEF/OEF projects or after the end of 2024 is not permitted.

## General comment
Notice: this data set supersedes the EF3.0-compliant version (see link under "preceding data set version" below calculated with the EF3.0). The life cycle inventory is not changed from the original EF3.0 data set. The LCIA results are calculated based on the EF3.1 methods which provide updated characterisation factors in the following impact categories: Climate Change, Ecotoxicity freshwater, Photochemical Ozone Formation, Acidification, Human Toxicity non-cancer, and Human Toxicity cancer. The review report and the data quality ratings refer to the original results. The data set has been updated by the European Commission on the basis of the original EF3.0 data set delivered by the data provider.Sueding or emerizing is a process in which fabric at open width is passed over one or more rotating emery-covered rollers to produce a suede-like finish. Sueding operation is often carried out before the raising process to reduce the friction between the fibers making up the cloth and consequently to facilitate the extraction of the fiber end. Sueding is performed on the surfaces of woven and knitted fabrics and even laminated fabrics. The sueding process is normally carried out on both sides of the fabric and modifies the appearance and the final hand of the cloth. The major change in the fabric after emerizing is the production of a very low pile, that is, short fibers protruding from the fabric surface. The handle will vary according to the type of fiber, the fiber linear density, and the sueding intensity on the fabric. The fabrics made up of microfibers should be emerized prior to dyeing.

Kumar, R. Senthil. 2014. Textiles for Industrial Applications Florida: Taylor & Francis Group. pp 107-108

## Technology and included processes
The sueding machine is made up of some rotating rollers coated with abrasive paper, which emerise the cloth and produce a more or less marked effect depending upon the pressure exerted on the fabric by the abrasive rollers. The abrasive paper used can vary according to the desired sueding degree and must be replaced after a given number of operating hours, or when it does not properly carry out suitably the sueding function. In some cases, it is possible to use also metal rollers with the surface coated with uneven and rough grains or pumice rollers performing an excellent sueding action on both dry or wet fabrics. (Kiron, 2014)

Emerizing machines can be classified into multiroller machine and single-roller machine. In the multiroller emerizing machine, the fabric is tensioned over four to seven rollers with emery papered rollers that turn against or with the direction of the fabric. The single-roller emerizing machine is less productive compared to multiroller emerizing machine. (Kumar, 2014)

The activity starts when the raw materials enter the process. Materials entering the process are included as well as energy uses and infrastructure. There is no direct emission to air since the emission comes from electricity usage, while the waste comes from waste lube oil, abrasive paper and its mineral. In the model, enegy sources of machines used solely from electricity. The consumption of lubricating oil using a nonwoven hot calendering machines as a proxy. Amount of abrasive paper was based on assumptions for 400G abrasive grit. The GSM of the fabric is assumed to be 315 GSM (polyester, acrylic fabric)

Kiron, Mazharul Islam. 2014. Sueding Finishing Process: Mechanism, Application and Benefits, https://textilelearner.net/sueding-finishing-process/, Textile Learner
Kumar, R. Senthil. 2014. Textiles for Industrial Applications Florida: Taylor & Francis Group. pp 107-108

## Parameters
- kg_0: 1.07014e-6
  Mass in kg, for lubricating oil // lubricants at refinery // cn; Articulated lorry transport, Euro 4, Total weight >32 t; EU+EFTA+UK
- km_0: 1000
  Distance in km, for lubricating oil // lubricants at refinery // cn; Articulated lorry transport, Euro 4, Total weight >32 t; EU+EFTA+UK
- kg_km_0: 0.00107014; = kg_0*km_0
  Transport amount in km*km, for lubricating oil // lubricants at refinery // cn; Articulated lorry transport, Euro 4, Total weight >32 t; EU+EFTA+UK
- kg_1: 2.57202e-7
  Mass in kg, for lubricating oil // lubricants at refinery // raf; Articulated lorry transport, Euro 4, Total weight >32 t; EU+EFTA+UK
- km_1: 1000
  Distance in km, for lubricating oil // lubricants at refinery // raf; Articulated lorry transport, Euro 4, Total weight >32 t; EU+EFTA+UK
- kg_km_1: 0.000257202; = kg_1*km_1
  Transport amount in km*km, for lubricating oil // lubricants at refinery // raf; Articulated lorry transport, Euro 4, Total weight >32 t; EU+EFTA+UK
- kg_2: 6.74006e-6
  Mass in kg, for lubricating oil // lubricants at refinery // ras w/o cn; Articulated lorry transport, Euro 4, Total weight >32 t; EU+EFTA+UK
- km_2: 1000
  Distance in km, for lubricating oil // lubricants at refinery // ras w/o cn; Articulated lorry transport, Euro 4, Total weight >32 t; EU+EFTA+UK
- kg_km_2: 0.00674006; = kg_2*km_2
  Transport amount in km*km, for lubricating oil // lubricants at refinery // ras w/o cn; Articulated lorry transport, Euro 4, Total weight >32 t; EU+EFTA+UK
- kg_3: 5.26115e-6
  Mass in kg, for lubricating oil // lubricants at refinery // rna; Articulated lorry transport, Euro 4, Total weight >32 t; EU+EFTA+UK
- km_3: 1000
  Distance in km, for lubricating oil // lubricants at refinery // rna; Articulated lorry transport, Euro 4, Total weight >32 t; EU+EFTA+UK
- kg_km_3: 0.00526115; = kg_3*km_3
  Transport amount in km*km, for lubricating oil // lubricants at refinery // rna; Articulated lorry transport, Euro 4, Total weight >32 t; EU+EFTA+UK
- kg_4: 6.26929e-7
  Mass in kg, for lubricating oil // lubricants at refinery // rsa; Articulated lorry transport, Euro 4, Total weight >32 t; EU+EFTA+UK
- km_4: 1000
  Distance in km, for lubricating oil // lubricants at refinery // rsa; Articulated lorry transport, Euro 4, Total weight >32 t; EU+EFTA+UK
- kg_km_4: 0.000626929; = kg_4*km_4
  Transport amount in km*km, for lubricating oil // lubricants at refinery // rsa; Articulated lorry transport, Euro 4, Total weight >32 t; EU+EFTA+UK
- kg_5: 5.57347e-6
  Mass in kg, for lubricating oil // lubricants at refinery // ru; Articulated lorry transport, Euro 4, Total weight >32 t; EU+EFTA+UK
- km_5: 1000
  Distance in km, for lubricating oil // lubricants at refinery // ru; Articulated lorry transport, Euro 4, Total weight >32 t; EU+EFTA+UK
- kg_km_5: 0.00557347; = kg_5*km_5
  Transport amount in km*km, for lubricating oil // lubricants at refinery // ru; Articulated lorry transport, Euro 4, Total weight >32 t; EU+EFTA+UK
- kg_6: 3.43318e-6
  Mass in kg, for lubricating oil // lubricants at refinery // eu+efta+uk; Articulated lorry transport, Euro 4, Total weight >32 t; EU+EFTA+UK
- km_6: 999.073
  Distance in km, for lubricating oil // lubricants at refinery // eu+efta+uk; Articulated lorry transport, Euro 4, Total weight >32 t; EU+EFTA+UK
- kg_km_6: 0.00343; = kg_6*km_6
  Transport amount in km*km, for lubricating oil // lubricants at refinery // eu+efta+uk; Articulated lorry transport, Euro 4, Total weight >32 t; EU+EFTA+UK
- kg_7: 0.000206488
  Mass in kg, for kraft paper, uncoated // kraft paper, uncoated // eu+efta+uk; Articulated lorry transport, Euro 4, Total weight >32 t; EU+EFTA+UK
- km_7: 997.637
  Distance in km, for kraft paper, uncoated // kraft paper, uncoated // eu+efta+uk; Articulated lorry transport, Euro 4, Total weight >32 t; EU+EFTA+UK
- kg_km_7: 0.206; = kg_7*km_7
  Transport amount in km*km, for kraft paper, uncoated // kraft paper, uncoated // eu+efta+uk; Articulated lorry transport, Euro 4, Total weight >32 t; EU+EFTA+UK
- kg_8: 0.00011012
  Mass in kg, for aluminium oxide // aluminium oxide production // glo; Articulated lorry transport, Euro 4, Total weight >32 t; EU+EFTA+UK
- km_8: 998.908
  Distance in km, for aluminium oxide // aluminium oxide production // glo; Articulated lorry transport, Euro 4, Total weight >32 t; EU+EFTA+UK
- kg_km_8: 0.11; = kg_8*km_8
  Transport amount in km*km, for aluminium oxide // aluminium oxide production // glo; Articulated lorry transport, Euro 4, Total weight >32 t; EU+EFTA+UK
- kg_9: 0.000206488
  Mass in kg, for paper and paperboard waste to landfill // landfill of paper and paperboard waste // eu+efta+uk; Articulated lorry transport, Euro 4, Total weight >32 t; EU+EFTA+UK
- km_9: 70
  Distance in km, for paper and paperboard waste to landfill // landfill of paper and paperboard waste // eu+efta+uk; Articulated lorry transport, Euro 4, Total weight >32 t; EU+EFTA+UK
- kg_km_9: 0.0144542; = kg_9*km_9
  Transport amount in km*km, for paper and paperboard waste to landfill // landfill of paper and paperboard waste // eu+efta+uk; Articulated lorry transport, Euro 4, Total weight >32 t; EU+EFTA+UK
- kg_10: 1.07014e-6
  Mass in kg, for lubricating oil // lubricants at refinery // cn; Transoceanic ship, containers; GLO
- km_10: 18000
  Distance in km, for lubricating oil // lubricants at refinery // cn; Transoceanic ship, containers; GLO
- kg_km_10: 0.0192626; = kg_10*km_10
  Transport amount in km*km, for lubricating oil // lubricants at refinery // cn; Transoceanic ship, containers; GLO
- kg_11: 2.57202e-7
  Mass in kg, for lubricating oil // lubricants at refinery // raf; Transoceanic ship, containers; GLO
- km_11: 18000
  Distance in km, for lubricating oil // lubricants at refinery // raf; Transoceanic ship, containers; GLO
- kg_km_11: 0.00462963; = kg_11*km_11
  Transport amount in km*km, for lubricating oil // lubricants at refinery // raf; Transoceanic ship, containers; GLO
- kg_12: 6.74006e-6
  Mass in kg, for lubricating oil // lubricants at refinery // ras w/o cn; Transoceanic ship, containers; GLO
- km_12: 18000
  Distance in km, for lubricating oil // lubricants at refinery // ras w/o cn; Transoceanic ship, containers; GLO
- kg_km_12: 0.121321; = kg_12*km_12
  Transport amount in km*km, for lubricating oil // lubricants at refinery // ras w/o cn; Transoceanic ship, containers; GLO
- kg_13: 5.26115e-6
  Mass in kg, for lubricating oil // lubricants at refinery // rna; Transoceanic ship, containers; GLO
- km_13: 18000
  Distance in km, for lubricating oil // lubricants at refinery // rna; Transoceanic ship, containers; GLO
- kg_km_13: 0.0947007; = kg_13*km_13
  Transport amount in km*km, for lubricating oil // lubricants at refinery // rna; Transoceanic ship, containers; GLO
- kg_14: 3.43318e-6
  Mass in kg, for lubricating oil // lubricants at refinery // eu+efta+uk; Transoceanic ship, containers; GLO
- km_14: 17971.7
  Distance in km, for lubricating oil // lubricants at refinery // eu+efta+uk; Transoceanic ship, containers; GLO
- kg_km_14: 0.0617; = kg_14*km_14
  Transport amount in km*km, for lubricating oil // lubricants at refinery // eu+efta+uk; Transoceanic ship, containers; GLO
- kg_15: 6.26929e-7
  Mass in kg, for lubricating oil // lubricants at refinery // rsa; Transoceanic ship, containers; GLO
- km_15: 18000
  Distance in km, for lubricating oil // lubricants at refinery // rsa; Transoceanic ship, containers; GLO
- kg_km_15: 0.0112847; = kg_15*km_15
  Transport amount in km*km, for lubricating oil // lubricants at refinery // rsa; Transoceanic ship, containers; GLO
- kg_16: 5.57347e-6
  Mass in kg, for lubricating oil // lubricants at refinery // ru; Transoceanic ship, containers; GLO
- km_16: 18000
  Distance in km, for lubricating oil // lubricants at refinery // ru; Transoceanic ship, containers; GLO
- kg_km_16: 0.100322; = kg_16*km_16
  Transport amount in km*km, for lubricating oil // lubricants at refinery // ru; Transoceanic ship, containers; GLO
- kg_17: 0.000206488
  Mass in kg, for kraft paper, uncoated // kraft paper, uncoated // eu+efta+uk; Transoceanic ship, containers; GLO
- km_17: 17967.1
  Distance in km, for kraft paper, uncoated // kraft paper, uncoated // eu+efta+uk; Transoceanic ship, containers; GLO
- kg_km_17: 3.71; = kg_17*km_17
  Transport amount in km*km, for kraft paper, uncoated // kraft paper, uncoated // eu+efta+uk; Transoceanic ship, containers; GLO
- kg_18: 0.00011012
  Mass in kg, for aluminium oxide // aluminium oxide production // glo; Transoceanic ship, containers; GLO
- km_18: 17980.3
  Distance in km, for aluminium oxide // aluminium oxide production // glo; Transoceanic ship, containers; GLO
- kg_km_18: 1.98; = kg_18*km_18
  Transport amount in km*km, for aluminium oxide // aluminium oxide production // glo; Transoceanic ship, containers; GLO

## Reference product
- emerizing // emerizing // glo: 1

## Inputs
- Electricity from Electricity grid mix 1kV-60kV - AU: 0.0017
- Electricity from Electricity grid mix 1kV-60kV - EU+EFTA+UK: 0.0244
- Electricity from Electricity grid mix 1kV-60kV - NZ: 0.0003
- Electricity from Electricity grid mix 1kV-60kV - RAF: 0.0053
- Electricity from Electricity grid mix 1kV-60kV - RNA: 0.0357
- Electricity from Electricity grid mix 1kV-60kV - RSA: 0.0121
- Electricity from Electricity grid mix 1kV-60kV - RU: 0.0071
- Transport of lubricating oil // lubricants at refinery // cn by Articulated lorry transport, Euro 4, Total weight >32 t - EU+EFTA+UK: 0.00107014; = kg_km_0
- Transport of lubricating oil // lubricants at refinery // raf by Articulated lorry transport, Euro 4, Total weight >32 t - EU+EFTA+UK: 0.000257202; = kg_km_1
- Transport of lubricating oil // lubricants at refinery // ras w/o cn by Articulated lorry transport, Euro 4, Total weight >32 t - EU+EFTA+UK: 0.00674006; = kg_km_2
- Transport of lubricating oil // lubricants at refinery // rna by Articulated lorry transport, Euro 4, Total weight >32 t - EU+EFTA+UK: 0.00526115; = kg_km_3
- Transport of lubricating oil // lubricants at refinery // rsa by Articulated lorry transport, Euro 4, Total weight >32 t - EU+EFTA+UK: 0.000626929; = kg_km_4
- Transport of lubricating oil // lubricants at refinery // ru by Articulated lorry transport, Euro 4, Total weight >32 t - EU+EFTA+UK: 0.00557347; = kg_km_5
- Transport of lubricating oil // lubricants at refinery // eu+efta+uk by Articulated lorry transport, Euro 4, Total weight >32 t - EU+EFTA+UK: 0.00343; = kg_km_6
- Transport of kraft paper, uncoated // kraft paper, uncoated // eu+efta+uk by Articulated lorry transport, Euro 4, Total weight >32 t - EU+EFTA+UK: 0.206; = kg_km_7
- Transport of aluminium oxide // aluminium oxide production // glo by Articulated lorry transport, Euro 4, Total weight >32 t - EU+EFTA+UK: 0.11; = kg_km_8
- Transport of paper and paperboard waste to landfill // landfill of paper and paperboard waste // eu+efta+uk by Articulated lorry transport, Euro 4, Total weight >32 t - EU+EFTA+UK: 0.0144542; = kg_km_9
- Transport of lubricating oil // lubricants at refinery // cn by Transoceanic ship, containers - GLO: 0.0192626; = kg_km_10
- Transport of lubricating oil // lubricants at refinery // raf by Transoceanic ship, containers - GLO: 0.00462963; = kg_km_11
- Transport of lubricating oil // lubricants at refinery // ras w/o cn by Transoceanic ship, containers - GLO: 0.121321; = kg_km_12
- Transport of lubricating oil // lubricants at refinery // rna by Transoceanic ship, containers - GLO: 0.0947007; = kg_km_13
- Transport of lubricating oil // lubricants at refinery // eu+efta+uk by Transoceanic ship, containers - GLO: 0.0617; = kg_km_14
- Transport of lubricating oil // lubricants at refinery // rsa by Transoceanic ship, containers - GLO: 0.0112847; = kg_km_15
- Transport of lubricating oil // lubricants at refinery // ru by Transoceanic ship, containers - GLO: 0.100322; = kg_km_16
- Transport of kraft paper, uncoated // kraft paper, uncoated // eu+efta+uk by Transoceanic ship, containers - GLO: 3.71; = kg_km_17
- Transport of aluminium oxide // aluminium oxide production // glo by Transoceanic ship, containers - GLO: 1.98; = kg_km_18
- Electricity from Electricity grid mix 1kV-60kV - CN: 0.0365998
- Electricity from Electricity grid mix 1kV-60kV - RAS w/o CN: 0.0401002
- emerizing // emerizing // glo, blackbox: 1
- emerizing // emerizing // glo, elementary: 1

## Impact indicators
- Eutrophication marine: 2.82794e-5
- Ecotoxicity, freshwater: 0.464623
- Land use: 0.0930664
- Water use: 0.0103554
- Resource use, minerals and metals: 1.51803e-8
- Resource use, fossils: 0.420656
- Climate change: 0.0319644
- Ozone depletion: 2.02518e-11
- Human toxicity, cancer: 1.78014e-11
- Human toxicity, non-cancer: 1.88549e-10
- EF-particulate Matter: 7.54789e-9
- Ionising radiation, human health: 0.00229225
- Photochemical ozone formation - human health: 8.6306e-5
- Acidification: 0.0002038
- Eutrophication, terrestrial: 0.000307111
- Eutrophication, freshwater: 8.76157e-8

## Deviations from the LCI method principle
The background data uses:
- the \xe2\x80\x9cRecycled content cut-off\xe2\x80\x9d approach to allocate end-of-life by-products and secondary materials. This allocation is explained in the description of the recycled content system model (http://www.ecoinvent.org/database/system-models-in-ecoinvent-3/cut-off-system-model/allocation-cut-off-by-classification.html).
OR
- EF compliant data

## Deviations from the LCI method approaches
Background data:
- the \xe2\x80\x9cRecycled content cut-off\xe2\x80\x9d approach to allocate end-of-life by-products and secondary materials. This allocation is explained in the description of the recycled content system model (http://www.ecoinvent.org/database/system-models-in-ecoinvent-3/cut-off-system-model/allocation-cut-off-by-classification.html). The ecoinvent database mostly relies on “Allocation – market values” apart for few exceptions particularly in the energy sector. ecoinvent energy data is replaced with EF3.0 core data as per the EF guidelines version 2.0.
OR
- EF compliant data

## Modelling constants
All modelling constants follow the requirements listed in the Tender Specifications 070201/2020/SER/ENV.B1. Completeness: There are no intentional cut-offs in the inventory no matter how small their contribution to all the EF impact categories is. Eventual cut-offs are in compliance with the Guide for EF compliant data sets (JRC 2020), i.e. only if below the 3% cut-off rule. Water use: water use is modelled at country level using separate flows for water withdrawal, water release and water evaporation. Handling multi-functional processes: the following PEF multi- functionality decision hierarchy is applied for resolving all multi- functionality problems: (1) subdivision or system expansion; (2) allocation based on a relevant underlying physical relationship (substitution may apply here); (3) allocation based on some other relationship. Direct land use change: GHG emissions from direct LUC allocated to good/service for 20 years after the LUC occurs, with IPCC default values. Carbon storage and delayed emissions: credits associated with temporary (carbon) storage or delayed emissions up to 300 years are not be considered. Emissions off-setting: are not included. Capital goods (including infrastructures) and their End of life: they are included. System boundaries: system boundaries include all processes linked to the product supply chain (e.g. maintenance). Time period: emissions and removals are modelled as if released or removed at the beginning of the assessment method. Fossil and biogenic carbon emissions and removals: removals and emissions are modelled as follows: All GHG emissions from fossil fuels (including peat and limestone) are modelled consistently with the most updated ILCD list of elementary flows. The non-fossil (biogenic) carbon flows are modelled consistently with the most updated ILCD list of elementary flows.

## Cut-off and completeness
There are no intentional cut-offs in the inventory no matter how small their contribution to all the EF impact categories is. Eventual cut-offs are in compliance with the Guide for EF compliant data sets (JRC 2020), i.e. only if below the 3% cut-off rule. The dataset dry mass and water balance has been checked to ensure the inventory is complete. Capital goods (e.g. infrastructure) and their end-of-life are included.

## Data selection and combination
These datasets include, in both their foreground and background data, links to EF3.0 compliant data.
The relevant background data on energy, transport, and End of Life are from the LCDN data node (http://lcdn.thinkstep.com/Node/).
All other background data in the supply of this product for which no EF3.0 process was available are from ecoinvent v3.7 database (www.ecoinvent.org) or other data sources.

## Data treatment and extrapolations
Several data sources have been used to model the inventory.

## Review details
Internal reviews have been asked to review the plausibility of the unit process, LCIA scores, and DQRs. Internal reviewers have also been asked to review the data for EF compliancy. The consortium is therefore responsible for aspects such as compliancy with the ILCD format, including validation in Look@LCI, and nomenclature.
Internal reviwers have been asked to judge based on the process name, that the unit process models in a complete and representative way the process in the requested location. The review encompassed the plausability of:
- exchanges with nature (elementary flows) as well as exchanges such as product and waste flows.
- meta information (general comment, technology comment, system boundaries, allocation, cut-off rules, etc.). Reviewers were asked to judge if the provided information is enough to understand the content of the process.
- LCIA scores
- DQRs including precision, technology, time and geography. As well as the overall DQR.
External reviewers have been asked to provide their expertise in the field of interest. External reviewers have been asked to review the unit process, including eventual methodological choices, the LCIA scores (provided with contribution scores as well), and DQRs. External reviewers have been provided all the information in a tool developed by the consortium for the purpose of this project.
External reviewers have been asked to judge based on the process name, that the unit process models in a complete and representative way the process in the requested location. The review encompassed:
- Plausability and completeness of exchanges with nature (elementary flows) as well as exchanges such as product and waste flows.
- Review of meta information (general comment, technology comment, system boundaries, allocation, cut-off rules, etc.). Reviewers were asked to judge if the provided information is enough to understand the content of the process.
- Review of properties (biogenic carbon and water content).
- Review of allocation keys.
- Plausability of LCIA scores calculated by the consortium.
- Plausability of DQRs including precision, technology, time and geography. As well as the overall DQR.

## Data sources
- Background Data for Representative products and organisations. EF 3.0 compliant (data stock)
- Hans Abrasive (2021) Seamless Diamond Strips for Textile Sueding Eliminate Breakage, https://www.hansuperabrasive.com/diamond-abrasive-flexible-belt/53495481.html, Hans Superabrasive Material Co., Ltd. Shandong, China
- Woodcraft (2018) TRUE GRITS: WHAT YOU NEED TO KNOW ABOUT SANDPAPER FOR A FASTER, FINER FINISH, https://www.woodcraft.com/blog_entries/true-grits-what-you-need-to-know-about-sandpaper-for-a-faster-finer-finish, Woodcraft Supply, LLC, West Virginia, United States
- Dana (2021) Aluminium Oxides, https://nanopartikel.info/en/knowledge/materials/aluminium-oxides/, DaNa4.0, German
- Technical Bulletin (1992) SUEDING OF COTTON FABRICS, https://www.cottoninc.com/wp-content/uploads/2017/12/TRI-3010-Sueding-of-Cotton-Fabrics.pdf, North Carolina, United States
- Abrasive Resource (2011) Choosing the Correct Backing for Your Sandpaper & Abrasive Products, https://www.abrasiveresource.com/Default.asp, Abrasive Resource, North Carolina, United States http://abrasiveresource.blogspot.com/2011/08/choosing-correct-backing-for-your.html
- Lebon Machinery (2021), Nonwoven Ironing Machine, Catalog and Company Massages, Qingdao Lebon Industry Co., Ltd., China
- UN Data (2018) Statistics Data for Lubricants Productions, http://data.un.org/Data.aspx?q=Lubricants&d=EDATA&f=cmID%3aLU, United Nations Statistics Division, Global
- F2F (2021) Suede Fabric : 130 gsm to 500 gsm, 100% Polyester, 70% Acrylic / 30% Polyester, Dyed, Warp knitted Supplier, https://www.fibre2fashion.com/fabrics/suede-fabric-suppliers-1344322, Fibre2Fashion, Wuhan Jundor Trading Co., Ltd., China
- ZGL (2021) MB342E Sueding machine, http://en.jsyyfj.com/product/16476.htm, Jiangsu Yingyou Textile Machinery CO.,LTD, China

## Intended applications
Implementation of regular Product Environmental Footprint (PEF) studies and Organisation Environmental Footprint (OEF) studies exclusively under the specified Product groups and sectors as defined in the Product Environmental Footprint Category Rules (PEFCR) and Organisation Environmental Footprint Sectorial Rules (OEFSR) listed in http://ec.europa.eu/environment/eussd/smgp/PEFCR_OEFSR.htm
