# foaming, free, by coating (1 side); technology mix; production mix, at plant; 100% active substance

Dataset: ILCD process, Partly terminated system
Geography: GLO
Reference year: 2021
Valid until: 2024
Classification: Systems / Textiles, furnitures and other interiors
LCI method principle: Attributional
LCI method approaches: Allocation - market value
Completeness: All relevant flows quantified
Project: Provision of process-based 3.0 Environmental Footprint-compliant life cycle inventory datasets - Apparel 1 - contract number 070201/2020/840291/SER/ENV.B.1
Generated by: Life Cycle Indonesia
Owner: PRé Sustainability B.V.
Compliance: ILCD Data Network - Entry-level; Suggestions for updating the PEF method 2019; ISO 14040 Environmental Management – Life Cycle Assessment – Principles and Framework, 2006; ISO 14044:2006. Environmental Management – Life Cycle Assessment – Requirements and guidelines.; Environmental Footprint 3.1
Review: Dependent internal review by Avraam Symeonidis, Emilia Moreno Ruiz; Independent review panel by Madhuri Nigam
Data quality: Overall quality: Good; Time representativeness: Very good; Geographical representativeness: Fair; Technological representativeness: Very good; Precision: Good; Methodological appropriateness and consistency: Not applicable
Amounts: no units in this file; such an amount is in the reference unit of its flow, which a separate flow dataset defines
copyright: true
licenseType: Free of charge for some user types or use types
accessRestrictions: Free of charge for all final users implementing a regular Product Environmental Footprint (PEF) studies and Organisation Environmental Footprint (OEF) studies exclusively under the specified Product groups and sectors as defined in the Product Environmental Footprint Category Rules (PEFCR) and Organisation Environmental Footprint Sectorial Rules (OEFSR) listed in http://ec.europa.eu/environment/eussd/smgp/PEFCR_OEFSR.htm and in accordance with the terms and conditions of the EULA (available at https://ecoinvent.lca-data.com/) exclusively until 31st December 2024. Any use of this dataset or any derivative data not within the specific context of one of the PEF/OEF projects or after the end of 2024 is not permitted.

## General comment
Notice: this data set supersedes the EF3.0-compliant version (see link under "preceding data set version" below calculated with the EF3.0). The life cycle inventory is not changed from the original EF3.0 data set. The LCIA results are calculated based on the EF3.1 methods which provide updated characterisation factors in the following impact categories: Climate Change, Ecotoxicity freshwater, Photochemical Ozone Formation, Acidification, Human Toxicity non-cancer, and Human Toxicity cancer. The review report and the data quality ratings refer to the original results. The data set has been updated by the European Commission on the basis of the original EF3.0 data set delivered by the data provider.Foam technology in the processing of textiles, as a low add-on technology, uses foam to apply chemicals and colorants to the textiles, resulting in large water and energy savings owing to the replacement of water with air. Foam technology has attracted interest in the textiles field; this technology allows single-side treatment , accelerates production with a reduced drying time, lowers the demand for chemicals, and eliminates migration (Yu, et al., 2014). In foam dyeing, foam is obtained from an aqueous solution and then spread on a fabric (Fibre2Fashion, 2013).

Reactive dye is a class of colored synthetic organic chemicals that attach to textile fibers via a chemical reaction that forms a covalent bond. Reactive dyes are the most permanent of all dye types and are the most common type of dye used on cotton and other cellulose fibers (Bomgardner, 2018). Application of foam for dyeing can be done with several technique. It can be applied either to one side or both sides of fabric. Doctor blade or knife, doctor roller, or pressure or suction can be used to apply foam to one side of fabric. The foam would be applied as a uniform layer to the fabric surface by a doctor blade or rolleer and the thickness of foam layer is controlled by adjusting height of the doctor blade or roller (Walt & Rensburg, 1984).

Bomgardner, Melody M., (2018). These new textile dyeing methods could make fashion more sustainable, https://cen.acs.org/business/consumer-products/new-textile-dyeing-methods-make/96/i29, c&en
Fibre2Fashion (2013), Foam Dyeing - an energy saving solution to dyeing, https://www.fibre2fashion.com/industry-article/7000/foam-dyeing--an-energy-saving-solution-to-dyeing, Fibre2Fashion Pvt. Ltd. USA.
Walt, G.H.J Van Der and Rensburg, N.H.H Van(1984) A review of low add-on and foam application techniques, South African Wool And Textile Research Institute Of The CSIR, South Africa
Yu. H, Wang Y.F., Zhong Y., Mao Z., Tan S., (2014), Foam properties and application in dyeing cotton fabrics with reactive dyes, doi: 10.1111/cote.12088, Key Laboratory of Science and Technology of Eco-Textile (Ministry of Education), Sanghai: Donghua University, China

## Technology and included processes
In this model, the foam aplicator for 1 side dyeing is doctor blade coating machine. As the industrial specification of machine is limited, lab-scale machine is used as a proxy. foam generator is used to generate foam mechanically. Machine for steam fixation and drying process is proxy to stenter, drying, and curing machine as the nature of the process is quite similiar. Treatment process before dyeing (Pre-dyeing process) and washing process after dyeing are not included in the model.

The dye used in this model is recipe for reactive dye. One of the example of reactive dye is CI RED Reactive 120 (Yu, et al., 2014), and can be classfied as organic chemical as most dyes contains carbon. Several auxiliaries chemicals also needed to make the dyeing foam.

The model represents the process itself, hence the input raw materials are not included in the model. The user will use this dataset along with the input raw materials. Energy uses, infrastructure, steam and compressed air consumption are included. There is no direct emission to soil, emission to air resulted from the drying process and it is assumed all water evaporate while dye and chemicals generated as product. Emission to water resulted from cooling water for foam generator and the hazardous waste comes from waste lube oil. In the model, energy sources of machines used solely from electricity. The consumption of lubricating oil for foam generator and stenter using a thermobonding oven as a proxy, while lubricating oil for doctor blade coating machine is not accounted in the model as it is a lab-scale machine hence industrial machine cannot be used as a proxy.

Yu. H, Wang Y.F., Zhong Y., Mao Z., Tan S., (2014), Foam properties and application in dyeing cotton fabrics with reactive dyes, doi: 10.1111/cote.12088, Key Laboratory of Science and Technology of Eco-Textile (Ministry of Education), Sanghai: Donghua University, China

## Parameters
- kg_0: 0.0129671
  Mass in kg, for urea, per kg n, production mix, at plant // urea, per kg n // glo; Articulated lorry transport, Euro 4, Total weight >32 t; EU+EFTA+UK
- km_0: 1002.54
  Distance in km, for urea, per kg n, production mix, at plant // urea, per kg n // glo; Articulated lorry transport, Euro 4, Total weight >32 t; EU+EFTA+UK
- kg_km_0: 13; = kg_0*km_0
  Transport amount in km*km, for urea, per kg n, production mix, at plant // urea, per kg n // glo; Articulated lorry transport, Euro 4, Total weight >32 t; EU+EFTA+UK
- kg_1: 0.00222292
  Mass in kg, for dodecanol; Transoceanic ship, containers; GLO
- km_1: 898.5
  Distance in km, for dodecanol; Transoceanic ship, containers; GLO
- kg_km_1: 1.9973; = kg_1*km_1
  Transport amount in km*km, for dodecanol; Transoceanic ship, containers; GLO
- kg_2: 0.00222292
  Mass in kg, for dodecanol; Freight train, diesel traction; EU+EFTA+UK
- km_2: 343.908
  Distance in km, for dodecanol; Freight train, diesel traction; EU+EFTA+UK
- kg_km_2: 0.76448; = kg_2*km_2
  Transport amount in km*km, for dodecanol; Freight train, diesel traction; EU+EFTA+UK
- kg_3: 0.00222292
  Mass in kg, for dodecanol; Freight train, electricity traction; EU+EFTA+UK
- km_3: 116.983
  Distance in km, for dodecanol; Freight train, electricity traction; EU+EFTA+UK
- kg_km_3: 0.260045; = kg_3*km_3
  Transport amount in km*km, for dodecanol; Freight train, electricity traction; EU+EFTA+UK
- kg_4: 0.00222292
  Mass in kg, for dodecanol; Freight train, average; EU+EFTA+UK
- km_4: 2.75911
  Distance in km, for dodecanol; Freight train, average; EU+EFTA+UK
- kg_km_4: 0.00613328; = kg_4*km_4
  Transport amount in km*km, for dodecanol; Freight train, average; EU+EFTA+UK
- kg_5: 0.00222292
  Mass in kg, for dodecanol; Barge; EU+EFTA+UK
- km_5: 12.1304
  Distance in km, for dodecanol; Barge; EU+EFTA+UK
- kg_km_5: 0.0269649; = kg_5*km_5
  Transport amount in km*km, for dodecanol; Barge; EU+EFTA+UK
- kg_6: 0.00222292
  Mass in kg, for dodecanol; Barge; ROW w/o EU+EFTA
- km_6: 24.7696
  Distance in km, for dodecanol; Barge; ROW w/o EU+EFTA
- kg_km_6: 0.055061; = kg_6*km_6
  Transport amount in km*km, for dodecanol; Barge; ROW w/o EU+EFTA
- kg_7: 0.00222292
  Mass in kg, for dodecanol; Articulated lorry transport, Euro 4, Total weight >32 t; EU+EFTA+UK
- km_7: 86.0631
  Distance in km, for dodecanol; Articulated lorry transport, Euro 4, Total weight >32 t; EU+EFTA+UK
- kg_km_7: 0.191312; = kg_7*km_7
  Transport amount in km*km, for dodecanol; Articulated lorry transport, Euro 4, Total weight >32 t; EU+EFTA+UK
- kg_8: 0.00222292
  Mass in kg, for dodecanol; Articulated lorry transport, Total weight >32 t, mix Euro 0-5; ROW w/o EU+EFTA
- km_8: 227.137
  Distance in km, for dodecanol; Articulated lorry transport, Total weight >32 t, mix Euro 0-5; ROW w/o EU+EFTA
- kg_km_8: 0.504908; = kg_8*km_8
  Transport amount in km*km, for dodecanol; Articulated lorry transport, Total weight >32 t, mix Euro 0-5; ROW w/o EU+EFTA
- kg_9: 0.0129671
  Mass in kg, for urea, per kg n, production mix, at plant // urea, per kg n // glo; Transoceanic ship, containers; GLO
- km_9: 17968.6
  Distance in km, for urea, per kg n, production mix, at plant // urea, per kg n // glo; Transoceanic ship, containers; GLO
- kg_km_9: 233; = kg_9*km_9
  Transport amount in km*km, for urea, per kg n, production mix, at plant // urea, per kg n // glo; Transoceanic ship, containers; GLO
- kg_10: 1.17494e-6
  Mass in kg, for lubricating oil // lubricants at refinery // cn; Articulated lorry transport, Euro 4, Total weight >32 t; EU+EFTA+UK
- km_10: 1000
  Distance in km, for lubricating oil // lubricants at refinery // cn; Articulated lorry transport, Euro 4, Total weight >32 t; EU+EFTA+UK
- kg_km_10: 0.00117494; = kg_10*km_10
  Transport amount in km*km, for lubricating oil // lubricants at refinery // cn; Articulated lorry transport, Euro 4, Total weight >32 t; EU+EFTA+UK
- kg_11: 2.82388e-7
  Mass in kg, for lubricating oil // lubricants at refinery // raf; Articulated lorry transport, Euro 4, Total weight >32 t; EU+EFTA+UK
- km_11: 1000
  Distance in km, for lubricating oil // lubricants at refinery // raf; Articulated lorry transport, Euro 4, Total weight >32 t; EU+EFTA+UK
- kg_km_11: 0.000282388; = kg_11*km_11
  Transport amount in km*km, for lubricating oil // lubricants at refinery // raf; Articulated lorry transport, Euro 4, Total weight >32 t; EU+EFTA+UK
- kg_12: 7.40008e-6
  Mass in kg, for lubricating oil // lubricants at refinery // ras w/o cn; Articulated lorry transport, Euro 4, Total weight >32 t; EU+EFTA+UK
- km_12: 1000
  Distance in km, for lubricating oil // lubricants at refinery // ras w/o cn; Articulated lorry transport, Euro 4, Total weight >32 t; EU+EFTA+UK
- kg_km_12: 0.00740008; = kg_12*km_12
  Transport amount in km*km, for lubricating oil // lubricants at refinery // ras w/o cn; Articulated lorry transport, Euro 4, Total weight >32 t; EU+EFTA+UK
- kg_13: 5.77635e-6
  Mass in kg, for lubricating oil // lubricants at refinery // rna; Articulated lorry transport, Euro 4, Total weight >32 t; EU+EFTA+UK
- km_13: 1000
  Distance in km, for lubricating oil // lubricants at refinery // rna; Articulated lorry transport, Euro 4, Total weight >32 t; EU+EFTA+UK
- kg_km_13: 0.00577635; = kg_13*km_13
  Transport amount in km*km, for lubricating oil // lubricants at refinery // rna; Articulated lorry transport, Euro 4, Total weight >32 t; EU+EFTA+UK
- kg_14: 6.88321e-7
  Mass in kg, for lubricating oil // lubricants at refinery // rsa; Articulated lorry transport, Euro 4, Total weight >32 t; EU+EFTA+UK
- km_14: 1000
  Distance in km, for lubricating oil // lubricants at refinery // rsa; Articulated lorry transport, Euro 4, Total weight >32 t; EU+EFTA+UK
- kg_km_14: 0.000688321; = kg_14*km_14
  Transport amount in km*km, for lubricating oil // lubricants at refinery // rsa; Articulated lorry transport, Euro 4, Total weight >32 t; EU+EFTA+UK
- kg_15: 6.11925e-6
  Mass in kg, for lubricating oil // lubricants at refinery // ru; Articulated lorry transport, Euro 4, Total weight >32 t; EU+EFTA+UK
- km_15: 1000
  Distance in km, for lubricating oil // lubricants at refinery // ru; Articulated lorry transport, Euro 4, Total weight >32 t; EU+EFTA+UK
- kg_km_15: 0.00611925; = kg_15*km_15
  Transport amount in km*km, for lubricating oil // lubricants at refinery // ru; Articulated lorry transport, Euro 4, Total weight >32 t; EU+EFTA+UK
- kg_16: 1.17494e-6
  Mass in kg, for lubricating oil // lubricants at refinery // cn; Transoceanic ship, containers; GLO
- km_16: 18000
  Distance in km, for lubricating oil // lubricants at refinery // cn; Transoceanic ship, containers; GLO
- kg_km_16: 0.0211488; = kg_16*km_16
  Transport amount in km*km, for lubricating oil // lubricants at refinery // cn; Transoceanic ship, containers; GLO
- kg_17: 2.82388e-7
  Mass in kg, for lubricating oil // lubricants at refinery // raf; Transoceanic ship, containers; GLO
- km_17: 18000
  Distance in km, for lubricating oil // lubricants at refinery // raf; Transoceanic ship, containers; GLO
- kg_km_17: 0.00508299; = kg_17*km_17
  Transport amount in km*km, for lubricating oil // lubricants at refinery // raf; Transoceanic ship, containers; GLO
- kg_18: 7.40008e-6
  Mass in kg, for lubricating oil // lubricants at refinery // ras w/o cn; Transoceanic ship, containers; GLO
- km_18: 18000
  Distance in km, for lubricating oil // lubricants at refinery // ras w/o cn; Transoceanic ship, containers; GLO
- kg_km_18: 0.133201; = kg_18*km_18
  Transport amount in km*km, for lubricating oil // lubricants at refinery // ras w/o cn; Transoceanic ship, containers; GLO
- kg_19: 5.77635e-6
  Mass in kg, for lubricating oil // lubricants at refinery // rna; Transoceanic ship, containers; GLO
- km_19: 18000
  Distance in km, for lubricating oil // lubricants at refinery // rna; Transoceanic ship, containers; GLO
- kg_km_19: 0.103974; = kg_19*km_19
  Transport amount in km*km, for lubricating oil // lubricants at refinery // rna; Transoceanic ship, containers; GLO
- kg_20: 6.88321e-7
  Mass in kg, for lubricating oil // lubricants at refinery // rsa; Transoceanic ship, containers; GLO
- km_20: 18000
  Distance in km, for lubricating oil // lubricants at refinery // rsa; Transoceanic ship, containers; GLO
- kg_km_20: 0.0123898; = kg_20*km_20
  Transport amount in km*km, for lubricating oil // lubricants at refinery // rsa; Transoceanic ship, containers; GLO
- kg_21: 6.11925e-6
  Mass in kg, for lubricating oil // lubricants at refinery // ru; Transoceanic ship, containers; GLO
- km_21: 18000
  Distance in km, for lubricating oil // lubricants at refinery // ru; Transoceanic ship, containers; GLO
- kg_km_21: 0.110146; = kg_21*km_21
  Transport amount in km*km, for lubricating oil // lubricants at refinery // ru; Transoceanic ship, containers; GLO
- kg_22: 3.76938e-6
  Mass in kg, for lubricating oil // lubricants at refinery // eu+efta+uk; Articulated lorry transport, Euro 4, Total weight >32 t; EU+EFTA+UK
- km_22: 1000.17
  Distance in km, for lubricating oil // lubricants at refinery // eu+efta+uk; Articulated lorry transport, Euro 4, Total weight >32 t; EU+EFTA+UK
- kg_km_22: 0.00377; = kg_22*km_22
  Transport amount in km*km, for lubricating oil // lubricants at refinery // eu+efta+uk; Articulated lorry transport, Euro 4, Total weight >32 t; EU+EFTA+UK
- kg_23: 3.76938e-6
  Mass in kg, for lubricating oil // lubricants at refinery // eu+efta+uk; Transoceanic ship, containers; GLO
- km_23: 17987.1
  Distance in km, for lubricating oil // lubricants at refinery // eu+efta+uk; Transoceanic ship, containers; GLO
- kg_km_23: 0.0678; = kg_23*km_23
  Transport amount in km*km, for lubricating oil // lubricants at refinery // eu+efta+uk; Transoceanic ship, containers; GLO
- kg_24: 0.0129671
  Mass in kg, for soda ash // soda ash production // glo; Articulated lorry transport, Euro 4, Total weight >32 t; EU+EFTA+UK
- km_24: 1002.54
  Distance in km, for soda ash // soda ash production // glo; Articulated lorry transport, Euro 4, Total weight >32 t; EU+EFTA+UK
- kg_km_24: 13; = kg_24*km_24
  Transport amount in km*km, for soda ash // soda ash production // glo; Articulated lorry transport, Euro 4, Total weight >32 t; EU+EFTA+UK
- kg_25: 0.0129671
  Mass in kg, for soda ash // soda ash production // glo; Transoceanic ship, containers; GLO
- km_25: 17968.6
  Distance in km, for soda ash // soda ash production // glo; Transoceanic ship, containers; GLO
- kg_km_25: 233; = kg_25*km_25
  Transport amount in km*km, for soda ash // soda ash production // glo; Transoceanic ship, containers; GLO

## Reference product
- foaming, free, by coating (1 side) // foaming, free, by coating (1 side) // glo: 1

## Inputs
- Transport of urea, per kg n, production mix, at plant // urea, per kg n // glo by Articulated lorry transport, Euro 4, Total weight >32 t - EU+EFTA+UK: 13; = kg_km_0
- Transport of dodecanol by Transoceanic ship, containers - GLO: 1.9973; = kg_km_1
- Transport of dodecanol by Freight train, diesel traction - EU+EFTA+UK: 0.76448; = kg_km_2
- Transport of dodecanol by Freight train, electricity traction - EU+EFTA+UK: 0.260045; = kg_km_3
- Transport of dodecanol by Freight train, average - EU+EFTA+UK: 0.00613328; = kg_km_4
- Transport of dodecanol by Barge - EU+EFTA+UK: 0.0269649; = kg_km_5
- Transport of dodecanol by Barge - ROW w/o EU+EFTA: 0.055061; = kg_km_6
- Transport of dodecanol by Articulated lorry transport, Euro 4, Total weight >32 t - EU+EFTA+UK: 0.191312; = kg_km_7
- Transport of dodecanol by Articulated lorry transport, Total weight >32 t, mix Euro 0-5 - ROW w/o EU+EFTA: 0.504908; = kg_km_8
- Electricity from Electricity grid mix 1kV-60kV - AU: 0.0068
- Electricity from Electricity grid mix 1kV-60kV - NZ: 0.0013
- Electricity from Electricity grid mix 1kV-60kV - RU: 0.0295
- Electricity from Electricity grid mix 1kV-60kV - RAF: 0.022
- Electricity from Electricity grid mix 1kV-60kV - EU+EFTA+UK: 0.1008
- Electricity from Electricity grid mix 1kV-60kV - RSA: 0.0501
- Electricity from Electricity grid mix 1kV-60kV - RNA: 0.1475
- Transport of urea, per kg n, production mix, at plant // urea, per kg n // glo by Transoceanic ship, containers - GLO: 233; = kg_km_9
- Transport of lubricating oil // lubricants at refinery // cn by Articulated lorry transport, Euro 4, Total weight >32 t - EU+EFTA+UK: 0.00117494; = kg_km_10
- Transport of lubricating oil // lubricants at refinery // raf by Articulated lorry transport, Euro 4, Total weight >32 t - EU+EFTA+UK: 0.000282388; = kg_km_11
- Transport of lubricating oil // lubricants at refinery // ras w/o cn by Articulated lorry transport, Euro 4, Total weight >32 t - EU+EFTA+UK: 0.00740008; = kg_km_12
- Transport of lubricating oil // lubricants at refinery // rna by Articulated lorry transport, Euro 4, Total weight >32 t - EU+EFTA+UK: 0.00577635; = kg_km_13
- Transport of lubricating oil // lubricants at refinery // rsa by Articulated lorry transport, Euro 4, Total weight >32 t - EU+EFTA+UK: 0.000688321; = kg_km_14
- Transport of lubricating oil // lubricants at refinery // ru by Articulated lorry transport, Euro 4, Total weight >32 t - EU+EFTA+UK: 0.00611925; = kg_km_15
- Transport of lubricating oil // lubricants at refinery // cn by Transoceanic ship, containers - GLO: 0.0211488; = kg_km_16
- Transport of lubricating oil // lubricants at refinery // raf by Transoceanic ship, containers - GLO: 0.00508299; = kg_km_17
- Transport of lubricating oil // lubricants at refinery // ras w/o cn by Transoceanic ship, containers - GLO: 0.133201; = kg_km_18
- Transport of lubricating oil // lubricants at refinery // rna by Transoceanic ship, containers - GLO: 0.103974; = kg_km_19
- Transport of lubricating oil // lubricants at refinery // rsa by Transoceanic ship, containers - GLO: 0.0123898; = kg_km_20
- Transport of lubricating oil // lubricants at refinery // ru by Transoceanic ship, containers - GLO: 0.110146; = kg_km_21
- Transport of lubricating oil // lubricants at refinery // eu+efta+uk by Articulated lorry transport, Euro 4, Total weight >32 t - EU+EFTA+UK: 0.00377; = kg_km_22
- Transport of lubricating oil // lubricants at refinery // eu+efta+uk by Transoceanic ship, containers - GLO: 0.0678; = kg_km_23
- Transport of soda ash // soda ash production // glo by Articulated lorry transport, Euro 4, Total weight >32 t - EU+EFTA+UK: 13; = kg_km_24
- Transport of soda ash // soda ash production // glo by Transoceanic ship, containers - GLO: 233; = kg_km_25
- Electricity from Electricity grid mix 1kV-60kV - CN: 0.151171
- Electricity from Electricity grid mix 1kV-60kV - RAS w/o CN: 0.165629
- foaming, free, by coating (1 side) // foaming, free, by coating (1 side) // glo, blackbox: 1
- foaming, free, by coating (1 side) // foaming, free, by coating (1 side) // glo, elementary: 1

## Impact indicators
- Eutrophication marine: 0.000399352
- Ecotoxicity, freshwater: 1.98527
- Land use: 3.88792
- Water use: 0.107972
- Resource use, minerals and metals: 7.6675e-7
- Resource use, fossils: 4.00981
- Climate change: 0.302602
- Ozone depletion: 9.71957e-10
- Human toxicity, cancer: 2.55307e-10
- Human toxicity, non-cancer: 2.21825e-9
- EF-particulate Matter: 8.51272e-8
- Ionising radiation, human health: 0.0107628
- Photochemical ozone formation - human health: 0.0010711
- Acidification: 0.00187104
- Eutrophication, terrestrial: 0.00378992
- Eutrophication, freshwater: 4.34329e-6

## Deviations from the LCI method principle
The background data uses:
- the \xe2\x80\x9cRecycled content cut-off\xe2\x80\x9d approach to allocate end-of-life by-products and secondary materials. This allocation is explained in the description of the recycled content system model (http://www.ecoinvent.org/database/system-models-in-ecoinvent-3/cut-off-system-model/allocation-cut-off-by-classification.html).
OR
- EF compliant data

## Deviations from the LCI method approaches
Background data:
- the \xe2\x80\x9cRecycled content cut-off\xe2\x80\x9d approach to allocate end-of-life by-products and secondary materials. This allocation is explained in the description of the recycled content system model (http://www.ecoinvent.org/database/system-models-in-ecoinvent-3/cut-off-system-model/allocation-cut-off-by-classification.html). The ecoinvent database mostly relies on “Allocation – market values” apart for few exceptions particularly in the energy sector. ecoinvent energy data is replaced with EF3.0 core data as per the EF guidelines version 2.0.
OR
- EF compliant data

## Modelling constants
All modelling constants follow the requirements listed in the Tender Specifications 070201/2020/SER/ENV.B1. Completeness: There are no intentional cut-offs in the inventory no matter how small their contribution to all the EF impact categories is. Eventual cut-offs are in compliance with the Guide for EF compliant data sets (JRC 2020), i.e. only if below the 3% cut-off rule. Water use: water use is modelled at country level using separate flows for water withdrawal, water release and water evaporation. Handling multi-functional processes: the following PEF multi- functionality decision hierarchy is applied for resolving all multi- functionality problems: (1) subdivision or system expansion; (2) allocation based on a relevant underlying physical relationship (substitution may apply here); (3) allocation based on some other relationship. Direct land use change: GHG emissions from direct LUC allocated to good/service for 20 years after the LUC occurs, with IPCC default values. Carbon storage and delayed emissions: credits associated with temporary (carbon) storage or delayed emissions up to 300 years are not be considered. Emissions off-setting: are not included. Capital goods (including infrastructures) and their End of life: they are included. System boundaries: system boundaries include all processes linked to the product supply chain (e.g. maintenance). Time period: emissions and removals are modelled as if released or removed at the beginning of the assessment method. Fossil and biogenic carbon emissions and removals: removals and emissions are modelled as follows: All GHG emissions from fossil fuels (including peat and limestone) are modelled consistently with the most updated ILCD list of elementary flows. The non-fossil (biogenic) carbon flows are modelled consistently with the most updated ILCD list of elementary flows.

## Cut-off and completeness
There are no intentional cut-offs in the inventory no matter how small their contribution to all the EF impact categories is. Eventual cut-offs are in compliance with the Guide for EF compliant data sets (JRC 2020), i.e. only if below the 3% cut-off rule. The dataset dry mass and water balance has been checked to ensure the inventory is complete. Capital goods (e.g. infrastructure) and their end-of-life are included.

## Data selection and combination
These datasets include, in both their foreground and background data, links to EF3.0 compliant data.
The relevant background data on energy, transport, and End of Life are from the LCDN data node (http://lcdn.thinkstep.com/Node/).
All other background data in the supply of this product for which no EF3.0 process was available are from ecoinvent v3.7 database (www.ecoinvent.org) or other data sources.

## Data treatment and extrapolations
Several data sources have been used to model the inventory.

## Review details
Internal reviews have been asked to review the plausibility of the unit process, LCIA scores, and DQRs. Internal reviewers have also been asked to review the data for EF compliancy. The consortium is therefore responsible for aspects such as compliancy with the ILCD format, including validation in Look@LCI, and nomenclature.
Internal reviwers have been asked to judge based on the process name, that the unit process models in a complete and representative way the process in the requested location. The review encompassed the plausability of:
- exchanges with nature (elementary flows) as well as exchanges such as product and waste flows.
- meta information (general comment, technology comment, system boundaries, allocation, cut-off rules, etc.). Reviewers were asked to judge if the provided information is enough to understand the content of the process.
- LCIA scores
- DQRs including precision, technology, time and geography. As well as the overall DQR.
External reviewers have been asked to provide their expertise in the field of interest. External reviewers have been asked to review the unit process, including eventual methodological choices, the LCIA scores (provided with contribution scores as well), and DQRs. External reviewers have been provided all the information in a tool developed by the consortium for the purpose of this project.
External reviewers have been asked to judge based on the process name, that the unit process models in a complete and representative way the process in the requested location. The review encompassed:
- Plausability and completeness of exchanges with nature (elementary flows) as well as exchanges such as product and waste flows.
- Review of meta information (general comment, technology comment, system boundaries, allocation, cut-off rules, etc.). Reviewers were asked to judge if the provided information is enough to understand the content of the process.
- Review of properties (biogenic carbon and water content).
- Review of allocation keys.
- Plausability of LCIA scores calculated by the consortium.
- Plausability of DQRs including precision, technology, time and geography. As well as the overall DQR.

## Data sources
- Background Data for Representative products and organisations. EF 3.0 compliant (data stock)
- UN Data (2018) Statistics Data for Lubricants Productions, http://data.un.org/Data.aspx?q=Lubricants&d=EDATA&f=cmID%3aLU, United Nations Statistics Division, Global.
- Gemata (2021) FOAM GENERATOR FOR WATER BASED CHEMICALS, https://www.gemata.it/a_ENG_260_1.html, GE.MA.TA. SpA, Italy
- Chowdhury, Kawser Parveen (2018) Effect of Special Finishes on the Functional Properties of Cotton Fabrics, Journal of Textile Science and Technology, 4, 49-66, https://file.scirp.org/pdf/JTST_2018050815303131.pdf, Bangladesh
- Finestart (2017) Open Width Compactor(Dryer, Stenter and Compactor 3in1), http://www.finestart.com.cn/index.php?m=content&c=index&a=show&catid=55&id=62, Shandong Finestart Imp.& Exp. Co.,Ltd., Shandong, China
- Lebon (2021) Nonwoven Oven Machine, Catalog and Company Messages, Qingdao Lebon Industry Co., Ltd., China
- America’s Cotton Producers and Importers (2011). Foam Applications on Textiles, https://www.cottonworks.com/wp-content/uploads/2018/07/Foam-Applications_Finishing.pdf, Cary, North Carolina.
- Hong Yu, Yuanfeng Wang, Yi Zhong, Zhiping Mao, Sisi Tan (2014) Foam properties and application in dyeing cotton fabrics with reactive dyes, doi: 10.1111/cote.12088, Society of Dyers and Colourists, Sanghai, China
- CYKY (2021) High-precision Roll-to-Roll doctor blade film coater, https://www.cysi.wang/Doctor-Blade-Film-Coater/high-precision-roll-to-roll-doctor-blade-film-coater.html, Zhengzhou CY Scientific Instrument Co., Ltd., Henan, China
- Lab Manager (2010) Instrument Life-Cycle Management, https://www.labmanager.com/business-management/instrument-life-cycle-management-19179#:~:text=The%20product%20life%20cycle%20for,seven%20years%20and%20often%20shorter., Lab Manager, Delaware, Unite States
- G.H.J Van Der Walt, N.H.H Van Rensburg (1984) A review of low add-on and foam application techniques, South African Wool And Textile Research Institute Of The CSIR, South Africa

## Intended applications
Implementation of regular Product Environmental Footprint (PEF) studies and Organisation Environmental Footprint (OEF) studies exclusively under the specified Product groups and sectors as defined in the Product Environmental Footprint Category Rules (PEFCR) and Organisation Environmental Footprint Sectorial Rules (OEFSR) listed in http://ec.europa.eu/environment/eussd/smgp/PEFCR_OEFSR.htm
