# rivet/snaps application (not snap strips); process, automatic punching and eyeletting machine; production mix, at plant; service

Dataset: ILCD process, Partly terminated system
Geography: GLO
Reference year: 2021
Valid until: 2024
Classification: Systems / Textiles, furnitures and other interiors
LCI method principle: Attributional
LCI method approaches: Allocation - market value
Completeness: All relevant flows quantified
Project: Provision of process-based 3.0 Environmental Footprint-compliant life cycle inventory datasets - Apparel 2 - contract number 070201/2020/840292/SER/ENV.B.1
Generated by: Life Cycle Indonesia
Owner: PRé Sustainability B.V.
Compliance: ILCD Data Network - Entry-level; Suggestions for updating the PEF method 2019; ISO 14040 Environmental Management – Life Cycle Assessment – Principles and Framework, 2006; ISO 14044:2006. Environmental Management – Life Cycle Assessment – Requirements and guidelines.; Environmental Footprint 3.1
Review: Dependent internal review by Avraam Symeonidis, Emilia Moreno Ruiz; Independent review panel by Subramanian Senthilkannan Muthu
Data quality: Overall quality: Good; Time representativeness: Very good; Geographical representativeness: Good; Technological representativeness: Good; Precision: Good; Methodological appropriateness and consistency: Not applicable
Amounts: no units in this file; such an amount is in the reference unit of its flow, which a separate flow dataset defines
copyright: true
licenseType: Free of charge for some user types or use types
accessRestrictions: Free of charge for all final users implementing a regular Product Environmental Footprint (PEF) studies and Organisation Environmental Footprint (OEF) studies exclusively under the specified Product groups and sectors as defined in the Product Environmental Footprint Category Rules (PEFCR) and Organisation Environmental Footprint Sectorial Rules (OEFSR) listed in http://ec.europa.eu/environment/eussd/smgp/PEFCR_OEFSR.htm and in accordance with the terms and conditions of the EULA (available at https://ecoinvent.lca-data.com/) exclusively until 31st December 2024. Any use of this dataset or any derivative data not within the specific context of one of the PEF/OEF projects or after the end of 2024 is not permitted.

## General comment
Notice: this data set supersedes the EF3.0-compliant version (see link under "preceding data set version" below calculated with the EF3.0). The life cycle inventory is not changed from the original EF3.0 data set. The LCIA results are calculated based on the EF3.1 methods which provide updated characterisation factors in the following impact categories: Climate Change, Ecotoxicity freshwater, Photochemical Ozone Formation, Acidification, Human Toxicity non-cancer, and Human Toxicity cancer. The review report and the data quality ratings refer to the original results. The data set has been updated by the European Commission on the basis of the original EF3.0 data set delivered by the data provider.Rivets in footwear provide multiple functions. First of all, it has the function of increasing eyelet durability in shoes. The addition of rivets in eyelets will prevent shoes from coming into direct contact with lace and thus increasing the durability of that shoe. Rivets are also used to increase a shoe's aesthetics since rivets can be customized according to the design of the manufacturer.
On average, each pair of shoes has 7 eyelets on both sides (Hagen & Ewald, 2008). Therefore, the total amount of rivets in a pair of shoes amounts to 28 rivets

Hagen, Marco and Ewald M. Hennig. (2008). Effects of Different Shoe-Lacing Patterns on the Biomechanics of running shoes. Germany: Journal of Sports Sciences, February 1st 2009; 27(3): 267-275.

## Technology and included processes
The application of rivets is achieved by using automatic punching and eyeletting machines. This machine processes the material by punching a hole through the material and applying rivets at the same time.

This process includes the use of an automatic punching and eyeletting machine. The production process starts when the raw materials enter the process. The rivets + metal eyelets, energy consumption and infrastructure of the machine are included. There is no direct emission to the air since the emission comes from electricity usage, while hazardous waste comes from the waste lube oil. In the model, the energy sources of machines are used solely from electricity. The consumption of lubricating oil using a stitch bonding machine as a proxy and the waste material produced by the riveting process is not accounted for.

## Parameters
- kg_0: 3.36511e-5
  Mass in kg, for steel, low-alloyed; Transoceanic ship, bulk; GLO
- km_0: 110058
  Distance in km, for steel, low-alloyed; Transoceanic ship, bulk; GLO
- kg_km_0: 3.70356; = kg_0*km_0
  Transport amount in km*km, for steel, low-alloyed; Transoceanic ship, bulk; GLO
- kg_1: 3.36511e-5
  Mass in kg, for steel, low-alloyed; Freight train, diesel traction; EU+EFTA+UK
- km_1: 35234.7
  Distance in km, for steel, low-alloyed; Freight train, diesel traction; EU+EFTA+UK
- kg_km_1: 1.18569; = kg_1*km_1
  Transport amount in km*km, for steel, low-alloyed; Freight train, diesel traction; EU+EFTA+UK
- kg_2: 3.36511e-5
  Mass in kg, for steel, low-alloyed; Freight train, electricity traction; EU+EFTA+UK
- km_2: 11985.4
  Distance in km, for steel, low-alloyed; Freight train, electricity traction; EU+EFTA+UK
- kg_km_2: 0.403322; = kg_2*km_2
  Transport amount in km*km, for steel, low-alloyed; Freight train, electricity traction; EU+EFTA+UK
- kg_3: 3.36511e-5
  Mass in kg, for steel, low-alloyed; Freight train, average; EU+EFTA+UK
- km_3: 282.681
  Distance in km, for steel, low-alloyed; Freight train, average; EU+EFTA+UK
- kg_km_3: 0.00951253; = kg_3*km_3
  Transport amount in km*km, for steel, low-alloyed; Freight train, average; EU+EFTA+UK
- kg_4: 3.36511e-5
  Mass in kg, for steel, low-alloyed; Barge; EU+EFTA+UK
- km_4: 1649.39
  Distance in km, for steel, low-alloyed; Barge; EU+EFTA+UK
- kg_km_4: 0.0555038; = kg_4*km_4
  Transport amount in km*km, for steel, low-alloyed; Barge; EU+EFTA+UK
- kg_5: 3.36511e-5
  Mass in kg, for steel, low-alloyed; Barge; ROW w/o EU+EFTA
- km_5: 3367.98
  Distance in km, for steel, low-alloyed; Barge; ROW w/o EU+EFTA
- kg_km_5: 0.113336; = kg_5*km_5
  Transport amount in km*km, for steel, low-alloyed; Barge; ROW w/o EU+EFTA
- kg_6: 3.36511e-5
  Mass in kg, for steel, low-alloyed; Articulated lorry transport, Euro 4, Total weight >32 t; EU+EFTA+UK
- km_6: 14164.3
  Distance in km, for steel, low-alloyed; Articulated lorry transport, Euro 4, Total weight >32 t; EU+EFTA+UK
- kg_km_6: 0.476644; = kg_6*km_6
  Transport amount in km*km, for steel, low-alloyed; Articulated lorry transport, Euro 4, Total weight >32 t; EU+EFTA+UK
- kg_7: 3.36511e-5
  Mass in kg, for steel, low-alloyed; Articulated lorry transport, Total weight >32 t, mix Euro 0-5; ROW w/o EU+EFTA
- km_7: 37382.3
  Distance in km, for steel, low-alloyed; Articulated lorry transport, Total weight >32 t, mix Euro 0-5; ROW w/o EU+EFTA
- kg_km_7: 1.25796; = kg_7*km_7
  Transport amount in km*km, for steel, low-alloyed; Articulated lorry transport, Total weight >32 t, mix Euro 0-5; ROW w/o EU+EFTA
- kg_8: 1.59578e-7
  Mass in kg, for lubricating oil // lubricants at refinery // rsa; Articulated lorry transport, Euro 4, Total weight >32 t; EU+EFTA+UK
- km_8: 1000
  Distance in km, for lubricating oil // lubricants at refinery // rsa; Articulated lorry transport, Euro 4, Total weight >32 t; EU+EFTA+UK
- kg_km_8: 0.000159578; = kg_8*km_8
  Transport amount in km*km, for lubricating oil // lubricants at refinery // rsa; Articulated lorry transport, Euro 4, Total weight >32 t; EU+EFTA+UK
- kg_9: 6.54679e-8
  Mass in kg, for lubricating oil // lubricants at refinery // raf; Articulated lorry transport, Euro 4, Total weight >32 t; EU+EFTA+UK
- km_9: 1000
  Distance in km, for lubricating oil // lubricants at refinery // raf; Articulated lorry transport, Euro 4, Total weight >32 t; EU+EFTA+UK
- kg_km_9: 6.54679e-5; = kg_9*km_9
  Transport amount in km*km, for lubricating oil // lubricants at refinery // raf; Articulated lorry transport, Euro 4, Total weight >32 t; EU+EFTA+UK
- kg_10: 1.71561e-6
  Mass in kg, for lubricating oil // lubricants at refinery // ras w/o cn; Articulated lorry transport, Euro 4, Total weight >32 t; EU+EFTA+UK
- km_10: 1000
  Distance in km, for lubricating oil // lubricants at refinery // ras w/o cn; Articulated lorry transport, Euro 4, Total weight >32 t; EU+EFTA+UK
- kg_km_10: 0.00171561; = kg_10*km_10
  Transport amount in km*km, for lubricating oil // lubricants at refinery // ras w/o cn; Articulated lorry transport, Euro 4, Total weight >32 t; EU+EFTA+UK
- kg_11: 1.41867e-6
  Mass in kg, for lubricating oil // lubricants at refinery // ru; Articulated lorry transport, Euro 4, Total weight >32 t; EU+EFTA+UK
- km_11: 1000
  Distance in km, for lubricating oil // lubricants at refinery // ru; Articulated lorry transport, Euro 4, Total weight >32 t; EU+EFTA+UK
- kg_km_11: 0.00141867; = kg_11*km_11
  Transport amount in km*km, for lubricating oil // lubricants at refinery // ru; Articulated lorry transport, Euro 4, Total weight >32 t; EU+EFTA+UK
- kg_12: 1.33917e-6
  Mass in kg, for lubricating oil // lubricants at refinery // rna; Articulated lorry transport, Euro 4, Total weight >32 t; EU+EFTA+UK
- km_12: 1000
  Distance in km, for lubricating oil // lubricants at refinery // rna; Articulated lorry transport, Euro 4, Total weight >32 t; EU+EFTA+UK
- kg_km_12: 0.00133917; = kg_12*km_12
  Transport amount in km*km, for lubricating oil // lubricants at refinery // rna; Articulated lorry transport, Euro 4, Total weight >32 t; EU+EFTA+UK
- kg_13: 2.72393e-7
  Mass in kg, for lubricating oil // lubricants at refinery // cn; Articulated lorry transport, Euro 4, Total weight >32 t; EU+EFTA+UK
- km_13: 1000
  Distance in km, for lubricating oil // lubricants at refinery // cn; Articulated lorry transport, Euro 4, Total weight >32 t; EU+EFTA+UK
- kg_km_13: 0.000272393; = kg_13*km_13
  Transport amount in km*km, for lubricating oil // lubricants at refinery // cn; Articulated lorry transport, Euro 4, Total weight >32 t; EU+EFTA+UK
- kg_14: 8.7388e-7
  Mass in kg, for lubricating oil // lubricants at refinery // eu+efta+uk; Articulated lorry transport, Euro 4, Total weight >32 t; EU+EFTA+UK
- km_14: 1000.14
  Distance in km, for lubricating oil // lubricants at refinery // eu+efta+uk; Articulated lorry transport, Euro 4, Total weight >32 t; EU+EFTA+UK
- kg_km_14: 0.000874; = kg_14*km_14
  Transport amount in km*km, for lubricating oil // lubricants at refinery // eu+efta+uk; Articulated lorry transport, Euro 4, Total weight >32 t; EU+EFTA+UK
- kg_15: 8.7388e-7
  Mass in kg, for lubricating oil // lubricants at refinery // eu+efta+uk; Transoceanic ship, containers; GLO
- km_15: 17965.8
  Distance in km, for lubricating oil // lubricants at refinery // eu+efta+uk; Transoceanic ship, containers; GLO
- kg_km_15: 0.0157; = kg_15*km_15
  Transport amount in km*km, for lubricating oil // lubricants at refinery // eu+efta+uk; Transoceanic ship, containers; GLO
- kg_16: 1.59578e-7
  Mass in kg, for lubricating oil // lubricants at refinery // rsa; Transoceanic ship, containers; GLO
- km_16: 18000
  Distance in km, for lubricating oil // lubricants at refinery // rsa; Transoceanic ship, containers; GLO
- kg_km_16: 0.00287241; = kg_16*km_16
  Transport amount in km*km, for lubricating oil // lubricants at refinery // rsa; Transoceanic ship, containers; GLO
- kg_17: 6.54679e-8
  Mass in kg, for lubricating oil // lubricants at refinery // raf; Transoceanic ship, containers; GLO
- km_17: 18000
  Distance in km, for lubricating oil // lubricants at refinery // raf; Transoceanic ship, containers; GLO
- kg_km_17: 0.00117842; = kg_17*km_17
  Transport amount in km*km, for lubricating oil // lubricants at refinery // raf; Transoceanic ship, containers; GLO
- kg_18: 1.71561e-6
  Mass in kg, for lubricating oil // lubricants at refinery // ras w/o cn; Transoceanic ship, containers; GLO
- km_18: 18000
  Distance in km, for lubricating oil // lubricants at refinery // ras w/o cn; Transoceanic ship, containers; GLO
- kg_km_18: 0.030881; = kg_18*km_18
  Transport amount in km*km, for lubricating oil // lubricants at refinery // ras w/o cn; Transoceanic ship, containers; GLO
- kg_19: 1.41867e-6
  Mass in kg, for lubricating oil // lubricants at refinery // ru; Transoceanic ship, containers; GLO
- km_19: 180000
  Distance in km, for lubricating oil // lubricants at refinery // ru; Transoceanic ship, containers; GLO
- kg_km_19: 0.25536; = kg_19*km_19
  Transport amount in km*km, for lubricating oil // lubricants at refinery // ru; Transoceanic ship, containers; GLO
- kg_20: 1.33917e-6
  Mass in kg, for lubricating oil // lubricants at refinery // rna; Transoceanic ship, containers; GLO
- km_20: 18000
  Distance in km, for lubricating oil // lubricants at refinery // rna; Transoceanic ship, containers; GLO
- kg_km_20: 0.0241051; = kg_20*km_20
  Transport amount in km*km, for lubricating oil // lubricants at refinery // rna; Transoceanic ship, containers; GLO
- kg_21: 2.72393e-7
  Mass in kg, for lubricating oil // lubricants at refinery // cn; Transoceanic ship, containers; GLO
- km_21: 18000
  Distance in km, for lubricating oil // lubricants at refinery // cn; Transoceanic ship, containers; GLO
- kg_km_21: 0.00490308; = kg_21*km_21
  Transport amount in km*km, for lubricating oil // lubricants at refinery // cn; Transoceanic ship, containers; GLO

## Reference product
- rivet/snaps application (not snap strips) // rivet/snaps application (not snap strips) // glo: 1

## Inputs
- Electricity from Electricity grid mix 1kV-60kV - AU: 0.0001
- Electricity from Electricity grid mix 1kV-60kV - EU+EFTA+UK: 0.0013
- Electricity from Electricity grid mix 1kV-60kV - NZ: 0
- Electricity from Electricity grid mix 1kV-60kV - RAF: 0.0003
- Electricity from Electricity grid mix 1kV-60kV - RNA: 0.002
- Electricity from Electricity grid mix 1kV-60kV - RSA: 0.0007
- Electricity from Electricity grid mix 1kV-60kV - RU: 0.0004
- Transport of steel, low-alloyed by Transoceanic ship, bulk - GLO: 3.70356; = kg_km_0
- Transport of steel, low-alloyed by Freight train, diesel traction - EU+EFTA+UK: 1.18569; = kg_km_1
- Transport of steel, low-alloyed by Freight train, electricity traction - EU+EFTA+UK: 0.403322; = kg_km_2
- Transport of steel, low-alloyed by Freight train, average - EU+EFTA+UK: 0.00951253; = kg_km_3
- Transport of steel, low-alloyed by Barge - EU+EFTA+UK: 0.0555038; = kg_km_4
- Transport of steel, low-alloyed by Barge - ROW w/o EU+EFTA: 0.113336; = kg_km_5
- Transport of steel, low-alloyed by Articulated lorry transport, Euro 4, Total weight >32 t - EU+EFTA+UK: 0.476644; = kg_km_6
- Transport of steel, low-alloyed by Articulated lorry transport, Total weight >32 t, mix Euro 0-5 - ROW w/o EU+EFTA: 1.25796; = kg_km_7
- Transport of lubricating oil // lubricants at refinery // rsa by Articulated lorry transport, Euro 4, Total weight >32 t - EU+EFTA+UK: 0.000159578; = kg_km_8
- Transport of lubricating oil // lubricants at refinery // raf by Articulated lorry transport, Euro 4, Total weight >32 t - EU+EFTA+UK: 6.54679e-5; = kg_km_9
- Transport of lubricating oil // lubricants at refinery // ras w/o cn by Articulated lorry transport, Euro 4, Total weight >32 t - EU+EFTA+UK: 0.00171561; = kg_km_10
- Transport of lubricating oil // lubricants at refinery // ru by Articulated lorry transport, Euro 4, Total weight >32 t - EU+EFTA+UK: 0.00141867; = kg_km_11
- Transport of lubricating oil // lubricants at refinery // rna by Articulated lorry transport, Euro 4, Total weight >32 t - EU+EFTA+UK: 0.00133917; = kg_km_12
- Transport of lubricating oil // lubricants at refinery // cn by Articulated lorry transport, Euro 4, Total weight >32 t - EU+EFTA+UK: 0.000272393; = kg_km_13
- Transport of lubricating oil // lubricants at refinery // eu+efta+uk by Articulated lorry transport, Euro 4, Total weight >32 t - EU+EFTA+UK: 0.000874; = kg_km_14
- Transport of lubricating oil // lubricants at refinery // eu+efta+uk by Transoceanic ship, containers - GLO: 0.0157; = kg_km_15
- Transport of lubricating oil // lubricants at refinery // rsa by Transoceanic ship, containers - GLO: 0.00287241; = kg_km_16
- Transport of lubricating oil // lubricants at refinery // raf by Transoceanic ship, containers - GLO: 0.00117842; = kg_km_17
- Transport of lubricating oil // lubricants at refinery // ras w/o cn by Transoceanic ship, containers - GLO: 0.030881; = kg_km_18
- Transport of lubricating oil // lubricants at refinery // ru by Transoceanic ship, containers - GLO: 0.25536; = kg_km_19
- Transport of lubricating oil // lubricants at refinery // rna by Transoceanic ship, containers - GLO: 0.0241051; = kg_km_20
- Transport of lubricating oil // lubricants at refinery // cn by Transoceanic ship, containers - GLO: 0.00490308; = kg_km_21
- Electricity from Electricity grid mix 1kV-60kV - CN: 0.00200416
- Electricity from Electricity grid mix 1kV-60kV - RAS w/o CN: 0.00219584
- rivet/snaps application (not snap strips) // rivet/snaps application (not snap strips) // glo, blackbox: 1
- rivet/snaps application (not snap strips) // rivet/snaps application (not snap strips) // glo, elementary: 1

## Impact indicators
- Eutrophication marine: 1.25818e-5
- Ecotoxicity, freshwater: 0.0902787
- Land use: 0.0300075
- Water use: 0.00828149
- Resource use, minerals and metals: 9.62121e-8
- Resource use, fossils: 0.149137
- Climate change: 0.0122984
- Ozone depletion: 1.14674e-10
- Human toxicity, cancer: 2.03283e-10
- Human toxicity, non-cancer: 2.4265e-10
- EF-particulate Matter: 1.84139e-9
- Ionising radiation, human health: 0.000483517
- Photochemical ozone formation - human health: 4.62541e-5
- Acidification: 5.84521e-5
- Eutrophication, terrestrial: 0.000124364
- Eutrophication, freshwater: 1.33384e-6

## Deviations from the LCI method principle
The background data uses:
- the \xe2\x80\x9cRecycled content cut-off\xe2\x80\x9d approach to allocate end-of-life by-products and secondary materials. This allocation is explained in the description of the recycled content system model (http://www.ecoinvent.org/database/system-models-in-ecoinvent-3/cut-off-system-model/allocation-cut-off-by-classification.html).
OR
- EF compliant data

## Deviations from the LCI method approaches
Background data:
- the \xe2\x80\x9cRecycled content cut-off\xe2\x80\x9d approach to allocate end-of-life by-products and secondary materials. This allocation is explained in the description of the recycled content system model (http://www.ecoinvent.org/database/system-models-in-ecoinvent-3/cut-off-system-model/allocation-cut-off-by-classification.html). The ecoinvent database mostly relies on “Allocation – market values” apart for few exceptions particularly in the energy sector. ecoinvent energy data is replaced with EF3.0 core data as per the EF guidelines version 2.0.
OR
- EF compliant data

## Modelling constants
All modelling constants follow the requirements listed in the Tender Specifications 070201/2020/SER/ENV.B1. Completeness: There are no intentional cut-offs in the inventory no matter how small their contribution to all the EF impact categories is. Eventual cut-offs are in compliance with the Guide for EF compliant data sets (JRC 2020), i.e. only if below the 3% cut-off rule. Water use: water use is modelled at country level using separate flows for water withdrawal, water release and water evaporation. Handling multi-functional processes: the following PEF multi- functionality decision hierarchy is applied for resolving all multi- functionality problems: (1) subdivision or system expansion; (2) allocation based on a relevant underlying physical relationship (substitution may apply here); (3) allocation based on some other relationship. Direct land use change: GHG emissions from direct LUC allocated to good/service for 20 years after the LUC occurs, with IPCC default values. Carbon storage and delayed emissions: credits associated with temporary (carbon) storage or delayed emissions up to 300 years are not be considered. Emissions off-setting: are not included. Capital goods (including infrastructures) and their End of life: they are included. System boundaries: system boundaries include all processes linked to the product supply chain (e.g. maintenance). Time period: emissions and removals are modelled as if released or removed at the beginning of the assessment method. Fossil and biogenic carbon emissions and removals: removals and emissions are modelled as follows: All GHG emissions from fossil fuels (including peat and limestone) are modelled consistently with the most updated ILCD list of elementary flows. The non-fossil (biogenic) carbon flows are modelled consistently with the most updated ILCD list of elementary flows.

## Cut-off and completeness
There are no intentional cut-offs in the inventory no matter how small their contribution to all the EF impact categories is. Eventual cut-offs are in compliance with the Guide for EF compliant data sets (JRC 2020), i.e. only if below the 3% cut-off rule. The dataset dry mass and water balance has been checked to ensure the inventory is complete. Capital goods (e.g. infrastructure) and their end-of-life are included.

## Data selection and combination
These datasets include, in both their foreground and background data, links to EF3.0 compliant data.
The relevant background data on energy, transport, and End of Life are from the LCDN data node (http://lcdn.thinkstep.com/Node/).
All other background data in the supply of this product for which no EF3.0 process was available are from ecoinvent v3.7 database (www.ecoinvent.org) or other data sources.

## Data treatment and extrapolations
Several data sources have been used to model the inventory.

## Review details
Internal reviews have been asked to review the plausibility of the unit process, LCIA scores, and DQRs. Internal reviewers have also been asked to review the data for EF compliancy. The consortium is therefore responsible for aspects such as compliancy with the ILCD format, including validation in Look@LCI, and nomenclature.
Internal reviwers have been asked to judge based on the process name, that the unit process models in a complete and representative way the process in the requested location. The review encompassed the plausability of:
- exchanges with nature (elementary flows) as well as exchanges such as product and waste flows.
- meta information (general comment, technology comment, system boundaries, allocation, cut-off rules, etc.). Reviewers were asked to judge if the provided information is enough to understand the content of the process.
- LCIA scores
- DQRs including precision, technology, time and geography. As well as the overall DQR.
External reviewers have been asked to provide their expertise in the field of interest. External reviewers have been asked to review the unit process, including eventual methodological choices, the LCIA scores (provided with contribution scores as well), and DQRs. External reviewers have been provided all the information in a tool developed by the consortium for the purpose of this project.
External reviewers have been asked to judge based on the process name, that the unit process models in a complete and representative way the process in the requested location. The review encompassed:
- Plausability and completeness of exchanges with nature (elementary flows) as well as exchanges such as product and waste flows.
- Review of meta information (general comment, technology comment, system boundaries, allocation, cut-off rules, etc.). Reviewers were asked to judge if the provided information is enough to understand the content of the process.
- Review of properties (biogenic carbon and water content).
- Review of allocation keys.
- Plausability of LCIA scores calculated by the consortium.
- Plausability of DQRs including precision, technology, time and geography. As well as the overall DQR.

## Data sources
- Background Data for Representative products and organisations. EF 3.0 compliant (data stock)
- UN Data (2018) Statistics Data for Lubricants Productions, http://data.un.org/Data.aspx?q=Lubricants&d=EDATA&f=cmID%3aLU, United Nations Statistics Division, Global.
- Cotex (2021) Stitch Bonding Machine, Catalog and Company Email, Suzhou Cotex International Co., Ltd., China.
- Hagen, Marco and Ewald M. Hennig. (2008). Effects of Different Shoe-Lacing Patterns on the Biomechanics of running shoes. Germany: Journal of Sports Sciences, February 1st 2009; 27(3): 267-275, https://doi.org/10.1080/02640410802482425
- Guanhua (2021) Metal Eyelets, http://www.guanhuabutton.com/metal-eyelets.html, Shenzhen Guanhua Button Co., Ltd., Guangdong, China Alibaba (2021) https://www.alibaba.com/product-detail/Metal-Grommets-Eyelets-for-Bag-Shoes_60585659534.html
- Zhejiang (2021) BD-98 Automatic Punching and Eyeletting Machine, http://www.judamachine.com/products/bd-98-automatic-punching--eyeletting-machine-ID31.html, Zhejiang Juda Machinery Co.,Ltd, China.
- Foxsew (2021), Outsole Stitching Machine for Heavy Soles and Boots https://www.chinafoxsew.com/side-seaming-and-sole-stitching-machine/42069729.html, TAIZHOU FOXSEW SEWING MACHINE CO.,LTD., Zhejiang, China
- James V. (2021) Life Expectancy: How Long Will My Sewing Machine Last?, https://sewingiscool.com/life-expectancy-how-long-will-my-sewing-machine-last/, Sewing is Cool
- Industrial Data (2018)
- Coats (2021) Gral AWF (Coarse Sizes), https://coats.com/en/Products/Threads/Gral/Gral-AWF---coarse-sizes, Coats Group, Uxbridge, England

## Intended applications
Implementation of regular Product Environmental Footprint (PEF) studies and Organisation Environmental Footprint (OEF) studies exclusively under the specified Product groups and sectors as defined in the Product Environmental Footprint Category Rules (PEFCR) and Organisation Environmental Footprint Sectorial Rules (OEFSR) listed in http://ec.europa.eu/environment/eussd/smgp/PEFCR_OEFSR.htm
