# extrusion and melt-spinning, continuous filament, with texturing (80 to 500 dtex- 72 to 450 den-125 to 20 nm); technology mix; production mix, at plant; service, Synthetic texturised flament yarn

Dataset: ILCD process, Partly terminated system
Geography: GLO
Reference year: 2021
Valid until: 2024
Classification: Systems / Textiles, furnitures and other interiors
LCI method principle: Attributional
LCI method approaches: Allocation - market value
Completeness: All relevant flows quantified
Project: Provision of process-based 3.0 Environmental Footprint-compliant life cycle inventory datasets - Apparel 1 - contract number 070201/2020/840291/SER/ENV.B.1
Generated by: Metsims Sustainability Consulting
Owner: PRé Sustainability B.V.
Compliance: ILCD Data Network - Entry-level; Suggestions for updating the PEF method 2019; ISO 14040 Environmental Management – Life Cycle Assessment – Principles and Framework, 2006; ISO 14044:2006. Environmental Management – Life Cycle Assessment – Requirements and guidelines.; Environmental Footprint 3.1
Review: Dependent internal review by Lucia Valsasina, Emilia Moreno Ruiz; Independent review panel by Subramanian Senthilkannan Muthu
Data quality: Overall quality: Good; Time representativeness: Very good; Geographical representativeness: Good; Technological representativeness: Good; Precision: Good; Methodological appropriateness and consistency: Not applicable
Amounts: no units in this file; such an amount is in the reference unit of its flow, which a separate flow dataset defines
copyright: true
licenseType: Free of charge for some user types or use types
accessRestrictions: Free of charge for all final users implementing a regular Product Environmental Footprint (PEF) studies and Organisation Environmental Footprint (OEF) studies exclusively under the specified Product groups and sectors as defined in the Product Environmental Footprint Category Rules (PEFCR) and Organisation Environmental Footprint Sectorial Rules (OEFSR) listed in http://ec.europa.eu/environment/eussd/smgp/PEFCR_OEFSR.htm and in accordance with the terms and conditions of the EULA (available at https://ecoinvent.lca-data.com/) exclusively until 31st December 2024. Any use of this dataset or any derivative data not within the specific context of one of the PEF/OEF projects or after the end of 2024 is not permitted.

## General comment
Notice: this data set supersedes the EF3.0-compliant version (see link under "preceding data set version" below calculated with the EF3.0). The life cycle inventory is not changed from the original EF3.0 data set. The LCIA results are calculated based on the EF3.1 methods which provide updated characterisation factors in the following impact categories: Climate Change, Ecotoxicity freshwater, Photochemical Ozone Formation, Acidification, Human Toxicity non-cancer, and Human Toxicity cancer. The review report and the data quality ratings refer to the original results. The data set has been updated by the European Commission on the basis of the original EF3.0 data set delivered by the data provider.The process covers extrusion and melt spinning of synthetic filament yarn production. Melted synthetic raw material are extruded into yarn form. After spinning yarns are coagulated by cold air.

Process emissions and energy consumption are modelled according to the most used polymers (PET, nylon and elastane) based on global consumption of textile raw materials.

Inputs and outpus were directly taken from scientific paper of Roos (2019) without any calculation.

## Technology and included processes
The process covers extrusion and melt spinning of synthetic filament yarn production. Synthetic raw materials in granule shape are extruded into yarn form in melt form. After spinning yarns are coagulated by cold air.

Process emissions and energy consumption are modelled according to the most commonly used polymers (PET, nylon and elastane) based on global consumption of textile raw materials.

Inputs and outputs were directly taken from scientific paper of Roos (2019) without any calculation.

In melt spinning, thermoplastic polymer granules are fed into an extruder and then the polymer melt is pumped through a spinneret under pressure. The extruded polymer is cooled down with cold air to solidify into filaments. After then, spin finish oil-lubricant is applied to spinned yarn to enhance performance of yarn at further textile production processes. The function of spinfinish oil is completed once the yarn is weaved or knitted. Spinfinish oil is then removed from fabric by washing treatment. The loss of spinfinish oil into wastewater after washing is taken into account.. Due to the lack of data on the wastewater treatment around the globe, EU wastewater treatment as a proxy is used.

After getting fibres from yarn production process, texturizing step is applied. Air-jet texturing technology uses air turbulence to give fibers natural like curves.

1.03 kg of material is used to produce 1 kg of yarn. 0.03 kg of waste amount shall also be added into the model. The nature of the recycling and/or disposal of this waste should be considered . The user is also responsible for accounting transportation expenditures for all extra input and output materials that need to be modelled alongside this service.*

*Ref: Altun, S. (2012). Prediction of textile waste profile and recycling opportunities in Turk. Fibres & Textiles in Eastern Europe.

References:
- Rawal, A., & Mukhopadhyay, S. (2014). Melt spinning of synthetic polymeric filaments. In Advances in filament yarn spinning of Textiles and Polymers (pp. 75-99). Woodhead Publishing.
- Bernholz, W. F., Redston, J. P., & Schlatter, C. (1974). Spin-Finish Usage and Compounding for Man-Made Fibers.
- www.korteks.com.tr, Access Date: 26.02.2021

## Parameters
- kg_0: 0.00019025
  Mass in kg, for antimony; Transoceanic ship, containers; GLO
- km_0: 363.3
  Distance in km, for antimony; Transoceanic ship, containers; GLO
- kg_km_0: 0.0691178; = kg_0*km_0
  Transport amount in km*km, for antimony; Transoceanic ship, containers; GLO
- kg_1: 0.00019025
  Mass in kg, for antimony; Freight train, diesel traction; EU+EFTA+UK
- km_1: 255.752
  Distance in km, for antimony; Freight train, diesel traction; EU+EFTA+UK
- kg_km_1: 0.0486568; = kg_1*km_1
  Transport amount in km*km, for antimony; Freight train, diesel traction; EU+EFTA+UK
- kg_2: 0.00019025
  Mass in kg, for antimony; Freight train, electricity traction; EU+EFTA+UK
- km_2: 86.9963
  Distance in km, for antimony; Freight train, electricity traction; EU+EFTA+UK
- kg_km_2: 0.016551; = kg_2*km_2
  Transport amount in km*km, for antimony; Freight train, electricity traction; EU+EFTA+UK
- kg_3: 0.00019025
  Mass in kg, for antimony; Freight train, average; EU+EFTA+UK
- km_3: 2.05185
  Distance in km, for antimony; Freight train, average; EU+EFTA+UK
- kg_km_3: 0.000390364; = kg_3*km_3
  Transport amount in km*km, for antimony; Freight train, average; EU+EFTA+UK
- kg_4: 0.00019025
  Mass in kg, for antimony; Barge; EU+EFTA+UK
- km_4: 11.9331
  Distance in km, for antimony; Barge; EU+EFTA+UK
- kg_km_4: 0.00227028; = kg_4*km_4
  Transport amount in km*km, for antimony; Barge; EU+EFTA+UK
- kg_5: 0.00019025
  Mass in kg, for antimony; Barge; ROW w/o EU+EFTA
- km_5: 24.3669
  Distance in km, for antimony; Barge; ROW w/o EU+EFTA
- kg_km_5: 0.0046358; = kg_5*km_5
  Transport amount in km*km, for antimony; Barge; ROW w/o EU+EFTA
- kg_6: 0.00019025
  Mass in kg, for antimony; Articulated lorry transport, Euro 4, Total weight >32 t; EU+EFTA+UK
- km_6: 99.3077
  Distance in km, for antimony; Articulated lorry transport, Euro 4, Total weight >32 t; EU+EFTA+UK
- kg_km_6: 0.0188933; = kg_6*km_6
  Transport amount in km*km, for antimony; Articulated lorry transport, Euro 4, Total weight >32 t; EU+EFTA+UK
- kg_7: 0.00019025
  Mass in kg, for antimony; Articulated lorry transport, Total weight >32 t, mix Euro 0-5; ROW w/o EU+EFTA
- km_7: 262.092
  Distance in km, for antimony; Articulated lorry transport, Total weight >32 t, mix Euro 0-5; ROW w/o EU+EFTA
- kg_km_7: 0.0498631; = kg_7*km_7
  Transport amount in km*km, for antimony; Articulated lorry transport, Total weight >32 t, mix Euro 0-5; ROW w/o EU+EFTA
- kg_8: 8.21981e-9
  Mass in kg, for cobalt; Transoceanic ship, containers; GLO
- km_8: 465066
  Distance in km, for cobalt; Transoceanic ship, containers; GLO
- kg_km_8: 0.00382275; = kg_8*km_8
  Transport amount in km*km, for cobalt; Transoceanic ship, containers; GLO
- kg_9: 8.21981e-9
  Mass in kg, for cobalt; Freight train, diesel traction; EU+EFTA+UK
- km_9: 78392.1
  Distance in km, for cobalt; Freight train, diesel traction; EU+EFTA+UK
- kg_km_9: 0.000644368; = kg_9*km_9
  Transport amount in km*km, for cobalt; Freight train, diesel traction; EU+EFTA+UK
- kg_10: 8.21981e-9
  Mass in kg, for cobalt; Freight train, electricity traction; EU+EFTA+UK
- km_10: 26665.8
  Distance in km, for cobalt; Freight train, electricity traction; EU+EFTA+UK
- kg_km_10: 0.000219188; = kg_10*km_10
  Transport amount in km*km, for cobalt; Freight train, electricity traction; EU+EFTA+UK
- kg_11: 8.21981e-9
  Mass in kg, for cobalt; Freight train, average; EU+EFTA+UK
- km_11: 628.925
  Distance in km, for cobalt; Freight train, average; EU+EFTA+UK
- kg_km_11: 5.16964e-6; = kg_11*km_11
  Transport amount in km*km, for cobalt; Freight train, average; EU+EFTA+UK
- kg_12: 8.21981e-9
  Mass in kg, for cobalt; Barge; EU+EFTA+UK
- km_12: 29443
  Distance in km, for cobalt; Barge; EU+EFTA+UK
- kg_km_12: 0.000242016; = kg_12*km_12
  Transport amount in km*km, for cobalt; Barge; EU+EFTA+UK
- kg_13: 8.21981e-9
  Mass in kg, for cobalt; Barge; ROW w/o EU+EFTA
- km_13: 60121.2
  Distance in km, for cobalt; Barge; ROW w/o EU+EFTA
- kg_km_13: 0.000494184; = kg_13*km_13
  Transport amount in km*km, for cobalt; Barge; ROW w/o EU+EFTA
- kg_14: 8.21981e-9
  Mass in kg, for cobalt; Articulated lorry transport, Euro 4, Total weight >32 t; EU+EFTA+UK
- km_14: 13080.2
  Distance in km, for cobalt; Articulated lorry transport, Euro 4, Total weight >32 t; EU+EFTA+UK
- kg_km_14: 0.000107517; = kg_14*km_14
  Transport amount in km*km, for cobalt; Articulated lorry transport, Euro 4, Total weight >32 t; EU+EFTA+UK
- kg_15: 8.21981e-9
  Mass in kg, for cobalt; Articulated lorry transport, Total weight >32 t, mix Euro 0-5; ROW w/o EU+EFTA
- km_15: 34521.2
  Distance in km, for cobalt; Articulated lorry transport, Total weight >32 t, mix Euro 0-5; ROW w/o EU+EFTA
- kg_km_15: 0.000283758; = kg_15*km_15
  Transport amount in km*km, for cobalt; Articulated lorry transport, Total weight >32 t, mix Euro 0-5; ROW w/o EU+EFTA
- kg_16: 4.90618e-5
  Mass in kg, for manganese; Transoceanic ship, containers; GLO
- km_16: 1425.45
  Distance in km, for manganese; Transoceanic ship, containers; GLO
- kg_km_16: 0.0699353; = kg_16*km_16
  Transport amount in km*km, for manganese; Transoceanic ship, containers; GLO
- kg_17: 4.90618e-5
  Mass in kg, for manganese; Freight train, diesel traction; EU+EFTA+UK
- km_17: 1003.47
  Distance in km, for manganese; Freight train, diesel traction; EU+EFTA+UK
- kg_km_17: 0.0492322; = kg_17*km_17
  Transport amount in km*km, for manganese; Freight train, diesel traction; EU+EFTA+UK
- kg_18: 4.90618e-5
  Mass in kg, for manganese; Freight train, electricity traction; EU+EFTA+UK
- km_18: 341.341
  Distance in km, for manganese; Freight train, electricity traction; EU+EFTA+UK
- kg_km_18: 0.0167468; = kg_18*km_18
  Transport amount in km*km, for manganese; Freight train, electricity traction; EU+EFTA+UK
- kg_19: 4.90618e-5
  Mass in kg, for manganese; Freight train, average; EU+EFTA+UK
- km_19: 8.05068
  Distance in km, for manganese; Freight train, average; EU+EFTA+UK
- kg_km_19: 0.000394981; = kg_19*km_19
  Transport amount in km*km, for manganese; Freight train, average; EU+EFTA+UK
- kg_20: 4.90618e-5
  Mass in kg, for manganese; Barge; EU+EFTA+UK
- km_20: 46.821
  Distance in km, for manganese; Barge; EU+EFTA+UK
- kg_km_20: 0.00229713; = kg_20*km_20
  Transport amount in km*km, for manganese; Barge; EU+EFTA+UK
- kg_21: 4.90618e-5
  Mass in kg, for manganese; Barge; ROW w/o EU+EFTA
- km_21: 95.6064
  Distance in km, for manganese; Barge; ROW w/o EU+EFTA
- kg_km_21: 0.00469062; = kg_21*km_21
  Transport amount in km*km, for manganese; Barge; ROW w/o EU+EFTA
- kg_22: 4.90618e-5
  Mass in kg, for manganese; Articulated lorry transport, Euro 4, Total weight >32 t; EU+EFTA+UK
- km_22: 389.646
  Distance in km, for manganese; Articulated lorry transport, Euro 4, Total weight >32 t; EU+EFTA+UK
- kg_km_22: 0.0191167; = kg_22*km_22
  Transport amount in km*km, for manganese; Articulated lorry transport, Euro 4, Total weight >32 t; EU+EFTA+UK
- kg_23: 4.90618e-5
  Mass in kg, for manganese; Articulated lorry transport, Total weight >32 t, mix Euro 0-5; ROW w/o EU+EFTA
- km_23: 1028.35
  Distance in km, for manganese; Articulated lorry transport, Total weight >32 t, mix Euro 0-5; ROW w/o EU+EFTA
- kg_km_23: 0.0504528; = kg_23*km_23
  Transport amount in km*km, for manganese; Articulated lorry transport, Total weight >32 t, mix Euro 0-5; ROW w/o EU+EFTA
- kg_24: 1.40625e-5
  Mass in kg, for sodium; Transoceanic ship, containers; GLO
- km_24: 1916.8
  Distance in km, for sodium; Transoceanic ship, containers; GLO
- kg_km_24: 0.026955; = kg_24*km_24
  Transport amount in km*km, for sodium; Transoceanic ship, containers; GLO
- kg_25: 1.40625e-5
  Mass in kg, for sodium; Freight train, diesel traction; EU+EFTA+UK
- km_25: 733.67
  Distance in km, for sodium; Freight train, diesel traction; EU+EFTA+UK
- kg_km_25: 0.0103172; = kg_25*km_25
  Transport amount in km*km, for sodium; Freight train, diesel traction; EU+EFTA+UK
- kg_26: 1.40625e-5
  Mass in kg, for sodium; Freight train, electricity traction; EU+EFTA+UK
- km_26: 249.564
  Distance in km, for sodium; Freight train, electricity traction; EU+EFTA+UK
- kg_km_26: 0.0035095; = kg_26*km_26
  Transport amount in km*km, for sodium; Freight train, electricity traction; EU+EFTA+UK
- kg_27: 1.40625e-5
  Mass in kg, for sodium; Freight train, average; EU+EFTA+UK
- km_27: 5.88609
  Distance in km, for sodium; Freight train, average; EU+EFTA+UK
- kg_km_27: 8.27732e-5; = kg_27*km_27
  Transport amount in km*km, for sodium; Freight train, average; EU+EFTA+UK
- kg_28: 1.40625e-5
  Mass in kg, for sodium; Barge; EU+EFTA+UK
- km_28: 25.8781
  Distance in km, for sodium; Barge; EU+EFTA+UK
- kg_km_28: 0.000363911; = kg_28*km_28
  Transport amount in km*km, for sodium; Barge; EU+EFTA+UK
- kg_29: 1.40625e-5
  Mass in kg, for sodium; Barge; ROW w/o EU+EFTA
- km_29: 52.8419
  Distance in km, for sodium; Barge; ROW w/o EU+EFTA
- kg_km_29: 0.000743089; = kg_29*km_29
  Transport amount in km*km, for sodium; Barge; ROW w/o EU+EFTA
- kg_30: 1.40625e-5
  Mass in kg, for sodium; Articulated lorry transport, Euro 4, Total weight >32 t; EU+EFTA+UK
- km_30: 183.601
  Distance in km, for sodium; Articulated lorry transport, Euro 4, Total weight >32 t; EU+EFTA+UK
- kg_km_30: 0.00258189; = kg_30*km_30
  Transport amount in km*km, for sodium; Articulated lorry transport, Euro 4, Total weight >32 t; EU+EFTA+UK
- kg_31: 1.40625e-5
  Mass in kg, for sodium; Articulated lorry transport, Total weight >32 t, mix Euro 0-5; ROW w/o EU+EFTA
- km_31: 484.559
  Distance in km, for sodium; Articulated lorry transport, Total weight >32 t, mix Euro 0-5; ROW w/o EU+EFTA
- kg_km_31: 0.00681411; = kg_31*km_31
  Transport amount in km*km, for sodium; Articulated lorry transport, Total weight >32 t, mix Euro 0-5; ROW w/o EU+EFTA
- kg_32: 0.00047998
  Mass in kg, for lubricating oil // lubricants at refinery // cn; Articulated lorry transport, Euro 4, Total weight >32 t; EU+EFTA+UK
- km_32: 1000
  Distance in km, for lubricating oil // lubricants at refinery // cn; Articulated lorry transport, Euro 4, Total weight >32 t; EU+EFTA+UK
- kg_km_32: 0.47998; = kg_32*km_32
  Transport amount in km*km, for lubricating oil // lubricants at refinery // cn; Articulated lorry transport, Euro 4, Total weight >32 t; EU+EFTA+UK
- kg_33: 0.00153985
  Mass in kg, for lubricating oil // lubricants at refinery // eu+efta+uk; Articulated lorry transport, Euro 4, Total weight >32 t; EU+EFTA+UK
- km_33: 1000
  Distance in km, for lubricating oil // lubricants at refinery // eu+efta+uk; Articulated lorry transport, Euro 4, Total weight >32 t; EU+EFTA+UK
- kg_km_33: 1.53985; = kg_33*km_33
  Transport amount in km*km, for lubricating oil // lubricants at refinery // eu+efta+uk; Articulated lorry transport, Euro 4, Total weight >32 t; EU+EFTA+UK
- kg_34: 0.00011536
  Mass in kg, for lubricating oil // lubricants at refinery // raf; Articulated lorry transport, Euro 4, Total weight >32 t; EU+EFTA+UK
- km_34: 1000
  Distance in km, for lubricating oil // lubricants at refinery // raf; Articulated lorry transport, Euro 4, Total weight >32 t; EU+EFTA+UK
- kg_km_34: 0.11536; = kg_34*km_34
  Transport amount in km*km, for lubricating oil // lubricants at refinery // raf; Articulated lorry transport, Euro 4, Total weight >32 t; EU+EFTA+UK
- kg_35: 0.00302305
  Mass in kg, for lubricating oil // lubricants at refinery // ras w/o cn; Articulated lorry transport, Euro 4, Total weight >32 t; EU+EFTA+UK
- km_35: 1000
  Distance in km, for lubricating oil // lubricants at refinery // ras w/o cn; Articulated lorry transport, Euro 4, Total weight >32 t; EU+EFTA+UK
- kg_km_35: 3.02305; = kg_35*km_35
  Transport amount in km*km, for lubricating oil // lubricants at refinery // ras w/o cn; Articulated lorry transport, Euro 4, Total weight >32 t; EU+EFTA+UK
- kg_36: 0.00235973
  Mass in kg, for lubricating oil // lubricants at refinery // rna; Articulated lorry transport, Euro 4, Total weight >32 t; EU+EFTA+UK
- km_36: 1000
  Distance in km, for lubricating oil // lubricants at refinery // rna; Articulated lorry transport, Euro 4, Total weight >32 t; EU+EFTA+UK
- kg_km_36: 2.35973; = kg_36*km_36
  Transport amount in km*km, for lubricating oil // lubricants at refinery // rna; Articulated lorry transport, Euro 4, Total weight >32 t; EU+EFTA+UK
- kg_37: 0.00028119
  Mass in kg, for lubricating oil // lubricants at refinery // rsa; Articulated lorry transport, Euro 4, Total weight >32 t; EU+EFTA+UK
- km_37: 1000
  Distance in km, for lubricating oil // lubricants at refinery // rsa; Articulated lorry transport, Euro 4, Total weight >32 t; EU+EFTA+UK
- kg_km_37: 0.28119; = kg_37*km_37
  Transport amount in km*km, for lubricating oil // lubricants at refinery // rsa; Articulated lorry transport, Euro 4, Total weight >32 t; EU+EFTA+UK
- kg_38: 0.00249981
  Mass in kg, for lubricating oil // lubricants at refinery // ru; Articulated lorry transport, Euro 4, Total weight >32 t; EU+EFTA+UK
- km_38: 1000
  Distance in km, for lubricating oil // lubricants at refinery // ru; Articulated lorry transport, Euro 4, Total weight >32 t; EU+EFTA+UK
- kg_km_38: 2.49981; = kg_38*km_38
  Transport amount in km*km, for lubricating oil // lubricants at refinery // ru; Articulated lorry transport, Euro 4, Total weight >32 t; EU+EFTA+UK
- kg_39: 4.5e-5
  Mass in kg, for methylene diphenyldiisocyanate // methylene diphenyldiisocyanate production // glo; Articulated lorry transport, Euro 4, Total weight >32 t; EU+EFTA+UK
- km_39: 1000
  Distance in km, for methylene diphenyldiisocyanate // methylene diphenyldiisocyanate production // glo; Articulated lorry transport, Euro 4, Total weight >32 t; EU+EFTA+UK
- kg_km_39: 0.045; = kg_39*km_39
  Transport amount in km*km, for methylene diphenyldiisocyanate // methylene diphenyldiisocyanate production // glo; Articulated lorry transport, Euro 4, Total weight >32 t; EU+EFTA+UK
- kg_40: 4.5e-6
  Mass in kg, for phosphoric acid // phosphoric acid production // glo; Articulated lorry transport, Euro 4, Total weight >32 t; EU+EFTA+UK
- km_40: 1000
  Distance in km, for phosphoric acid // phosphoric acid production // glo; Articulated lorry transport, Euro 4, Total weight >32 t; EU+EFTA+UK
- kg_km_40: 0.0045; = kg_40*km_40
  Transport amount in km*km, for phosphoric acid // phosphoric acid production // glo; Articulated lorry transport, Euro 4, Total weight >32 t; EU+EFTA+UK
- kg_41: 0.00047998
  Mass in kg, for lubricating oil // lubricants at refinery // cn; Transoceanic ship, containers; GLO
- km_41: 18000
  Distance in km, for lubricating oil // lubricants at refinery // cn; Transoceanic ship, containers; GLO
- kg_km_41: 8.63964; = kg_41*km_41
  Transport amount in km*km, for lubricating oil // lubricants at refinery // cn; Transoceanic ship, containers; GLO
- kg_42: 0.00153985
  Mass in kg, for lubricating oil // lubricants at refinery // eu+efta+uk; Transoceanic ship, containers; GLO
- km_42: 18000
  Distance in km, for lubricating oil // lubricants at refinery // eu+efta+uk; Transoceanic ship, containers; GLO
- kg_km_42: 27.7173; = kg_42*km_42
  Transport amount in km*km, for lubricating oil // lubricants at refinery // eu+efta+uk; Transoceanic ship, containers; GLO
- kg_43: 0.00011536
  Mass in kg, for lubricating oil // lubricants at refinery // raf; Transoceanic ship, containers; GLO
- km_43: 18000
  Distance in km, for lubricating oil // lubricants at refinery // raf; Transoceanic ship, containers; GLO
- kg_km_43: 2.07648; = kg_43*km_43
  Transport amount in km*km, for lubricating oil // lubricants at refinery // raf; Transoceanic ship, containers; GLO
- kg_44: 0.00302305
  Mass in kg, for lubricating oil // lubricants at refinery // ras w/o cn; Transoceanic ship, containers; GLO
- km_44: 18000
  Distance in km, for lubricating oil // lubricants at refinery // ras w/o cn; Transoceanic ship, containers; GLO
- kg_km_44: 54.4149; = kg_44*km_44
  Transport amount in km*km, for lubricating oil // lubricants at refinery // ras w/o cn; Transoceanic ship, containers; GLO
- kg_45: 0.00235973
  Mass in kg, for lubricating oil // lubricants at refinery // rna; Transoceanic ship, containers; GLO
- km_45: 18000
  Distance in km, for lubricating oil // lubricants at refinery // rna; Transoceanic ship, containers; GLO
- kg_km_45: 42.4751; = kg_45*km_45
  Transport amount in km*km, for lubricating oil // lubricants at refinery // rna; Transoceanic ship, containers; GLO
- kg_46: 0.00028119
  Mass in kg, for lubricating oil // lubricants at refinery // rsa; Transoceanic ship, containers; GLO
- km_46: 18000
  Distance in km, for lubricating oil // lubricants at refinery // rsa; Transoceanic ship, containers; GLO
- kg_km_46: 5.06142; = kg_46*km_46
  Transport amount in km*km, for lubricating oil // lubricants at refinery // rsa; Transoceanic ship, containers; GLO
- kg_47: 0.00249981
  Mass in kg, for lubricating oil // lubricants at refinery // ru; Transoceanic ship, containers; GLO
- km_47: 18000
  Distance in km, for lubricating oil // lubricants at refinery // ru; Transoceanic ship, containers; GLO
- kg_km_47: 44.9966; = kg_47*km_47
  Transport amount in km*km, for lubricating oil // lubricants at refinery // ru; Transoceanic ship, containers; GLO
- kg_48: 4.5e-5
  Mass in kg, for methylene diphenyldiisocyanate // methylene diphenyldiisocyanate production // glo; Transoceanic ship, containers; GLO
- km_48: 18000
  Distance in km, for methylene diphenyldiisocyanate // methylene diphenyldiisocyanate production // glo; Transoceanic ship, containers; GLO
- kg_km_48: 0.81; = kg_48*km_48
  Transport amount in km*km, for methylene diphenyldiisocyanate // methylene diphenyldiisocyanate production // glo; Transoceanic ship, containers; GLO
- kg_49: 4.5e-6
  Mass in kg, for phosphoric acid // phosphoric acid production // glo; Transoceanic ship, containers; GLO
- km_49: 18000
  Distance in km, for phosphoric acid // phosphoric acid production // glo; Transoceanic ship, containers; GLO
- kg_km_49: 0.081; = kg_49*km_49
  Transport amount in km*km, for phosphoric acid // phosphoric acid production // glo; Transoceanic ship, containers; GLO

## Reference product
- synthetic flament yarn, textured // extrusion and melt-spinning, continuous filament, with texturing (80 to 500 dtex- 72 to 450 den-125 to 20 nm) // glo: 1

## Inputs
- Transport of antimony by Transoceanic ship, containers - GLO: 0.0691178; = kg_km_0
- Transport of antimony by Freight train, diesel traction - EU+EFTA+UK: 0.0486568; = kg_km_1
- Transport of antimony by Freight train, electricity traction - EU+EFTA+UK: 0.016551; = kg_km_2
- Transport of antimony by Freight train, average - EU+EFTA+UK: 0.000390364; = kg_km_3
- Transport of antimony by Barge - EU+EFTA+UK: 0.00227028; = kg_km_4
- Transport of antimony by Barge - ROW w/o EU+EFTA: 0.0046358; = kg_km_5
- Transport of antimony by Articulated lorry transport, Euro 4, Total weight >32 t - EU+EFTA+UK: 0.0188933; = kg_km_6
- Transport of antimony by Articulated lorry transport, Total weight >32 t, mix Euro 0-5 - ROW w/o EU+EFTA: 0.0498631; = kg_km_7
- Transport of cobalt by Transoceanic ship, containers - GLO: 0.00382275; = kg_km_8
- Transport of cobalt by Freight train, diesel traction - EU+EFTA+UK: 0.000644368; = kg_km_9
- Transport of cobalt by Freight train, electricity traction - EU+EFTA+UK: 0.000219188; = kg_km_10
- Transport of cobalt by Freight train, average - EU+EFTA+UK: 5.16964e-6; = kg_km_11
- Transport of cobalt by Barge - EU+EFTA+UK: 0.000242016; = kg_km_12
- Transport of cobalt by Barge - ROW w/o EU+EFTA: 0.000494184; = kg_km_13
- Transport of cobalt by Articulated lorry transport, Euro 4, Total weight >32 t - EU+EFTA+UK: 0.000107517; = kg_km_14
- Transport of cobalt by Articulated lorry transport, Total weight >32 t, mix Euro 0-5 - ROW w/o EU+EFTA: 0.000283758; = kg_km_15
- Electricity from Electricity grid mix 1kV-60kV - AU: 0.0759
- Electricity from Electricity grid mix 1kV-60kV - EU+EFTA+UK: 1.1186
- Electricity from Electricity grid mix 1kV-60kV - NZ: 0.0145
- Electricity from Electricity grid mix 1kV-60kV - RAF: 0.2444
- Electricity from Electricity grid mix 1kV-60kV - RNA: 1.6369
- Electricity from Electricity grid mix 1kV-60kV - RSA: 0.5554
- Electricity from Electricity grid mix 1kV-60kV - RU: 0.3273
- Transport of manganese by Transoceanic ship, containers - GLO: 0.0699353; = kg_km_16
- Transport of manganese by Freight train, diesel traction - EU+EFTA+UK: 0.0492322; = kg_km_17
- Transport of manganese by Freight train, electricity traction - EU+EFTA+UK: 0.0167468; = kg_km_18
- Transport of manganese by Freight train, average - EU+EFTA+UK: 0.000394981; = kg_km_19
- Transport of manganese by Barge - EU+EFTA+UK: 0.00229713; = kg_km_20
- Transport of manganese by Barge - ROW w/o EU+EFTA: 0.00469062; = kg_km_21
- Transport of manganese by Articulated lorry transport, Euro 4, Total weight >32 t - EU+EFTA+UK: 0.0191167; = kg_km_22
- Transport of manganese by Articulated lorry transport, Total weight >32 t, mix Euro 0-5 - ROW w/o EU+EFTA: 0.0504528; = kg_km_23
- Transport of sodium by Transoceanic ship, containers - GLO: 0.026955; = kg_km_24
- Transport of sodium by Freight train, diesel traction - EU+EFTA+UK: 0.0103172; = kg_km_25
- Transport of sodium by Freight train, electricity traction - EU+EFTA+UK: 0.0035095; = kg_km_26
- Transport of sodium by Freight train, average - EU+EFTA+UK: 8.27732e-5; = kg_km_27
- Transport of sodium by Barge - EU+EFTA+UK: 0.000363911; = kg_km_28
- Transport of sodium by Barge - ROW w/o EU+EFTA: 0.000743089; = kg_km_29
- Transport of sodium by Articulated lorry transport, Euro 4, Total weight >32 t - EU+EFTA+UK: 0.00258189; = kg_km_30
- Transport of sodium by Articulated lorry transport, Total weight >32 t, mix Euro 0-5 - ROW w/o EU+EFTA: 0.00681411; = kg_km_31
- Thermal energy (MJ) from Thermal energy from hard coal - ROW: 0.99
- Thermal energy (MJ) from Thermal energy from heavy fuel oil (HFO) - ROW: 0.022
- Thermal energy (MJ) from Thermal energy from light fuel oil (LFO) - ROW: 0.308
- Thermal energy (MJ) from Thermal energy from natural gas - ROW: 0.88
- Transport of lubricating oil // lubricants at refinery // cn by Articulated lorry transport, Euro 4, Total weight >32 t - EU+EFTA+UK: 0.47998; = kg_km_32
- Transport of lubricating oil // lubricants at refinery // eu+efta+uk by Articulated lorry transport, Euro 4, Total weight >32 t - EU+EFTA+UK: 1.53985; = kg_km_33
- Transport of lubricating oil // lubricants at refinery // raf by Articulated lorry transport, Euro 4, Total weight >32 t - EU+EFTA+UK: 0.11536; = kg_km_34
- Transport of lubricating oil // lubricants at refinery // ras w/o cn by Articulated lorry transport, Euro 4, Total weight >32 t - EU+EFTA+UK: 3.02305; = kg_km_35
- Transport of lubricating oil // lubricants at refinery // rna by Articulated lorry transport, Euro 4, Total weight >32 t - EU+EFTA+UK: 2.35973; = kg_km_36
- Transport of lubricating oil // lubricants at refinery // rsa by Articulated lorry transport, Euro 4, Total weight >32 t - EU+EFTA+UK: 0.28119; = kg_km_37
- Transport of lubricating oil // lubricants at refinery // ru by Articulated lorry transport, Euro 4, Total weight >32 t - EU+EFTA+UK: 2.49981; = kg_km_38
- Transport of methylene diphenyldiisocyanate // methylene diphenyldiisocyanate production // glo by Articulated lorry transport, Euro 4, Total weight >32 t - EU+EFTA+UK: 0.045; = kg_km_39
- Transport of phosphoric acid // phosphoric acid production // glo by Articulated lorry transport, Euro 4, Total weight >32 t - EU+EFTA+UK: 0.0045; = kg_km_40
- Transport of lubricating oil // lubricants at refinery // cn by Transoceanic ship, containers - GLO: 8.63964; = kg_km_41
- Transport of lubricating oil // lubricants at refinery // eu+efta+uk by Transoceanic ship, containers - GLO: 27.7173; = kg_km_42
- Transport of lubricating oil // lubricants at refinery // raf by Transoceanic ship, containers - GLO: 2.07648; = kg_km_43
- Transport of lubricating oil // lubricants at refinery // ras w/o cn by Transoceanic ship, containers - GLO: 54.4149; = kg_km_44
- Transport of lubricating oil // lubricants at refinery // rna by Transoceanic ship, containers - GLO: 42.4751; = kg_km_45
- Transport of lubricating oil // lubricants at refinery // rsa by Transoceanic ship, containers - GLO: 5.06142; = kg_km_46
- Transport of lubricating oil // lubricants at refinery // ru by Transoceanic ship, containers - GLO: 44.9966; = kg_km_47
- Transport of methylene diphenyldiisocyanate // methylene diphenyldiisocyanate production // glo by Transoceanic ship, containers - GLO: 0.81; = kg_km_48
- Transport of phosphoric acid // phosphoric acid production // glo by Transoceanic ship, containers - GLO: 0.081; = kg_km_49
- Electricity from Electricity grid mix 1kV-60kV - CN: 1.67725
- Electricity from Electricity grid mix 1kV-60kV - RAS w/o CN: 1.83765
- synthetic flament yarn, textured // extrusion and melt-spinning, continuous filament, with texturing (80 to 500 dtex- 72 to 450 den-125 to 20 nm) // glo, blackbox: 1
- synthetic flament yarn, textured // extrusion and melt-spinning, continuous filament, with texturing (80 to 500 dtex- 72 to 450 den-125 to 20 nm) // glo, elementary: 1

## Impact indicators
- Eutrophication marine: 0.00179798
- Ecotoxicity, freshwater: 11.6712
- Land use: -0.0953925
- Water use: 0.819261
- Resource use, minerals and metals: 0.000239551
- Resource use, fossils: 22.5942
- Climate change: 1.77012
- Ozone depletion: 1.77888e-9
- Human toxicity, cancer: 1.27851e-9
- Human toxicity, non-cancer: 1.54719e-8
- EF-particulate Matter: 3.93935e-7
- Ionising radiation, human health: 0.110422
- Photochemical ozone formation - human health: 0.0045826
- Acidification: 0.0102764
- Eutrophication, terrestrial: 0.0158074
- Eutrophication, freshwater: 9.87745e-5

## Deviations from the LCI method principle
The background data uses:
- the \xe2\x80\x9cRecycled content cut-off\xe2\x80\x9d approach to allocate end-of-life by-products and secondary materials. This allocation is explained in the description of the recycled content system model (http://www.ecoinvent.org/database/system-models-in-ecoinvent-3/cut-off-system-model/allocation-cut-off-by-classification.html).
OR
- EF compliant data

## Deviations from the LCI method approaches
Background data:
- the \xe2\x80\x9cRecycled content cut-off\xe2\x80\x9d approach to allocate end-of-life by-products and secondary materials. This allocation is explained in the description of the recycled content system model (http://www.ecoinvent.org/database/system-models-in-ecoinvent-3/cut-off-system-model/allocation-cut-off-by-classification.html). The ecoinvent database mostly relies on “Allocation – market values” apart for few exceptions particularly in the energy sector. ecoinvent energy data is replaced with EF3.0 core data as per the EF guidelines version 2.0.
OR
- EF compliant data

## Modelling constants
All modelling constants follow the requirements listed in the Tender Specifications 070201/2020/SER/ENV.B1. Completeness: There are no intentional cut-offs in the inventory no matter how small their contribution to all the EF impact categories is. Eventual cut-offs are in compliance with the Guide for EF compliant data sets (JRC 2020), i.e. only if below the 3% cut-off rule. Water use: water use is modelled at country level using separate flows for water withdrawal, water release and water evaporation. Handling multi-functional processes: the following PEF multi- functionality decision hierarchy is applied for resolving all multi- functionality problems: (1) subdivision or system expansion; (2) allocation based on a relevant underlying physical relationship (substitution may apply here); (3) allocation based on some other relationship. Direct land use change: GHG emissions from direct LUC allocated to good/service for 20 years after the LUC occurs, with IPCC default values. Carbon storage and delayed emissions: credits associated with temporary (carbon) storage or delayed emissions up to 300 years are not be considered. Emissions off-setting: are not included. Capital goods (including infrastructures) and their End of life: they are included. System boundaries: system boundaries include all processes linked to the product supply chain (e.g. maintenance). Time period: emissions and removals are modelled as if released or removed at the beginning of the assessment method. Fossil and biogenic carbon emissions and removals: removals and emissions are modelled as follows: All GHG emissions from fossil fuels (including peat and limestone) are modelled consistently with the most updated ILCD list of elementary flows. The non-fossil (biogenic) carbon flows are modelled consistently with the most updated ILCD list of elementary flows.

## Cut-off and completeness
There are no intentional cut-offs in the inventory no matter how small their contribution to all the EF impact categories is. Eventual cut-offs are in compliance with the Guide for EF compliant data sets (JRC 2020), i.e. only if below the 3% cut-off rule. The dataset dry mass and water balance has been checked to ensure the inventory is complete. Capital goods (e.g. infrastructure) and their end-of-life are included.

## Data selection and combination
These datasets include, in both their foreground and background data, links to EF3.0 compliant data.
The relevant background data on energy, transport, and End of Life are from the LCDN data node (http://lcdn.thinkstep.com/Node/).
All other background data in the supply of this product for which no EF3.0 process was available are from ecoinvent v3.7 database (www.ecoinvent.org) or other data sources.

## Data treatment and extrapolations
Several data sources have been used to model the inventory.

## Review details
Internal reviews have been asked to review the plausibility of the unit process, LCIA scores, and DQRs. Internal reviewers have also been asked to review the data for EF compliancy. The consortium is therefore responsible for aspects such as compliancy with the ILCD format, including validation in Look@LCI, and nomenclature.
Internal reviwers have been asked to judge based on the process name, that the unit process models in a complete and representative way the process in the requested location. The review encompassed the plausability of:
- exchanges with nature (elementary flows) as well as exchanges such as product and waste flows.
- meta information (general comment, technology comment, system boundaries, allocation, cut-off rules, etc.). Reviewers were asked to judge if the provided information is enough to understand the content of the process.
- LCIA scores
- DQRs including precision, technology, time and geography. As well as the overall DQR.
External reviewers have been asked to provide their expertise in the field of interest. External reviewers have been asked to review the unit process, including eventual methodological choices, the LCIA scores (provided with contribution scores as well), and DQRs. External reviewers have been provided all the information in a tool developed by the consortium for the purpose of this project.
External reviewers have been asked to judge based on the process name, that the unit process models in a complete and representative way the process in the requested location. The review encompassed:
- Plausability and completeness of exchanges with nature (elementary flows) as well as exchanges such as product and waste flows.
- Review of meta information (general comment, technology comment, system boundaries, allocation, cut-off rules, etc.). Reviewers were asked to judge if the provided information is enough to understand the content of the process.
- Review of properties (biogenic carbon and water content).
- Review of allocation keys.
- Plausability of LCIA scores calculated by the consortium.
- Plausability of DQRs including precision, technology, time and geography. As well as the overall DQR.

## Data sources
- Background Data for Representative products and organisations. EF 3.0 compliant (data stock)
- Roos, S., Jönsson, C., Posner, S., Arvidsson, R., & Svanström, M. (2019). An inventory framework for inclusion of textile chemicals in life cycle assessment. The International Journal of Life Cycle Assessment, 24(5), 838-847.
- http://cisscomachinery.com/ATY_YARN_AIR_TEXTURED_YARN_MACHINE, Acces Date: 26.02.2021
- www.korteks.com.tr, Access Date: 26.02.2021
- Rawal, A., & Mukhopadhyay, S. (2014). Melt spinning of synthetic polymeric filaments. In Advances in filament yarn spinning of Textiles and Polymers (pp. 75-99). Woodhead Publishing.
- Bernholz, W. F., Redston, J. P., & Schlatter, C. (1974). Spin-Finish Usage and Compounding for Man-Made Fibers.
- Freitas A., Zhang G., Mathews R., (2017), Waterfootprint Assessment of Polyester and Viscose and Comparison to Cotton, Water Footprint Network

## Intended applications
Implementation of regular Product Environmental Footprint (PEF) studies and Organisation Environmental Footprint (OEF) studies exclusively under the specified Product groups and sectors as defined in the Product Environmental Footprint Category Rules (PEFCR) and Organisation Environmental Footprint Sectorial Rules (OEFSR) listed in http://ec.europa.eu/environment/eussd/smgp/PEFCR_OEFSR.htm
