# eucalyptus forestry; technology mix; production mix, at plantation; 1 kg of DM (basic wood density 580 kg/m³)

Dataset: ILCD process, Partly terminated system
Geography: WORLD (WITHOUT EU+EFTA+UK)
Reference year: 2019
Valid until: 2024
Classification: Materials production / Wood
LCI method principle: Attributional
LCI method approaches: Allocation - market value
Completeness: All relevant flows quantified
Project: Provision of process-based 3.0 Environmental Footprint-compliant life cycle inventory datasets - Renewable materials - contract number 070201/2020/840085/SER/ENV.B.1
Generated by: ACV Brasil
Owner: ecoinvent
Compliance: ILCD Data Network - Entry-level; Suggestions for updating the PEF method 2019; ISO 14040 Environmental Management – Life Cycle Assessment – Principles and Framework, 2006; ISO 14044:2006. Environmental Management – Life Cycle Assessment – Requirements and guidelines.; Environmental Footprint 3.1
Review: Dependent internal review by Hans Blonk, Lucia Valsasina; Independent review panel by Laura Batlle Bayer
Data quality: Overall quality: Good; Time representativeness: Very good; Geographical representativeness: Good; Technological representativeness: Good; Precision: Good; Methodological appropriateness and consistency: Not applicable
Amounts: no units in this file; such an amount is in the reference unit of its flow, which a separate flow dataset defines
copyright: true
licenseType: Free of charge for some user types or use types
accessRestrictions: Free of charge for all final users implementing a regular Product Environmental Footprint (PEF) studies and Organisation Environmental Footprint (OEF) studies exclusively under the specified Product groups and sectors as defined in the Product Environmental Footprint Category Rules (PEFCR) and Organisation Environmental Footprint Sectorial Rules (OEFSR) listed in http://ec.europa.eu/environment/eussd/smgp/PEFCR_OEFSR.htm and in accordance with the terms and conditions of the EULA (available at https://ecoinvent.lca-data.com/) exclusively until 31st December 2024. Any use of this dataset or any derivative data not within the specific context of one of the PEF/OEF projects or after the end of 2024 is not permitted.

## General comment
Notice: this data set supersedes the EF3.0-compliant version (see link under "preceding data set version" below calculated with the EF3.0). The life cycle inventory is not changed from the original EF3.0 data set. The LCIA results are calculated based on the EF3.1 methods which provide updated characterisation factors in the following impact categories: Climate Change, Ecotoxicity freshwater, Photochemical Ozone Formation, Acidification, Human Toxicity non-cancer, and Human Toxicity cancer. The review report and the data quality ratings refer to the original results. The data set has been updated by the European Commission on the basis of the original EF3.0 data set delivered by the data provider.This dataset represents the production of 1 kg of Eucalyptus on a dry mass basis. The data is collected from two pulp and paper companies in Brazil. The production takes place in the Brazilian states of São Paulo, Paraná, Mato Grosso do Sul and Bahia. This dataset is modelled as the arithmetic average of the two companies production. The basic wood density reported by the producers is 580 kg/m³.

## Technology and included processes
The production of Eucalyptus starts with the cultivation of seedlings in greenhouses, which are transplanted to the plantation area. Machines are used for site preparation. Eucalyptus cultivation is enhanced by means of herbicides, pesticides and fertilizers, especially in the first years of growth. After a growing period of seven years, machines are used for thinning and clear cut of the trees.
This activity includes the seedling production, the inputs of fertilizers, herbicides and pesticides as well as the fuel burned in the machinery.
Emissions to air, water and soil resulting from fertilizer use are modelled according to Nemecek et al. (2015). The active ingredients of pesticides and herbicides are considered as soil emissions. The input of boron (3.81E-06 kg) was excluded since its contribution was less than 3 % in terms of mass and single score.
Climate change impacts related to land use change (LUC) over the past 20 years are modelled according to Novaes et al. (2007).
References:
Nemecek T., Bengoa X., Lansche J., Mouron P., Riedener E., Rossi V. & Humbert S. Methodological Guidelines for the Life Cycle Inventory of Agricultural Products. [Version 3.0, July 2015.] World Food LCA Database (WFLDB). Quantis and Agroscope, Lausanne and Zurich,
Switzerland.

Novaes, R. M. L., Pazianotto, R. A. A., Brandão, M., Alves, B. J. R., May, A., Folegatti-Matsuura, M. I. S. 2017. Estimating 20-year land use change and derived CO2 emissions associated to crops, pasture and forestry in Brazil and each of its 27 states. Global Change Biology, v. 23, n. 9, p. 3716-3728.

## Parameters
- kg_0: 0.00500155
  Mass in kg, for dolomite; Freight train, diesel traction; EU+EFTA+UK
- km_0: 210.646
  Distance in km, for dolomite; Freight train, diesel traction; EU+EFTA+UK
- kg_km_0: 1.05356; = kg_0*km_0
  Transport amount in km*km, for dolomite; Freight train, diesel traction; EU+EFTA+UK
- kg_1: 0.00500155
  Mass in kg, for dolomite; Freight train, electricity traction; EU+EFTA+UK
- km_1: 63.6114
  Distance in km, for dolomite; Freight train, electricity traction; EU+EFTA+UK
- kg_km_1: 0.318156; = kg_1*km_1
  Transport amount in km*km, for dolomite; Freight train, electricity traction; EU+EFTA+UK
- kg_2: 0.00500155
  Mass in kg, for dolomite; Freight train, average; EU+EFTA+UK
- km_2: 1.74213
  Distance in km, for dolomite; Freight train, average; EU+EFTA+UK
- kg_km_2: 0.00871336; = kg_2*km_2
  Transport amount in km*km, for dolomite; Freight train, average; EU+EFTA+UK
- kg_3: 0.00500155
  Mass in kg, for dolomite; Articulated lorry transport, Total weight >32 t, mix Euro 0-5; ROW w/o EU+EFTA
- km_3: 148
  Distance in km, for dolomite; Articulated lorry transport, Total weight >32 t, mix Euro 0-5; ROW w/o EU+EFTA
- kg_km_3: 0.74023; = kg_3*km_3
  Transport amount in km*km, for dolomite; Articulated lorry transport, Total weight >32 t, mix Euro 0-5; ROW w/o EU+EFTA
- kg_4: 0.00500155
  Mass in kg, for dolomite; Barge; ROW w/o EU+EFTA
- km_4: 47
  Distance in km, for dolomite; Barge; ROW w/o EU+EFTA
- kg_km_4: 0.235073; = kg_4*km_4
  Transport amount in km*km, for dolomite; Barge; ROW w/o EU+EFTA
- kg_5: 2.02485e-5
  Mass in kg, for pesticide, unspecified; Transoceanic ship, containers; GLO
- km_5: 6018.12
  Distance in km, for pesticide, unspecified; Transoceanic ship, containers; GLO
- kg_km_5: 0.121858; = kg_5*km_5
  Transport amount in km*km, for pesticide, unspecified; Transoceanic ship, containers; GLO
- kg_6: 2.02485e-5
  Mass in kg, for pesticide, unspecified; Freight train, diesel traction; EU+EFTA+UK
- km_6: 942.064
  Distance in km, for pesticide, unspecified; Freight train, diesel traction; EU+EFTA+UK
- kg_km_6: 0.0190754; = kg_6*km_6
  Transport amount in km*km, for pesticide, unspecified; Freight train, diesel traction; EU+EFTA+UK
- kg_7: 2.02485e-5
  Mass in kg, for pesticide, unspecified; Freight train, electricity traction; EU+EFTA+UK
- km_7: 320.452
  Distance in km, for pesticide, unspecified; Freight train, electricity traction; EU+EFTA+UK
- kg_km_7: 0.00648866; = kg_7*km_7
  Transport amount in km*km, for pesticide, unspecified; Freight train, electricity traction; EU+EFTA+UK
- kg_8: 2.02485e-5
  Mass in kg, for pesticide, unspecified; Freight train, average; EU+EFTA+UK
- km_8: 7.558
  Distance in km, for pesticide, unspecified; Freight train, average; EU+EFTA+UK
- kg_km_8: 0.000153038; = kg_8*km_8
  Transport amount in km*km, for pesticide, unspecified; Freight train, average; EU+EFTA+UK
- kg_9: 2.02485e-5
  Mass in kg, for pesticide, unspecified; Articulated lorry transport, Total weight <7.5 t, mix Euro 0-5; EU+EFTA+UK
- km_9: 150.928
  Distance in km, for pesticide, unspecified; Articulated lorry transport, Total weight <7.5 t, mix Euro 0-5; EU+EFTA+UK
- kg_km_9: 0.00305607; = kg_9*km_9
  Transport amount in km*km, for pesticide, unspecified; Articulated lorry transport, Total weight <7.5 t, mix Euro 0-5; EU+EFTA+UK
- kg_10: 2.02485e-5
  Mass in kg, for pesticide, unspecified; Articulated lorry transport, Euro 4, Total weight >32 t; EU+EFTA+UK
- km_10: 1408.59
  Distance in km, for pesticide, unspecified; Articulated lorry transport, Euro 4, Total weight >32 t; EU+EFTA+UK
- kg_km_10: 0.0285218; = kg_10*km_10
  Transport amount in km*km, for pesticide, unspecified; Articulated lorry transport, Euro 4, Total weight >32 t; EU+EFTA+UK
- kg_11: 2.02485e-5
  Mass in kg, for pesticide, unspecified; Articulated lorry transport, Total weight >32 t, mix Euro 0-5; ROW w/o EU+EFTA
- km_11: 3717.53
  Distance in km, for pesticide, unspecified; Articulated lorry transport, Total weight >32 t, mix Euro 0-5; ROW w/o EU+EFTA
- kg_km_11: 0.0752745; = kg_11*km_11
  Transport amount in km*km, for pesticide, unspecified; Articulated lorry transport, Total weight >32 t, mix Euro 0-5; ROW w/o EU+EFTA
- kg_12: 1.03807e-5
  Mass in kg, for crude vegetable oil blend, from crushing, at plant // glo; Articulated lorry transport, Euro 4, Total weight >32 t; EU+EFTA+UK
- km_12: 1000
  Distance in km, for crude vegetable oil blend, from crushing, at plant // glo; Articulated lorry transport, Euro 4, Total weight >32 t; EU+EFTA+UK
- kg_km_12: 0.0103807; = kg_12*km_12
  Transport amount in km*km, for crude vegetable oil blend, from crushing, at plant // glo; Articulated lorry transport, Euro 4, Total weight >32 t; EU+EFTA+UK
- kg_13: 1.03807e-5
  Mass in kg, for crude vegetable oil blend, from crushing, at plant // glo; Transoceanic ship, containers; GLO
- km_13: 18000
  Distance in km, for crude vegetable oil blend, from crushing, at plant // glo; Transoceanic ship, containers; GLO
- kg_km_13: 0.186853; = kg_13*km_13
  Transport amount in km*km, for crude vegetable oil blend, from crushing, at plant // glo; Transoceanic ship, containers; GLO
- kg_14: 8.9077e-6
  Mass in kg, for polyacrylamide // polyacrylamide production // eu+efta+uk; Articulated lorry transport, Euro 4, Total weight >32 t; EU+EFTA+UK
- km_14: 1000
  Distance in km, for polyacrylamide // polyacrylamide production // eu+efta+uk; Articulated lorry transport, Euro 4, Total weight >32 t; EU+EFTA+UK
- kg_km_14: 0.0089077; = kg_14*km_14
  Transport amount in km*km, for polyacrylamide // polyacrylamide production // eu+efta+uk; Articulated lorry transport, Euro 4, Total weight >32 t; EU+EFTA+UK
- kg_15: 8.9077e-6
  Mass in kg, for polyacrylamide // polyacrylamide production // eu+efta+uk; Transoceanic ship, containers; GLO
- km_15: 18000
  Distance in km, for polyacrylamide // polyacrylamide production // eu+efta+uk; Transoceanic ship, containers; GLO
- kg_km_15: 0.160339; = kg_15*km_15
  Transport amount in km*km, for polyacrylamide // polyacrylamide production // eu+efta+uk; Transoceanic ship, containers; GLO
- kg_16: 1.01607e-7
  Mass in kg, for urea, per kg n, production mix, at plant // urea, per kg n // glo; Articulated lorry transport, Euro 4, Total weight >32 t; EU+EFTA+UK
- km_16: 1000
  Distance in km, for urea, per kg n, production mix, at plant // urea, per kg n // glo; Articulated lorry transport, Euro 4, Total weight >32 t; EU+EFTA+UK
- kg_km_16: 0.000101607; = kg_16*km_16
  Transport amount in km*km, for urea, per kg n, production mix, at plant // urea, per kg n // glo; Articulated lorry transport, Euro 4, Total weight >32 t; EU+EFTA+UK
- kg_17: 1.01607e-7
  Mass in kg, for urea, per kg n, production mix, at plant // urea, per kg n // glo; Transoceanic ship, containers; GLO
- km_17: 18000
  Distance in km, for urea, per kg n, production mix, at plant // urea, per kg n // glo; Transoceanic ship, containers; GLO
- kg_km_17: 0.00182893; = kg_17*km_17
  Transport amount in km*km, for urea, per kg n, production mix, at plant // urea, per kg n // glo; Transoceanic ship, containers; GLO
- kg_18: 1.87215e-5
  Mass in kg, for glyphosate // glyphosate // glo; Articulated lorry transport, Euro 4, Total weight >32 t; EU+EFTA+UK
- km_18: 1000
  Distance in km, for glyphosate // glyphosate // glo; Articulated lorry transport, Euro 4, Total weight >32 t; EU+EFTA+UK
- kg_km_18: 0.0187215; = kg_18*km_18
  Transport amount in km*km, for glyphosate // glyphosate // glo; Articulated lorry transport, Euro 4, Total weight >32 t; EU+EFTA+UK
- kg_19: 1.87215e-5
  Mass in kg, for glyphosate // glyphosate // glo; Transoceanic ship, containers; GLO
- km_19: 18000
  Distance in km, for glyphosate // glyphosate // glo; Transoceanic ship, containers; GLO
- kg_km_19: 0.336986; = kg_19*km_19
  Transport amount in km*km, for glyphosate // glyphosate // glo; Transoceanic ship, containers; GLO
- kg_20: 6.55251e-5
  Mass in kg, for mono ammonium phosphate, per kg n, production mix, at plant // mono ammonium phosphate, per kg n // glo; Articulated lorry transport, Euro 4, Total weight >32 t; EU+EFTA+UK
- km_20: 1000
  Distance in km, for mono ammonium phosphate, per kg n, production mix, at plant // mono ammonium phosphate, per kg n // glo; Articulated lorry transport, Euro 4, Total weight >32 t; EU+EFTA+UK
- kg_km_20: 0.0655251; = kg_20*km_20
  Transport amount in km*km, for mono ammonium phosphate, per kg n, production mix, at plant // mono ammonium phosphate, per kg n // glo; Articulated lorry transport, Euro 4, Total weight >32 t; EU+EFTA+UK
- kg_21: 6.55251e-5
  Mass in kg, for mono ammonium phosphate, per kg n, production mix, at plant // mono ammonium phosphate, per kg n // glo; Transoceanic ship, containers; GLO
- km_21: 18000
  Distance in km, for mono ammonium phosphate, per kg n, production mix, at plant // mono ammonium phosphate, per kg n // glo; Transoceanic ship, containers; GLO
- kg_km_21: 1.17945; = kg_21*km_21
  Transport amount in km*km, for mono ammonium phosphate, per kg n, production mix, at plant // mono ammonium phosphate, per kg n // glo; Transoceanic ship, containers; GLO
- kg_22: 0.000152968
  Mass in kg, for triple super phosphate, per kg substance, production mix, at plant // triple super phosphate, per kg substance // glo; Articulated lorry transport, Euro 4, Total weight >32 t; EU+EFTA+UK
- km_22: 1000
  Distance in km, for triple super phosphate, per kg substance, production mix, at plant // triple super phosphate, per kg substance // glo; Articulated lorry transport, Euro 4, Total weight >32 t; EU+EFTA+UK
- kg_km_22: 0.152968; = kg_22*km_22
  Transport amount in km*km, for triple super phosphate, per kg substance, production mix, at plant // triple super phosphate, per kg substance // glo; Articulated lorry transport, Euro 4, Total weight >32 t; EU+EFTA+UK
- kg_23: 0.000152968
  Mass in kg, for triple super phosphate, per kg substance, production mix, at plant // triple super phosphate, per kg substance // glo; Transoceanic ship, containers; GLO
- km_23: 18000
  Distance in km, for triple super phosphate, per kg substance, production mix, at plant // triple super phosphate, per kg substance // glo; Transoceanic ship, containers; GLO
- kg_km_23: 2.75342; = kg_23*km_23
  Transport amount in km*km, for triple super phosphate, per kg substance, production mix, at plant // triple super phosphate, per kg substance // glo; Transoceanic ship, containers; GLO
- kg_24: 0.000559026
  Mass in kg, for inorganic potassium fertiliser, as k2o // nutrient supply from potassium chloride // row; Articulated lorry transport, Euro 4, Total weight >32 t; EU+EFTA+UK
- km_24: 322.642
  Distance in km, for inorganic potassium fertiliser, as k2o // nutrient supply from potassium chloride // row; Articulated lorry transport, Euro 4, Total weight >32 t; EU+EFTA+UK
- kg_km_24: 0.180365; = kg_24*km_24
  Transport amount in km*km, for inorganic potassium fertiliser, as k2o // nutrient supply from potassium chloride // row; Articulated lorry transport, Euro 4, Total weight >32 t; EU+EFTA+UK
- kg_25: 0.000559026
  Mass in kg, for inorganic potassium fertiliser, as k2o // nutrient supply from potassium chloride // row; Transoceanic ship, containers; GLO
- km_25: 5807.55
  Distance in km, for inorganic potassium fertiliser, as k2o // nutrient supply from potassium chloride // row; Transoceanic ship, containers; GLO
- kg_km_25: 3.24658; = kg_25*km_25
  Transport amount in km*km, for inorganic potassium fertiliser, as k2o // nutrient supply from potassium chloride // row; Transoceanic ship, containers; GLO
- kg_26: 7.68265e-6
  Mass in kg, for wax // wax production // eu+efta+uk; Articulated lorry transport, Euro 4, Total weight >32 t; EU+EFTA+UK
- km_26: 1000
  Distance in km, for wax // wax production // eu+efta+uk; Articulated lorry transport, Euro 4, Total weight >32 t; EU+EFTA+UK
- kg_km_26: 0.00768265; = kg_26*km_26
  Transport amount in km*km, for wax // wax production // eu+efta+uk; Articulated lorry transport, Euro 4, Total weight >32 t; EU+EFTA+UK
- kg_27: 7.68265e-6
  Mass in kg, for wax // wax production // eu+efta+uk; Transoceanic ship, containers; GLO
- km_27: 18000
  Distance in km, for wax // wax production // eu+efta+uk; Transoceanic ship, containers; GLO
- kg_km_27: 0.138288; = kg_27*km_27
  Transport amount in km*km, for wax // wax production // eu+efta+uk; Transoceanic ship, containers; GLO
- kg_28: 0.000340183
  Mass in kg, for acrylic acid // acrylic acid production // eu+efta+uk; Articulated lorry transport, Euro 4, Total weight >32 t; EU+EFTA+UK
- km_28: 1000
  Distance in km, for acrylic acid // acrylic acid production // eu+efta+uk; Articulated lorry transport, Euro 4, Total weight >32 t; EU+EFTA+UK
- kg_km_28: 0.340183; = kg_28*km_28
  Transport amount in km*km, for acrylic acid // acrylic acid production // eu+efta+uk; Articulated lorry transport, Euro 4, Total weight >32 t; EU+EFTA+UK
- kg_29: 0.000340183
  Mass in kg, for acrylic acid // acrylic acid production // eu+efta+uk; Transoceanic ship, containers; GLO
- km_29: 18000
  Distance in km, for acrylic acid // acrylic acid production // eu+efta+uk; Transoceanic ship, containers; GLO
- kg_km_29: 6.12329; = kg_29*km_29
  Transport amount in km*km, for acrylic acid // acrylic acid production // eu+efta+uk; Transoceanic ship, containers; GLO

## Reference product
- eucalyptus forestry // eucalyptus forestry // world (without eu+efta+uk): 1

## Inputs
- Transport of dolomite by Freight train, diesel traction - EU+EFTA+UK: 1.05356; = kg_km_0
- Transport of dolomite by Freight train, electricity traction - EU+EFTA+UK: 0.318156; = kg_km_1
- Transport of dolomite by Freight train, average - EU+EFTA+UK: 0.00871336; = kg_km_2
- Transport of dolomite by Articulated lorry transport, Total weight >32 t, mix Euro 0-5 - ROW w/o EU+EFTA: 0.74023; = kg_km_3
- Transport of dolomite by Barge - ROW w/o EU+EFTA: 0.235073; = kg_km_4
- Transport of pesticide, unspecified by Transoceanic ship, containers - GLO: 0.121858; = kg_km_5
- Transport of pesticide, unspecified by Freight train, diesel traction - EU+EFTA+UK: 0.0190754; = kg_km_6
- Transport of pesticide, unspecified by Freight train, electricity traction - EU+EFTA+UK: 0.00648866; = kg_km_7
- Transport of pesticide, unspecified by Freight train, average - EU+EFTA+UK: 0.000153038; = kg_km_8
- Transport of pesticide, unspecified by Articulated lorry transport, Total weight <7.5 t, mix Euro 0-5 - EU+EFTA+UK: 0.00305607; = kg_km_9
- Transport of pesticide, unspecified by Articulated lorry transport, Euro 4, Total weight >32 t - EU+EFTA+UK: 0.0285218; = kg_km_10
- Transport of pesticide, unspecified by Articulated lorry transport, Total weight >32 t, mix Euro 0-5 - ROW w/o EU+EFTA: 0.0752745; = kg_km_11
- Transport of crude vegetable oil blend, from crushing, at plant // glo by Articulated lorry transport, Euro 4, Total weight >32 t - EU+EFTA+UK: 0.0103807; = kg_km_12
- Transport of crude vegetable oil blend, from crushing, at plant // glo by Transoceanic ship, containers - GLO: 0.186853; = kg_km_13
- Transport of polyacrylamide // polyacrylamide production // eu+efta+uk by Articulated lorry transport, Euro 4, Total weight >32 t - EU+EFTA+UK: 0.0089077; = kg_km_14
- Transport of polyacrylamide // polyacrylamide production // eu+efta+uk by Transoceanic ship, containers - GLO: 0.160339; = kg_km_15
- Transport of urea, per kg n, production mix, at plant // urea, per kg n // glo by Articulated lorry transport, Euro 4, Total weight >32 t - EU+EFTA+UK: 0.000101607; = kg_km_16
- Transport of urea, per kg n, production mix, at plant // urea, per kg n // glo by Transoceanic ship, containers - GLO: 0.00182893; = kg_km_17
- Transport of glyphosate // glyphosate // glo by Articulated lorry transport, Euro 4, Total weight >32 t - EU+EFTA+UK: 0.0187215; = kg_km_18
- Transport of glyphosate // glyphosate // glo by Transoceanic ship, containers - GLO: 0.336986; = kg_km_19
- Transport of mono ammonium phosphate, per kg n, production mix, at plant // mono ammonium phosphate, per kg n // glo by Articulated lorry transport, Euro 4, Total weight >32 t - EU+EFTA+UK: 0.0655251; = kg_km_20
- Transport of mono ammonium phosphate, per kg n, production mix, at plant // mono ammonium phosphate, per kg n // glo by Transoceanic ship, containers - GLO: 1.17945; = kg_km_21
- Transport of triple super phosphate, per kg substance, production mix, at plant // triple super phosphate, per kg substance // glo by Articulated lorry transport, Euro 4, Total weight >32 t - EU+EFTA+UK: 0.152968; = kg_km_22
- Transport of triple super phosphate, per kg substance, production mix, at plant // triple super phosphate, per kg substance // glo by Transoceanic ship, containers - GLO: 2.75342; = kg_km_23
- Transport of inorganic potassium fertiliser, as k2o // nutrient supply from potassium chloride // row by Articulated lorry transport, Euro 4, Total weight >32 t - EU+EFTA+UK: 0.180365; = kg_km_24
- Transport of inorganic potassium fertiliser, as k2o // nutrient supply from potassium chloride // row by Transoceanic ship, containers - GLO: 3.24658; = kg_km_25
- Transport of wax // wax production // eu+efta+uk by Articulated lorry transport, Euro 4, Total weight >32 t - EU+EFTA+UK: 0.00768265; = kg_km_26
- Transport of wax // wax production // eu+efta+uk by Transoceanic ship, containers - GLO: 0.138288; = kg_km_27
- Transport of acrylic acid // acrylic acid production // eu+efta+uk by Articulated lorry transport, Euro 4, Total weight >32 t - EU+EFTA+UK: 0.340183; = kg_km_28
- Transport of acrylic acid // acrylic acid production // eu+efta+uk by Transoceanic ship, containers - GLO: 6.12329; = kg_km_29
- eucalyptus forestry // eucalyptus forestry // world (without eu+efta+uk), blackbox: 1
- eucalyptus forestry // eucalyptus forestry // world (without eu+efta+uk), elementary: 1

## Impact indicators
- Eutrophication marine: 0.000101404
- Ecotoxicity, freshwater: 23.6385
- Land use: 11.3611
- Water use: 0.00408887
- Resource use, minerals and metals: 1.30866e-7
- Resource use, fossils: 0.221525
- Climate change: 0.0187272
- Ozone depletion: 5.61806e-9
- Human toxicity, cancer: 1.29164e-11
- Human toxicity, non-cancer: 4.6079e-9
- EF-particulate Matter: 5.45339e-9
- Ionising radiation, human health: 0.000313853
- Photochemical ozone formation - human health: 0.000179331
- Acidification: 0.000473906
- Eutrophication, terrestrial: 0.00205546
- Eutrophication, freshwater: 8.25421e-6

## Deviations from the LCI method principle
The background data uses:
- the \xe2\x80\x9cRecycled content cut-off\xe2\x80\x9d approach to allocate end-of-life by-products and secondary materials. This allocation is explained in the description of the recycled content system model (http://www.ecoinvent.org/database/system-models-in-ecoinvent-3/cut-off-system-model/allocation-cut-off-by-classification.html).
OR
- EF compliant data

## Deviations from the LCI method approaches
Background data:
- the \xe2\x80\x9cRecycled content cut-off\xe2\x80\x9d approach to allocate end-of-life by-products and secondary materials. This allocation is explained in the description of the recycled content system model (http://www.ecoinvent.org/database/system-models-in-ecoinvent-3/cut-off-system-model/allocation-cut-off-by-classification.html). The ecoinvent database mostly relies on “Allocation – market values” apart for few exceptions particularly in the energy sector. ecoinvent energy data is replaced with EF3.0 core data as per the EF guidelines version 2.0.
OR
- EF compliant data

## Modelling constants
All modelling constants follow the requirements listed in the Tender Specifications 070201/2020/SER/ENV.B1. Completeness: There are no intentional cut-offs in the inventory no matter how small their contribution to all the EF impact categories is. Eventual cut-offs are in compliance with the Guide for EF compliant data sets (JRC 2020), i.e. only if below the 3% cut-off rule. Water use: water use is modelled at country level using separate flows for water withdrawal, water release and water evaporation. Handling multi-functional processes: the following PEF multi- functionality decision hierarchy is applied for resolving all multi- functionality problems: (1) subdivision or system expansion; (2) allocation based on a relevant underlying physical relationship (substitution may apply here); (3) allocation based on some other relationship. Direct land use change: GHG emissions from direct LUC allocated to good/service for 20 years after the LUC occurs, with IPCC default values. Carbon storage and delayed emissions: credits associated with temporary (carbon) storage or delayed emissions up to 300 years are not be considered. Emissions off-setting: are not included. Capital goods (including infrastructures) and their End of life: they are included. System boundaries: system boundaries include all processes linked to the product supply chain (e.g. maintenance). Time period: emissions and removals are modelled as if released or removed at the beginning of the assessment method. Fossil and biogenic carbon emissions and removals: removals and emissions are modelled as follows: All GHG emissions from fossil fuels (including peat and limestone) are modelled consistently with the most updated ILCD list of elementary flows. The non-fossil (biogenic) carbon flows are modelled consistently with the most updated ILCD list of elementary flows.

## Cut-off and completeness
There are no intentional cut-offs in the inventory no matter how small their contribution to all the EF impact categories is. Eventual cut-offs are in compliance with the Guide for EF compliant data sets (JRC 2020), i.e. only if below the 3% cut-off rule. The dataset dry mass and water balance has been checked to ensure the inventory is complete. Capital goods (e.g. infrastructure) and their end-of-life are included.

## Data selection and combination
These datasets include, in both their foreground and background data, links to EF3.0 compliant data.
The relevant background data on energy, transport, and End of Life are from the LCDN data node (http://lcdn.thinkstep.com/Node/).
All other background data in the supply of this product for which no EF3.0 process was available are from ecoinvent v3.7 database (www.ecoinvent.org) or other data sources.

## Data treatment and extrapolations
Several data sources have been used to model the inventory.

## Review details
Internal reviews have been asked to review the plausibility of the unit process, LCIA scores, and DQRs. Internal reviewers have also been asked to review the data for EF compliancy. The consortium is therefore responsible for aspects such as compliancy with the ILCD format, including validation in Look@LCI, and nomenclature.
Internal reviwers have been asked to judge based on the process name, that the unit process models in a complete and representative way the process in the requested location. The review encompassed the plausability of:
- exchanges with nature (elementary flows) as well as exchanges such as product and waste flows.
- meta information (general comment, technology comment, system boundaries, allocation, cut-off rules, etc.). Reviewers were asked to judge if the provided information is enough to understand the content of the process.
- LCIA scores
- DQRs including precision, technology, time and geography. As well as the overall DQR.
External reviewers have been asked to provide their expertise in the field of interest. External reviewers have been asked to review the unit process, including eventual methodological choices, the LCIA scores (provided with contribution scores as well), and DQRs. External reviewers have been provided all the information in a tool developed by the consortium for the purpose of this project.
External reviewers have been asked to judge based on the process name, that the unit process models in a complete and representative way the process in the requested location. The review encompassed:
- Plausability and completeness of exchanges with nature (elementary flows) as well as exchanges such as product and waste flows.
- Review of meta information (general comment, technology comment, system boundaries, allocation, cut-off rules, etc.). Reviewers were asked to judge if the provided information is enough to understand the content of the process.
- Review of properties (biogenic carbon and water content).
- Review of allocation keys.
- Plausability of LCIA scores calculated by the consortium.
- Plausability of DQRs including precision, technology, time and geography. As well as the overall DQR.

## Data sources
- Background Data for Representative products and organisations. EF 3.0 compliant (data stock)
- Nemecek T., Bengoa X., Lansche J., Mouron P., Riedener E., Rossi V. & Humbert S. Methodological Guidelines for the Life Cycle Inventory of Agricultural Products. [Version 3.0, July 2015.] World Food LCA Database (WFLDB). Quantis and Agroscope, Lausanne and Zurich, Switzerland.
- Quirino et al. (2005). Fatos e números do Brasil florestal. Brazilian Forestry Society - SBS.
- Novaes, R. M. L., Pazianotto, R. A. A., Brandão, M., Alves, B. J. R., May, A., Folegatti-Matsuura, M. I. S. 2017. Estimating 20-year land use change and derived CO2 emissions associated to crops, pasture and forestry in Brazil and each of its 27 states. Global Change Biology, v. 23, n. 9, p. 3716-3728.
- Novais & Smyth (1999) Fósforo em solo e planta em condições tropicais. Viçosa: Universidade Federal de Viçosa, p. 399.
- Nemecek, T.; Schnetzer, J (2011). Methods of assessment of direct field emissions for LCIs of agricultural production systems, Data v3.0 (2011): http://www.ecoinvent.org/fileadmin/talkpages/pages/01-01-crop-production/01_crop_production_-_direct_field_emissions___natural_resources_v1.1.pdf.

## Intended applications
Implementation of regular Product Environmental Footprint (PEF) studies and Organisation Environmental Footprint (OEF) studies exclusively under the specified Product groups and sectors as defined in the Product Environmental Footprint Category Rules (PEFCR) and Organisation Environmental Footprint Sectorial Rules (OEFSR) listed in http://ec.europa.eu/environment/eussd/smgp/PEFCR_OEFSR.htm
