# Conversion from electricity medium voltage to electricity low voltage; Transformation of medium voltage electricity to low voltage; Consumption mix, to consumer; grid losses, from 0,54% to 18,18% see general comments

Dataset: ILCD process, Unit process, single operation
Geography: GLO
Reference year: 2012
Valid until: 2024
Classification: Energy carriers and technologies / Electricity
LCI method principle: Attributional
Completeness: All relevant flows quantified
Share of supply or production covered: 95 %
Method details: PEF guide (2013/179/EU); GaBi Modelling Principles; GaBi Water Modelling Principles; GaBi Energy Modelling Principles; GaBi Refinery Modelling Principles; GaBi Agriculture Model Documentation; GaBi Land Use Change Model Documentation; Suggestions for updating the Organisation Environmental Footprint (OEF) method; Guide for EF compliant data sets; GaBi Agrarian Modelling Principles
Project: Provision of product environmental footprint-compliant life cycle inventory datasets. Contract number 070201/2019/802697/SER/ENV.B.1
Generated by: thinkstep
Owner: thinkstep
Compliance: ILCD Data Network - Entry-level; Suggestions for updating the PEF method 2019; ISO 14040 Environmental Management – Life Cycle Assessment – Principles and Framework, 2006; ISO 14044:2006. Environmental Management – Life Cycle Assessment – Requirements and guidelines.; Environmental Footprint 3.1
Review: Independent review panel by Peter Shonfield (PhD), Johannes Kreissig, Dr.-Ing. Wolfram Trinius
Data quality: Technological representativeness: Very good; Time representativeness: Very good; Geographical representativeness: Very good; Completeness: Not applicable; Precision: Good; Methodological appropriateness and consistency: Not applicable; Overall quality: Very good
Amounts: no units in this file; such an amount is in the reference unit of its flow, which a separate flow dataset defines
copyright: true
licenseType: Free of charge for some user types or use types
accessRestrictions: http://www.gabi-software.com/fileadmin/gabi/EULA_European_Commission_-_use_of_thinkstep_LCI_data.pdf

## General comment
This process corresponds to the losses occuring during the transport in the medium voltage network and transformation into low voltage
Typical values are for Europe between 0,61% and 4,32% with an average of 2,29%. For World these values are between 0,54% and 18,18% with an average of 4,10%. For exact values for European countries please see table below. These values may be used in specific country scopes.

## Geography
The data set represents the global average. Main technologies for electricity transformation from medium to low voltage are considered according to the global situation.The geographical representativeness concerning the related country as well as its DQR is related to relevance of the contributors. Possible geographical variance of minor contributors below the cut-off criteria are not affecting the geographical representativeness of the overall process, but are positively affecting the completeness of the model.

## Time period
Annual average, the most recent data source consistently available for all countries (IEA for 2012) has been used. The DQR of the dataset reflects the quality of the data at the time of release. The user of the dataset should revise the DQR at the moment of application.

## Technology and included processes
This process corresponds to the losses due to the transformation from medium voltage to low voltage.

## Technical purpose
This dataset has to be used to model losses due to the transformation from medium voltage to low voltage electricity.

## Model description
For mathematical model details concerning the implementation of the CCF formula see:
http://www.gabi-software.com/fileadmin/GaBi_Databases/PEF_CFF_model_description.pdf

## Parameters
- input: 1.0229; = 1 + (losses / 100)
- losses: 2.29; max 100
  [%] Losses occuring during the transport in the medium voltage net and transformation into low volta

## Reference product
- Electricity: 3.6

## Inputs
- Electricity: 3.68244; = 3.6 * input

## Impact indicators
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
## Modelling constants
Direct land use change: GHG emissions from direct LUC allocated to good/service for 20 years after the LUC occurs.
Carbon storage and delayed emissions: credits associated with temporary (carbon) storage or delayed emissions are not considered in the calculation of the EF for the default impact categories.
Emissions off-setting: not included
Fossil and biogenic carbon emissions and removals: removals and emissions are modelled as follows: All GHG emissions from fossil fuels (including peat and limestone) are modelled consistently with the ILCD list of elementary flows. In the case that the emissions refer to the molecules CO2 and CH4, they are modelled as ‘carbon dioxide (fossil)’ and ‘methane (fossil)’. Biogenic uptake and emissions are modelled separately. For land use change, all carbon emissions and uptakes are inventoried separately for each of the elementary flows. Soil carbon accumulation (uptake) via improved agricultural management is excluded from the model.

## Cut-off and completeness
A cut-off rule based on mass or energy flow or the level of environmental significance of max. 3% is applied and confirmed by the reviewer. An active cut-off within the system has not been applied, no data gaps are known and all elementary flows of environmental effect are included in the inventory.

Capital goods (including infrastructures) and their end of life are included unless the exclusion is clearly documented and conform with the cut-off principles.

System boundaries include all known processes linked to the product supply chain.

## Deviations from cut-off and completeness
Capital goods are not included, they fall under the cut-off criteria.

## Data selection and combination
Not applied

## Use advice
Notice: this data set supersedes the EF3.0-compliant version (see link under "preceding data set version" below calculated with the EF3.0). The life cycle inventory is not changed from the original EF3.0 data set. The LCIA results are calculated based on the EF3.1 methods which provide updated characterisation factors in the following impact categories: Climate Change, Ecotoxicity freshwater, Photochemical Ozone Formation, Acidification, Human Toxicity non-cancer, and Human Toxicity cancer. The review report and the data quality ratings refer to the original results. The data set has been updated by the European Commission on the basis of the original EF3.0 data set delivered by the data provider.Life Cycle Inventory (LCI) datasets to be used for implementing regular Product Environmental Footprint (PEF) studies and Organisation Environmental Footprint (OEF) studies exclusively under the specified Product groups and sectors as defined in the Product Environmental Footprint Category Rules (PEFCR) and Organisation Environmental Footprint Sectorial Rules (OEFSR) listed in http://ec.eiirona.eu/enviiOnment/eussd/smgp/PEFCR OEFSR en.htm and in accordance with the terms and conditions of this EULA exclusively until 31st December 2024 (PERMITTED USE).
The datasets are specifically designed for these methodological requirements (see above) and the related LCIA methods (listed below) recommended in EF.
For use outside this scope, see beforehand the license conditions at http://www.gabi-software.com/fileadmin/gabi/EULA_European_Commission_-_use_of_thinkstep_LCI_data.pdf

## Review details
The dataset is compliant to the 2019 JRC report “Suggestion for updating the PEF method”, the data guide “Guide for EF compliant data sets” and "ILCD Data Network - Entry-level".
This dataset has the following DQRs:
Technological representativeness: very good (1.0)
Time representativeness: very good (1.0)
Geographical representativeness: vey good (1.0)
Precision: good (2.0)
Very good overall quality (1.3)
In the EF context the fields “Methodological appropriateness and consistency” and “Completeness” shall be set as “Not applicable”.
The results are plausible, both for the impact category level results as well as for the most relevant elementary flows. The data set documentation is reflecting what has been modelled and is appropriate in terms of content and level of detail. The system boundaries include all relevant processes and activity types from cradle to gate, the not covered activities and flows (cut-off due to data limitations for less relevant contributors) jointly contribute less than 3% to the overall environmental impacts. An active cut-off, i.e. by excluding available data, has not been found. The LCI modelling choices follow the PEF and OEF guides, such as allocation, consistency of included processes, and LCI methodology in general; further requirements of the PEF guide and the PEF and OEF guidance documents (version 6.3 of 2018) are equally observed. The pre-calculated LCIA results that are provided for the EF3.0 impact categories have been calculated in correspondence of the Input and Output elementary flows (including their geographical validity, e.g. country-specific water consumption) with the applied LCIA method(s).
The DQR results are conservative expert judgements, confirmed or - if necessary - corrected by the reviewers, based on their methodological as well as process understanding and considering semi-quantitatively the contribution of the DQRs of the used EF energy and transport datasets and of EF-related DQRs provided and reviewed within the GaBi databases. The overall DQRs of the datasets consider primarily the quality and representativeness of the foreground technology information and that of the key upstream processes. If datasets are e.g. energy and transport intensive - or gain credits from energy recovery - the DQRs of the used EF energy and transport datasets influence the overall DQR significantly and have been taken into account via expert judgement. In case of doubt, lower (i.e. lower quality) DQRs were assigned.

## Other review details
The review procedure concerning EF 3.0 data is to be understood as additional review on top of the already existing independent panel review for EF 2.0, as far as updates are concerned. The review was undertaken as independent internal review for the update from EF 2.0 to EF 3.0; done by Peter Shonfield and Manfred Russ. Please see related EF 3.0 review details:
http://www.gabi-software.com/fileadmin/GaBi_Databases/Internal_Review_Statement_for_EF_3-0.pdf

## Data sources
- IEA World Energy Outlook 2014

## Intended applications
Life Cycle Inventory (LCI) datasets to be used in Product Environmental Footprint Category Rules (PEFCRs) and Organisation Environmental Footprint Sectoral Rules (OEFSRs) developed in the context of the Environmental Footprint transition phase launched by the Commission in 2018.
