# bleached kraft pulp, hardwood; technology mix; production mix, at plant; dry mass 0.9, carbon content, non-fossil 0.494

Dataset: ILCD process, Partly terminated system
Geography: RNA
Reference year: 2020
Valid until: 2024
Classification: Materials production / Paper and cardboards
LCI method principle: Attributional
LCI method approaches: Allocation - market value
Completeness: All relevant flows quantified
Project: Provision of process-based 3.0 Environmental Footprint-compliant life cycle inventory datasets - Renewable materials - contract number 070201/2020/840085/SER/ENV.B.1
Generated by: EPIS
Owner: EPIS
Compliance: ILCD Data Network - Entry-level; Suggestions for updating the PEF method 2019; ISO 14040 Environmental Management – Life Cycle Assessment – Principles and Framework, 2006; ISO 14044:2006. Environmental Management – Life Cycle Assessment – Requirements and guidelines.; Environmental Footprint 3.1
Review: Dependent internal review by Marisa Vieira, Emilia Moreno Ruiz; Independent review panel by Michael Sturges
Data quality: Overall quality: Good; Time representativeness: Very good; Geographical representativeness: Very good; Technological representativeness: Good; Precision: Good; Methodological appropriateness and consistency: Not applicable
Amounts: no units in this file; such an amount is in the reference unit of its flow, which a separate flow dataset defines
copyright: true
licenseType: Free of charge for some user types or use types
accessRestrictions: Free of charge for all final users implementing a regular Product Environmental Footprint (PEF) studies and Organisation Environmental Footprint (OEF) studies exclusively under the specified Product groups and sectors as defined in the Product Environmental Footprint Category Rules (PEFCR) and Organisation Environmental Footprint Sectorial Rules (OEFSR) listed in http://ec.europa.eu/environment/eussd/smgp/PEFCR_OEFSR.htm and in accordance with the terms and conditions of the EULA (available at https://ecoinvent.lca-data.com/) exclusively until 31st December 2024. Any use of this dataset or any derivative data not within the specific context of one of the PEF/OEF projects or after the end of 2024 is not permitted.

## General comment
Notice: this data set supersedes the EF3.0-compliant version (see link under "preceding data set version" below calculated with the EF3.0). The life cycle inventory is not changed from the original EF3.0 data set. The LCIA results are calculated based on the EF3.1 methods which provide updated characterisation factors in the following impact categories: Climate Change, Ecotoxicity freshwater, Photochemical Ozone Formation, Acidification, Human Toxicity non-cancer, and Human Toxicity cancer. The review report and the data quality ratings refer to the original results. The data set has been updated by the European Commission on the basis of the original EF3.0 data set delivered by the data provider.This dataset represents the production of bleached hardwood kraft pulp for North America for the year 2020.
Pulp is a clean, wood-based, renewable and biodegradable raw material to make different paper, board and other products. Main end uses for market pulp are tissue (toilet paper), graphic papers, specialty products, packaging, fluff pulp, viscose, CMC etc. Hardwood pulp is made from non-coniferous trees, in Nordic countries primarily of birch. Hardwood fibres are short and can be rounder than softwood fibres and their number per gram of pulp is much larger; they give the end product its smoothness, softness and optical properties like opacity (that you cannot see through the paper).
This activity starts with the transport of raw material to the pulp factory. The activity ends when the kraft pulp is ready to be sold.
Due to a lack of data, the North American dataset has been extrapolated from the European dataset for bleached hardwood kraft pulp production. The European dataset is based on Industry data from 7 corresponding pulp mills which was provided by the European Pulp Industry Sector Association AISBL (EPIS). In 2020, total production of the 7 pulp mills corresponded to 100% of the European market capacity.
The dataset has been allocated based on the following products: Bleached kraft pulp, hardwood // Bleached kraft pulp, hardwood // RNA with allocation factor of 99.9975%, methanol, from biomass with allocation factor of 0.0023%, Sodium hydroxide with allocation factor of 0.0002%.

## Technology and included processes
The pulp, or fibres from the wood are separated in a kraft cooking process in a so-called fibre line. In a recovery line, the chemicals used in the cooking process are recovered to be used again and energy is produced. The third process is effluent treatment where gaseous and liquid discharges to the environment are continuously minimized and monitored.
The process includes transports to the pulp mill, wood handling, chemical pulping and bleaching, drying process, energy production on-site, recovery cycles of chemicals and internal waste water treatment. The input of magnesium sulphate (0.00063 kg/kg) has been excluded from the inventory since its contribution was less than 3 % in terms of mass and single score.
The following air emissions were reported in the study:
CO2 (fossil and biogenic), CO, SOx (as SO2), NOx, TRS (as S), SO2 (reported as S), Dust (unspecified). Next to these key emissions, additional emissions from on-site energy production from external and internal fuels were calculated, using emission profiles from ecoinvent combustion processes. Internal biogenic fuels are represented by the calculated emissions but do not have the corresponding fuel input from technosphere, because they are supplied from within the system boundaries. The amounts of internal fuels used in the process are: Biogas (6.34E+01 MJ/t), Bark (1.34E+02MJ/t), Black liquor(1.98E+04MJ/t), Sludge (3.64E+00MJ/t), Methanol (1.73E+02MJ/t), Biomass (1.12E+02 MJ/t), tall oil pitch (4.14E+02 MJ/t)

The following ecoinvent combustion processes were used to estimate additional air emissions:
Biofuel - Biogas: heat production, natural gas, at industrial furnace >100kW, Europe without Switzerland; Peat: heat production, lignite briquette, at stove 5-15kW; Hard coal: heat production, at hard coal industrial furnace 1-10MW, Europe without Switzerland; Heavy fuel oil: heat production, heavy fuel oil, at industrial furnace 1MW, Europe without Switzerland; Light fuel oil: heat production, light fuel oil, at industrial furnace 1MW, Europe without Switzerland; Methanol: heat production, natural gas, at industrial furnace >100kW, Europe without Switzerland; Natural gas: heat production, natural gas, at industrial furnace >100kW, Europe without Switzerland; Biofuel - Bark : heat production, wood chips from industry, at furnace 1000kW, CH; Biofuel - Biomass: heat production, wood chips from industry, at furnace 1000kW, CH;

Black liquor, sludge, tall oil pitch, tar oil and sodium formiate were not included in the emissions calculations because no specific emission profiles, e.g. for the black liquor recovery process, were available. Emissions from these internal energy generation processes are therefore only reflected in the key emission factors provided by the industry, other emissions constitute a data gap.
Emissions of stemming from biogas are approximated with the combustion of natural gas, whereby CO2, CO and CH4 emissions stemming from biogas were modelled as non-fossil. Tar oil which is an external fuel (4.44E+01 MJ/t) has also no corresponding fuel input from technosphere because no appropriate proxy could be found.
The amount of infrastructure (pulp factory) was taken from the dataset “The European Pulp Industry Sector Association AISBL, sulfate pulp production, from hardwood, bleached, RER, Undefined, ecoinvent database version 3.7.1.”

## Parameters
- kg_0: 0.00139213
  Mass in kg, for malusil; Transoceanic ship, bulk; GLO
- km_0: 219.908
  Distance in km, for malusil; Transoceanic ship, bulk; GLO
- kg_km_0: 0.30614; = kg_0*km_0
  Transport amount in km*km, for malusil; Transoceanic ship, bulk; GLO
- kg_1: 0.00139213
  Mass in kg, for malusil; Freight train, diesel traction; EU+EFTA+UK
- km_1: 27.1484
  Distance in km, for malusil; Freight train, diesel traction; EU+EFTA+UK
- kg_km_1: 0.037794; = kg_1*km_1
  Transport amount in km*km, for malusil; Freight train, diesel traction; EU+EFTA+UK
- kg_2: 0.00139213
  Mass in kg, for malusil; Freight train, electricity traction; EU+EFTA+UK
- km_2: 9.23477
  Distance in km, for malusil; Freight train, electricity traction; EU+EFTA+UK
- kg_km_2: 0.012856; = kg_2*km_2
  Transport amount in km*km, for malusil; Freight train, electricity traction; EU+EFTA+UK
- kg_3: 0.00139213
  Mass in kg, for malusil; Freight train, average; EU+EFTA+UK
- km_3: 0.217806
  Distance in km, for malusil; Freight train, average; EU+EFTA+UK
- kg_km_3: 0.000303214; = kg_3*km_3
  Transport amount in km*km, for malusil; Freight train, average; EU+EFTA+UK
- kg_4: 0.00139213
  Mass in kg, for malusil; Barge; EU+EFTA+UK
- km_4: 2.08821
  Distance in km, for malusil; Barge; EU+EFTA+UK
- kg_km_4: 0.00290705; = kg_4*km_4
  Transport amount in km*km, for malusil; Barge; EU+EFTA+UK
- kg_5: 0.00139213
  Mass in kg, for malusil; Barge; ROW w/o EU+EFTA
- km_5: 4.26403
  Distance in km, for malusil; Barge; ROW w/o EU+EFTA
- kg_km_5: 0.00593607; = kg_5*km_5
  Transport amount in km*km, for malusil; Barge; ROW w/o EU+EFTA
- kg_6: 0.00139213
  Mass in kg, for malusil; Articulated lorry transport, Total weight <7.5 t, mix Euro 0-5; EU+EFTA+UK
- km_6: 2.87567
  Distance in km, for malusil; Articulated lorry transport, Total weight <7.5 t, mix Euro 0-5; EU+EFTA+UK
- kg_km_6: 0.00400329; = kg_6*km_6
  Transport amount in km*km, for malusil; Articulated lorry transport, Total weight <7.5 t, mix Euro 0-5; EU+EFTA+UK
- kg_7: 0.00139213
  Mass in kg, for malusil; Articulated lorry transport, Euro 4, Total weight >32 t; EU+EFTA+UK
- km_7: 26.8476
  Distance in km, for malusil; Articulated lorry transport, Euro 4, Total weight >32 t; EU+EFTA+UK
- kg_km_7: 0.0373752; = kg_7*km_7
  Transport amount in km*km, for malusil; Articulated lorry transport, Euro 4, Total weight >32 t; EU+EFTA+UK
- kg_8: 0.00139213
  Mass in kg, for malusil; Articulated lorry transport, Total weight >32 t, mix Euro 0-5; ROW w/o EU+EFTA
- km_8: 70.8559
  Distance in km, for malusil; Articulated lorry transport, Total weight >32 t, mix Euro 0-5; ROW w/o EU+EFTA
- kg_km_8: 0.0986404; = kg_8*km_8
  Transport amount in km*km, for malusil; Articulated lorry transport, Total weight >32 t, mix Euro 0-5; ROW w/o EU+EFTA
- kg_9: 0.00158828
  Mass in kg, for sodium hydrogen sulphite // sodium hydrogen sulphite production // eu+efta+uk; Articulated lorry transport, Euro 4, Total weight >32 t; EU+EFTA+UK
- km_9: 1001.06
  Distance in km, for sodium hydrogen sulphite // sodium hydrogen sulphite production // eu+efta+uk; Articulated lorry transport, Euro 4, Total weight >32 t; EU+EFTA+UK
- kg_km_9: 1.58996; = kg_9*km_9
  Transport amount in km*km, for sodium hydrogen sulphite // sodium hydrogen sulphite production // eu+efta+uk; Articulated lorry transport, Euro 4, Total weight >32 t; EU+EFTA+UK
- kg_10: 0.00158828
  Mass in kg, for sodium hydrogen sulphite // sodium hydrogen sulphite production // eu+efta+uk; Transoceanic ship, containers; GLO
- km_10: 18006.4
  Distance in km, for sodium hydrogen sulphite // sodium hydrogen sulphite production // eu+efta+uk; Transoceanic ship, containers; GLO
- kg_km_10: 28.5993; = kg_10*km_10
  Transport amount in km*km, for sodium hydrogen sulphite // sodium hydrogen sulphite production // eu+efta+uk; Transoceanic ship, containers; GLO
- kg_11: 3.11357
  Mass in kg, for hardwood under bark // hardwood forestry // rna; Articulated lorry transport, Euro 4, Total weight >32 t; EU+EFTA+UK
- km_11: 72.6042
  Distance in km, for hardwood under bark // hardwood forestry // rna; Articulated lorry transport, Euro 4, Total weight >32 t; EU+EFTA+UK
- kg_km_11: 226.059; = kg_11*km_11
  Transport amount in km*km, for hardwood under bark // hardwood forestry // rna; Articulated lorry transport, Euro 4, Total weight >32 t; EU+EFTA+UK
- kg_12: 3.11357
  Mass in kg, for hardwood under bark // hardwood forestry // rna; Barge; ROW w/o EU+EFTA
- km_12: 14.05
  Distance in km, for hardwood under bark // hardwood forestry // rna; Barge; ROW w/o EU+EFTA
- kg_km_12: 43.7457; = kg_12*km_12
  Transport amount in km*km, for hardwood under bark // hardwood forestry // rna; Barge; ROW w/o EU+EFTA
- kg_13: 3.11357
  Mass in kg, for hardwood under bark // hardwood forestry // rna; Freight train, average; EU+EFTA+UK
- km_13: 107.728
  Distance in km, for hardwood under bark // hardwood forestry // rna; Freight train, average; EU+EFTA+UK
- kg_km_13: 335.419; = kg_13*km_13
  Transport amount in km*km, for hardwood under bark // hardwood forestry // rna; Freight train, average; EU+EFTA+UK
- kg_14: 3.11357
  Mass in kg, for hardwood under bark // hardwood forestry // rna; Transoceanic ship, bulk; GLO
- km_14: 170.04
  Distance in km, for hardwood under bark // hardwood forestry // rna; Transoceanic ship, bulk; GLO
- kg_km_14: 529.432; = kg_14*km_14
  Transport amount in km*km, for hardwood under bark // hardwood forestry // rna; Transoceanic ship, bulk; GLO
- kg_15: 0.104136
  Mass in kg, for wood chips, hardwood // wood chips, hardwood // rna; Articulated lorry transport, Euro 4, Total weight >32 t; EU+EFTA+UK
- km_15: 1750
  Distance in km, for wood chips, hardwood // wood chips, hardwood // rna; Articulated lorry transport, Euro 4, Total weight >32 t; EU+EFTA+UK
- kg_km_15: 182.237; = kg_15*km_15
  Transport amount in km*km, for wood chips, hardwood // wood chips, hardwood // rna; Articulated lorry transport, Euro 4, Total weight >32 t; EU+EFTA+UK
- kg_16: 0.104136
  Mass in kg, for wood chips, hardwood // wood chips, hardwood // rna; Transoceanic ship, containers; GLO
- km_16: 31499.9
  Distance in km, for wood chips, hardwood // wood chips, hardwood // rna; Transoceanic ship, containers; GLO
- kg_km_16: 3280.27; = kg_16*km_16
  Transport amount in km*km, for wood chips, hardwood // wood chips, hardwood // rna; Transoceanic ship, containers; GLO
- kg_17: 0.0270934
  Mass in kg, for wood chips, softwood // wood chips, softwood // rna; Articulated lorry transport, Euro 4, Total weight >32 t; EU+EFTA+UK
- km_17: 1750.01
  Distance in km, for wood chips, softwood // wood chips, softwood // rna; Articulated lorry transport, Euro 4, Total weight >32 t; EU+EFTA+UK
- kg_km_17: 47.4138; = kg_17*km_17
  Transport amount in km*km, for wood chips, softwood // wood chips, softwood // rna; Articulated lorry transport, Euro 4, Total weight >32 t; EU+EFTA+UK
- kg_18: 0.0270934
  Mass in kg, for wood chips, softwood // wood chips, softwood // rna; Transoceanic ship, containers; GLO
- km_18: 31500.3
  Distance in km, for wood chips, softwood // wood chips, softwood // rna; Transoceanic ship, containers; GLO
- kg_km_18: 853.448; = kg_18*km_18
  Transport amount in km*km, for wood chips, softwood // wood chips, softwood // rna; Transoceanic ship, containers; GLO
- kg_19: 0.0111259
  Mass in kg, for biogas for bioenergy // biogas for bioenergy // rna; Articulated lorry transport, Euro 4, Total weight >32 t; EU+EFTA+UK
- km_19: 997.645
  Distance in km, for biogas for bioenergy // biogas for bioenergy // rna; Articulated lorry transport, Euro 4, Total weight >32 t; EU+EFTA+UK
- kg_km_19: 11.0997; = kg_19*km_19
  Transport amount in km*km, for biogas for bioenergy // biogas for bioenergy // rna; Articulated lorry transport, Euro 4, Total weight >32 t; EU+EFTA+UK
- kg_20: 0.0111259
  Mass in kg, for biogas for bioenergy // biogas for bioenergy // rna; Transoceanic ship, containers; GLO
- km_20: 17975.6
  Distance in km, for biogas for bioenergy // biogas for bioenergy // rna; Transoceanic ship, containers; GLO
- kg_km_20: 199.995; = kg_20*km_20
  Transport amount in km*km, for biogas for bioenergy // biogas for bioenergy // rna; Transoceanic ship, containers; GLO
- kg_21: 0.00267614
  Mass in kg, for bark, hardwood // bark, hardwood // eu+efta+uk; Articulated lorry transport, Euro 4, Total weight >32 t; EU+EFTA+UK
- km_21: 1700.17
  Distance in km, for bark, hardwood // bark, hardwood // eu+efta+uk; Articulated lorry transport, Euro 4, Total weight >32 t; EU+EFTA+UK
- kg_km_21: 4.54988; = kg_21*km_21
  Transport amount in km*km, for bark, hardwood // bark, hardwood // eu+efta+uk; Articulated lorry transport, Euro 4, Total weight >32 t; EU+EFTA+UK
- kg_22: 0.00267614
  Mass in kg, for bark, hardwood // bark, hardwood // eu+efta+uk; Transoceanic ship, containers; GLO
- km_22: 30603
  Distance in km, for bark, hardwood // bark, hardwood // eu+efta+uk; Transoceanic ship, containers; GLO
- kg_km_22: 81.8979; = kg_22*km_22
  Transport amount in km*km, for bark, hardwood // bark, hardwood // eu+efta+uk; Transoceanic ship, containers; GLO
- kg_23: 0.00267614
  Mass in kg, for bark, softwood // bark, softwood // eu+efta+uk; Articulated lorry transport, Euro 4, Total weight >32 t; EU+EFTA+UK
- km_23: 1700.17
  Distance in km, for bark, softwood // bark, softwood // eu+efta+uk; Articulated lorry transport, Euro 4, Total weight >32 t; EU+EFTA+UK
- kg_km_23: 4.54988; = kg_23*km_23
  Transport amount in km*km, for bark, softwood // bark, softwood // eu+efta+uk; Articulated lorry transport, Euro 4, Total weight >32 t; EU+EFTA+UK
- kg_24: 0.00267614
  Mass in kg, for bark, softwood // bark, softwood // eu+efta+uk; Transoceanic ship, containers; GLO
- km_24: 30603
  Distance in km, for bark, softwood // bark, softwood // eu+efta+uk; Transoceanic ship, containers; GLO
- kg_km_24: 81.8979; = kg_24*km_24
  Transport amount in km*km, for bark, softwood // bark, softwood // eu+efta+uk; Transoceanic ship, containers; GLO
- kg_25: 0.00328602
  Mass in kg, for heavy fuel oil (1.0 wt.% s) // heavy fuel oil at refinery // rna; Articulated lorry transport, Euro 4, Total weight >32 t; EU+EFTA+UK
- km_25: 1001.19
  Distance in km, for heavy fuel oil (1.0 wt.% s) // heavy fuel oil at refinery // rna; Articulated lorry transport, Euro 4, Total weight >32 t; EU+EFTA+UK
- kg_km_25: 3.28992; = kg_25*km_25
  Transport amount in km*km, for heavy fuel oil (1.0 wt.% s) // heavy fuel oil at refinery // rna; Articulated lorry transport, Euro 4, Total weight >32 t; EU+EFTA+UK
- kg_26: 0.00328602
  Mass in kg, for heavy fuel oil (1.0 wt.% s) // heavy fuel oil at refinery // rna; Transoceanic ship, containers; GLO
- km_26: 17984.8
  Distance in km, for heavy fuel oil (1.0 wt.% s) // heavy fuel oil at refinery // rna; Transoceanic ship, containers; GLO
- kg_km_26: 59.0985; = kg_26*km_26
  Transport amount in km*km, for heavy fuel oil (1.0 wt.% s) // heavy fuel oil at refinery // rna; Transoceanic ship, containers; GLO
- kg_27: 2.91334e-5
  Mass in kg, for light fuel oil // light fuel oil at refinery // rna; Articulated lorry transport, Euro 4, Total weight >32 t; EU+EFTA+UK
- km_27: 42218.5
  Distance in km, for light fuel oil // light fuel oil at refinery // rna; Articulated lorry transport, Euro 4, Total weight >32 t; EU+EFTA+UK
- kg_km_27: 1.22997; = kg_27*km_27
  Transport amount in km*km, for light fuel oil // light fuel oil at refinery // rna; Articulated lorry transport, Euro 4, Total weight >32 t; EU+EFTA+UK
- kg_28: 2.91334e-5
  Mass in kg, for light fuel oil // light fuel oil at refinery // rna; Transoceanic ship, containers; GLO
- km_28: 758561
  Distance in km, for light fuel oil // light fuel oil at refinery // rna; Transoceanic ship, containers; GLO
- kg_km_28: 22.0994; = kg_28*km_28
  Transport amount in km*km, for light fuel oil // light fuel oil at refinery // rna; Transoceanic ship, containers; GLO
- kg_29: 0.000232407
  Mass in kg, for hard coal, at consumer rna // hard coal mix // rna; Articulated lorry transport, Euro 4, Total weight >32 t; EU+EFTA+UK
- km_29: 998.224
  Distance in km, for hard coal, at consumer rna // hard coal mix // rna; Articulated lorry transport, Euro 4, Total weight >32 t; EU+EFTA+UK
- kg_km_29: 0.231994; = kg_29*km_29
  Transport amount in km*km, for hard coal, at consumer rna // hard coal mix // rna; Articulated lorry transport, Euro 4, Total weight >32 t; EU+EFTA+UK
- kg_30: 0.000232407
  Mass in kg, for hard coal, at consumer rna // hard coal mix // rna; Transoceanic ship, containers; GLO
- km_30: 17985.2
  Distance in km, for hard coal, at consumer rna // hard coal mix // rna; Transoceanic ship, containers; GLO
- kg_km_30: 4.17989; = kg_30*km_30
  Transport amount in km*km, for hard coal, at consumer rna // hard coal mix // rna; Transoceanic ship, containers; GLO
- kg_31: 0.00187812
  Mass in kg, for lignite rna // lignite mix // rna; Articulated lorry transport, Euro 4, Total weight >32 t; EU+EFTA+UK
- km_31: 654.894
  Distance in km, for lignite rna // lignite mix // rna; Articulated lorry transport, Euro 4, Total weight >32 t; EU+EFTA+UK
- kg_km_31: 1.22997; = kg_31*km_31
  Transport amount in km*km, for lignite rna // lignite mix // rna; Articulated lorry transport, Euro 4, Total weight >32 t; EU+EFTA+UK
- kg_32: 0.00187812
  Mass in kg, for lignite rna // lignite mix // rna; Transoceanic ship, containers; GLO
- km_32: 11766.8
  Distance in km, for lignite rna // lignite mix // rna; Transoceanic ship, containers; GLO
- kg_km_32: 22.0994; = kg_32*km_32
  Transport amount in km*km, for lignite rna // lignite mix // rna; Transoceanic ship, containers; GLO
- kg_33: 3.28772e-5
  Mass in kg, for sodium formate // sodium formate production // eu+efta+uk; Articulated lorry transport, Euro 4, Total weight >32 t; EU+EFTA+UK
- km_33: 1000.67
  Distance in km, for sodium formate // sodium formate production // eu+efta+uk; Articulated lorry transport, Euro 4, Total weight >32 t; EU+EFTA+UK
- kg_km_33: 0.0328992; = kg_33*km_33
  Transport amount in km*km, for sodium formate // sodium formate production // eu+efta+uk; Articulated lorry transport, Euro 4, Total weight >32 t; EU+EFTA+UK
- kg_34: 3.28772e-5
  Mass in kg, for sodium formate // sodium formate production // eu+efta+uk; Transoceanic ship, containers; GLO
- km_34: 18005.9
  Distance in km, for sodium formate // sodium formate production // eu+efta+uk; Transoceanic ship, containers; GLO
- kg_km_34: 0.591985; = kg_34*km_34
  Transport amount in km*km, for sodium formate // sodium formate production // eu+efta+uk; Transoceanic ship, containers; GLO
- kg_35: 0.00721596
  Mass in kg, for hydrogen peroxide, 100% // hydrogen peroxide, 100% production // eu+efta+uk; Articulated lorry transport, Euro 4, Total weight >32 t; EU+EFTA+UK
- km_35: 1000.53
  Distance in km, for hydrogen peroxide, 100% // hydrogen peroxide, 100% production // eu+efta+uk; Articulated lorry transport, Euro 4, Total weight >32 t; EU+EFTA+UK
- kg_km_35: 7.21982; = kg_35*km_35
  Transport amount in km*km, for hydrogen peroxide, 100% // hydrogen peroxide, 100% production // eu+efta+uk; Articulated lorry transport, Euro 4, Total weight >32 t; EU+EFTA+UK
- kg_36: 0.00721596
  Mass in kg, for hydrogen peroxide, 100% // hydrogen peroxide, 100% production // eu+efta+uk; Transoceanic ship, containers; GLO
- km_36: 18015.2
  Distance in km, for hydrogen peroxide, 100% // hydrogen peroxide, 100% production // eu+efta+uk; Transoceanic ship, containers; GLO
- kg_km_36: 129.997; = kg_36*km_36
  Transport amount in km*km, for hydrogen peroxide, 100% // hydrogen peroxide, 100% production // eu+efta+uk; Transoceanic ship, containers; GLO
- kg_37: 0.022288
  Mass in kg, for oxygen // oxygen production // eu+efta+uk; Articulated lorry transport, Euro 4, Total weight >32 t; EU+EFTA+UK
- km_37: 1000.51
  Distance in km, for oxygen // oxygen production // eu+efta+uk; Articulated lorry transport, Euro 4, Total weight >32 t; EU+EFTA+UK
- kg_km_37: 22.2994; = kg_37*km_37
  Transport amount in km*km, for oxygen // oxygen production // eu+efta+uk; Articulated lorry transport, Euro 4, Total weight >32 t; EU+EFTA+UK
- kg_38: 0.022288
  Mass in kg, for oxygen // oxygen production // eu+efta+uk; Transoceanic ship, containers; GLO
- km_38: 17991.3
  Distance in km, for oxygen // oxygen production // eu+efta+uk; Transoceanic ship, containers; GLO
- kg_km_38: 400.99; = kg_38*km_38
  Transport amount in km*km, for oxygen // oxygen production // eu+efta+uk; Transoceanic ship, containers; GLO
- kg_39: 0.00923309
  Mass in kg, for sodium chlorate // sodium chlorate production // glo; Articulated lorry transport, Euro 4, Total weight >32 t; EU+EFTA+UK
- km_39: 999.64
  Distance in km, for sodium chlorate // sodium chlorate production // glo; Articulated lorry transport, Euro 4, Total weight >32 t; EU+EFTA+UK
- kg_km_39: 9.22977; = kg_39*km_39
  Transport amount in km*km, for sodium chlorate // sodium chlorate production // glo; Articulated lorry transport, Euro 4, Total weight >32 t; EU+EFTA+UK
- kg_40: 0.00923309
  Mass in kg, for sodium chlorate // sodium chlorate production // glo; Transoceanic ship, containers; GLO
- km_40: 17978.4
  Distance in km, for sodium chlorate // sodium chlorate production // glo; Transoceanic ship, containers; GLO
- kg_km_40: 165.996; = kg_40*km_40
  Transport amount in km*km, for sodium chlorate // sodium chlorate production // glo; Transoceanic ship, containers; GLO
- kg_41: 0.0285261
  Mass in kg, for sodium hydroxide // sodium hydroxide production // eu+efta+uk; Articulated lorry transport, Euro 4, Total weight >32 t; EU+EFTA+UK
- km_41: 999.059
  Distance in km, for sodium hydroxide // sodium hydroxide production // eu+efta+uk; Articulated lorry transport, Euro 4, Total weight >32 t; EU+EFTA+UK
- kg_km_41: 28.4993; = kg_41*km_41
  Transport amount in km*km, for sodium hydroxide // sodium hydroxide production // eu+efta+uk; Articulated lorry transport, Euro 4, Total weight >32 t; EU+EFTA+UK
- kg_42: 0.0285261
  Mass in kg, for sodium hydroxide // sodium hydroxide production // eu+efta+uk; Transoceanic ship, containers; GLO
- km_42: 17983.1
  Distance in km, for sodium hydroxide // sodium hydroxide production // eu+efta+uk; Transoceanic ship, containers; GLO
- kg_km_42: 512.987; = kg_42*km_42
  Transport amount in km*km, for sodium hydroxide // sodium hydroxide production // eu+efta+uk; Transoceanic ship, containers; GLO
- kg_43: 0.0249632
  Mass in kg, for sulphuric acid // sulphuric acid production // eu+efta+uk; Articulated lorry transport, Euro 4, Total weight >32 t; EU+EFTA+UK
- km_43: 1001.45
  Distance in km, for sulphuric acid // sulphuric acid production // eu+efta+uk; Articulated lorry transport, Euro 4, Total weight >32 t; EU+EFTA+UK
- kg_km_43: 24.9994; = kg_43*km_43
  Transport amount in km*km, for sulphuric acid // sulphuric acid production // eu+efta+uk; Articulated lorry transport, Euro 4, Total weight >32 t; EU+EFTA+UK
- kg_44: 0.0249632
  Mass in kg, for sulphuric acid // sulphuric acid production // eu+efta+uk; Transoceanic ship, containers; GLO
- km_44: 17986
  Distance in km, for sulphuric acid // sulphuric acid production // eu+efta+uk; Transoceanic ship, containers; GLO
- kg_km_44: 448.989; = kg_44*km_44
  Transport amount in km*km, for sulphuric acid // sulphuric acid production // eu+efta+uk; Transoceanic ship, containers; GLO
- kg_45: 0.00771565
  Mass in kg, for chlorine dioxide // chlorine dioxide production // glo; Articulated lorry transport, Euro 4, Total weight >32 t; EU+EFTA+UK
- km_45: 1000.54
  Distance in km, for chlorine dioxide // chlorine dioxide production // glo; Articulated lorry transport, Euro 4, Total weight >32 t; EU+EFTA+UK
- kg_km_45: 7.7198; = kg_45*km_45
  Transport amount in km*km, for chlorine dioxide // chlorine dioxide production // glo; Articulated lorry transport, Euro 4, Total weight >32 t; EU+EFTA+UK
- kg_46: 0.00771565
  Mass in kg, for chlorine dioxide // chlorine dioxide production // glo; Transoceanic ship, containers; GLO
- km_46: 18014.9
  Distance in km, for chlorine dioxide // chlorine dioxide production // glo; Transoceanic ship, containers; GLO
- kg_km_46: 138.996; = kg_46*km_46
  Transport amount in km*km, for chlorine dioxide // chlorine dioxide production // glo; Transoceanic ship, containers; GLO
- kg_47: 1.29789e-5
  Mass in kg, for sodium sulphate // sodium sulphate production // eu+efta+uk; Articulated lorry transport, Euro 4, Total weight >32 t; EU+EFTA+UK
- km_47: 1001.6
  Distance in km, for sodium sulphate // sodium sulphate production // eu+efta+uk; Articulated lorry transport, Euro 4, Total weight >32 t; EU+EFTA+UK
- kg_km_47: 0.0129997; = kg_47*km_47
  Transport amount in km*km, for sodium sulphate // sodium sulphate production // eu+efta+uk; Articulated lorry transport, Euro 4, Total weight >32 t; EU+EFTA+UK
- kg_48: 1.29789e-5
  Mass in kg, for sodium sulphate // sodium sulphate production // eu+efta+uk; Transoceanic ship, containers; GLO
- km_48: 18028.9
  Distance in km, for sodium sulphate // sodium sulphate production // eu+efta+uk; Transoceanic ship, containers; GLO
- kg_km_48: 0.233994; = kg_48*km_48
  Transport amount in km*km, for sodium sulphate // sodium sulphate production // eu+efta+uk; Transoceanic ship, containers; GLO
- kg_49: 0.00153313
  Mass in kg, for precipitated calcium carbonate // precipitated calcium carbonate production // eu+efta+uk; Articulated lorry transport, Euro 4, Total weight >32 t; EU+EFTA+UK
- km_49: 997.934
  Distance in km, for precipitated calcium carbonate // precipitated calcium carbonate production // eu+efta+uk; Articulated lorry transport, Euro 4, Total weight >32 t; EU+EFTA+UK
- kg_km_49: 1.52996; = kg_49*km_49
  Transport amount in km*km, for precipitated calcium carbonate // precipitated calcium carbonate production // eu+efta+uk; Articulated lorry transport, Euro 4, Total weight >32 t; EU+EFTA+UK
- kg_50: 0.00153313
  Mass in kg, for precipitated calcium carbonate // precipitated calcium carbonate production // eu+efta+uk; Transoceanic ship, containers; GLO
- km_50: 18002
  Distance in km, for precipitated calcium carbonate // precipitated calcium carbonate production // eu+efta+uk; Transoceanic ship, containers; GLO
- kg_km_50: 27.5993; = kg_50*km_50
  Transport amount in km*km, for precipitated calcium carbonate // precipitated calcium carbonate production // eu+efta+uk; Transoceanic ship, containers; GLO
- kg_51: 0.000710153
  Mass in kg, for aluminium sulphate powder // aluminium sulphate powder production // eu+efta+uk; Articulated lorry transport, Euro 4, Total weight >32 t; EU+EFTA+UK
- km_51: 999.76
  Distance in km, for aluminium sulphate powder // aluminium sulphate powder production // eu+efta+uk; Articulated lorry transport, Euro 4, Total weight >32 t; EU+EFTA+UK
- kg_km_51: 0.709982; = kg_51*km_51
  Transport amount in km*km, for aluminium sulphate powder // aluminium sulphate powder production // eu+efta+uk; Articulated lorry transport, Euro 4, Total weight >32 t; EU+EFTA+UK
- kg_52: 0.000710153
  Mass in kg, for aluminium sulphate powder // aluminium sulphate powder production // eu+efta+uk; Transoceanic ship, containers; GLO
- km_52: 18023.8
  Distance in km, for aluminium sulphate powder // aluminium sulphate powder production // eu+efta+uk; Transoceanic ship, containers; GLO
- kg_km_52: 12.7997; = kg_52*km_52
  Transport amount in km*km, for aluminium sulphate powder // aluminium sulphate powder production // eu+efta+uk; Transoceanic ship, containers; GLO
- kg_53: 0.000203797
  Mass in kg, for methanol // methanol production // eu+efta+uk; Articulated lorry transport, Euro 4, Total weight >32 t; EU+EFTA+UK
- km_53: 1000.97
  Distance in km, for methanol // methanol production // eu+efta+uk; Articulated lorry transport, Euro 4, Total weight >32 t; EU+EFTA+UK
- kg_km_53: 0.203995; = kg_53*km_53
  Transport amount in km*km, for methanol // methanol production // eu+efta+uk; Articulated lorry transport, Euro 4, Total weight >32 t; EU+EFTA+UK
- kg_54: 0.000203797
  Mass in kg, for methanol // methanol production // eu+efta+uk; Transoceanic ship, containers; GLO
- km_54: 18007.7
  Distance in km, for methanol // methanol production // eu+efta+uk; Transoceanic ship, containers; GLO
- kg_km_54: 3.66991; = kg_54*km_54
  Transport amount in km*km, for methanol // methanol production // eu+efta+uk; Transoceanic ship, containers; GLO
- kg_55: 9.96682e-5
  Mass in kg, for edta // edta production // eu+efta+uk; Articulated lorry transport, Euro 4, Total weight >32 t; EU+EFTA+UK
- km_55: 1000.29
  Distance in km, for edta // edta production // eu+efta+uk; Articulated lorry transport, Euro 4, Total weight >32 t; EU+EFTA+UK
- kg_km_55: 0.0996975; = kg_55*km_55
  Transport amount in km*km, for edta // edta production // eu+efta+uk; Articulated lorry transport, Euro 4, Total weight >32 t; EU+EFTA+UK
- kg_56: 9.96682e-5
  Mass in kg, for edta // edta production // eu+efta+uk; Transoceanic ship, containers; GLO
- km_56: 17959.1
  Distance in km, for edta // edta production // eu+efta+uk; Transoceanic ship, containers; GLO
- kg_km_56: 1.78995; = kg_56*km_56
  Transport amount in km*km, for edta // edta production // eu+efta+uk; Transoceanic ship, containers; GLO
- kg_57: 0.0139437
  Mass in kg, for biodegradable waste to landfill // landfill of biodegradable waste // eu+efta+uk; Articulated lorry transport, Euro 4, Total weight >32 t; EU+EFTA+UK
- km_57: 77
  Distance in km, for biodegradable waste to landfill // landfill of biodegradable waste // eu+efta+uk; Articulated lorry transport, Euro 4, Total weight >32 t; EU+EFTA+UK
- kg_km_57: 1.07367; = kg_57*km_57
  Transport amount in km*km, for biodegradable waste to landfill // landfill of biodegradable waste // eu+efta+uk; Articulated lorry transport, Euro 4, Total weight >32 t; EU+EFTA+UK

## Reference product
- bleached kraft pulp, hardwood // bleached kraft pulp, hardwood // rna: 1

## Inputs
- Thermal energy (MJ) from Thermal energy from natural gas - ROW: 0.0582974
- Transport of malusil by Transoceanic ship, bulk - GLO: 0.30614; = kg_km_0
- Transport of malusil by Freight train, diesel traction - EU+EFTA+UK: 0.037794; = kg_km_1
- Transport of malusil by Freight train, electricity traction - EU+EFTA+UK: 0.012856; = kg_km_2
- Transport of malusil by Freight train, average - EU+EFTA+UK: 0.000303214; = kg_km_3
- Transport of malusil by Barge - EU+EFTA+UK: 0.00290705; = kg_km_4
- Transport of malusil by Barge - ROW w/o EU+EFTA: 0.00593607; = kg_km_5
- Transport of malusil by Articulated lorry transport, Total weight <7.5 t, mix Euro 0-5 - EU+EFTA+UK: 0.00400329; = kg_km_6
- Transport of malusil by Articulated lorry transport, Euro 4, Total weight >32 t - EU+EFTA+UK: 0.0373752; = kg_km_7
- Transport of malusil by Articulated lorry transport, Total weight >32 t, mix Euro 0-5 - ROW w/o EU+EFTA: 0.0986404; = kg_km_8
- Transport of sodium hydrogen sulphite // sodium hydrogen sulphite production // eu+efta+uk by Articulated lorry transport, Euro 4, Total weight >32 t - EU+EFTA+UK: 1.58996; = kg_km_9
- Transport of sodium hydrogen sulphite // sodium hydrogen sulphite production // eu+efta+uk by Transoceanic ship, containers - GLO: 28.5993; = kg_km_10
- Transport of hardwood under bark // hardwood forestry // rna by Articulated lorry transport, Euro 4, Total weight >32 t - EU+EFTA+UK: 226.059; = kg_km_11
- Transport of hardwood under bark // hardwood forestry // rna by Barge - ROW w/o EU+EFTA: 43.7457; = kg_km_12
- Transport of hardwood under bark // hardwood forestry // rna by Freight train, average - EU+EFTA+UK: 335.419; = kg_km_13
- Transport of hardwood under bark // hardwood forestry // rna by Transoceanic ship, bulk - GLO: 529.432; = kg_km_14
- Transport of wood chips, hardwood // wood chips, hardwood // rna by Articulated lorry transport, Euro 4, Total weight >32 t - EU+EFTA+UK: 182.237; = kg_km_15
- Transport of wood chips, hardwood // wood chips, hardwood // rna by Transoceanic ship, containers - GLO: 3280.27; = kg_km_16
- Transport of wood chips, softwood // wood chips, softwood // rna by Articulated lorry transport, Euro 4, Total weight >32 t - EU+EFTA+UK: 47.4138; = kg_km_17
- Transport of wood chips, softwood // wood chips, softwood // rna by Transoceanic ship, containers - GLO: 853.448; = kg_km_18
- Transport of biogas for bioenergy // biogas for bioenergy // rna by Articulated lorry transport, Euro 4, Total weight >32 t - EU+EFTA+UK: 11.0997; = kg_km_19
- Transport of biogas for bioenergy // biogas for bioenergy // rna by Transoceanic ship, containers - GLO: 199.995; = kg_km_20
- Transport of bark, hardwood // bark, hardwood // eu+efta+uk by Articulated lorry transport, Euro 4, Total weight >32 t - EU+EFTA+UK: 4.54988; = kg_km_21
- Transport of bark, hardwood // bark, hardwood // eu+efta+uk by Transoceanic ship, containers - GLO: 81.8979; = kg_km_22
- Transport of bark, softwood // bark, softwood // eu+efta+uk by Articulated lorry transport, Euro 4, Total weight >32 t - EU+EFTA+UK: 4.54988; = kg_km_23
- Transport of bark, softwood // bark, softwood // eu+efta+uk by Transoceanic ship, containers - GLO: 81.8979; = kg_km_24
- Transport of heavy fuel oil (1.0 wt.% s) // heavy fuel oil at refinery // rna by Articulated lorry transport, Euro 4, Total weight >32 t - EU+EFTA+UK: 3.28992; = kg_km_25
- Transport of heavy fuel oil (1.0 wt.% s) // heavy fuel oil at refinery // rna by Transoceanic ship, containers - GLO: 59.0985; = kg_km_26
- Transport of light fuel oil // light fuel oil at refinery // rna by Articulated lorry transport, Euro 4, Total weight >32 t - EU+EFTA+UK: 1.22997; = kg_km_27
- Transport of light fuel oil // light fuel oil at refinery // rna by Transoceanic ship, containers - GLO: 22.0994; = kg_km_28
- Transport of hard coal, at consumer rna // hard coal mix // rna by Articulated lorry transport, Euro 4, Total weight >32 t - EU+EFTA+UK: 0.231994; = kg_km_29
- Transport of hard coal, at consumer rna // hard coal mix // rna by Transoceanic ship, containers - GLO: 4.17989; = kg_km_30
- Transport of lignite rna // lignite mix // rna by Articulated lorry transport, Euro 4, Total weight >32 t - EU+EFTA+UK: 1.22997; = kg_km_31
- Transport of lignite rna // lignite mix // rna by Transoceanic ship, containers - GLO: 22.0994; = kg_km_32
- Transport of sodium formate // sodium formate production // eu+efta+uk by Articulated lorry transport, Euro 4, Total weight >32 t - EU+EFTA+UK: 0.0328992; = kg_km_33
- Transport of sodium formate // sodium formate production // eu+efta+uk by Transoceanic ship, containers - GLO: 0.591985; = kg_km_34
- Transport of hydrogen peroxide, 100% // hydrogen peroxide, 100% production // eu+efta+uk by Articulated lorry transport, Euro 4, Total weight >32 t - EU+EFTA+UK: 7.21982; = kg_km_35
- Transport of hydrogen peroxide, 100% // hydrogen peroxide, 100% production // eu+efta+uk by Transoceanic ship, containers - GLO: 129.997; = kg_km_36
- Transport of oxygen // oxygen production // eu+efta+uk by Articulated lorry transport, Euro 4, Total weight >32 t - EU+EFTA+UK: 22.2994; = kg_km_37
- Transport of oxygen // oxygen production // eu+efta+uk by Transoceanic ship, containers - GLO: 400.99; = kg_km_38
- Transport of sodium chlorate // sodium chlorate production // glo by Articulated lorry transport, Euro 4, Total weight >32 t - EU+EFTA+UK: 9.22977; = kg_km_39
- Transport of sodium chlorate // sodium chlorate production // glo by Transoceanic ship, containers - GLO: 165.996; = kg_km_40
- Transport of sodium hydroxide // sodium hydroxide production // eu+efta+uk by Articulated lorry transport, Euro 4, Total weight >32 t - EU+EFTA+UK: 28.4993; = kg_km_41
- Transport of sodium hydroxide // sodium hydroxide production // eu+efta+uk by Transoceanic ship, containers - GLO: 512.987; = kg_km_42
- Transport of sulphuric acid // sulphuric acid production // eu+efta+uk by Articulated lorry transport, Euro 4, Total weight >32 t - EU+EFTA+UK: 24.9994; = kg_km_43
- Transport of sulphuric acid // sulphuric acid production // eu+efta+uk by Transoceanic ship, containers - GLO: 448.989; = kg_km_44
- Transport of chlorine dioxide // chlorine dioxide production // glo by Articulated lorry transport, Euro 4, Total weight >32 t - EU+EFTA+UK: 7.7198; = kg_km_45
- Transport of chlorine dioxide // chlorine dioxide production // glo by Transoceanic ship, containers - GLO: 138.996; = kg_km_46
- Transport of sodium sulphate // sodium sulphate production // eu+efta+uk by Articulated lorry transport, Euro 4, Total weight >32 t - EU+EFTA+UK: 0.0129997; = kg_km_47
- Transport of sodium sulphate // sodium sulphate production // eu+efta+uk by Transoceanic ship, containers - GLO: 0.233994; = kg_km_48
- Transport of precipitated calcium carbonate // precipitated calcium carbonate production // eu+efta+uk by Articulated lorry transport, Euro 4, Total weight >32 t - EU+EFTA+UK: 1.52996; = kg_km_49
- Transport of precipitated calcium carbonate // precipitated calcium carbonate production // eu+efta+uk by Transoceanic ship, containers - GLO: 27.5993; = kg_km_50
- Transport of aluminium sulphate powder // aluminium sulphate powder production // eu+efta+uk by Articulated lorry transport, Euro 4, Total weight >32 t - EU+EFTA+UK: 0.709982; = kg_km_51
- Transport of aluminium sulphate powder // aluminium sulphate powder production // eu+efta+uk by Transoceanic ship, containers - GLO: 12.7997; = kg_km_52
- Transport of methanol // methanol production // eu+efta+uk by Articulated lorry transport, Euro 4, Total weight >32 t - EU+EFTA+UK: 0.203995; = kg_km_53
- Transport of methanol // methanol production // eu+efta+uk by Transoceanic ship, containers - GLO: 3.66991; = kg_km_54
- Transport of edta // edta production // eu+efta+uk by Articulated lorry transport, Euro 4, Total weight >32 t - EU+EFTA+UK: 0.0996975; = kg_km_55
- Transport of edta // edta production // eu+efta+uk by Transoceanic ship, containers - GLO: 1.78995; = kg_km_56
- Electricity from Electricity grid mix 1kV-60kV - RNA: 0.0769525
- Transport of biodegradable waste to landfill // landfill of biodegradable waste // eu+efta+uk by Articulated lorry transport, Euro 4, Total weight >32 t - EU+EFTA+UK: 1.07367; = kg_km_57
- bleached kraft pulp, hardwood // bleached kraft pulp, hardwood // rna, blackbox: 1
- bleached kraft pulp, hardwood // bleached kraft pulp, hardwood // rna, elementary: 1

## Impact indicators
- Eutrophication marine: 0.00152271
- Ecotoxicity, freshwater: 3.01616
- Land use: 361.142
- Water use: 1.88389
- Resource use, minerals and metals: 2.90271e-6
- Resource use, fossils: 2.30644
- Climate change: 0.186629
- Ozone depletion: 2.05791e-8
- Human toxicity, cancer: 5.07996e-11
- Human toxicity, non-cancer: 3.85955e-9
- EF-particulate Matter: 7.35648e-8
- Ionising radiation, human health: 0.0154204
- Photochemical ozone formation - human health: 0.00469581
- Acidification: 0.00426227
- Eutrophication, terrestrial: 0.0154343
- Eutrophication, freshwater: 4.95259e-5

## Deviations from the LCI method principle
The background data uses:
- the \xe2\x80\x9cRecycled content cut-off\xe2\x80\x9d approach to allocate end-of-life by-products and secondary materials. This allocation is explained in the description of the recycled content system model (http://www.ecoinvent.org/database/system-models-in-ecoinvent-3/cut-off-system-model/allocation-cut-off-by-classification.html).
OR
- EF compliant data

## Deviations from the LCI method approaches
Background data:
- the \xe2\x80\x9cRecycled content cut-off\xe2\x80\x9d approach to allocate end-of-life by-products and secondary materials. This allocation is explained in the description of the recycled content system model (http://www.ecoinvent.org/database/system-models-in-ecoinvent-3/cut-off-system-model/allocation-cut-off-by-classification.html). The ecoinvent database mostly relies on “Allocation – market values” apart for few exceptions particularly in the energy sector. ecoinvent energy data is replaced with EF3.0 core data as per the EF guidelines version 2.0.
OR
- EF compliant data

## Modelling constants
All modelling constants follow the requirements listed in the Tender Specifications 070201/2020/SER/ENV.B1. Completeness: There are no intentional cut-offs in the inventory no matter how small their contribution to all the EF impact categories is. Eventual cut-offs are in compliance with the Guide for EF compliant data sets (JRC 2020), i.e. only if below the 3% cut-off rule. Water use: water use is modelled at country level using separate flows for water withdrawal, water release and water evaporation. Handling multi-functional processes: the following PEF multi- functionality decision hierarchy is applied for resolving all multi- functionality problems: (1) subdivision or system expansion; (2) allocation based on a relevant underlying physical relationship (substitution may apply here); (3) allocation based on some other relationship. Direct land use change: GHG emissions from direct LUC allocated to good/service for 20 years after the LUC occurs, with IPCC default values. Carbon storage and delayed emissions: credits associated with temporary (carbon) storage or delayed emissions up to 300 years are not be considered. Emissions off-setting: are not included. Capital goods (including infrastructures) and their End of life: they are included. System boundaries: system boundaries include all processes linked to the product supply chain (e.g. maintenance). Time period: emissions and removals are modelled as if released or removed at the beginning of the assessment method. Fossil and biogenic carbon emissions and removals: removals and emissions are modelled as follows: All GHG emissions from fossil fuels (including peat and limestone) are modelled consistently with the most updated ILCD list of elementary flows. The non-fossil (biogenic) carbon flows are modelled consistently with the most updated ILCD list of elementary flows.

## Cut-off and completeness
There are no intentional cut-offs in the inventory no matter how small their contribution to all the EF impact categories is. Eventual cut-offs are in compliance with the Guide for EF compliant data sets (JRC 2020), i.e. only if below the 3% cut-off rule. The dataset dry mass and water balance has been checked to ensure the inventory is complete. Capital goods (e.g. infrastructure) and their end-of-life are included.

## Data selection and combination
These datasets include, in both their foreground and background data, links to EF3.0 compliant data.
The relevant background data on energy, transport, and End of Life are from the LCDN data node (http://lcdn.thinkstep.com/Node/).
All other background data in the supply of this product for which no EF3.0 process was available are from ecoinvent v3.7 database (www.ecoinvent.org) or other data sources.

## Data treatment and extrapolations
Several data sources have been used to model the inventory.

## Review details
Internal reviews have been asked to review the plausibility of the unit process, LCIA scores, and DQRs. Internal reviewers have also been asked to review the data for EF compliancy. The consortium is therefore responsible for aspects such as compliancy with the ILCD format, including validation in Look@LCI, and nomenclature.
Internal reviwers have been asked to judge based on the process name, that the unit process models in a complete and representative way the process in the requested location. The review encompassed the plausability of:
- exchanges with nature (elementary flows) as well as exchanges such as product and waste flows.
- meta information (general comment, technology comment, system boundaries, allocation, cut-off rules, etc.). Reviewers were asked to judge if the provided information is enough to understand the content of the process.
- LCIA scores
- DQRs including precision, technology, time and geography. As well as the overall DQR.
External reviewers have been asked to provide their expertise in the field of interest. External reviewers have been asked to review the unit process, including eventual methodological choices, the LCIA scores (provided with contribution scores as well), and DQRs. External reviewers have been provided all the information in a tool developed by the consortium for the purpose of this project.
External reviewers have been asked to judge based on the process name, that the unit process models in a complete and representative way the process in the requested location. The review encompassed:
- Plausability and completeness of exchanges with nature (elementary flows) as well as exchanges such as product and waste flows.
- Review of meta information (general comment, technology comment, system boundaries, allocation, cut-off rules, etc.). Reviewers were asked to judge if the provided information is enough to understand the content of the process.
- Review of properties (biogenic carbon and water content).
- Review of allocation keys.
- Plausability of LCIA scores calculated by the consortium.
- Plausability of DQRs including precision, technology, time and geography. As well as the overall DQR.

## Data sources
- Background Data for Representative products and organisations. EF 3.0 compliant (data stock)
- The European Pulp Industry Sector Association AISBL (EPIS), (2020). EPIS Life Cycle Inventory data for Northern Bleached Hardwood Kraft Pulp, 2020 Data.

## Intended applications
Implementation of regular Product Environmental Footprint (PEF) studies and Organisation Environmental Footprint (OEF) studies exclusively under the specified Product groups and sectors as defined in the Product Environmental Footprint Category Rules (PEFCR) and Organisation Environmental Footprint Sectorial Rules (OEFSR) listed in http://ec.europa.eu/environment/eussd/smgp/PEFCR_OEFSR.htm
