# handwashing; handwashing process; production mix, at plant; service

Dataset: ILCD process, Partly terminated system
Geography: EU+EFTA+UK
Reference year: 2021
Valid until: 2024
Classification: Systems / Textiles, furnitures and other interiors
LCI method principle: Attributional
LCI method approaches: Allocation - market value
Completeness: All relevant flows quantified
Project: Provision of process-based 3.0 Environmental Footprint-compliant life cycle inventory datasets - Others - contract number 070201/2020/840235/SER/ENV.B.1
Generated by: Life Cycle Indonesia
Owner: PRé Sustainability B.V.
Compliance: ILCD Data Network - Entry-level; Suggestions for updating the PEF method 2019; ISO 14040 Environmental Management – Life Cycle Assessment – Principles and Framework, 2006; ISO 14044:2006. Environmental Management – Life Cycle Assessment – Requirements and guidelines.; Environmental Footprint 3.1
Review: Dependent internal review by Avraam Symeonidis, Emilia Moreno Ruiz; Independent review panel by Fábio Valebona
Data quality: Overall quality: Good; Time representativeness: Very good; Geographical representativeness: Good; Technological representativeness: Good; Precision: Good; Methodological appropriateness and consistency: Not applicable
Amounts: no units in this file; such an amount is in the reference unit of its flow, which a separate flow dataset defines
copyright: true
licenseType: Free of charge for some user types or use types
accessRestrictions: Free of charge for all final users implementing a regular Product Environmental Footprint (PEF) studies and Organisation Environmental Footprint (OEF) studies exclusively under the specified Product groups and sectors as defined in the Product Environmental Footprint Category Rules (PEFCR) and Organisation Environmental Footprint Sectorial Rules (OEFSR) listed in http://ec.europa.eu/environment/eussd/smgp/PEFCR_OEFSR.htm and in accordance with the terms and conditions of the EULA (available at https://ecoinvent.lca-data.com/) exclusively until 31st December 2024. Any use of this dataset or any derivative data not within the specific context of one of the PEF/OEF projects or after the end of 2024 is not permitted.

## General comment
Notice: this data set supersedes the EF3.0-compliant version (see link under "preceding data set version" below calculated with the EF3.0). The life cycle inventory is not changed from the original EF3.0 data set. The LCIA results are calculated based on the EF3.1 methods which provide updated characterisation factors in the following impact categories: Climate Change, Ecotoxicity freshwater, Photochemical Ozone Formation, Acidification, Human Toxicity non-cancer, and Human Toxicity cancer. The review report and the data quality ratings refer to the original results. The data set has been updated by the European Commission on the basis of the original EF3.0 data set delivered by the data provider.Handwashing is the gentlest way to wash items. Handwashing clothes increases the longevity of textiles by preserving fibers and detailing, in a way that washing machines can’t. Handwash clothes is important because it’s the best method to use when washing delicate or wool items at home or while traveling. Normally, high fashion items, delicate silks, woolens, merino wool (especially fine knits), lace, cashmere, and embellished items meet the qualification for hand washing, whereas suits cannot be hand washed.

The Laundress (2021). Hand Washing, The Laundress Store, https://www.thelaundress.com/how-to/360-wash/washing/hand-washing.html
Murray Daisy (2020). How To Hand Wash Clothes According To Steamery's Co-Founder Frej Lewenhaupt, Elle, https://www.elle.com/uk/fashion/a32778126/how-hand-wash-clothes/

## Technology and included processes
Steps of handwashing clothes: Pre-treat any stains and/or pre-soak your clothes if needed. Fill up your wash basin with lukewarm water. Soak your garment and gently press water and detergent through the fibres. Let it rest for 15 minutes and repeat the gently pressing for the water and detergent to penetrate the fabric. Pour the water and detergent out and rinse clothes with cold water. Repeat this process again. Finish by rinsing with water until there are no detergent residues left. Gently press the laundry to release excess water (do not twist any garment). Tightly roll in a terry cloth towel to release water. Gently pull and straighten out fabric, taking care to focus on seams, collars and cuffs. Flat-dry knits by laying them out on a surface. Hang-dry woven fabrics and jersey. (Murray, 2020)

The activity starts when the raw materials enter the process. Materials entering the process are included as well as the use of energy to make warm water, the water itself and chemicals. The average temperature of warm water used is around 34.5 celcius. There is no direct emission to soil, but there is direct emission to water from this process. Chemical agents that are used in the process are emitted through the wastewater. The pre-treatment process is not included in this dataset.

Murray, Daisy (2020). How To Hand Wash Clothes According To Steamery's Co-Founder Frej Lewenhaupt, Elle, https://www.elle.com/uk/fashion/a32778126/how-hand-wash-clothes/

## Parameters
- kg_0: 0.04365
  Mass in kg, for surfactant // surfactant production // glo; Freight train, average; EU+EFTA+UK
- km_0: 240.55
  Distance in km, for surfactant // surfactant production // glo; Freight train, average; EU+EFTA+UK
- kg_km_0: 10.5; = kg_0*km_0
  Transport amount in km*km, for surfactant // surfactant production // glo; Freight train, average; EU+EFTA+UK
- kg_1: 0.04365
  Mass in kg, for surfactant // surfactant production // glo; Barge; EU+EFTA+UK
- km_1: 270.332
  Distance in km, for surfactant // surfactant production // glo; Barge; EU+EFTA+UK
- kg_km_1: 11.8; = kg_1*km_1
  Transport amount in km*km, for surfactant // surfactant production // glo; Barge; EU+EFTA+UK
- kg_2: 0.04365
  Mass in kg, for surfactant // surfactant production // glo; Articulated lorry transport, Euro 4, Total weight >32 t; EU+EFTA+UK
- km_2: 129.897
  Distance in km, for surfactant // surfactant production // glo; Articulated lorry transport, Euro 4, Total weight >32 t; EU+EFTA+UK
- kg_km_2: 5.67; = kg_2*km_2
  Transport amount in km*km, for surfactant // surfactant production // glo; Articulated lorry transport, Euro 4, Total weight >32 t; EU+EFTA+UK

## Reference product
- handwashing // handwashing // eu+efta+uk: 1

## Inputs
- Transport of surfactant // surfactant production // glo by Freight train, average - EU+EFTA+UK: 10.5; = kg_km_0
- Transport of surfactant // surfactant production // glo by Barge - EU+EFTA+UK: 11.8; = kg_km_1
- Transport of surfactant // surfactant production // glo by Articulated lorry transport, Euro 4, Total weight >32 t - EU+EFTA+UK: 5.67; = kg_km_2
- Electricity from Electricity grid mix 1kV-60kV - EU+EFTA+UK: 0.4608
- handwashing // handwashing // eu+efta+uk, blackbox: 1
- handwashing // handwashing // eu+efta+uk, elementary: 1

## Impact indicators
- Eutrophication marine: 0.000800861
- Ecotoxicity, freshwater: 3.49126
- Land use: 5.60284
- Water use: 0.274893
- Resource use, minerals and metals: 5.72166e-7
- Resource use, fossils: 2.59061
- Climate change: 0.164809
- Ozone depletion: 2.48355e-9
- Human toxicity, cancer: 3.29961e-10
- Human toxicity, non-cancer: 3.7593e-9
- EF-particulate Matter: 1.85176e-8
- Ionising radiation, human health: 0.0273464
- Photochemical ozone formation - human health: 0.000704224
- Acidification: 0.00126062
- Eutrophication, terrestrial: 0.00386963
- Eutrophication, freshwater: 2.08544e-5

## Deviations from the LCI method principle
The background data uses:
- the \xe2\x80\x9cRecycled content cut-off\xe2\x80\x9d approach to allocate end-of-life by-products and secondary materials. This allocation is explained in the description of the recycled content system model (http://www.ecoinvent.org/database/system-models-in-ecoinvent-3/cut-off-system-model/allocation-cut-off-by-classification.html).
OR
- EF compliant data

## Deviations from the LCI method approaches
Background data:
- the \xe2\x80\x9cRecycled content cut-off\xe2\x80\x9d approach to allocate end-of-life by-products and secondary materials. This allocation is explained in the description of the recycled content system model (http://www.ecoinvent.org/database/system-models-in-ecoinvent-3/cut-off-system-model/allocation-cut-off-by-classification.html). The ecoinvent database mostly relies on “Allocation – market values” apart for few exceptions particularly in the energy sector. ecoinvent energy data is replaced with EF3.0 core data as per the EF guidelines version 2.0.
OR
- EF compliant data

## Modelling constants
All modelling constants follow the requirements listed in the Tender Specifications 070201/2020/SER/ENV.B1. Completeness: There are no intentional cut-offs in the inventory no matter how small their contribution to all the EF impact categories is. Eventual cut-offs are in compliance with the Guide for EF compliant data sets (JRC 2020), i.e. only if below the 3% cut-off rule. Water use: water use is modelled at country level using separate flows for water withdrawal, water release and water evaporation. Handling multi-functional processes: the following PEF multi- functionality decision hierarchy is applied for resolving all multi- functionality problems: (1) subdivision or system expansion; (2) allocation based on a relevant underlying physical relationship (substitution may apply here); (3) allocation based on some other relationship. Direct land use change: GHG emissions from direct LUC allocated to good/service for 20 years after the LUC occurs, with IPCC default values. Carbon storage and delayed emissions: credits associated with temporary (carbon) storage or delayed emissions up to 300 years are not be considered. Emissions off-setting: are not included. Capital goods (including infrastructures) and their End of life: they are included. System boundaries: system boundaries include all processes linked to the product supply chain (e.g. maintenance). Time period: emissions and removals are modelled as if released or removed at the beginning of the assessment method. Fossil and biogenic carbon emissions and removals: removals and emissions are modelled as follows: All GHG emissions from fossil fuels (including peat and limestone) are modelled consistently with the most updated ILCD list of elementary flows. The non-fossil (biogenic) carbon flows are modelled consistently with the most updated ILCD list of elementary flows.

## Cut-off and completeness
There are no intentional cut-offs in the inventory no matter how small their contribution to all the EF impact categories is. Eventual cut-offs are in compliance with the Guide for EF compliant data sets (JRC 2020), i.e. only if below the 3% cut-off rule. The dataset dry mass and water balance has been checked to ensure the inventory is complete. Capital goods (e.g. infrastructure) and their end-of-life are included.

## Data selection and combination
These datasets include, in both their foreground and background data, links to EF3.0 compliant data.
The relevant background data on energy, transport, and End of Life are from the LCDN data node (http://lcdn.thinkstep.com/Node/).
All other background data in the supply of this product for which no EF3.0 process was available are from ecoinvent v3.7 database (www.ecoinvent.org) or other data sources.

## Data treatment and extrapolations
Several data sources have been used to model the inventory.

## Review details
Internal reviews have been asked to review the plausibility of the unit process, LCIA scores, and DQRs. Internal reviewers have also been asked to review the data for EF compliancy. The consortium is therefore responsible for aspects such as compliancy with the ILCD format, including validation in Look@LCI, and nomenclature.
Internal reviwers have been asked to judge based on the process name, that the unit process models in a complete and representative way the process in the requested location. The review encompassed the plausability of:
- exchanges with nature (elementary flows) as well as exchanges such as product and waste flows.
- meta information (general comment, technology comment, system boundaries, allocation, cut-off rules, etc.). Reviewers were asked to judge if the provided information is enough to understand the content of the process.
- LCIA scores
- DQRs including precision, technology, time and geography. As well as the overall DQR.
External reviewers have been asked to provide their expertise in the field of interest. External reviewers have been asked to review the unit process, including eventual methodological choices, the LCIA scores (provided with contribution scores as well), and DQRs. External reviewers have been provided all the information in a tool developed by the consortium for the purpose of this project.
External reviewers have been asked to judge based on the process name, that the unit process models in a complete and representative way the process in the requested location. The review encompassed:
- Plausability and completeness of exchanges with nature (elementary flows) as well as exchanges such as product and waste flows.
- Review of meta information (general comment, technology comment, system boundaries, allocation, cut-off rules, etc.). Reviewers were asked to judge if the provided information is enough to understand the content of the process.
- Review of properties (biogenic carbon and water content).
- Review of allocation keys.
- Plausability of LCIA scores calculated by the consortium.
- Plausability of DQRs including precision, technology, time and geography. As well as the overall DQR.

## Data sources
- Background Data for Representative products and organisations. EF 3.0 compliant (data stock)
- Kirsi Laitala, Ingun Grimstad Klepp, Roy Kettlewell and Stephen Wiedemann (2020). Laundry Care Regimes: Do the Practices of Keeping Clothes Clean Have Different Environmental Impacts Based on the Fibre Content?, www.mdpi.com, Molecular Diversity Preservation International (MDPI) Sustainability Foundation, Basel, Switzerland
- Persil (2021) HOW TO USE WASHING POWDER, https://www.persil.com/uk/laundry/laundry-tips/washing-tips/dosing-for-powder.html, Persil Unilever, United Kingdom

## Intended applications
Implementation of regular Product Environmental Footprint (PEF) studies and Organisation Environmental Footprint (OEF) studies exclusively under the specified Product groups and sectors as defined in the Product Environmental Footprint Category Rules (PEFCR) and Organisation Environmental Footprint Sectorial Rules (OEFSR) listed in http://ec.europa.eu/environment/eussd/smgp/PEFCR_OEFSR.htm
