# cotton fibre; technology mix; production mix, at farm; "as is" delinted product

Dataset: ILCD process, Partly terminated system
Geography: EG
Reference year: 2019
Valid until: 2024
Classification: Materials production / Food and renewable raw materials
LCI method principle: Attributional
LCI method approaches: Allocation - market value
Completeness: All relevant flows quantified
Project: Provision of process-based 3.0 Environmental Footprint-compliant life cycle inventory datasets - Renewable materials - contract number 070201/2020/840085/SER/ENV.B.1
Generated by: Blonk Sustainability Tools
Owner: Blonk Sustainability Tools
Compliance: ILCD Data Network - Entry-level; Suggestions for updating the PEF method 2019; ISO 14040 Environmental Management – Life Cycle Assessment – Principles and Framework, 2006; ISO 14044:2006. Environmental Management – Life Cycle Assessment – Requirements and guidelines.; Environmental Footprint 3.1
Review: Dependent internal review by Hans Blonk, Emilia Moreno Ruiz; Independent review panel by Philippa Notten
Data quality: Overall quality: Good; Time representativeness: Good; Geographical representativeness: Very good; Technological representativeness: Very good; Precision: Good; Methodological appropriateness and consistency: Not applicable
Amounts: no units in this file; such an amount is in the reference unit of its flow, which a separate flow dataset defines
copyright: true
licenseType: Free of charge for some user types or use types
accessRestrictions: Free of charge for all final users implementing a regular Product Environmental Footprint (PEF) studies and Organisation Environmental Footprint (OEF) studies exclusively under the specified Product groups and sectors as defined in the Product Environmental Footprint Category Rules (PEFCR) and Organisation Environmental Footprint Sectorial Rules (OEFSR) listed in http://ec.europa.eu/environment/eussd/smgp/PEFCR_OEFSR.htm and in accordance with the terms and conditions of the EULA (available at https://ecoinvent.lca-data.com/) exclusively until 31st December 2024. Any use of this dataset or any derivative data not within the specific context of one of the PEF/OEF projects or after the end of 2024 is not permitted.

## General comment
Notice: this data set supersedes the EF3.0-compliant version (see link under "preceding data set version" below calculated with the EF3.0). The life cycle inventory is not changed from the original EF3.0 data set. The LCIA results are calculated based on the EF3.1 methods which provide updated characterisation factors in the following impact categories: Climate Change, Ecotoxicity freshwater, Photochemical Ozone Formation, Acidification, Human Toxicity non-cancer, and Human Toxicity cancer. The review report and the data quality ratings refer to the original results. The data set has been updated by the European Commission on the basis of the original EF3.0 data set delivered by the data provider.This process describes cotton fibre production in Egypt. Cotton fibre is a co-product of ginning and delinting Seed Cotton

## Technology and included processes
The environmental impact cotton fibre includes cultivation and delintint the Seed cotton. The ginning and delinting processes are based on the information in Feedprint (2012). For cotton fibre production the following activities are included: cotton seed input, energy use for delinting resulting in cotton fibre and seed cotton. Considered activities for cultivation are: fertilizer, lime and pesticide application rates and their production, capital goods depreciation, energy use for field management and irrigation. The elementary flows include field emissions to the air, water and soil, direct land use change emissions and emissions due to pesticide use and heavy metal emissions. Generic plant infrastructure is cut-off. Basic infrastructure is considered at crop cultivation.

Crop yields are derived from FAO statistics (2012-2016). Synthetic fertilizer use is based on data the Fertilizer model (See Agri-footprint 5 methodology reports). Specific fertilizer amount are quantified based on total NPK and relative amounts of fertilizer consumed by type for each country (IFA, 2019). For arable cultivations, animal manure is applied for soil maintenance based on the methodology described in appendix 4 of Vellinga et al (2013). Seven heavy metal emissions due to synthetic fertilizer, manure and lime use have been calculated based on adapted methodology. It is taken in account the heavy metal balance as a function of deposition, use of fertilizer and crop uptake using literature concerning heavy metal contents of manure and fertilizers and lime and crop uptake.

Energy use for arable and orchard cultivations were calculated based on 'Energy model for crop cultivation', which include energy requirements for nine different agricultural activities. Various inputs are used for the energy model including yield, irrigation water use and different type of tillage techniques applied around the world."

## Parameters
- kg_0: 792.339
  Mass in kg, for seed cotton, at farm/eg economic; Articulated lorry transport, Total weight 14-20 t, mix Euro 0-5; ROW w/o EU+EFTA
- km_0: 15
  Distance in km, for seed cotton, at farm/eg economic; Articulated lorry transport, Total weight 14-20 t, mix Euro 0-5; ROW w/o EU+EFTA
- kg_km_0: 11885.1; = kg_0*km_0
  Transport amount in km*km, for seed cotton, at farm/eg economic; Articulated lorry transport, Total weight 14-20 t, mix Euro 0-5; ROW w/o EU+EFTA

## Reference product
- cotton fibre // cotton fibre // eg: 1

## Inputs
- Electricity from Electricity grid mix 1kV-60kV - RAS w/o CN: 427.863
- Transport of seed cotton, at farm/eg economic by Articulated lorry transport, Total weight 14-20 t, mix Euro 0-5 - ROW w/o EU+EFTA: 11885.1; = kg_km_0
- cotton fibre // cotton fibre // eg, blackbox: 1
- cotton fibre // cotton fibre // eg, elementary: 1

## Impact indicators
- Eutrophication marine: 31.6411
- Ecotoxicity, freshwater: 133062
- Land use: 180897
- Water use: 83399.8
- Resource use, minerals and metals: 0.000799632
- Resource use, fossils: 16106.1
- Climate change: 1670.32
- Ozone depletion: 9.68677e-6
- Human toxicity, cancer: 7.11958e-7
- Human toxicity, non-cancer: 7.05723e-5
- EF-particulate Matter: 0.000496254
- Ionising radiation, human health: 15.2658
- Photochemical ozone formation - human health: 13.448
- Acidification: 36.1481
- Eutrophication, terrestrial: 164.781
- Eutrophication, freshwater: 0.371649

## Deviations from the LCI method principle
The background data uses:
- the Recycled content cut-off approach to allocate end-of-life by-products and secondary materials. This allocation is explained in the description of the recycled content system model (http://www.ecoinvent.org/database/system-models-in-ecoinvent-3/cut-off-system-model/allocation-cut-off-by-classification.html).
OR
- EF compliant data

## Deviations from the LCI method approaches
Background data:
- the \xe2\x80\x9cRecycled content cut-off\xe2\x80\x9d approach to allocate end-of-life by-products and secondary materials. This allocation is explained in the description of the recycled content system model (http://www.ecoinvent.org/database/system-models-in-ecoinvent-3/cut-off-system-model/allocation-cut-off-by-classification.html). The ecoinvent database mostly relies on “Allocation – market values” apart for few exceptions particularly in the energy sector. ecoinvent energy data is replaced with EF3.0 core data as per the EF guidelines version 2.0.
OR
- EF compliant data

## Modelling constants
All modelling constants follow the requirements listed in the Tender Specifications 070201/2020/SER/ENV.B1. Completeness: There are no intentional cut-offs in the inventory no matter how small their contribution to all the EF impact categories is. Eventual cut-offs are in compliance with the Guide for EF compliant data sets (JRC 2020), i.e. only if below the 3% cut-off rule. Water use: water use is modelled at country level using separate flows for water withdrawal, water release and water evaporation. Handling multi-functional processes: the following PEF multi- functionality decision hierarchy is applied for resolving all multi- functionality problems: (1) subdivision or system expansion; (2) allocation based on a relevant underlying physical relationship (substitution may apply here); (3) allocation based on some other relationship. Direct land use change: GHG emissions from direct LUC allocated to good/service for 20 years after the LUC occurs, with IPCC default values. Carbon storage and delayed emissions: credits associated with temporary (carbon) storage or delayed emissions up to 300 years are not be considered. Emissions off-setting: are not included. Capital goods (including infrastructures) and their End of life: they are included. System boundaries: system boundaries include all processes linked to the product supply chain (e.g. maintenance). Time period: emissions and removals are modelled as if released or removed at the beginning of the assessment method. Fossil and biogenic carbon emissions and removals: removals and emissions are modelled as follows: All GHG emissions from fossil fuels (including peat and limestone) are modelled consistently with the most updated ILCD list of elementary flows. The non-fossil (biogenic) carbon flows are modelled consistently with the most updated ILCD list of elementary flows.

## Cut-off and completeness
There are no intentional cut-offs in the inventory no matter how small their contribution to all the EF impact categories is. Eventual cut-offs are in compliance with the Guide for EF compliant data sets (JRC 2020), i.e. only if below the 3% cut-off rule. The dataset dry mass and water balance has been checked to ensure the inventory is complete. Capital goods (e.g. infrastructure) and their end-of-life are included.

## Data selection and combination
These datasets include, in both their foreground and background data, links to EF3.0 compliant data.
The relevant background data on energy, transport, and End of Life are from the LCDN data node (http://lcdn.thinkstep.com/Node/).
All other background data in the supply of this product for which no EF3.0 process was available are from ecoinvent v3.7 database (www.ecoinvent.org) or other data sources.

## Data treatment and extrapolations
Several data sources have been used to model the inventory.

## Review details
Internal reviews have been asked to review the plausibility of the unit process, LCIA scores, and DQRs. Internal reviewers have also been asked to review the data for EF compliancy. The consortium is therefore responsible for aspects such as compliancy with the ILCD format, including validation in Look@LCI, and nomenclature.
Internal reviwers have been asked to judge based on the process name, that the unit process models in a complete and representative way the process in the requested location. The review encompassed the plausability of:
- exchanges with nature (elementary flows) as well as exchanges such as product and waste flows.
- meta information (general comment, technology comment, system boundaries, allocation, cut-off rules, etc.). Reviewers were asked to judge if the provided information is enough to understand the content of the process.
- LCIA scores
- DQRs including precision, technology, time and geography. As well as the overall DQR.
External reviewers have been asked to provide their expertise in the field of interest. External reviewers have been asked to review the unit process, including eventual methodological choices, the LCIA scores (provided with contribution scores as well), and DQRs. External reviewers have been provided all the information in a tool developed by the consortium for the purpose of this project.
External reviewers have been asked to judge based on the process name, that the unit process models in a complete and representative way the process in the requested location. The review encompassed:
- Plausability and completeness of exchanges with nature (elementary flows) as well as exchanges such as product and waste flows.
- Review of meta information (general comment, technology comment, system boundaries, allocation, cut-off rules, etc.). Reviewers were asked to judge if the provided information is enough to understand the content of the process.
- Review of properties (biogenic carbon and water content).
- Review of allocation keys.
- Plausability of LCIA scores calculated by the consortium.
- Plausability of DQRs including precision, technology, time and geography. As well as the overall DQR.

## Data sources
- Background Data for Representative products and organisations. EF 3.0 compliant (data stock)
- van Zeist W J., Marinussen M., Blonk H., Broekema R., Kool A., Ponsioen T C. (2012) LCI data for the calculation tool Feedprint for greenhouse gas emissions of feed production and utilization: Crushing industry. Gouda, The Netherlands
- Blonk Agri-footprint BV. (2019). Agri-footprint - Part 2 - Description of data. Gouda, the Netherlands.
- Blonk Agri-footprint BV. (2019). Agri-footprint - Part 1 - Methodology and basic principles. Gouda, the Netherlands.
- Blonk Consultants. (2018). The Direct Land Use Change Assessment Tool. Gouda, Netherlands
- FAOstat (2019). Crop production, retrieved from: www.fao.org/faostat/en/#data/QCL
- FAO (2019). FAOstat manure applied to soils, retrieved from: faostat.fao.org
- Mekonnen, M. M., & Hoekstra, A. Y. (2010). The green, blue and grey water footprint of crops and derived crop products - Volume 1: Main Report (Vol. 1).
- IPCC (2006). 2006 IPCC Guidelines for National Greenhouse Gas Inventories, volume 4: Agriculture, Forestry and Other Land Use

## Intended applications
Implementation of regular Product Environmental Footprint (PEF) studies and Organisation Environmental Footprint (OEF) studies exclusively under the specified Product groups and sectors as defined in the Product Environmental Footprint Category Rules (PEFCR) and Organisation Environmental Footprint Sectorial Rules (OEFSR) listed in http://ec.europa.eu/environment/eussd/smgp/PEFCR_OEFSR.htm
