# needle-punching of primary backing; technology mix; production mix, at plant; service

Dataset: ILCD process, Partly terminated system
Geography: EU+EFTA+UK
Reference year: 2021
Valid until: 2024
Classification: Systems / Textiles, furnitures and other interiors
LCI method principle: Attributional
LCI method approaches: Allocation - market value
Completeness: All relevant flows quantified
Project: Provision of process-based 3.0 Environmental Footprint-compliant life cycle inventory datasets - Apparel 2 - contract number 070201/2020/840292/SER/ENV.B.1
Generated by: Life Cycle Indonesia
Owner: PRé Sustainability B.V.
Compliance: ILCD Data Network - Entry-level; Suggestions for updating the PEF method 2019; ISO 14040 Environmental Management – Life Cycle Assessment – Principles and Framework, 2006; ISO 14044:2006. Environmental Management – Life Cycle Assessment – Requirements and guidelines.; Environmental Footprint 3.1
Review: Dependent internal review by Avraam Symeonidis, Emilia Moreno Ruiz; Independent review panel by Fábio Valebona
Data quality: Overall quality: Very good; Time representativeness: Very good; Geographical representativeness: Very good; Technological representativeness: Very good; Precision: Good; Methodological appropriateness and consistency: Not applicable
Amounts: no units in this file; such an amount is in the reference unit of its flow, which a separate flow dataset defines
copyright: true
licenseType: Free of charge for some user types or use types
accessRestrictions: Free of charge for all final users implementing a regular Product Environmental Footprint (PEF) studies and Organisation Environmental Footprint (OEF) studies exclusively under the specified Product groups and sectors as defined in the Product Environmental Footprint Category Rules (PEFCR) and Organisation Environmental Footprint Sectorial Rules (OEFSR) listed in http://ec.europa.eu/environment/eussd/smgp/PEFCR_OEFSR.htm and in accordance with the terms and conditions of the EULA (available at https://ecoinvent.lca-data.com/) exclusively until 31st December 2024. Any use of this dataset or any derivative data not within the specific context of one of the PEF/OEF projects or after the end of 2024 is not permitted.

## General comment
Notice: this data set supersedes the EF3.0-compliant version (see link under "preceding data set version" below calculated with the EF3.0). The life cycle inventory is not changed from the original EF3.0 data set. The LCIA results are calculated based on the EF3.1 methods which provide updated characterisation factors in the following impact categories: Climate Change, Ecotoxicity freshwater, Photochemical Ozone Formation, Acidification, Human Toxicity non-cancer, and Human Toxicity cancer. The review report and the data quality ratings refer to the original results. The data set has been updated by the European Commission on the basis of the original EF3.0 data set delivered by the data provider.Needle punching is one of the primary backing manufacturing techniques for machine-made carpets. Nonwoven synthetic material, usually polypropylene, can be needle punched. Needle-punched carpeting is made by barbed felting needles, punching bating into a centre fabric. This forms a flat fabric such as carpet that is mainly used for indoor–outdoor carpeting, artificial grass surfaces, and some carpet tiles. Needle-punched carpet can be printed, flocked, or embossed. Different textural effects, such as corduroy, can be attained by mixing fibre deniers and angling the needle in various ways. A coating of weather resistant latex or similar material is applied to the back.

A user employing this service within their models should use it along with an 1 kg of material (nonwoven synthetic material, usually polypropylene or others may use polyester) to produce an 1 kg of fabric. No waste is generated in the needle punchung process. Additionally, a user is responsible for accounting transportation expenditures for all extra input and output materials that need to be modelled alongside this service.

Goswami, K. K. (2018). The Textile Institute Book Series Advance in Carpet Manufacture (Second Edition). Cambridge: Woodhead Publishing, pp 299-302
Mohsen Miraftab, Richard Horrocks & Colin Woods (1999) Carpet Waste, an Expensive Luxury We Must Do Without, AUTEX Research Journal Vol 1, No.1, 1999

## Technology and included processes
The process of needlepunching, also known as needle felting was originally developed to produce mechanically bonded nonwoven fabrics from fibres that could not be felted like wool. The fibres are mechanically entangled to produce a fabric by reciprocating barbed needles (felting needles) through a moving batt of fibres in a needleloom (Russel, 2007).

Webs are laid by a cross-lapper to produce a batt to the required width and basis weight. Drafting operation to reduce the basis weight of fabric could takes place before, during or after pre-needling operation. Generally, the needle loom comprises three main components, namely, needle board, bed plate and stripper plate. The needle-punched fabrics are delivered when pointed needles are pushed through a stringy cross-laid web driving a few filaments through the web, where they remain when the needles are withdrawn. A needle-punched nonwoven is a fabric made from webs or batts of fibers in which some of the fibers have been driven upward or downward or both by barbed needles. This needling action interlocks fibers and holds the structure together by friction forces. Needlepunching machines can be classified as single-board, multi-board, structuring or speciality and their use varies depending on application. Most of the needle loom comprises two needle boards i.e. pre-needling and final needling for effective needling operation and to reduce the thickness of the batt. After final needling, the fabric is transported away from the needling zone by take-up rollers to finisihing process, the movement of which may be intermittent or continuous. The finisihing process of final needling fabrics are heat setting, calendaring, chemical bonding, coating, and lamination (Khartik et al., 2016).

The production capacity of the needle loom machine depends on the type (GSM) of fabric used. The size and the delivery speed of the machine will influence the production capacity of machine. Materials entering the process are included as well as energy uses and infrastructure. There is no direct emission to air and soil from this process. In the model, needle-punched nonwoven fabric is needling through two types of machines i.e pre needle loom and main needle loom. There are two types needle-punched nonwoven fabrics output i.e. twice needled and thrice needled. Both twice and thrice needled must enter the pre needle loom machine. After pre needling, the twice needled fabric enter the main needle loom one time, while thrice needled fabric enter the main needle loom two times. Since the GSM of primary backing is small, so the calculation model uses twice needled. The finishing process is not included in the scope of this dataset. The consumption of lubricating oil using a stitch bonding machines as a proxy.

References:
Russel, S.J. 2007. Handbook of Nonwovens. England: Woodhead Publishing Limited. pp 240-241
Khartik, T., dkk. 2016. Non-woven - Process, Structure, Properties and Applications. New Delhi: Woodhead Publishing India. pp 97

## Parameters
- kg_0: 4.92655e-6
  Mass in kg, for lubricating oil // lubricants at refinery // eu+efta+uk; Freight train, average; EU+EFTA+UK
- km_0: 239.518
  Distance in km, for lubricating oil // lubricants at refinery // eu+efta+uk; Freight train, average; EU+EFTA+UK
- kg_km_0: 0.00118; = kg_0*km_0
  Transport amount in km*km, for lubricating oil // lubricants at refinery // eu+efta+uk; Freight train, average; EU+EFTA+UK
- kg_1: 4.92655e-6
  Mass in kg, for lubricating oil // lubricants at refinery // eu+efta+uk; Barge; EU+EFTA+UK
- km_1: 269.966
  Distance in km, for lubricating oil // lubricants at refinery // eu+efta+uk; Barge; EU+EFTA+UK
- kg_km_1: 0.00133; = kg_1*km_1
  Transport amount in km*km, for lubricating oil // lubricants at refinery // eu+efta+uk; Barge; EU+EFTA+UK
- kg_2: 4.92655e-6
  Mass in kg, for lubricating oil // lubricants at refinery // eu+efta+uk; Articulated lorry transport, Euro 4, Total weight >32 t; EU+EFTA+UK
- km_2: 130.111
  Distance in km, for lubricating oil // lubricants at refinery // eu+efta+uk; Articulated lorry transport, Euro 4, Total weight >32 t; EU+EFTA+UK
- kg_km_2: 0.000641; = kg_2*km_2
  Transport amount in km*km, for lubricating oil // lubricants at refinery // eu+efta+uk; Articulated lorry transport, Euro 4, Total weight >32 t; EU+EFTA+UK

## Reference product
- needle-punching of primary backing // needle-punching of primary backing // eu+efta+uk: 1

## Inputs
- Electricity from Electricity grid mix 1kV-60kV - EU+EFTA+UK: 0.4311
- Transport of lubricating oil // lubricants at refinery // eu+efta+uk by Freight train, average - EU+EFTA+UK: 0.00118; = kg_km_0
- Transport of lubricating oil // lubricants at refinery // eu+efta+uk by Barge - EU+EFTA+UK: 0.00133; = kg_km_1
- Transport of lubricating oil // lubricants at refinery // eu+efta+uk by Articulated lorry transport, Euro 4, Total weight >32 t - EU+EFTA+UK: 0.000641; = kg_km_2
- needle-punching of primary backing // needle-punching of primary backing // eu+efta+uk, blackbox: 1
- needle-punching of primary backing // needle-punching of primary backing // eu+efta+uk, elementary: 1

## Impact indicators
- Eutrophication marine: 3.48136e-5
- Ecotoxicity, freshwater: 0.263827
- Land use: 0.229192
- Water use: 0.0176562
- Resource use, minerals and metals: 1.51086e-7
- Resource use, fossils: 0.931864
- Climate change: 0.0540891
- Ozone depletion: 3.77968e-11
- Human toxicity, cancer: 4.55103e-11
- Human toxicity, non-cancer: 2.36009e-10
- EF-particulate Matter: 2.32717e-9
- Ionising radiation, human health: 0.0214415
- Photochemical ozone formation - human health: 0.000100533
- Acidification: 0.000180431
- Eutrophication, terrestrial: 0.000370802
- Eutrophication, freshwater: 6.30177e-7

## Deviations from the LCI method principle
The background data use the \xe2\x80\x9cRecycled content cut-off\xe2\x80\x9d approach to allocate end-of-life by-products and secondary materials. This allocation is explained in the description of the recycled content system model (http://www.ecoinvent.org/database/system-models-in-ecoinvent-3/cut-off-system-model/allocation-cut-off-by-classification.html).

## Deviations from the LCI method approaches
Background data:
- the \xe2\x80\x9cRecycled content cut-off\xe2\x80\x9d approach to allocate end-of-life by-products and secondary materials. This allocation is explained in the description of the recycled content system model (http://www.ecoinvent.org/database/system-models-in-ecoinvent-3/cut-off-system-model/allocation-cut-off-by-classification.html). The ecoinvent database mostly relies on “Allocation – market values” apart for few exceptions particularly in the energy sector. ecoinvent energy data is replaced with EF3.0 core data as per the EF guidelines version 2.0.
OR
- EF compliant data

## Modelling constants
All modelling constants follow the requirements listed in the Tender Specifications ENV.B.1/SER/2016/0038vl. Completeness: All known environmental flows are included. All known resource uses and emissions are listed in the inventory. Water use: water use is modelled at country level using separate flows for water withdrawal, water release and water evaporation. Cut-off: All known environmental flows are included. All known resource uses and emissions are listed in the inventory. Handling multi-functional processes: the following PEF multi- functionality decision hierarchy is applied for resolving all multi- functionality problems: (1) subdivision or system expansion; (2) allocation based on a relevant underlying physical relationship (substitution may apply here); (3) allocation based on some other relationship. Direct land use change: GHG emissions from direct LUC allocated to good/service for 20 years after the LUC occurs, with IPCC default values. Carbon storage and delayed emissions: credits associated with temporary (carbon) storage or delayed emissions up to 300 years are not be considered. Emissions off-setting: are not included. Capital goods (including infrastructures) and their End of life: they are included. System boundaries: system boundaries include all processes linked to the product supply chain (e.g. maintenance). Time period: emissions and removals are modelled as if released or removed at the beginning of the assessment method. Fossil and biogenic carbon emissions and removals: removals and emissions are modelled as follows: All GHG emissions from fossil fuels (including peat and limestone) are modelled consistently with the most updated ILCD list of elementary flows. The non-fossil (biogenic) carbon flows are modelled consistently with the most updated ILCD list of elementary flows.

## Cut-off and completeness
All known environmental flows are included. All known resource uses and emissions are listed in the inventory. The dataset dry mass balance has been checked to ensure the inventory is complete. Capital goods (e.g. infrastructure) and their end-of-life are included.

## Data selection and combination
These datasets include, in both their foreground and background data, links to EF3.0 compliant data.
The relevant background data on energy, transport, and End of Life are from the LCDN data node (http://lcdn.thinkstep.com/Node/).
All other background data in the supply of this product for which no EF3.0 process was available are from ecoinvent v3.7 database (www.ecoinvent.org) or other data sources.

## Data treatment and extrapolations
Several data sources have been used to model the inventory.

## Review details
Internal reviews have been asked to review the plausibility of the unit process, LCIA scores, and DQRs. Internal reviewers have also been asked to review the data for EF compliancy. The consortium is therefore responsible for aspects such as compliancy with the ILCD format, including validation in Look@LCI, and nomenclature.
Internal reviwers have been asked to judge based on the process name, that the unit process models in a complete and representative way the process in the requested location. The review encompassed the plausability of:
- exchanges with nature (elementary flows) as well as exchanges such as product and waste flows.
- meta information (general comment, technology comment, system boundaries, allocation, cut-off rules, etc.). Reviewers were asked to judge if the provided information is enough to understand the content of the process.
- LCIA scores
- DQRs including precision, technology, time and geography. As well as the overall DQR.
External reviewers have been asked to provide their expertise in the field of interest. External reviewers have been asked to review the unit process, including eventual methodological choices, the LCIA scores (provided with contribution scores as well), and DQRs. External reviewers have been provided all the information in a tool developed by the consortium for the purpose of this project.
External reviewers have been asked to judge based on the process name, that the unit process models in a complete and representative way the process in the requested location. The review encompassed:
- Plausability and completeness of exchanges with nature (elementary flows) as well as exchanges such as product and waste flows.
- Review of meta information (general comment, technology comment, system boundaries, allocation, cut-off rules, etc.). Reviewers were asked to judge if the provided information is enough to understand the content of the process.
- Review of properties (biogenic carbon and water content).
- Review of allocation keys.
- Plausability of LCIA scores calculated by the consortium.
- Plausability of DQRs including precision, technology, time and geography. As well as the overall DQR.

## Data sources
- Background Data for Representative products and organisations. EF 3.0 compliant (data stock)
- UN Data (2018) Statistics Data for Lubricants Productions, http://data.un.org/Data.aspx?q=Lubricants&d=EDATA&f=cmID%3aLU, United Nations Statistics Division, Global.
- Cotex (2021) Stitch Bonding Machine, Catalog and Company Email, Suzhou Cotex International Co., Ltd., China.
- Mustafa Sabri Ozen, Erhan Sancak, Mehmet Akalin (2015). The effect of needle-punched nonwoven fabric thickness on electromagnetic shielding effectiveness. Textile Research Journal, United Kingdom
- Yarun (2020) Primary Backing, http://www.yrunfabric.com/pinfo.php?title=Primary-Backing&mid=2&u=687, Yangzhou Yarun Fabric Co., Ltd., Yizheng, China https://www.domotex.de/product/primary-backing/204373/K616779
- Sail (2021) Pre Needle Loom Machine, E-mail Company, Sail Nonwoven Machinery Co. Ltd., China
- Sail (2021) Main Needle Loom Machine, E-mail Company, Sail Nonwoven Machinery Co. Ltd., China

## Intended applications
Implementation of regular Product Environmental Footprint (PEF) studies and Organisation Environmental Footprint (OEF) studies exclusively under the specified Product groups and sectors as defined in the Product Environmental Footprint Category Rules (PEFCR) and Organisation Environmental Footprint Sectorial Rules (OEFSR) listed in http://ec.europa.eu/environment/eussd/smgp/PEFCR_OEFSR.htm
