# pvc leather production; technology mix; at plant; PVC leather of thickness 1.6 mm (PVC foam 1mm (0.41 g/cm3), Cotton backing of 0.5 mm (1 g/cm3), and PVC veneer of 0.1 mm (1.23g/cm3))

Dataset: ILCD process, Partly terminated system
Geography: GLO
Reference year: 2019
Valid until: 2024
Classification: Systems / Textiles, furnitures and other interiors
LCI method principle: Attributional
LCI method approaches: Allocation - market value
Completeness: All relevant flows quantified
Project: Provision of process-based 3.0 Environmental Footprint-compliant life cycle inventory datasets - Apparel 1 - contract number 070201/2020/840291/SER/ENV.B.1
Generated by: PRé Sustainability B.V.
Owner: PRé Sustainability B.V.
Compliance: ILCD Data Network - Entry-level; Suggestions for updating the PEF method 2019; ISO 14040 Environmental Management – Life Cycle Assessment – Principles and Framework, 2006; ISO 14044:2006. Environmental Management – Life Cycle Assessment – Requirements and guidelines.; Environmental Footprint 3.1
Review: Dependent internal review by Avraam Symeonidis, Marisa Vieira; Independent review panel by Madhuri Nigam
Data quality: Overall quality: Good; Time representativeness: Very good; Geographical representativeness: Good; Technological representativeness: Good; Precision: Very good; Methodological appropriateness and consistency: Not applicable
Amounts: no units in this file; such an amount is in the reference unit of its flow, which a separate flow dataset defines
copyright: true
licenseType: Free of charge for some user types or use types
accessRestrictions: Free of charge for all final users implementing a regular Product Environmental Footprint (PEF) studies and Organisation Environmental Footprint (OEF) studies exclusively under the specified Product groups and sectors as defined in the Product Environmental Footprint Category Rules (PEFCR) and Organisation Environmental Footprint Sectorial Rules (OEFSR) listed in http://ec.europa.eu/environment/eussd/smgp/PEFCR_OEFSR.htm and in accordance with the terms and conditions of the EULA (available at https://ecoinvent.lca-data.com/) exclusively until 31st December 2024. Any use of this dataset or any derivative data not within the specific context of one of the PEF/OEF projects or after the end of 2024 is not permitted.

## General comment
Notice: this data set supersedes the EF3.0-compliant version (see link under "preceding data set version" below calculated with the EF3.0). The life cycle inventory is not changed from the original EF3.0 data set. The LCIA results are calculated based on the EF3.1 methods which provide updated characterisation factors in the following impact categories: Climate Change, Ecotoxicity freshwater, Photochemical Ozone Formation, Acidification, Human Toxicity non-cancer, and Human Toxicity cancer. The review report and the data quality ratings refer to the original results. The data set has been updated by the European Commission on the basis of the original EF3.0 data set delivered by the data provider.# Density
Considering a foam PVC layer of 1mm (0.41 g/cm3) and PVC veneer of 0.1 mm (1.23g/cm3), and a knit-cotton backing of around 120 grams per square metre, based on a light weight fabric for the backing (based on Luke, at Hero and Villain Style, 2020). Gives a final leather density of around 650 gsm. Density of foam PVC layer Based on blow ratio of 2:1 for foam layer (Fine and Harrington, 1982), thickness estimates (Gurera and Bhushan, 2018), and other estimates based on Grossman, 2008, n. Table 7.13; Luke, at Hero and Villain Style, 2020.

# Energy usage
Based on data from online assembly line manufacturers.
Assumptions: 1300 kg/h production. 160 KW motor power consumption, two 30 kW high-temperature continuous ovens. Gives 792 MJ for each 1300 kg of vinyl leather produced.
Electricity models assigned based on 2016-19 market share from as recorded by OEC, 2021

Modelled based on PVC leather manufacturers, and manufacturers of machinery for PVC leather, including websites, reference sheets, and video recordings inside factories. See references below

# References:
Henan Kruger Rango Machinery, 2021. Multi Temperature Control System Conveyor Tunnel Hot Air Curing Drying Oven on Alibaba.com [WWW Document]. URL https://www.alibaba.com/product-detail/Multi-temperature-control-system-Conveyor-Tunnel_1600157931187.html?spm=a2700.galleryofferlist.normal_offer.d_image.743c47afEPmUkG (accessed 8.6.21).
JWELL Intelligent Machinery Co.,Ltd, 2021. PVC Homoegeneous LVT SPC WPC Floor Extrusion Line - China JWELL Intelligent Machinery Co.,Ltd [WWW Document]. ecplaza.net. URL https://www.ecplaza.net/products/pvc-homoegeneous-lvt-spc-wpc-floor_4513514 (accessed 8.6.21).
OEC, 2021, "Plastic Coated Textile Fabric (HS: 5903) Product Trade, Exporters and Importers | OEC - The Observatory of Economic Complexity", https://oec.world/en/profile/hs92/plastic-coated-textile-fabric (accessed 8.6.21)
Patel Engineers, 2019. 3 station syntheic leather production process.
Productions MAJ, Inc., Discovery Channel, 2008. Synthetic Leather - How It’s Made.
Suzhou TUE HI-TECH Nonwoven Machinery Co., Ltd, n.d. Nonwoven Pu/pvc Artificial Leather Substrate Coating Production Line on Alibaba.com [WWW Document]. URL https://www.alibaba.com/product-detail/Leather-Production-Line-TUE-Nonwoven-Pu_60473712388.html?spm=a2700.7724857.normal_offer.d_title.7f3cf046KSlCnj&s=p (accessed 8.6.21).

## Technology and included processes
Includes:
- Electrical energy (grid mix based on production of plastic coated texitiles, OEC, 2019)
- Machinery on production line (a typical 200 t line, using textile machinery as a proxy)
- Waste (landfill of plastic waste), based on estimates of off-cuts from film evidence

Does not include:
- Water use, due to lack of data
- Direct emissions to air/water from PVC leather production facility itself, due to lack of data

## Parameters
- kg_0: 0.000879192
  Mass in kg, for textile, non-woven polyester; Transoceanic ship, containers; GLO
- km_0: 132710
  Distance in km, for textile, non-woven polyester; Transoceanic ship, containers; GLO
- kg_km_0: 116.678; = kg_0*km_0
  Transport amount in km*km, for textile, non-woven polyester; Transoceanic ship, containers; GLO
- kg_1: 0.000879192
  Mass in kg, for textile, non-woven polyester; Articulated lorry transport, Total weight <7.5 t, mix Euro 0-5; EU+EFTA+UK
- km_1: 2713.21
  Distance in km, for textile, non-woven polyester; Articulated lorry transport, Total weight <7.5 t, mix Euro 0-5; EU+EFTA+UK
- kg_km_1: 2.38543; = kg_1*km_1
  Transport amount in km*km, for textile, non-woven polyester; Articulated lorry transport, Total weight <7.5 t, mix Euro 0-5; EU+EFTA+UK
- kg_2: 0.000879192
  Mass in kg, for textile, non-woven polyester; Articulated lorry transport, Euro 4, Total weight >32 t; EU+EFTA+UK
- km_2: 12295.9
  Distance in km, for textile, non-woven polyester; Articulated lorry transport, Euro 4, Total weight >32 t; EU+EFTA+UK
- kg_km_2: 10.8105; = kg_2*km_2
  Transport amount in km*km, for textile, non-woven polyester; Articulated lorry transport, Euro 4, Total weight >32 t; EU+EFTA+UK
- kg_3: 0.000879192
  Mass in kg, for textile, non-woven polyester; Articulated lorry transport, Total weight >32 t, mix Euro 0-5; ROW w/o EU+EFTA
- km_3: 32451.3
  Distance in km, for textile, non-woven polyester; Articulated lorry transport, Total weight >32 t, mix Euro 0-5; ROW w/o EU+EFTA
- kg_km_3: 28.5309; = kg_3*km_3
  Transport amount in km*km, for textile, non-woven polyester; Articulated lorry transport, Total weight >32 t, mix Euro 0-5; ROW w/o EU+EFTA
- kg_4: 0.00020067
  Mass in kg, for textile, knit cotton; Transoceanic ship, containers; GLO
- km_4: 102607
  Distance in km, for textile, knit cotton; Transoceanic ship, containers; GLO
- kg_km_4: 20.5902; = kg_4*km_4
  Transport amount in km*km, for textile, knit cotton; Transoceanic ship, containers; GLO
- kg_5: 0.00020067
  Mass in kg, for textile, knit cotton; Articulated lorry transport, Total weight <7.5 t, mix Euro 0-5; EU+EFTA+UK
- km_5: 2097.77
  Distance in km, for textile, knit cotton; Articulated lorry transport, Total weight <7.5 t, mix Euro 0-5; EU+EFTA+UK
- kg_km_5: 0.420958; = kg_5*km_5
  Transport amount in km*km, for textile, knit cotton; Articulated lorry transport, Total weight <7.5 t, mix Euro 0-5; EU+EFTA+UK
- kg_6: 0.00020067
  Mass in kg, for textile, knit cotton; Articulated lorry transport, Euro 4, Total weight >32 t; EU+EFTA+UK
- km_6: 9506.82
  Distance in km, for textile, knit cotton; Articulated lorry transport, Euro 4, Total weight >32 t; EU+EFTA+UK
- kg_km_6: 1.90773; = kg_6*km_6
  Transport amount in km*km, for textile, knit cotton; Articulated lorry transport, Euro 4, Total weight >32 t; EU+EFTA+UK
- kg_7: 0.00020067
  Mass in kg, for textile, knit cotton; Articulated lorry transport, Total weight >32 t, mix Euro 0-5; ROW w/o EU+EFTA
- km_7: 25090.3
  Distance in km, for textile, knit cotton; Articulated lorry transport, Total weight >32 t, mix Euro 0-5; ROW w/o EU+EFTA
- kg_km_7: 5.03487; = kg_7*km_7
  Transport amount in km*km, for textile, knit cotton; Articulated lorry transport, Total weight >32 t, mix Euro 0-5; ROW w/o EU+EFTA
- kg_8: 0.00981625
  Mass in kg, for textile machinery; Articulated lorry transport, Euro 4, Total weight >32 t; EU+EFTA+UK
- km_8: 1000
  Distance in km, for textile machinery; Articulated lorry transport, Euro 4, Total weight >32 t; EU+EFTA+UK
- kg_km_8: 9.81625; = kg_8*km_8
  Transport amount in km*km, for textile machinery; Articulated lorry transport, Euro 4, Total weight >32 t; EU+EFTA+UK
- kg_9: 0.00981625
  Mass in kg, for textile machinery; Transoceanic ship, containers; GLO
- km_9: 18000
  Distance in km, for textile machinery; Transoceanic ship, containers; GLO
- kg_km_9: 176.693; = kg_9*km_9
  Transport amount in km*km, for textile machinery; Transoceanic ship, containers; GLO

## Reference product
- pvc leather // pvc leather production // glo: 1

## Inputs
- Electricity from Electricity grid mix 1kV-60kV - CN: 0.112855
- Electricity from Electricity grid mix 1kV-60kV - EU+EFTA+UK: 0.201255
- Electricity from Electricity grid mix 1kV-60kV - NZ: 0.0135045
- Electricity from Electricity grid mix 1kV-60kV - RAF: 0.000853015
- Electricity from Electricity grid mix 1kV-60kV - RAS w/o CN: 0.227866
- Electricity from Electricity grid mix 1kV-60kV - RNA: 0.0505958
- Electricity from Electricity grid mix 1kV-60kV - RSA: 0.00193009
- Transport of textile, non-woven polyester by Transoceanic ship, containers - GLO: 116.678; = kg_km_0
- Transport of textile, non-woven polyester by Articulated lorry transport, Total weight <7.5 t, mix Euro 0-5 - EU+EFTA+UK: 2.38543; = kg_km_1
- Transport of textile, non-woven polyester by Articulated lorry transport, Euro 4, Total weight >32 t - EU+EFTA+UK: 10.8105; = kg_km_2
- Transport of textile, non-woven polyester by Articulated lorry transport, Total weight >32 t, mix Euro 0-5 - ROW w/o EU+EFTA: 28.5309; = kg_km_3
- Transport of textile, knit cotton by Transoceanic ship, containers - GLO: 20.5902; = kg_km_4
- Transport of textile, knit cotton by Articulated lorry transport, Total weight <7.5 t, mix Euro 0-5 - EU+EFTA+UK: 0.420958; = kg_km_5
- Transport of textile, knit cotton by Articulated lorry transport, Euro 4, Total weight >32 t - EU+EFTA+UK: 1.90773; = kg_km_6
- Transport of textile, knit cotton by Articulated lorry transport, Total weight >32 t, mix Euro 0-5 - ROW w/o EU+EFTA: 5.03487; = kg_km_7
- Transport of textile machinery by Articulated lorry transport, Euro 4, Total weight >32 t - EU+EFTA+UK: 9.81625; = kg_km_8
- Transport of textile machinery by Transoceanic ship, containers - GLO: 176.693; = kg_km_9
- pvc leather // pvc leather production // glo, blackbox: 1
- pvc leather // pvc leather production // glo, elementary: 1

## Impact indicators
- Eutrophication marine: 0.00794733
- Ecotoxicity, freshwater: 59.7163
- Land use: 14.8369
- Water use: 4.09589
- Resource use, minerals and metals: 0.00283009
- Resource use, fossils: 39.0335
- Climate change: 2.51527
- Ozone depletion: 2.53897e-7
- Human toxicity, cancer: 2.9067e-9
- Human toxicity, non-cancer: 2.58941e-8
- EF-particulate Matter: 3.88403e-7
- Ionising radiation, human health: 0.0817576
- Photochemical ozone formation - human health: 0.0116383
- Acidification: 0.0184556
- Eutrophication, terrestrial: 0.0469844
- Eutrophication, freshwater: 0.000429744

## Deviations from the LCI method principle
The background data uses:
- the \xe2\x80\x9cRecycled content cut-off\xe2\x80\x9d approach to allocate end-of-life by-products and secondary materials. This allocation is explained in the description of the recycled content system model (http://www.ecoinvent.org/database/system-models-in-ecoinvent-3/cut-off-system-model/allocation-cut-off-by-classification.html).
OR
- EF compliant data

## Deviations from the LCI method approaches
Background data:
- the \xe2\x80\x9cRecycled content cut-off\xe2\x80\x9d approach to allocate end-of-life by-products and secondary materials. This allocation is explained in the description of the recycled content system model (http://www.ecoinvent.org/database/system-models-in-ecoinvent-3/cut-off-system-model/allocation-cut-off-by-classification.html). The ecoinvent database mostly relies on “Allocation – market values” apart for few exceptions particularly in the energy sector. ecoinvent energy data is replaced with EF3.0 core data as per the EF guidelines version 2.0.
OR
- EF compliant data

## Modelling constants
All modelling constants follow the requirements listed in the Tender Specifications 070201/2020/SER/ENV.B1. Completeness: There are no intentional cut-offs in the inventory no matter how small their contribution to all the EF impact categories is. Eventual cut-offs are in compliance with the Guide for EF compliant data sets (JRC 2020), i.e. only if below the 3% cut-off rule. Water use: water use is modelled at country level using separate flows for water withdrawal, water release and water evaporation. Handling multi-functional processes: the following PEF multi- functionality decision hierarchy is applied for resolving all multi- functionality problems: (1) subdivision or system expansion; (2) allocation based on a relevant underlying physical relationship (substitution may apply here); (3) allocation based on some other relationship. Direct land use change: GHG emissions from direct LUC allocated to good/service for 20 years after the LUC occurs, with IPCC default values. Carbon storage and delayed emissions: credits associated with temporary (carbon) storage or delayed emissions up to 300 years are not be considered. Emissions off-setting: are not included. Capital goods (including infrastructures) and their End of life: they are included. System boundaries: system boundaries include all processes linked to the product supply chain (e.g. maintenance). Time period: emissions and removals are modelled as if released or removed at the beginning of the assessment method. Fossil and biogenic carbon emissions and removals: removals and emissions are modelled as follows: All GHG emissions from fossil fuels (including peat and limestone) are modelled consistently with the most updated ILCD list of elementary flows. The non-fossil (biogenic) carbon flows are modelled consistently with the most updated ILCD list of elementary flows.

## Cut-off and completeness
There are no intentional cut-offs in the inventory no matter how small their contribution to all the EF impact categories is. Eventual cut-offs are in compliance with the Guide for EF compliant data sets (JRC 2020), i.e. only if below the 3% cut-off rule. The dataset dry mass and water balance has been checked to ensure the inventory is complete. Capital goods (e.g. infrastructure) and their end-of-life are included.

## Data selection and combination
These datasets include, in both their foreground and background data, links to EF3.0 compliant data.
The relevant background data on energy, transport, and End of Life are from the LCDN data node (http://lcdn.thinkstep.com/Node/).
All other background data in the supply of this product for which no EF3.0 process was available are from ecoinvent v3.7 database (www.ecoinvent.org) or other data sources.

## Data treatment and extrapolations
Several data sources have been used to model the inventory.

## Review details
Internal reviews have been asked to review the plausibility of the unit process, LCIA scores, and DQRs. Internal reviewers have also been asked to review the data for EF compliancy. The consortium is therefore responsible for aspects such as compliancy with the ILCD format, including validation in Look@LCI, and nomenclature.
Internal reviwers have been asked to judge based on the process name, that the unit process models in a complete and representative way the process in the requested location. The review encompassed the plausability of:
- exchanges with nature (elementary flows) as well as exchanges such as product and waste flows.
- meta information (general comment, technology comment, system boundaries, allocation, cut-off rules, etc.). Reviewers were asked to judge if the provided information is enough to understand the content of the process.
- LCIA scores
- DQRs including precision, technology, time and geography. As well as the overall DQR.
External reviewers have been asked to provide their expertise in the field of interest. External reviewers have been asked to review the unit process, including eventual methodological choices, the LCIA scores (provided with contribution scores as well), and DQRs. External reviewers have been provided all the information in a tool developed by the consortium for the purpose of this project.
External reviewers have been asked to judge based on the process name, that the unit process models in a complete and representative way the process in the requested location. The review encompassed:
- Plausability and completeness of exchanges with nature (elementary flows) as well as exchanges such as product and waste flows.
- Review of meta information (general comment, technology comment, system boundaries, allocation, cut-off rules, etc.). Reviewers were asked to judge if the provided information is enough to understand the content of the process.
- Review of properties (biogenic carbon and water content).
- Review of allocation keys.
- Plausability of LCIA scores calculated by the consortium.
- Plausability of DQRs including precision, technology, time and geography. As well as the overall DQR.

## Data sources
- Background Data for Representative products and organisations. EF 3.0 compliant (data stock)
- Doma, A.S., Hassan, H.H., 2019. The Vulcanization Characteristics and Physical Properties of Carbon Black Loaded–Polymeric Composites: I. N-220 Black Loaded PVC/EPDM Composites. Am. J. Chem. 9, 103–108.
- Fine, J., Harrington, G.N., 1982. Production of synthetic leather.
- Grossman, R.F., 2008. Handbook of Vinyl Formulating. John Wiley & Sons.
- Gurera, D., Bhushan, B., 2018. Fabrication of Bioinspired Superliquiphobic Synthetic Leather with Self-Cleaning and Low Adhesion. Colloids Surf. Physicochem. Eng. Asp. 545. https://doi.org/10.1016/j.colsurfa.2018.02.052
- Henan Kruger Rango Machinery, 2021. Multi Temperature Control System Conveyor Tunnel Hot Air Curing Drying Oven on Alibaba.com [WWW Document]. URL https://www.alibaba.com/product-detail/Multi-temperature-control-system-Conveyor-Tunnel_1600157931187.html?spm=a2700.galleryofferlist.normal_offer.d_image.743c47afEPmUkG (accessed 8.6.21).
- JWELL Intelligent Machinery Co.,Ltd, 2021. PVC Homoegeneous LVT SPC WPC Floor Extrusion Line - China JWELL Intelligent Machinery Co.,Ltd [WWW Document]. ecplaza.net. URL https://www.ecplaza.net/products/pvc-homoegeneous-lvt-spc-wpc-floor_4513514 (accessed 8.6.21).
- Kroushl, P., 2004. The Flame Retarding and Smoke Suppression of Flexible PVC.
- Nguyen, T.D., Nguyen, C.T., Tran, V.T.T., Nguyen, G.V., Le, H.V., Tran, L.D., Bach, G.L., Thai, H., 2018. Enhancement of the Thermomechanical Properties of a Fly Ash- and Carbon Black-Filled Polyvinyl Chloride Composite by Using Epoxidized Soybean Oil as a Secondary Bioplasticizer. Int. J. Polym. Sci. 2018, 1–8. https://doi.org/10.1155/2018/8428736
- OEC, 2021, "Plastic Coated Textile Fabric (HS: 5903) Product Trade, Exporters and Importers | OEC - The Observatory of Economic Complexity", https://oec.world/en/profile/hs92/plastic-coated-textile-fabric (accessed 8.6.21)

## Intended applications
Implementation of regular Product Environmental Footprint (PEF) studies and Organisation Environmental Footprint (OEF) studies exclusively under the specified Product groups and sectors as defined in the Product Environmental Footprint Category Rules (PEFCR) and Organisation Environmental Footprint Sectorial Rules (OEFSR) listed in http://ec.europa.eu/environment/eussd/smgp/PEFCR_OEFSR.htm
