# rubber, foamed, fossil fuel-based; technology mix; production mix, at plant; 1 kg

Dataset: ILCD process, Partly terminated system
Geography: GLO
Reference year: 2021
Valid until: 2024
Classification: Systems / Textiles, furnitures and other interiors
LCI method principle: Attributional
LCI method approaches: Allocation - market value
Completeness: All relevant flows quantified
Project: Provision of process-based 3.0 Environmental Footprint-compliant life cycle inventory datasets - Apparel 1 - contract number 070201/2020/840291/SER/ENV.B.1
Generated by: Life Cycle Indonesia
Owner: PRé Sustainability B.V.
Compliance: ILCD Data Network - Entry-level; Suggestions for updating the PEF method 2019; ISO 14040 Environmental Management – Life Cycle Assessment – Principles and Framework, 2006; ISO 14044:2006. Environmental Management – Life Cycle Assessment – Requirements and guidelines.; Environmental Footprint 3.1
Review: Dependent internal review by Avraam Symeonidis, Emilia Moreno Ruiz; Independent review panel by Philippa Notten
Data quality: Overall quality: Good; Time representativeness: Very good; Geographical representativeness: Good; Technological representativeness: Good; Precision: Good; Methodological appropriateness and consistency: Not applicable
Amounts: no units in this file; such an amount is in the reference unit of its flow, which a separate flow dataset defines
copyright: true
licenseType: Free of charge for some user types or use types
accessRestrictions: Free of charge for all final users implementing a regular Product Environmental Footprint (PEF) studies and Organisation Environmental Footprint (OEF) studies exclusively under the specified Product groups and sectors as defined in the Product Environmental Footprint Category Rules (PEFCR) and Organisation Environmental Footprint Sectorial Rules (OEFSR) listed in http://ec.europa.eu/environment/eussd/smgp/PEFCR_OEFSR.htm and in accordance with the terms and conditions of the EULA (available at https://ecoinvent.lca-data.com/) exclusively until 31st December 2024. Any use of this dataset or any derivative data not within the specific context of one of the PEF/OEF projects or after the end of 2024 is not permitted.

## General comment
Notice: this data set supersedes the EF3.0-compliant version (see link under "preceding data set version" below calculated with the EF3.0). The life cycle inventory is not changed from the original EF3.0 data set. The LCIA results are calculated based on the EF3.1 methods which provide updated characterisation factors in the following impact categories: Climate Change, Ecotoxicity freshwater, Photochemical Ozone Formation, Acidification, Human Toxicity non-cancer, and Human Toxicity cancer. The review report and the data quality ratings refer to the original results. The data set has been updated by the European Commission on the basis of the original EF3.0 data set delivered by the data provider.Foam rubber, also called Sponge Rubber, or Latex Foam, flexible, porous substance made from a natural or synthetic latex compounded with various ingredients and whipped into a froth. There are two basic types of foam, Flexible and Rigid Foam. This model covered the production of flexible polyurethane foams, which are used for vibration control and shock absorption. They provide increased energy absorption with increased density, predictable performance under compressive force, and low permanent deformation under constant resistance. These foams won’t become wider when compressed, which makes them a good choice when space is tight. Applications include cushioning for furniture and automobiles, hood gaskets in mobile equipment, shock absorbers for industrial machinery, vibration isolators for appliances, mattresses and pillows, automotive trim, and shoe soling.

Foam rubber uses a blowing agent, typically a gas or a chemical that produces a gas, to create a mass of small bubbles in a liquid mixture. This mixture may contain polyols, polyisocyanates, water, and additives By using specific types and combinations of liquid polymers, a material compounder can create foam rubber that is either flexible or rigid. During polymerization, molecules from the polyols and polyisocyanates crosslink to form three-dimensional structures. The importance of blowing agents in the production of foam rubber cannot be overstated because of their relationship to flexibility and rigidity. Typically, flexible foams use the carbon dioxide gas formed by the reaction of water with the polyisocynate.

Britannica, T. Editors of Encyclopaedia (1998, July 20). foam rubber. Encyclopedia Britannica. https://www.britannica.com/science/foam-rubber
Melito, Steve (2020) Foam Rubber vs. Sponge Rubber: What’s the Difference?. Elasto Proxy. https://www.elastoproxy.com/foam-rubber-vs-sponge-rubber/
Sheppard, Laurel (1999) Foam Rubber. How Product Are Made Volume 5. http://www.madehow.com/Volume-5/Foam-Rubber.html

## Technology and included processes
The model is based on Flexible rubber Foam (Polyurethane) production, the energy and infrastructure modelled based on a continuous production line.
The process begins when the liquid chemicals are delivered either by railroad tanker cars or tank trucks and pumped into large holding tanks. From there, the chemicals are pumped into smaller heated mixing tanks, and are kept separate if they react with each other. For continuous manufacture of foam such as slabstock, more than two monomer streams are typically used. Continuous dispensing (also called open pouring or free-rise) is used in the production of rigid and flexible low-density foams. A specific amount of each chemical, measured by metered pumps, is fed from the mixing tanks into a mixing head, where the blending of the chemicals take place. The reactive components are poured onto a moving surface or conveyor belt, where the foam rises and cures to form slabstock. As the foam moves toward the end of the conveyor belt, it is automatically cut by a horizontal bandsaw into smaller pieces, usually 12 ft (3.66 m) long sections. After cutting, the foam sections are cured at room temperature for 12 hours or more. They are not stacked since they are not firm enough to withstand any weight. After curing, a second automatic bandsaw cuts the sections into the desired thickness. Other shapes can also be cut.

The activity starts when the material enter the process. Raw materials, auxiliary chemicals, energy uses, and infrastructure are included in the model. There is no direct emission to soil, water, and air as the the energy used solely from the electricity. While the hazardous waste comes from waste lube oil. The consumption of lubricating oil using a thermalbonding machine as a proxy.

Melito, Steve (2020) Foam Rubber vs. Sponge Rubber: What’s the Difference?. Elasto Proxy. https://www.elastoproxy.com/foam-rubber-vs-sponge-rubber/
Sheppard, Laurel (1999) Foam Rubber. How Product Are Made Volume 5. http://www.madehow.com/Volume-5/Foam-Rubber.html

## Parameters
- kg_0: 0.670916
  Mass in kg, for polyether polyols (long chain) // polyether polyols (long chain) production // glo; Articulated lorry transport, Euro 4, Total weight >32 t; EU+EFTA+UK
- km_0: 1000
  Distance in km, for polyether polyols (long chain) // polyether polyols (long chain) production // glo; Articulated lorry transport, Euro 4, Total weight >32 t; EU+EFTA+UK
- kg_km_0: 670.916; = kg_0*km_0
  Transport amount in km*km, for polyether polyols (long chain) // polyether polyols (long chain) production // glo; Articulated lorry transport, Euro 4, Total weight >32 t; EU+EFTA+UK
- kg_1: 0.24153
  Mass in kg, for methylene diphenyldiisocyanate // methylene diphenyldiisocyanate production // glo; Articulated lorry transport, Euro 4, Total weight >32 t; EU+EFTA+UK
- km_1: 1000
  Distance in km, for methylene diphenyldiisocyanate // methylene diphenyldiisocyanate production // glo; Articulated lorry transport, Euro 4, Total weight >32 t; EU+EFTA+UK
- kg_km_1: 241.53; = kg_1*km_1
  Transport amount in km*km, for methylene diphenyldiisocyanate // methylene diphenyldiisocyanate production // glo; Articulated lorry transport, Euro 4, Total weight >32 t; EU+EFTA+UK
- kg_2: 0.0155149
  Mass in kg, for triethanolamine // triethanolamine production // glo; Articulated lorry transport, Euro 4, Total weight >32 t; EU+EFTA+UK
- km_2: 1000
  Distance in km, for triethanolamine // triethanolamine production // glo; Articulated lorry transport, Euro 4, Total weight >32 t; EU+EFTA+UK
- kg_km_2: 15.5149; = kg_2*km_2
  Transport amount in km*km, for triethanolamine // triethanolamine production // glo; Articulated lorry transport, Euro 4, Total weight >32 t; EU+EFTA+UK
- kg_3: 0.0075478
  Mass in kg, for silicone, fossil fuel-based // silicone production // glo; Articulated lorry transport, Euro 4, Total weight >32 t; EU+EFTA+UK
- km_3: 1000.29
  Distance in km, for silicone, fossil fuel-based // silicone production // glo; Articulated lorry transport, Euro 4, Total weight >32 t; EU+EFTA+UK
- kg_km_3: 7.55; = kg_3*km_3
  Transport amount in km*km, for silicone, fossil fuel-based // silicone production // glo; Articulated lorry transport, Euro 4, Total weight >32 t; EU+EFTA+UK
- kg_4: 2.83289e-8
  Mass in kg, for lubricating oil // lubricants at refinery // cn; Articulated lorry transport, Euro 4, Total weight >32 t; EU+EFTA+UK
- km_4: 1000
  Distance in km, for lubricating oil // lubricants at refinery // cn; Articulated lorry transport, Euro 4, Total weight >32 t; EU+EFTA+UK
- kg_km_4: 2.83289e-5; = kg_4*km_4
  Transport amount in km*km, for lubricating oil // lubricants at refinery // cn; Articulated lorry transport, Euro 4, Total weight >32 t; EU+EFTA+UK
- kg_5: 6.80867e-9
  Mass in kg, for lubricating oil // lubricants at refinery // raf; Articulated lorry transport, Euro 4, Total weight >32 t; EU+EFTA+UK
- km_5: 1000
  Distance in km, for lubricating oil // lubricants at refinery // raf; Articulated lorry transport, Euro 4, Total weight >32 t; EU+EFTA+UK
- kg_km_5: 6.80867e-6; = kg_5*km_5
  Transport amount in km*km, for lubricating oil // lubricants at refinery // raf; Articulated lorry transport, Euro 4, Total weight >32 t; EU+EFTA+UK
- kg_6: 1.78424e-7
  Mass in kg, for lubricating oil // lubricants at refinery // ras w/o cn; Articulated lorry transport, Euro 4, Total weight >32 t; EU+EFTA+UK
- km_6: 1000
  Distance in km, for lubricating oil // lubricants at refinery // ras w/o cn; Articulated lorry transport, Euro 4, Total weight >32 t; EU+EFTA+UK
- kg_km_6: 0.000178424; = kg_6*km_6
  Transport amount in km*km, for lubricating oil // lubricants at refinery // ras w/o cn; Articulated lorry transport, Euro 4, Total weight >32 t; EU+EFTA+UK
- kg_7: 1.39274e-7
  Mass in kg, for lubricating oil // lubricants at refinery // rna; Articulated lorry transport, Euro 4, Total weight >32 t; EU+EFTA+UK
- km_7: 1000
  Distance in km, for lubricating oil // lubricants at refinery // rna; Articulated lorry transport, Euro 4, Total weight >32 t; EU+EFTA+UK
- kg_km_7: 0.000139274; = kg_7*km_7
  Transport amount in km*km, for lubricating oil // lubricants at refinery // rna; Articulated lorry transport, Euro 4, Total weight >32 t; EU+EFTA+UK
- kg_8: 1.65961e-8
  Mass in kg, for lubricating oil // lubricants at refinery // rsa; Articulated lorry transport, Euro 4, Total weight >32 t; EU+EFTA+UK
- km_8: 1000
  Distance in km, for lubricating oil // lubricants at refinery // rsa; Articulated lorry transport, Euro 4, Total weight >32 t; EU+EFTA+UK
- kg_km_8: 1.65961e-5; = kg_8*km_8
  Transport amount in km*km, for lubricating oil // lubricants at refinery // rsa; Articulated lorry transport, Euro 4, Total weight >32 t; EU+EFTA+UK
- kg_9: 1.47541e-7
  Mass in kg, for lubricating oil // lubricants at refinery // ru; Articulated lorry transport, Euro 4, Total weight >32 t; EU+EFTA+UK
- km_9: 1000
  Distance in km, for lubricating oil // lubricants at refinery // ru; Articulated lorry transport, Euro 4, Total weight >32 t; EU+EFTA+UK
- kg_km_9: 0.000147541; = kg_9*km_9
  Transport amount in km*km, for lubricating oil // lubricants at refinery // ru; Articulated lorry transport, Euro 4, Total weight >32 t; EU+EFTA+UK
- kg_10: 9.08835e-8
  Mass in kg, for lubricating oil // lubricants at refinery // eu+efta+uk; Articulated lorry transport, Euro 4, Total weight >32 t; EU+EFTA+UK
- km_10: 1000.18
  Distance in km, for lubricating oil // lubricants at refinery // eu+efta+uk; Articulated lorry transport, Euro 4, Total weight >32 t; EU+EFTA+UK
- kg_km_10: 9.09e-5; = kg_10*km_10
  Transport amount in km*km, for lubricating oil // lubricants at refinery // eu+efta+uk; Articulated lorry transport, Euro 4, Total weight >32 t; EU+EFTA+UK
- kg_11: 9.08835e-8
  Mass in kg, for lubricating oil // lubricants at refinery // eu+efta+uk; Transoceanic ship, containers; GLO
- km_11: 18045.1
  Distance in km, for lubricating oil // lubricants at refinery // eu+efta+uk; Transoceanic ship, containers; GLO
- kg_km_11: 0.00164; = kg_11*km_11
  Transport amount in km*km, for lubricating oil // lubricants at refinery // eu+efta+uk; Transoceanic ship, containers; GLO
- kg_12: 0.670916
  Mass in kg, for polyether polyols (long chain) // polyether polyols (long chain) production // glo; Transoceanic ship, containers; GLO
- km_12: 18000
  Distance in km, for polyether polyols (long chain) // polyether polyols (long chain) production // glo; Transoceanic ship, containers; GLO
- kg_km_12: 12076.5; = kg_12*km_12
  Transport amount in km*km, for polyether polyols (long chain) // polyether polyols (long chain) production // glo; Transoceanic ship, containers; GLO
- kg_13: 0.24153
  Mass in kg, for methylene diphenyldiisocyanate // methylene diphenyldiisocyanate production // glo; Transoceanic ship, containers; GLO
- km_13: 18000
  Distance in km, for methylene diphenyldiisocyanate // methylene diphenyldiisocyanate production // glo; Transoceanic ship, containers; GLO
- kg_km_13: 4347.53; = kg_13*km_13
  Transport amount in km*km, for methylene diphenyldiisocyanate // methylene diphenyldiisocyanate production // glo; Transoceanic ship, containers; GLO
- kg_14: 0.0155149
  Mass in kg, for triethanolamine // triethanolamine production // glo; Transoceanic ship, containers; GLO
- km_14: 18000
  Distance in km, for triethanolamine // triethanolamine production // glo; Transoceanic ship, containers; GLO
- kg_km_14: 279.269; = kg_14*km_14
  Transport amount in km*km, for triethanolamine // triethanolamine production // glo; Transoceanic ship, containers; GLO
- kg_15: 0.0075478
  Mass in kg, for silicone, fossil fuel-based // silicone production // glo; Transoceanic ship, containers; GLO
- km_15: 18018.5
  Distance in km, for silicone, fossil fuel-based // silicone production // glo; Transoceanic ship, containers; GLO
- kg_km_15: 136; = kg_15*km_15
  Transport amount in km*km, for silicone, fossil fuel-based // silicone production // glo; Transoceanic ship, containers; GLO
- kg_16: 2.83289e-8
  Mass in kg, for lubricating oil // lubricants at refinery // cn; Transoceanic ship, containers; GLO
- km_16: 18000
  Distance in km, for lubricating oil // lubricants at refinery // cn; Transoceanic ship, containers; GLO
- kg_km_16: 0.000509921; = kg_16*km_16
  Transport amount in km*km, for lubricating oil // lubricants at refinery // cn; Transoceanic ship, containers; GLO
- kg_17: 6.80867e-9
  Mass in kg, for lubricating oil // lubricants at refinery // raf; Transoceanic ship, containers; GLO
- km_17: 18000
  Distance in km, for lubricating oil // lubricants at refinery // raf; Transoceanic ship, containers; GLO
- kg_km_17: 0.000122556; = kg_17*km_17
  Transport amount in km*km, for lubricating oil // lubricants at refinery // raf; Transoceanic ship, containers; GLO
- kg_18: 1.78424e-7
  Mass in kg, for lubricating oil // lubricants at refinery // ras w/o cn; Transoceanic ship, containers; GLO
- km_18: 18000
  Distance in km, for lubricating oil // lubricants at refinery // ras w/o cn; Transoceanic ship, containers; GLO
- kg_km_18: 0.00321162; = kg_18*km_18
  Transport amount in km*km, for lubricating oil // lubricants at refinery // ras w/o cn; Transoceanic ship, containers; GLO
- kg_19: 1.39274e-7
  Mass in kg, for lubricating oil // lubricants at refinery // rna; Transoceanic ship, containers; GLO
- km_19: 18000
  Distance in km, for lubricating oil // lubricants at refinery // rna; Transoceanic ship, containers; GLO
- kg_km_19: 0.00250693; = kg_19*km_19
  Transport amount in km*km, for lubricating oil // lubricants at refinery // rna; Transoceanic ship, containers; GLO
- kg_20: 1.65961e-8
  Mass in kg, for lubricating oil // lubricants at refinery // rsa; Transoceanic ship, containers; GLO
- km_20: 18000
  Distance in km, for lubricating oil // lubricants at refinery // rsa; Transoceanic ship, containers; GLO
- kg_km_20: 0.00029873; = kg_20*km_20
  Transport amount in km*km, for lubricating oil // lubricants at refinery // rsa; Transoceanic ship, containers; GLO
- kg_21: 1.47541e-7
  Mass in kg, for lubricating oil // lubricants at refinery // ru; Transoceanic ship, containers; GLO
- km_21: 18000
  Distance in km, for lubricating oil // lubricants at refinery // ru; Transoceanic ship, containers; GLO
- kg_km_21: 0.00265574; = kg_21*km_21
  Transport amount in km*km, for lubricating oil // lubricants at refinery // ru; Transoceanic ship, containers; GLO

## Reference product
- rubber, foamed, fossil fuel-based // rubber, foamed, fossil fuel-based // glo: 1

## Inputs
- Electricity from Electricity grid mix 1kV-60kV - AU: 0.0005
- Electricity from Electricity grid mix 1kV-60kV - EU+EFTA+UK: 0.0067
- Electricity from Electricity grid mix 1kV-60kV - NZ: 0.0001
- Electricity from Electricity grid mix 1kV-60kV - RAF: 0.0015
- Electricity from Electricity grid mix 1kV-60kV - RNA: 0.0098
- Electricity from Electricity grid mix 1kV-60kV - RSA: 0.0033
- Electricity from Electricity grid mix 1kV-60kV - RU: 0.002
- Transport of polyether polyols (long chain) // polyether polyols (long chain) production // glo by Articulated lorry transport, Euro 4, Total weight >32 t - EU+EFTA+UK: 670.916; = kg_km_0
- Transport of methylene diphenyldiisocyanate // methylene diphenyldiisocyanate production // glo by Articulated lorry transport, Euro 4, Total weight >32 t - EU+EFTA+UK: 241.53; = kg_km_1
- Transport of triethanolamine // triethanolamine production // glo by Articulated lorry transport, Euro 4, Total weight >32 t - EU+EFTA+UK: 15.5149; = kg_km_2
- Transport of silicone, fossil fuel-based // silicone production // glo by Articulated lorry transport, Euro 4, Total weight >32 t - EU+EFTA+UK: 7.55; = kg_km_3
- Transport of lubricating oil // lubricants at refinery // cn by Articulated lorry transport, Euro 4, Total weight >32 t - EU+EFTA+UK: 2.83289e-5; = kg_km_4
- Transport of lubricating oil // lubricants at refinery // raf by Articulated lorry transport, Euro 4, Total weight >32 t - EU+EFTA+UK: 6.80867e-6; = kg_km_5
- Transport of lubricating oil // lubricants at refinery // ras w/o cn by Articulated lorry transport, Euro 4, Total weight >32 t - EU+EFTA+UK: 0.000178424; = kg_km_6
- Transport of lubricating oil // lubricants at refinery // rna by Articulated lorry transport, Euro 4, Total weight >32 t - EU+EFTA+UK: 0.000139274; = kg_km_7
- Transport of lubricating oil // lubricants at refinery // rsa by Articulated lorry transport, Euro 4, Total weight >32 t - EU+EFTA+UK: 1.65961e-5; = kg_km_8
- Transport of lubricating oil // lubricants at refinery // ru by Articulated lorry transport, Euro 4, Total weight >32 t - EU+EFTA+UK: 0.000147541; = kg_km_9
- Transport of lubricating oil // lubricants at refinery // eu+efta+uk by Articulated lorry transport, Euro 4, Total weight >32 t - EU+EFTA+UK: 9.09e-5; = kg_km_10
- Transport of lubricating oil // lubricants at refinery // eu+efta+uk by Transoceanic ship, containers - GLO: 0.00164; = kg_km_11
- Transport of polyether polyols (long chain) // polyether polyols (long chain) production // glo by Transoceanic ship, containers - GLO: 12076.5; = kg_km_12
- Transport of methylene diphenyldiisocyanate // methylene diphenyldiisocyanate production // glo by Transoceanic ship, containers - GLO: 4347.53; = kg_km_13
- Transport of triethanolamine // triethanolamine production // glo by Transoceanic ship, containers - GLO: 279.269; = kg_km_14
- Transport of silicone, fossil fuel-based // silicone production // glo by Transoceanic ship, containers - GLO: 136; = kg_km_15
- Transport of lubricating oil // lubricants at refinery // cn by Transoceanic ship, containers - GLO: 0.000509921; = kg_km_16
- Transport of lubricating oil // lubricants at refinery // raf by Transoceanic ship, containers - GLO: 0.000122556; = kg_km_17
- Transport of lubricating oil // lubricants at refinery // ras w/o cn by Transoceanic ship, containers - GLO: 0.00321162; = kg_km_18
- Transport of lubricating oil // lubricants at refinery // rna by Transoceanic ship, containers - GLO: 0.00250693; = kg_km_19
- Transport of lubricating oil // lubricants at refinery // rsa by Transoceanic ship, containers - GLO: 0.00029873; = kg_km_20
- Transport of lubricating oil // lubricants at refinery // ru by Transoceanic ship, containers - GLO: 0.00265574; = kg_km_21
- Electricity from Electricity grid mix 1kV-60kV - CN: 0.0100685
- Electricity from Electricity grid mix 1kV-60kV - RAS w/o CN: 0.0110315
- rubber, foamed, fossil fuel-based // rubber, foamed, fossil fuel-based // glo, blackbox: 1
- rubber, foamed, fossil fuel-based // rubber, foamed, fossil fuel-based // glo, elementary: 1

## Impact indicators
- Eutrophication marine: 0.00768353
- Ecotoxicity, freshwater: 120.475
- Land use: 16.2493
- Water use: 3.78484
- Resource use, minerals and metals: 2.59614e-5
- Resource use, fossils: 81.0318
- Climate change: 3.9482
- Ozone depletion: 8.88069e-6
- Human toxicity, cancer: 2.78824e-8
- Human toxicity, non-cancer: 4.35439e-8
- EF-particulate Matter: 4.61948e-7
- Ionising radiation, human health: 0.147
- Photochemical ozone formation - human health: 0.0203774
- Acidification: 0.0291162
- Eutrophication, terrestrial: 0.0680055
- Eutrophication, freshwater: 0.000258523

## Deviations from the LCI method principle
The background data use the \xe2\x80\x9cRecycled content cut-off\xe2\x80\x9d approach to allocate end-of-life by-products and secondary materials. This allocation is explained in the description of the recycled content system model (http://www.ecoinvent.org/database/system-models-in-ecoinvent-3/cut-off-system-model/allocation-cut-off-by-classification.html).

## Deviations from the LCI method approaches
Background data:
- the \xe2\x80\x9cRecycled content cut-off\xe2\x80\x9d approach to allocate end-of-life by-products and secondary materials. This allocation is explained in the description of the recycled content system model (http://www.ecoinvent.org/database/system-models-in-ecoinvent-3/cut-off-system-model/allocation-cut-off-by-classification.html). The ecoinvent database mostly relies on “Allocation – market values” apart for few exceptions particularly in the energy sector. ecoinvent energy data is replaced with EF3.0 core data as per the EF guidelines version 2.0.
OR
- EF compliant data

## Modelling constants
All modelling constants follow the requirements listed in the Tender Specifications ENV.B.1/SER/2016/0038vl. Completeness: All known environmental flows are included. All known resource uses and emissions are listed in the inventory. Water use: water use is modelled at country level using separate flows for water withdrawal, water release and water evaporation. Cut-off: All known environmental flows are included. All known resource uses and emissions are listed in the inventory. Handling multi-functional processes: the following PEF multi- functionality decision hierarchy is applied for resolving all multi- functionality problems: (1) subdivision or system expansion; (2) allocation based on a relevant underlying physical relationship (substitution may apply here); (3) allocation based on some other relationship. Direct land use change: GHG emissions from direct LUC allocated to good/service for 20 years after the LUC occurs, with IPCC default values. Carbon storage and delayed emissions: credits associated with temporary (carbon) storage or delayed emissions up to 300 years are not be considered. Emissions off-setting: are not included. Capital goods (including infrastructures) and their End of life: they are included. System boundaries: system boundaries include all processes linked to the product supply chain (e.g. maintenance). Time period: emissions and removals are modelled as if released or removed at the beginning of the assessment method. Fossil and biogenic carbon emissions and removals: removals and emissions are modelled as follows: All GHG emissions from fossil fuels (including peat and limestone) are modelled consistently with the most updated ILCD list of elementary flows. The non-fossil (biogenic) carbon flows are modelled consistently with the most updated ILCD list of elementary flows.

## Cut-off and completeness
All known environmental flows are included. All known resource uses and emissions are listed in the inventory. The dataset dry mass balance has been checked to ensure the inventory is complete. Capital goods (e.g. infrastructure) and their end-of-life are included.

## Data selection and combination
These datasets include, in both their foreground and background data, links to EF3.0 compliant data.
The relevant background data on energy, transport, and End of Life are from the LCDN data node (http://lcdn.thinkstep.com/Node/).
All other background data in the supply of this product for which no EF3.0 process was available are from ecoinvent v3.7 database (www.ecoinvent.org) or other data sources.

## Data treatment and extrapolations
Several data sources have been used to model the inventory.

## Review details
Internal reviews have been asked to review the plausibility of the unit process, LCIA scores, and DQRs. Internal reviewers have also been asked to review the data for EF compliancy. The consortium is therefore responsible for aspects such as compliancy with the ILCD format, including validation in Look@LCI, and nomenclature.
Internal reviwers have been asked to judge based on the process name, that the unit process models in a complete and representative way the process in the requested location. The review encompassed the plausability of:
- exchanges with nature (elementary flows) as well as exchanges such as product and waste flows.
- meta information (general comment, technology comment, system boundaries, allocation, cut-off rules, etc.). Reviewers were asked to judge if the provided information is enough to understand the content of the process.
- LCIA scores
- DQRs including precision, technology, time and geography. As well as the overall DQR.
External reviewers have been asked to provide their expertise in the field of interest. External reviewers have been asked to review the unit process, including eventual methodological choices, the LCIA scores (provided with contribution scores as well), and DQRs. External reviewers have been provided all the information in a tool developed by the consortium for the purpose of this project.
External reviewers have been asked to judge based on the process name, that the unit process models in a complete and representative way the process in the requested location. The review encompassed:
- Plausability and completeness of exchanges with nature (elementary flows) as well as exchanges such as product and waste flows.
- Review of meta information (general comment, technology comment, system boundaries, allocation, cut-off rules, etc.). Reviewers were asked to judge if the provided information is enough to understand the content of the process.
- Review of properties (biogenic carbon and water content).
- Review of allocation keys.
- Plausability of LCIA scores calculated by the consortium.
- Plausability of DQRs including precision, technology, time and geography. As well as the overall DQR.

## Data sources
- Background Data for Representative products and organisations. EF 3.0 compliant (data stock)
- UN Data (2018) Statistics Data for Lubricants Productions, http://data.un.org/Data.aspx?q=Lubricants&d=EDATA&f=cmID%3aLU, United Nations Statistics Division, Global.
- Shuming Chen, Yang Jiang, Jing Chen, and Dengfeng Wang (2015). The Effects of Various Additive Components on the Sound Absorption Performances of Polyurethane Foams, doi:10.1155/2015/317561, Hindawi : Advances in Materials Science and Engineering, Changchun, China
- D&T Industry (2021) Horizontal Automatic Continuously Foaming Produced-Line, Hangzhou Fuyang D&T Industry Co., Ltd.http://en.dtfirm.com/product/64.html, Hangzhou Fuyang D&T Industry Co., Ltd., Hangzhou, China
- Lebon (2021) Nonwoven Oven Machine, Catalog and Company Messages, Qingdao Lebon Industry Co., Ltd., China

## Intended applications
Implementation of regular Product Environmental Footprint (PEF) studies and Organisation Environmental Footprint (OEF) studies exclusively under the specified Product groups and sectors as defined in the Product Environmental Footprint Category Rules (PEFCR) and Organisation Environmental Footprint Sectorial Rules (OEFSR) listed in http://ec.europa.eu/environment/eussd/smgp/PEFCR_OEFSR.htm
