# bleached kraft pulp, hardwood; technology mix; production mix, at plant; dry mass 0.9, carbon content, non-fossil 0.494

Dataset: ILCD process, Partly terminated system
Geography: EU+EFTA+UK
Reference year: 2020
Valid until: 2024
Classification: Materials production / Paper and cardboards
LCI method principle: Attributional
LCI method approaches: Allocation - market value
Completeness: All relevant flows quantified
Project: Provision of process-based 3.0 Environmental Footprint-compliant life cycle inventory datasets - Renewable materials - contract number 070201/2020/840085/SER/ENV.B.1
Generated by: EPIS
Owner: EPIS
Compliance: ILCD Data Network - Entry-level; Suggestions for updating the PEF method 2019; ISO 14040 Environmental Management – Life Cycle Assessment – Principles and Framework, 2006; ISO 14044:2006. Environmental Management – Life Cycle Assessment – Requirements and guidelines.; Environmental Footprint 3.1
Review: Dependent internal review by Marisa Vieira, Emilia Moreno Ruiz; Independent review panel by Michael Sturges
Data quality: Overall quality: Very good; Time representativeness: Very good; Geographical representativeness: Very good; Technological representativeness: Very good; Precision: Good; Methodological appropriateness and consistency: Not applicable
Amounts: no units in this file; such an amount is in the reference unit of its flow, which a separate flow dataset defines
copyright: true
licenseType: Free of charge for some user types or use types
accessRestrictions: Free of charge for all final users implementing a regular Product Environmental Footprint (PEF) studies and Organisation Environmental Footprint (OEF) studies exclusively under the specified Product groups and sectors as defined in the Product Environmental Footprint Category Rules (PEFCR) and Organisation Environmental Footprint Sectorial Rules (OEFSR) listed in http://ec.europa.eu/environment/eussd/smgp/PEFCR_OEFSR.htm and in accordance with the terms and conditions of the EULA (available at https://ecoinvent.lca-data.com/) exclusively until 31st December 2024. Any use of this dataset or any derivative data not within the specific context of one of the PEF/OEF projects or after the end of 2024 is not permitted.

## General comment
Notice: this data set supersedes the EF3.0-compliant version (see link under "preceding data set version" below calculated with the EF3.0). The life cycle inventory is not changed from the original EF3.0 data set. The LCIA results are calculated based on the EF3.1 methods which provide updated characterisation factors in the following impact categories: Climate Change, Ecotoxicity freshwater, Photochemical Ozone Formation, Acidification, Human Toxicity non-cancer, and Human Toxicity cancer. The review report and the data quality ratings refer to the original results. The data set has been updated by the European Commission on the basis of the original EF3.0 data set delivered by the data provider.This dataset represents the European production of bleached kraft pulp, obtained from northern European hardwood for the year 2020. Industry data was used which was provided by the European Pulp Industry Sector Association AISBL (EPIS). Values represent weighted average of 7 corresponding pulp mills located in Nordic countries.
Pulp is a clean, wood-based, renewable and biodegradable raw material to make different paper, board and other products. Main end uses for market pulp are tissue (toilet paper), graphic papers, specialty products, packaging, fluff pulp, viscose, CMC etc. Hardwood pulp is made from non-coniferous trees, in Nordic countries primarily of birch. Hardwood fibres are short and can be rounder than softwood fibres and their number per gram of pulp is much larger; they give the end product its smoothness, softness and optical properties like opacity (that you cannot see through the paper).
In 2020, total production of the 7 pulp mills corresponded to 100% of the European market capacity.
This activity starts with the transport of raw material to the pulp factory. The activity ends when the kraft pulp is ready to be sold.
The dataset has been allocated based on the following products: Bleached kraft pulp, hardwood // Bleached kraft pulp, hardwood // EU+EFTA+UK with allocation factor of 99.9975%, methanol, from biomass with allocation factor of 0.0023%, Sodium hydroxide with allocation factor of 0.0002%.

## Technology and included processes
The pulp, or fibres from the wood are separated in a kraft cooking process in a so-called fibre line. In a recovery line, the chemicals used in the cooking process are recovered to be used again and energy is produced. The third process is effluent treatment where gaseous and liquid discharges to the environment are continuously minimized and monitored.
The process includes transports to the pulp mill, wood handling, chemical pulping and bleaching, drying process, energy production on-site, recovery cycles of chemicals and internal waste water treatment. The input of magnesium sulphate (0.00063 kg/kg) has been excluded from the inventory since its contribution was less than 3 % in terms of mass and single score.
The following air emissions were reported in the study:
CO2 (fossil and biogenic), CO, SOx (as SO2), NOx, TRS (as S), SO2 (reported as S), Dust (unspecified). Next to these key emissions, additional emissions from on-site energy production from external and internal fuels were calculated, using emission profiles from ecoinvent combustion processes. Internal biogenic fuels are represented by the calculated emissions but do not have the corresponding fuel input from technosphere, because they are supplied from within the system boundaries. The amounts of internal fuels used in the process are: Biogas (6.34E+01 MJ/t), Bark (1.34E+02MJ/t), Black liquor(1.98E+04MJ/t), Sludge (3.64E+00MJ/t), Methanol (1.73E+02MJ/t), Biomass (1.12E+02 MJ/t), tall oil pitch (4.14E+02 MJ/t)

The following ecoinvent combustion processes were used to estimate additional air emissions:
Biofuel - Biogas: heat production, natural gas, at industrial furnace >100kW, Europe without Switzerland; Peat: heat production, lignite briquette, at stove 5-15kW; Hard coal: heat production, at hard coal industrial furnace 1-10MW, Europe without Switzerland; Heavy fuel oil: heat production, heavy fuel oil, at industrial furnace 1MW, Europe without Switzerland; Light fuel oil: heat production, light fuel oil, at industrial furnace 1MW, Europe without Switzerland; Methanol: heat production, natural gas, at industrial furnace >100kW, Europe without Switzerland; Natural gas: heat production, natural gas, at industrial furnace >100kW, Europe without Switzerland; Biofuel - Bark : heat production, wood chips from industry, at furnace 1000kW, CH; Biofuel - Biomass: heat production, wood chips from industry, at furnace 1000kW, CH;

Black liquor, sludge, tall oil pitch, tar oil and sodium formiate were not included in the emissions calculations because no specific emission profiles, e.g. for the black liquor recovery process, were available. Emissions from these internal energy generation processes are therefore only reflected in the key emission factors provided by the industry, other emissions constitute a data gap.
Emissions of stemming from biogas are approximated with the combustion of natural gas, whereby CO2, CO and CH4 emissions stemming from biogas were modelled as non-fossil. Tar oil which is an external fuel (4.44E+01 MJ/t) has also no corresponding fuel input from technosphere because no appropriate proxy could be found.
The amount of infrastructure (pulp factory) was taken from the dataset “The European Pulp Industry Sector Association AISBL, sulfate pulp production, from hardwood, bleached, RER, Undefined, ecoinvent database version 3.7.1.”

## Parameters
- kg_0: 0.00139213
  Mass in kg, for malusil; Transoceanic ship, bulk; GLO
- km_0: 219.908
  Distance in km, for malusil; Transoceanic ship, bulk; GLO
- kg_km_0: 0.30614; = kg_0*km_0
  Transport amount in km*km, for malusil; Transoceanic ship, bulk; GLO
- kg_1: 0.00139213
  Mass in kg, for malusil; Freight train, diesel traction; EU+EFTA+UK
- km_1: 27.1484
  Distance in km, for malusil; Freight train, diesel traction; EU+EFTA+UK
- kg_km_1: 0.037794; = kg_1*km_1
  Transport amount in km*km, for malusil; Freight train, diesel traction; EU+EFTA+UK
- kg_2: 0.00139213
  Mass in kg, for malusil; Freight train, electricity traction; EU+EFTA+UK
- km_2: 9.23477
  Distance in km, for malusil; Freight train, electricity traction; EU+EFTA+UK
- kg_km_2: 0.012856; = kg_2*km_2
  Transport amount in km*km, for malusil; Freight train, electricity traction; EU+EFTA+UK
- kg_3: 0.00139213
  Mass in kg, for malusil; Freight train, average; EU+EFTA+UK
- km_3: 0.217806
  Distance in km, for malusil; Freight train, average; EU+EFTA+UK
- kg_km_3: 0.000303214; = kg_3*km_3
  Transport amount in km*km, for malusil; Freight train, average; EU+EFTA+UK
- kg_4: 0.00139213
  Mass in kg, for malusil; Barge; EU+EFTA+UK
- km_4: 2.08821
  Distance in km, for malusil; Barge; EU+EFTA+UK
- kg_km_4: 0.00290705; = kg_4*km_4
  Transport amount in km*km, for malusil; Barge; EU+EFTA+UK
- kg_5: 0.00139213
  Mass in kg, for malusil; Barge; ROW w/o EU+EFTA
- km_5: 4.26403
  Distance in km, for malusil; Barge; ROW w/o EU+EFTA
- kg_km_5: 0.00593607; = kg_5*km_5
  Transport amount in km*km, for malusil; Barge; ROW w/o EU+EFTA
- kg_6: 0.00139213
  Mass in kg, for malusil; Articulated lorry transport, Total weight <7.5 t, mix Euro 0-5; EU+EFTA+UK
- km_6: 2.87567
  Distance in km, for malusil; Articulated lorry transport, Total weight <7.5 t, mix Euro 0-5; EU+EFTA+UK
- kg_km_6: 0.00400329; = kg_6*km_6
  Transport amount in km*km, for malusil; Articulated lorry transport, Total weight <7.5 t, mix Euro 0-5; EU+EFTA+UK
- kg_7: 0.00139213
  Mass in kg, for malusil; Articulated lorry transport, Euro 4, Total weight >32 t; EU+EFTA+UK
- km_7: 26.8476
  Distance in km, for malusil; Articulated lorry transport, Euro 4, Total weight >32 t; EU+EFTA+UK
- kg_km_7: 0.0373752; = kg_7*km_7
  Transport amount in km*km, for malusil; Articulated lorry transport, Euro 4, Total weight >32 t; EU+EFTA+UK
- kg_8: 0.00139213
  Mass in kg, for malusil; Articulated lorry transport, Total weight >32 t, mix Euro 0-5; ROW w/o EU+EFTA
- km_8: 70.8559
  Distance in km, for malusil; Articulated lorry transport, Total weight >32 t, mix Euro 0-5; ROW w/o EU+EFTA
- kg_km_8: 0.0986404; = kg_8*km_8
  Transport amount in km*km, for malusil; Articulated lorry transport, Total weight >32 t, mix Euro 0-5; ROW w/o EU+EFTA
- kg_9: 0.00158828
  Mass in kg, for sodium hydrogen sulphite // sodium hydrogen sulphite production // eu+efta+uk; Freight train, average; EU+EFTA+UK
- km_9: 240.505
  Distance in km, for sodium hydrogen sulphite // sodium hydrogen sulphite production // eu+efta+uk; Freight train, average; EU+EFTA+UK
- kg_km_9: 0.38199; = kg_9*km_9
  Transport amount in km*km, for sodium hydrogen sulphite // sodium hydrogen sulphite production // eu+efta+uk; Freight train, average; EU+EFTA+UK
- kg_10: 0.00158828
  Mass in kg, for sodium hydrogen sulphite // sodium hydrogen sulphite production // eu+efta+uk; Barge; EU+EFTA+UK
- km_10: 270.096
  Distance in km, for sodium hydrogen sulphite // sodium hydrogen sulphite production // eu+efta+uk; Barge; EU+EFTA+UK
- kg_km_10: 0.428989; = kg_10*km_10
  Transport amount in km*km, for sodium hydrogen sulphite // sodium hydrogen sulphite production // eu+efta+uk; Barge; EU+EFTA+UK
- kg_11: 0.00158828
  Mass in kg, for sodium hydrogen sulphite // sodium hydrogen sulphite production // eu+efta+uk; Articulated lorry transport, Euro 4, Total weight >32 t; EU+EFTA+UK
- km_11: 130.326
  Distance in km, for sodium hydrogen sulphite // sodium hydrogen sulphite production // eu+efta+uk; Articulated lorry transport, Euro 4, Total weight >32 t; EU+EFTA+UK
- kg_km_11: 0.206995; = kg_11*km_11
  Transport amount in km*km, for sodium hydrogen sulphite // sodium hydrogen sulphite production // eu+efta+uk; Articulated lorry transport, Euro 4, Total weight >32 t; EU+EFTA+UK
- kg_12: 3.11357
  Mass in kg, for hardwood under bark // hardwood forestry // eu+efta+uk; Articulated lorry transport, Euro 4, Total weight >32 t; EU+EFTA+UK
- km_12: 72.6042
  Distance in km, for hardwood under bark // hardwood forestry // eu+efta+uk; Articulated lorry transport, Euro 4, Total weight >32 t; EU+EFTA+UK
- kg_km_12: 226.059; = kg_12*km_12
  Transport amount in km*km, for hardwood under bark // hardwood forestry // eu+efta+uk; Articulated lorry transport, Euro 4, Total weight >32 t; EU+EFTA+UK
- kg_13: 3.11357
  Mass in kg, for hardwood under bark // hardwood forestry // eu+efta+uk; Barge; EU+EFTA+UK
- km_13: 14.05
  Distance in km, for hardwood under bark // hardwood forestry // eu+efta+uk; Barge; EU+EFTA+UK
- kg_km_13: 43.7457; = kg_13*km_13
  Transport amount in km*km, for hardwood under bark // hardwood forestry // eu+efta+uk; Barge; EU+EFTA+UK
- kg_14: 3.11357
  Mass in kg, for hardwood under bark // hardwood forestry // eu+efta+uk; Freight train, average; EU+EFTA+UK
- km_14: 107.728
  Distance in km, for hardwood under bark // hardwood forestry // eu+efta+uk; Freight train, average; EU+EFTA+UK
- kg_km_14: 335.419; = kg_14*km_14
  Transport amount in km*km, for hardwood under bark // hardwood forestry // eu+efta+uk; Freight train, average; EU+EFTA+UK
- kg_15: 3.11357
  Mass in kg, for hardwood under bark // hardwood forestry // eu+efta+uk; Transoceanic ship, bulk; GLO
- km_15: 170.04
  Distance in km, for hardwood under bark // hardwood forestry // eu+efta+uk; Transoceanic ship, bulk; GLO
- kg_km_15: 529.432; = kg_15*km_15
  Transport amount in km*km, for hardwood under bark // hardwood forestry // eu+efta+uk; Transoceanic ship, bulk; GLO
- kg_16: 0.104136
  Mass in kg, for wood chips, hardwood // wood chips, hardwood // eu+efta+uk; Freight train, average; EU+EFTA+UK
- km_16: 419.999
  Distance in km, for wood chips, hardwood // wood chips, hardwood // eu+efta+uk; Freight train, average; EU+EFTA+UK
- kg_km_16: 43.737; = kg_16*km_16
  Transport amount in km*km, for wood chips, hardwood // wood chips, hardwood // eu+efta+uk; Freight train, average; EU+EFTA+UK
- kg_17: 0.104136
  Mass in kg, for wood chips, hardwood // wood chips, hardwood // eu+efta+uk; Barge; EU+EFTA+UK
- km_17: 472.499
  Distance in km, for wood chips, hardwood // wood chips, hardwood // eu+efta+uk; Barge; EU+EFTA+UK
- kg_km_17: 49.2041; = kg_17*km_17
  Transport amount in km*km, for wood chips, hardwood // wood chips, hardwood // eu+efta+uk; Barge; EU+EFTA+UK
- kg_18: 0.104136
  Mass in kg, for wood chips, hardwood // wood chips, hardwood // eu+efta+uk; Articulated lorry transport, Euro 4, Total weight >32 t; EU+EFTA+UK
- km_18: 227.5
  Distance in km, for wood chips, hardwood // wood chips, hardwood // eu+efta+uk; Articulated lorry transport, Euro 4, Total weight >32 t; EU+EFTA+UK
- kg_km_18: 23.6909; = kg_18*km_18
  Transport amount in km*km, for wood chips, hardwood // wood chips, hardwood // eu+efta+uk; Articulated lorry transport, Euro 4, Total weight >32 t; EU+EFTA+UK
- kg_19: 0.0270934
  Mass in kg, for wood chips, softwood // wood chips, softwood // eu+efta+uk; Freight train, average; EU+EFTA+UK
- km_19: 420.004
  Distance in km, for wood chips, softwood // wood chips, softwood // eu+efta+uk; Freight train, average; EU+EFTA+UK
- kg_km_19: 11.3793; = kg_19*km_19
  Transport amount in km*km, for wood chips, softwood // wood chips, softwood // eu+efta+uk; Freight train, average; EU+EFTA+UK
- kg_20: 0.0270934
  Mass in kg, for wood chips, softwood // wood chips, softwood // eu+efta+uk; Barge; EU+EFTA+UK
- km_20: 472.504
  Distance in km, for wood chips, softwood // wood chips, softwood // eu+efta+uk; Barge; EU+EFTA+UK
- kg_km_20: 12.8017; = kg_20*km_20
  Transport amount in km*km, for wood chips, softwood // wood chips, softwood // eu+efta+uk; Barge; EU+EFTA+UK
- kg_21: 0.0270934
  Mass in kg, for wood chips, softwood // wood chips, softwood // eu+efta+uk; Articulated lorry transport, Euro 4, Total weight >32 t; EU+EFTA+UK
- km_21: 227.502
  Distance in km, for wood chips, softwood // wood chips, softwood // eu+efta+uk; Articulated lorry transport, Euro 4, Total weight >32 t; EU+EFTA+UK
- kg_km_21: 6.16379; = kg_21*km_21
  Transport amount in km*km, for wood chips, softwood // wood chips, softwood // eu+efta+uk; Articulated lorry transport, Euro 4, Total weight >32 t; EU+EFTA+UK
- kg_22: 0.0111259
  Mass in kg, for biogas for bioenergy // biogas for bioenergy // eu+efta+uk; Freight train, average; EU+EFTA+UK
- km_22: 239.974
  Distance in km, for biogas for bioenergy // biogas for bioenergy // eu+efta+uk; Freight train, average; EU+EFTA+UK
- kg_km_22: 2.66993; = kg_22*km_22
  Transport amount in km*km, for biogas for bioenergy // biogas for bioenergy // eu+efta+uk; Freight train, average; EU+EFTA+UK
- kg_23: 0.0111259
  Mass in kg, for biogas for bioenergy // biogas for bioenergy // eu+efta+uk; Barge; EU+EFTA+UK
- km_23: 269.634
  Distance in km, for biogas for bioenergy // biogas for bioenergy // eu+efta+uk; Barge; EU+EFTA+UK
- kg_km_23: 2.99992; = kg_23*km_23
  Transport amount in km*km, for biogas for bioenergy // biogas for bioenergy // eu+efta+uk; Barge; EU+EFTA+UK
- kg_24: 0.0111259
  Mass in kg, for biogas for bioenergy // biogas for bioenergy // eu+efta+uk; Articulated lorry transport, Euro 4, Total weight >32 t; EU+EFTA+UK
- km_24: 130.323
  Distance in km, for biogas for bioenergy // biogas for bioenergy // eu+efta+uk; Articulated lorry transport, Euro 4, Total weight >32 t; EU+EFTA+UK
- kg_km_24: 1.44996; = kg_24*km_24
  Transport amount in km*km, for biogas for bioenergy // biogas for bioenergy // eu+efta+uk; Articulated lorry transport, Euro 4, Total weight >32 t; EU+EFTA+UK
- kg_25: 0.00267614
  Mass in kg, for bark, hardwood // bark, hardwood // eu+efta+uk; Freight train, average; EU+EFTA+UK
- km_25: 408.04
  Distance in km, for bark, hardwood // bark, hardwood // eu+efta+uk; Freight train, average; EU+EFTA+UK
- kg_km_25: 1.09197; = kg_25*km_25
  Transport amount in km*km, for bark, hardwood // bark, hardwood // eu+efta+uk; Freight train, average; EU+EFTA+UK
- kg_26: 0.00267614
  Mass in kg, for bark, hardwood // bark, hardwood // eu+efta+uk; Barge; EU+EFTA+UK
- km_26: 459.045
  Distance in km, for bark, hardwood // bark, hardwood // eu+efta+uk; Barge; EU+EFTA+UK
- kg_km_26: 1.22847; = kg_26*km_26
  Transport amount in km*km, for bark, hardwood // bark, hardwood // eu+efta+uk; Barge; EU+EFTA+UK
- kg_27: 0.00267614
  Mass in kg, for bark, hardwood // bark, hardwood // eu+efta+uk; Articulated lorry transport, Euro 4, Total weight >32 t; EU+EFTA+UK
- km_27: 221.021
  Distance in km, for bark, hardwood // bark, hardwood // eu+efta+uk; Articulated lorry transport, Euro 4, Total weight >32 t; EU+EFTA+UK
- kg_km_27: 0.591485; = kg_27*km_27
  Transport amount in km*km, for bark, hardwood // bark, hardwood // eu+efta+uk; Articulated lorry transport, Euro 4, Total weight >32 t; EU+EFTA+UK
- kg_28: 0.00267614
  Mass in kg, for bark, softwood // bark, softwood // eu+efta+uk; Freight train, average; EU+EFTA+UK
- km_28: 408.04
  Distance in km, for bark, softwood // bark, softwood // eu+efta+uk; Freight train, average; EU+EFTA+UK
- kg_km_28: 1.09197; = kg_28*km_28
  Transport amount in km*km, for bark, softwood // bark, softwood // eu+efta+uk; Freight train, average; EU+EFTA+UK
- kg_29: 0.00267614
  Mass in kg, for bark, softwood // bark, softwood // eu+efta+uk; Barge; EU+EFTA+UK
- km_29: 459.045
  Distance in km, for bark, softwood // bark, softwood // eu+efta+uk; Barge; EU+EFTA+UK
- kg_km_29: 1.22847; = kg_29*km_29
  Transport amount in km*km, for bark, softwood // bark, softwood // eu+efta+uk; Barge; EU+EFTA+UK
- kg_30: 0.00267614
  Mass in kg, for bark, softwood // bark, softwood // eu+efta+uk; Articulated lorry transport, Euro 4, Total weight >32 t; EU+EFTA+UK
- km_30: 221.021
  Distance in km, for bark, softwood // bark, softwood // eu+efta+uk; Articulated lorry transport, Euro 4, Total weight >32 t; EU+EFTA+UK
- kg_km_30: 0.591485; = kg_30*km_30
  Transport amount in km*km, for bark, softwood // bark, softwood // eu+efta+uk; Articulated lorry transport, Euro 4, Total weight >32 t; EU+EFTA+UK
- kg_31: 0.00328602
  Mass in kg, for heavy fuel oil (1.0 wt.% s) // heavy fuel oil at refinery // eu+efta+uk; Freight train, average; EU+EFTA+UK
- km_31: 240.102
  Distance in km, for heavy fuel oil (1.0 wt.% s) // heavy fuel oil at refinery // eu+efta+uk; Freight train, average; EU+EFTA+UK
- kg_km_31: 0.78898; = kg_31*km_31
  Transport amount in km*km, for heavy fuel oil (1.0 wt.% s) // heavy fuel oil at refinery // eu+efta+uk; Freight train, average; EU+EFTA+UK
- kg_32: 0.00328602
  Mass in kg, for heavy fuel oil (1.0 wt.% s) // heavy fuel oil at refinery // eu+efta+uk; Barge; EU+EFTA+UK
- km_32: 269.925
  Distance in km, for heavy fuel oil (1.0 wt.% s) // heavy fuel oil at refinery // eu+efta+uk; Barge; EU+EFTA+UK
- kg_km_32: 0.886978; = kg_32*km_32
  Transport amount in km*km, for heavy fuel oil (1.0 wt.% s) // heavy fuel oil at refinery // eu+efta+uk; Barge; EU+EFTA+UK
- kg_33: 0.00328602
  Mass in kg, for heavy fuel oil (1.0 wt.% s) // heavy fuel oil at refinery // eu+efta+uk; Articulated lorry transport, Euro 4, Total weight >32 t; EU+EFTA+UK
- km_33: 129.941
  Distance in km, for heavy fuel oil (1.0 wt.% s) // heavy fuel oil at refinery // eu+efta+uk; Articulated lorry transport, Euro 4, Total weight >32 t; EU+EFTA+UK
- kg_km_33: 0.426989; = kg_33*km_33
  Transport amount in km*km, for heavy fuel oil (1.0 wt.% s) // heavy fuel oil at refinery // eu+efta+uk; Articulated lorry transport, Euro 4, Total weight >32 t; EU+EFTA+UK
- kg_34: 2.91334e-5
  Mass in kg, for light fuel oil // light fuel oil at refinery // eu+efta+uk; Freight train, average; EU+EFTA+UK
- km_34: 239.925
  Distance in km, for light fuel oil // light fuel oil at refinery // eu+efta+uk; Freight train, average; EU+EFTA+UK
- kg_km_34: 0.00698982; = kg_34*km_34
  Transport amount in km*km, for light fuel oil // light fuel oil at refinery // eu+efta+uk; Freight train, average; EU+EFTA+UK
- kg_35: 2.91334e-5
  Mass in kg, for light fuel oil // light fuel oil at refinery // eu+efta+uk; Barge; EU+EFTA+UK
- km_35: 270.13
  Distance in km, for light fuel oil // light fuel oil at refinery // eu+efta+uk; Barge; EU+EFTA+UK
- kg_km_35: 0.0078698; = kg_35*km_35
  Transport amount in km*km, for light fuel oil // light fuel oil at refinery // eu+efta+uk; Barge; EU+EFTA+UK
- kg_36: 2.91334e-5
  Mass in kg, for light fuel oil // light fuel oil at refinery // eu+efta+uk; Articulated lorry transport, Euro 4, Total weight >32 t; EU+EFTA+UK
- km_36: 130.088
  Distance in km, for light fuel oil // light fuel oil at refinery // eu+efta+uk; Articulated lorry transport, Euro 4, Total weight >32 t; EU+EFTA+UK
- kg_km_36: 0.0037899; = kg_36*km_36
  Transport amount in km*km, for light fuel oil // light fuel oil at refinery // eu+efta+uk; Articulated lorry transport, Euro 4, Total weight >32 t; EU+EFTA+UK
- kg_37: 0.000232407
  Mass in kg, for hard coal, at consumer eu+efta // hard coal mix // eu+efta+uk; Freight train, average; EU+EFTA+UK
- km_37: 240.09
  Distance in km, for hard coal, at consumer eu+efta // hard coal mix // eu+efta+uk; Freight train, average; EU+EFTA+UK
- kg_km_37: 0.0557986; = kg_37*km_37
  Transport amount in km*km, for hard coal, at consumer eu+efta // hard coal mix // eu+efta+uk; Freight train, average; EU+EFTA+UK
- kg_38: 0.000232407
  Mass in kg, for hard coal, at consumer eu+efta // hard coal mix // eu+efta+uk; Barge; EU+EFTA+UK
- km_38: 270.209
  Distance in km, for hard coal, at consumer eu+efta // hard coal mix // eu+efta+uk; Barge; EU+EFTA+UK
- kg_km_38: 0.0627984; = kg_38*km_38
  Transport amount in km*km, for hard coal, at consumer eu+efta // hard coal mix // eu+efta+uk; Barge; EU+EFTA+UK
- kg_39: 0.000232407
  Mass in kg, for hard coal, at consumer eu+efta // hard coal mix // eu+efta+uk; Articulated lorry transport, Euro 4, Total weight >32 t; EU+EFTA+UK
- km_39: 129.941
  Distance in km, for hard coal, at consumer eu+efta // hard coal mix // eu+efta+uk; Articulated lorry transport, Euro 4, Total weight >32 t; EU+EFTA+UK
- kg_km_39: 0.0301992; = kg_39*km_39
  Transport amount in km*km, for hard coal, at consumer eu+efta // hard coal mix // eu+efta+uk; Articulated lorry transport, Euro 4, Total weight >32 t; EU+EFTA+UK
- kg_40: 0.00187812
  Mass in kg, for lignite eu+efta // lignite mix // eu+efta+uk; Freight train, average; EU+EFTA+UK
- km_40: 157.068
  Distance in km, for lignite eu+efta // lignite mix // eu+efta+uk; Freight train, average; EU+EFTA+UK
- kg_km_40: 0.294993; = kg_40*km_40
  Transport amount in km*km, for lignite eu+efta // lignite mix // eu+efta+uk; Freight train, average; EU+EFTA+UK
- kg_41: 0.00187812
  Mass in kg, for lignite eu+efta // lignite mix // eu+efta+uk; Barge; EU+EFTA+UK
- km_41: 176.768
  Distance in km, for lignite eu+efta // lignite mix // eu+efta+uk; Barge; EU+EFTA+UK
- kg_km_41: 0.331992; = kg_41*km_41
  Transport amount in km*km, for lignite eu+efta // lignite mix // eu+efta+uk; Barge; EU+EFTA+UK
- kg_42: 0.00187812
  Mass in kg, for lignite eu+efta // lignite mix // eu+efta+uk; Articulated lorry transport, Euro 4, Total weight >32 t; EU+EFTA+UK
- km_42: 85.1895
  Distance in km, for lignite eu+efta // lignite mix // eu+efta+uk; Articulated lorry transport, Euro 4, Total weight >32 t; EU+EFTA+UK
- kg_km_42: 0.159996; = kg_42*km_42
  Transport amount in km*km, for lignite eu+efta // lignite mix // eu+efta+uk; Articulated lorry transport, Euro 4, Total weight >32 t; EU+EFTA+UK
- kg_43: 3.28772e-5
  Mass in kg, for sodium formate // sodium formate production // eu+efta+uk; Freight train, average; EU+EFTA+UK
- km_43: 239.978
  Distance in km, for sodium formate // sodium formate production // eu+efta+uk; Freight train, average; EU+EFTA+UK
- kg_km_43: 0.0078898; = kg_43*km_43
  Transport amount in km*km, for sodium formate // sodium formate production // eu+efta+uk; Freight train, average; EU+EFTA+UK
- kg_44: 3.28772e-5
  Mass in kg, for sodium formate // sodium formate production // eu+efta+uk; Barge; EU+EFTA+UK
- km_44: 270.089
  Distance in km, for sodium formate // sodium formate production // eu+efta+uk; Barge; EU+EFTA+UK
- kg_km_44: 0.00887978; = kg_44*km_44
  Transport amount in km*km, for sodium formate // sodium formate production // eu+efta+uk; Barge; EU+EFTA+UK
- kg_45: 3.28772e-5
  Mass in kg, for sodium formate // sodium formate production // eu+efta+uk; Articulated lorry transport, Euro 4, Total weight >32 t; EU+EFTA+UK
- km_45: 129.874
  Distance in km, for sodium formate // sodium formate production // eu+efta+uk; Articulated lorry transport, Euro 4, Total weight >32 t; EU+EFTA+UK
- kg_km_45: 0.00426989; = kg_45*km_45
  Transport amount in km*km, for sodium formate // sodium formate production // eu+efta+uk; Articulated lorry transport, Euro 4, Total weight >32 t; EU+EFTA+UK
- kg_46: 0.00721596
  Mass in kg, for hydrogen peroxide, 100% // hydrogen peroxide, 100% production // eu+efta+uk; Freight train, average; EU+EFTA+UK
- km_46: 239.74
  Distance in km, for hydrogen peroxide, 100% // hydrogen peroxide, 100% production // eu+efta+uk; Freight train, average; EU+EFTA+UK
- kg_km_46: 1.72996; = kg_46*km_46
  Transport amount in km*km, for hydrogen peroxide, 100% // hydrogen peroxide, 100% production // eu+efta+uk; Freight train, average; EU+EFTA+UK
- kg_47: 0.00721596
  Mass in kg, for hydrogen peroxide, 100% // hydrogen peroxide, 100% production // eu+efta+uk; Barge; EU+EFTA+UK
- km_47: 270.227
  Distance in km, for hydrogen peroxide, 100% // hydrogen peroxide, 100% production // eu+efta+uk; Barge; EU+EFTA+UK
- kg_km_47: 1.94995; = kg_47*km_47
  Transport amount in km*km, for hydrogen peroxide, 100% // hydrogen peroxide, 100% production // eu+efta+uk; Barge; EU+EFTA+UK
- kg_48: 0.00721596
  Mass in kg, for hydrogen peroxide, 100% // hydrogen peroxide, 100% production // eu+efta+uk; Articulated lorry transport, Euro 4, Total weight >32 t; EU+EFTA+UK
- km_48: 129.986
  Distance in km, for hydrogen peroxide, 100% // hydrogen peroxide, 100% production // eu+efta+uk; Articulated lorry transport, Euro 4, Total weight >32 t; EU+EFTA+UK
- kg_km_48: 0.937976; = kg_48*km_48
  Transport amount in km*km, for hydrogen peroxide, 100% // hydrogen peroxide, 100% production // eu+efta+uk; Articulated lorry transport, Euro 4, Total weight >32 t; EU+EFTA+UK
- kg_49: 0.022288
  Mass in kg, for oxygen // oxygen production // eu+efta+uk; Freight train, average; EU+EFTA+UK
- km_49: 240.034
  Distance in km, for oxygen // oxygen production // eu+efta+uk; Freight train, average; EU+EFTA+UK
- kg_km_49: 5.34986; = kg_49*km_49
  Transport amount in km*km, for oxygen // oxygen production // eu+efta+uk; Freight train, average; EU+EFTA+UK
- kg_50: 0.022288
  Mass in kg, for oxygen // oxygen production // eu+efta+uk; Barge; EU+EFTA+UK
- km_50: 270.094
  Distance in km, for oxygen // oxygen production // eu+efta+uk; Barge; EU+EFTA+UK
- kg_km_50: 6.01985; = kg_50*km_50
  Transport amount in km*km, for oxygen // oxygen production // eu+efta+uk; Barge; EU+EFTA+UK
- kg_51: 0.022288
  Mass in kg, for oxygen // oxygen production // eu+efta+uk; Articulated lorry transport, Euro 4, Total weight >32 t; EU+EFTA+UK
- km_51: 130.112
  Distance in km, for oxygen // oxygen production // eu+efta+uk; Articulated lorry transport, Euro 4, Total weight >32 t; EU+EFTA+UK
- kg_km_51: 2.89993; = kg_51*km_51
  Transport amount in km*km, for oxygen // oxygen production // eu+efta+uk; Articulated lorry transport, Euro 4, Total weight >32 t; EU+EFTA+UK
- kg_52: 0.00923309
  Mass in kg, for sodium chlorate // sodium chlorate production // glo; Freight train, average; EU+EFTA+UK
- km_52: 240.434
  Distance in km, for sodium chlorate // sodium chlorate production // glo; Freight train, average; EU+EFTA+UK
- kg_km_52: 2.21994; = kg_52*km_52
  Transport amount in km*km, for sodium chlorate // sodium chlorate production // glo; Freight train, average; EU+EFTA+UK
- kg_53: 0.00923309
  Mass in kg, for sodium chlorate // sodium chlorate production // glo; Barge; EU+EFTA+UK
- km_53: 269.675
  Distance in km, for sodium chlorate // sodium chlorate production // glo; Barge; EU+EFTA+UK
- kg_km_53: 2.48994; = kg_53*km_53
  Transport amount in km*km, for sodium chlorate // sodium chlorate production // glo; Barge; EU+EFTA+UK
- kg_54: 0.00923309
  Mass in kg, for sodium chlorate // sodium chlorate production // glo; Articulated lorry transport, Euro 4, Total weight >32 t; EU+EFTA+UK
- km_54: 129.964
  Distance in km, for sodium chlorate // sodium chlorate production // glo; Articulated lorry transport, Euro 4, Total weight >32 t; EU+EFTA+UK
- kg_km_54: 1.19997; = kg_54*km_54
  Transport amount in km*km, for sodium chlorate // sodium chlorate production // glo; Articulated lorry transport, Euro 4, Total weight >32 t; EU+EFTA+UK
- kg_55: 0.0285261
  Mass in kg, for sodium hydroxide // sodium hydroxide production // eu+efta+uk; Freight train, average; EU+EFTA+UK
- km_55: 240.125
  Distance in km, for sodium hydroxide // sodium hydroxide production // eu+efta+uk; Freight train, average; EU+EFTA+UK
- kg_km_55: 6.84983; = kg_55*km_55
  Transport amount in km*km, for sodium hydroxide // sodium hydroxide production // eu+efta+uk; Freight train, average; EU+EFTA+UK
- kg_56: 0.0285261
  Mass in kg, for sodium hydroxide // sodium hydroxide production // eu+efta+uk; Barge; EU+EFTA+UK
- km_56: 269.921
  Distance in km, for sodium hydroxide // sodium hydroxide production // eu+efta+uk; Barge; EU+EFTA+UK
- kg_km_56: 7.69981; = kg_56*km_56
  Transport amount in km*km, for sodium hydroxide // sodium hydroxide production // eu+efta+uk; Barge; EU+EFTA+UK
- kg_57: 0.0285261
  Mass in kg, for sodium hydroxide // sodium hydroxide production // eu+efta+uk; Articulated lorry transport, Euro 4, Total weight >32 t; EU+EFTA+UK
- km_57: 130.053
  Distance in km, for sodium hydroxide // sodium hydroxide production // eu+efta+uk; Articulated lorry transport, Euro 4, Total weight >32 t; EU+EFTA+UK
- kg_km_57: 3.70991; = kg_57*km_57
  Transport amount in km*km, for sodium hydroxide // sodium hydroxide production // eu+efta+uk; Articulated lorry transport, Euro 4, Total weight >32 t; EU+EFTA+UK
- kg_58: 0.0249632
  Mass in kg, for sulphuric acid // sulphuric acid production // eu+efta+uk; Freight train, average; EU+EFTA+UK
- km_58: 239.947
  Distance in km, for sulphuric acid // sulphuric acid production // eu+efta+uk; Freight train, average; EU+EFTA+UK
- kg_km_58: 5.98985; = kg_58*km_58
  Transport amount in km*km, for sulphuric acid // sulphuric acid production // eu+efta+uk; Freight train, average; EU+EFTA+UK
- kg_59: 0.0249632
  Mass in kg, for sulphuric acid // sulphuric acid production // eu+efta+uk; Barge; EU+EFTA+UK
- km_59: 269.991
  Distance in km, for sulphuric acid // sulphuric acid production // eu+efta+uk; Barge; EU+EFTA+UK
- kg_km_59: 6.73983; = kg_59*km_59
  Transport amount in km*km, for sulphuric acid // sulphuric acid production // eu+efta+uk; Barge; EU+EFTA+UK
- kg_60: 0.0249632
  Mass in kg, for sulphuric acid // sulphuric acid production // eu+efta+uk; Articulated lorry transport, Euro 4, Total weight >32 t; EU+EFTA+UK
- km_60: 130.189
  Distance in km, for sulphuric acid // sulphuric acid production // eu+efta+uk; Articulated lorry transport, Euro 4, Total weight >32 t; EU+EFTA+UK
- kg_km_60: 3.24992; = kg_60*km_60
  Transport amount in km*km, for sulphuric acid // sulphuric acid production // eu+efta+uk; Articulated lorry transport, Euro 4, Total weight >32 t; EU+EFTA+UK
- kg_61: 0.00771565
  Mass in kg, for chlorine dioxide // chlorine dioxide production // glo; Freight train, average; EU+EFTA+UK
- km_61: 239.766
  Distance in km, for chlorine dioxide // chlorine dioxide production // glo; Freight train, average; EU+EFTA+UK
- kg_km_61: 1.84995; = kg_61*km_61
  Transport amount in km*km, for chlorine dioxide // chlorine dioxide production // glo; Freight train, average; EU+EFTA+UK
- kg_62: 0.00771565
  Mass in kg, for chlorine dioxide // chlorine dioxide production // glo; Barge; EU+EFTA+UK
- km_62: 269.575
  Distance in km, for chlorine dioxide // chlorine dioxide production // glo; Barge; EU+EFTA+UK
- kg_km_62: 2.07995; = kg_62*km_62
  Transport amount in km*km, for chlorine dioxide // chlorine dioxide production // glo; Barge; EU+EFTA+UK
- kg_63: 0.00771565
  Mass in kg, for chlorine dioxide // chlorine dioxide production // glo; Articulated lorry transport, Euro 4, Total weight >32 t; EU+EFTA+UK
- km_63: 129.603
  Distance in km, for chlorine dioxide // chlorine dioxide production // glo; Articulated lorry transport, Euro 4, Total weight >32 t; EU+EFTA+UK
- kg_km_63: 0.999975; = kg_63*km_63
  Transport amount in km*km, for chlorine dioxide // chlorine dioxide production // glo; Articulated lorry transport, Euro 4, Total weight >32 t; EU+EFTA+UK
- kg_64: 1.29789e-5
  Mass in kg, for sodium sulphate // sodium sulphate production // eu+efta+uk; Freight train, average; EU+EFTA+UK
- km_64: 240.385
  Distance in km, for sodium sulphate // sodium sulphate production // eu+efta+uk; Freight train, average; EU+EFTA+UK
- kg_km_64: 0.00311992; = kg_64*km_64
  Transport amount in km*km, for sodium sulphate // sodium sulphate production // eu+efta+uk; Freight train, average; EU+EFTA+UK
- kg_65: 1.29789e-5
  Mass in kg, for sodium sulphate // sodium sulphate production // eu+efta+uk; Barge; EU+EFTA+UK
- km_65: 269.662
  Distance in km, for sodium sulphate // sodium sulphate production // eu+efta+uk; Barge; EU+EFTA+UK
- kg_km_65: 0.00349991; = kg_65*km_65
  Transport amount in km*km, for sodium sulphate // sodium sulphate production // eu+efta+uk; Barge; EU+EFTA+UK
- kg_66: 1.29789e-5
  Mass in kg, for sodium sulphate // sodium sulphate production // eu+efta+uk; Articulated lorry transport, Euro 4, Total weight >32 t; EU+EFTA+UK
- km_66: 130.208
  Distance in km, for sodium sulphate // sodium sulphate production // eu+efta+uk; Articulated lorry transport, Euro 4, Total weight >32 t; EU+EFTA+UK
- kg_km_66: 0.00168996; = kg_66*km_66
  Transport amount in km*km, for sodium sulphate // sodium sulphate production // eu+efta+uk; Articulated lorry transport, Euro 4, Total weight >32 t; EU+EFTA+UK
- kg_67: 0.00153313
  Mass in kg, for precipitated calcium carbonate // precipitated calcium carbonate production // eu+efta+uk; Freight train, average; EU+EFTA+UK
- km_67: 240.026
  Distance in km, for precipitated calcium carbonate // precipitated calcium carbonate production // eu+efta+uk; Freight train, average; EU+EFTA+UK
- kg_km_67: 0.367991; = kg_67*km_67
  Transport amount in km*km, for precipitated calcium carbonate // precipitated calcium carbonate production // eu+efta+uk; Freight train, average; EU+EFTA+UK
- kg_68: 0.00153313
  Mass in kg, for precipitated calcium carbonate // precipitated calcium carbonate production // eu+efta+uk; Barge; EU+EFTA+UK
- km_68: 270.029
  Distance in km, for precipitated calcium carbonate // precipitated calcium carbonate production // eu+efta+uk; Barge; EU+EFTA+UK
- kg_km_68: 0.41399; = kg_68*km_68
  Transport amount in km*km, for precipitated calcium carbonate // precipitated calcium carbonate production // eu+efta+uk; Barge; EU+EFTA+UK
- kg_69: 0.00153313
  Mass in kg, for precipitated calcium carbonate // precipitated calcium carbonate production // eu+efta+uk; Articulated lorry transport, Euro 4, Total weight >32 t; EU+EFTA+UK
- km_69: 129.797
  Distance in km, for precipitated calcium carbonate // precipitated calcium carbonate production // eu+efta+uk; Articulated lorry transport, Euro 4, Total weight >32 t; EU+EFTA+UK
- kg_km_69: 0.198995; = kg_69*km_69
  Transport amount in km*km, for precipitated calcium carbonate // precipitated calcium carbonate production // eu+efta+uk; Articulated lorry transport, Euro 4, Total weight >32 t; EU+EFTA+UK
- kg_70: 0.000710153
  Mass in kg, for aluminium sulphate powder // aluminium sulphate powder production // eu+efta+uk; Freight train, average; EU+EFTA+UK
- km_70: 239.379
  Distance in km, for aluminium sulphate powder // aluminium sulphate powder production // eu+efta+uk; Freight train, average; EU+EFTA+UK
- kg_km_70: 0.169996; = kg_70*km_70
  Transport amount in km*km, for aluminium sulphate powder // aluminium sulphate powder production // eu+efta+uk; Freight train, average; EU+EFTA+UK
- kg_71: 0.000710153
  Mass in kg, for aluminium sulphate powder // aluminium sulphate powder production // eu+efta+uk; Barge; EU+EFTA+UK
- km_71: 270.358
  Distance in km, for aluminium sulphate powder // aluminium sulphate powder production // eu+efta+uk; Barge; EU+EFTA+UK
- kg_km_71: 0.191995; = kg_71*km_71
  Transport amount in km*km, for aluminium sulphate powder // aluminium sulphate powder production // eu+efta+uk; Barge; EU+EFTA+UK
- kg_72: 0.000710153
  Mass in kg, for aluminium sulphate powder // aluminium sulphate powder production // eu+efta+uk; Articulated lorry transport, Euro 4, Total weight >32 t; EU+EFTA+UK
- km_72: 129.969
  Distance in km, for aluminium sulphate powder // aluminium sulphate powder production // eu+efta+uk; Articulated lorry transport, Euro 4, Total weight >32 t; EU+EFTA+UK
- kg_km_72: 0.0922977; = kg_72*km_72
  Transport amount in km*km, for aluminium sulphate powder // aluminium sulphate powder production // eu+efta+uk; Articulated lorry transport, Euro 4, Total weight >32 t; EU+EFTA+UK
- kg_73: 0.000203797
  Mass in kg, for methanol // methanol production // eu+efta+uk; Freight train, average; EU+EFTA+UK
- km_73: 239.939
  Distance in km, for methanol // methanol production // eu+efta+uk; Freight train, average; EU+EFTA+UK
- kg_km_73: 0.0488988; = kg_73*km_73
  Transport amount in km*km, for methanol // methanol production // eu+efta+uk; Freight train, average; EU+EFTA+UK
- kg_74: 0.000203797
  Mass in kg, for methanol // methanol production // eu+efta+uk; Barge; EU+EFTA+UK
- km_74: 269.87
  Distance in km, for methanol // methanol production // eu+efta+uk; Barge; EU+EFTA+UK
- kg_km_74: 0.0549986; = kg_74*km_74
  Transport amount in km*km, for methanol // methanol production // eu+efta+uk; Barge; EU+EFTA+UK
- kg_75: 0.000203797
  Mass in kg, for methanol // methanol production // eu+efta+uk; Articulated lorry transport, Euro 4, Total weight >32 t; EU+EFTA+UK
- km_75: 130.028
  Distance in km, for methanol // methanol production // eu+efta+uk; Articulated lorry transport, Euro 4, Total weight >32 t; EU+EFTA+UK
- kg_km_75: 0.0264993; = kg_75*km_75
  Transport amount in km*km, for methanol // methanol production // eu+efta+uk; Articulated lorry transport, Euro 4, Total weight >32 t; EU+EFTA+UK
- kg_76: 9.96682e-5
  Mass in kg, for edta // edta production // eu+efta+uk; Freight train, average; EU+EFTA+UK
- km_76: 239.79
  Distance in km, for edta // edta production // eu+efta+uk; Freight train, average; EU+EFTA+UK
- kg_km_76: 0.0238994; = kg_76*km_76
  Transport amount in km*km, for edta // edta production // eu+efta+uk; Freight train, average; EU+EFTA+UK
- kg_77: 9.96682e-5
  Mass in kg, for edta // edta production // eu+efta+uk; Barge; EU+EFTA+UK
- km_77: 269.889
  Distance in km, for edta // edta production // eu+efta+uk; Barge; EU+EFTA+UK
- kg_km_77: 0.0268993; = kg_77*km_77
  Transport amount in km*km, for edta // edta production // eu+efta+uk; Barge; EU+EFTA+UK
- kg_78: 9.96682e-5
  Mass in kg, for edta // edta production // eu+efta+uk; Articulated lorry transport, Euro 4, Total weight >32 t; EU+EFTA+UK
- km_78: 130.43
  Distance in km, for edta // edta production // eu+efta+uk; Articulated lorry transport, Euro 4, Total weight >32 t; EU+EFTA+UK
- kg_km_78: 0.0129997; = kg_78*km_78
  Transport amount in km*km, for edta // edta production // eu+efta+uk; Articulated lorry transport, Euro 4, Total weight >32 t; EU+EFTA+UK
- kg_79: 0.0139437
  Mass in kg, for biodegradable waste to landfill // landfill of biodegradable waste // eu+efta+uk; Articulated lorry transport, Euro 4, Total weight >32 t; EU+EFTA+UK
- km_79: 77
  Distance in km, for biodegradable waste to landfill // landfill of biodegradable waste // eu+efta+uk; Articulated lorry transport, Euro 4, Total weight >32 t; EU+EFTA+UK
- kg_km_79: 1.07367; = kg_79*km_79
  Transport amount in km*km, for biodegradable waste to landfill // landfill of biodegradable waste // eu+efta+uk; Articulated lorry transport, Euro 4, Total weight >32 t; EU+EFTA+UK

## Reference product
- bleached kraft pulp, hardwood // bleached kraft pulp, hardwood // eu+efta+uk: 1

## Inputs
- Thermal energy (MJ) from Thermal energy from natural gas - EU+EFTA+UK: 0.0582974
- Transport of malusil by Transoceanic ship, bulk - GLO: 0.30614; = kg_km_0
- Transport of malusil by Freight train, diesel traction - EU+EFTA+UK: 0.037794; = kg_km_1
- Transport of malusil by Freight train, electricity traction - EU+EFTA+UK: 0.012856; = kg_km_2
- Transport of malusil by Freight train, average - EU+EFTA+UK: 0.000303214; = kg_km_3
- Transport of malusil by Barge - EU+EFTA+UK: 0.00290705; = kg_km_4
- Transport of malusil by Barge - ROW w/o EU+EFTA: 0.00593607; = kg_km_5
- Transport of malusil by Articulated lorry transport, Total weight <7.5 t, mix Euro 0-5 - EU+EFTA+UK: 0.00400329; = kg_km_6
- Transport of malusil by Articulated lorry transport, Euro 4, Total weight >32 t - EU+EFTA+UK: 0.0373752; = kg_km_7
- Transport of malusil by Articulated lorry transport, Total weight >32 t, mix Euro 0-5 - ROW w/o EU+EFTA: 0.0986404; = kg_km_8
- Transport of sodium hydrogen sulphite // sodium hydrogen sulphite production // eu+efta+uk by Freight train, average - EU+EFTA+UK: 0.38199; = kg_km_9
- Transport of sodium hydrogen sulphite // sodium hydrogen sulphite production // eu+efta+uk by Barge - EU+EFTA+UK: 0.428989; = kg_km_10
- Transport of sodium hydrogen sulphite // sodium hydrogen sulphite production // eu+efta+uk by Articulated lorry transport, Euro 4, Total weight >32 t - EU+EFTA+UK: 0.206995; = kg_km_11
- Transport of hardwood under bark // hardwood forestry // eu+efta+uk by Articulated lorry transport, Euro 4, Total weight >32 t - EU+EFTA+UK: 226.059; = kg_km_12
- Transport of hardwood under bark // hardwood forestry // eu+efta+uk by Barge - EU+EFTA+UK: 43.7457; = kg_km_13
- Transport of hardwood under bark // hardwood forestry // eu+efta+uk by Freight train, average - EU+EFTA+UK: 335.419; = kg_km_14
- Transport of hardwood under bark // hardwood forestry // eu+efta+uk by Transoceanic ship, bulk - GLO: 529.432; = kg_km_15
- Transport of wood chips, hardwood // wood chips, hardwood // eu+efta+uk by Freight train, average - EU+EFTA+UK: 43.737; = kg_km_16
- Transport of wood chips, hardwood // wood chips, hardwood // eu+efta+uk by Barge - EU+EFTA+UK: 49.2041; = kg_km_17
- Transport of wood chips, hardwood // wood chips, hardwood // eu+efta+uk by Articulated lorry transport, Euro 4, Total weight >32 t - EU+EFTA+UK: 23.6909; = kg_km_18
- Transport of wood chips, softwood // wood chips, softwood // eu+efta+uk by Freight train, average - EU+EFTA+UK: 11.3793; = kg_km_19
- Transport of wood chips, softwood // wood chips, softwood // eu+efta+uk by Barge - EU+EFTA+UK: 12.8017; = kg_km_20
- Transport of wood chips, softwood // wood chips, softwood // eu+efta+uk by Articulated lorry transport, Euro 4, Total weight >32 t - EU+EFTA+UK: 6.16379; = kg_km_21
- Transport of biogas for bioenergy // biogas for bioenergy // eu+efta+uk by Freight train, average - EU+EFTA+UK: 2.66993; = kg_km_22
- Transport of biogas for bioenergy // biogas for bioenergy // eu+efta+uk by Barge - EU+EFTA+UK: 2.99992; = kg_km_23
- Transport of biogas for bioenergy // biogas for bioenergy // eu+efta+uk by Articulated lorry transport, Euro 4, Total weight >32 t - EU+EFTA+UK: 1.44996; = kg_km_24
- Transport of bark, hardwood // bark, hardwood // eu+efta+uk by Freight train, average - EU+EFTA+UK: 1.09197; = kg_km_25
- Transport of bark, hardwood // bark, hardwood // eu+efta+uk by Barge - EU+EFTA+UK: 1.22847; = kg_km_26
- Transport of bark, hardwood // bark, hardwood // eu+efta+uk by Articulated lorry transport, Euro 4, Total weight >32 t - EU+EFTA+UK: 0.591485; = kg_km_27
- Transport of bark, softwood // bark, softwood // eu+efta+uk by Freight train, average - EU+EFTA+UK: 1.09197; = kg_km_28
- Transport of bark, softwood // bark, softwood // eu+efta+uk by Barge - EU+EFTA+UK: 1.22847; = kg_km_29
- Transport of bark, softwood // bark, softwood // eu+efta+uk by Articulated lorry transport, Euro 4, Total weight >32 t - EU+EFTA+UK: 0.591485; = kg_km_30
- Transport of heavy fuel oil (1.0 wt.% s) // heavy fuel oil at refinery // eu+efta+uk by Freight train, average - EU+EFTA+UK: 0.78898; = kg_km_31
- Transport of heavy fuel oil (1.0 wt.% s) // heavy fuel oil at refinery // eu+efta+uk by Barge - EU+EFTA+UK: 0.886978; = kg_km_32
- Transport of heavy fuel oil (1.0 wt.% s) // heavy fuel oil at refinery // eu+efta+uk by Articulated lorry transport, Euro 4, Total weight >32 t - EU+EFTA+UK: 0.426989; = kg_km_33
- Transport of light fuel oil // light fuel oil at refinery // eu+efta+uk by Freight train, average - EU+EFTA+UK: 0.00698982; = kg_km_34
- Transport of light fuel oil // light fuel oil at refinery // eu+efta+uk by Barge - EU+EFTA+UK: 0.0078698; = kg_km_35
- Transport of light fuel oil // light fuel oil at refinery // eu+efta+uk by Articulated lorry transport, Euro 4, Total weight >32 t - EU+EFTA+UK: 0.0037899; = kg_km_36
- Transport of hard coal, at consumer eu+efta // hard coal mix // eu+efta+uk by Freight train, average - EU+EFTA+UK: 0.0557986; = kg_km_37
- Transport of hard coal, at consumer eu+efta // hard coal mix // eu+efta+uk by Barge - EU+EFTA+UK: 0.0627984; = kg_km_38
- Transport of hard coal, at consumer eu+efta // hard coal mix // eu+efta+uk by Articulated lorry transport, Euro 4, Total weight >32 t - EU+EFTA+UK: 0.0301992; = kg_km_39
- Transport of lignite eu+efta // lignite mix // eu+efta+uk by Freight train, average - EU+EFTA+UK: 0.294993; = kg_km_40
- Transport of lignite eu+efta // lignite mix // eu+efta+uk by Barge - EU+EFTA+UK: 0.331992; = kg_km_41
- Transport of lignite eu+efta // lignite mix // eu+efta+uk by Articulated lorry transport, Euro 4, Total weight >32 t - EU+EFTA+UK: 0.159996; = kg_km_42
- Transport of sodium formate // sodium formate production // eu+efta+uk by Freight train, average - EU+EFTA+UK: 0.0078898; = kg_km_43
- Transport of sodium formate // sodium formate production // eu+efta+uk by Barge - EU+EFTA+UK: 0.00887978; = kg_km_44
- Transport of sodium formate // sodium formate production // eu+efta+uk by Articulated lorry transport, Euro 4, Total weight >32 t - EU+EFTA+UK: 0.00426989; = kg_km_45
- Transport of hydrogen peroxide, 100% // hydrogen peroxide, 100% production // eu+efta+uk by Freight train, average - EU+EFTA+UK: 1.72996; = kg_km_46
- Transport of hydrogen peroxide, 100% // hydrogen peroxide, 100% production // eu+efta+uk by Barge - EU+EFTA+UK: 1.94995; = kg_km_47
- Transport of hydrogen peroxide, 100% // hydrogen peroxide, 100% production // eu+efta+uk by Articulated lorry transport, Euro 4, Total weight >32 t - EU+EFTA+UK: 0.937976; = kg_km_48
- Transport of oxygen // oxygen production // eu+efta+uk by Freight train, average - EU+EFTA+UK: 5.34986; = kg_km_49
- Transport of oxygen // oxygen production // eu+efta+uk by Barge - EU+EFTA+UK: 6.01985; = kg_km_50
- Transport of oxygen // oxygen production // eu+efta+uk by Articulated lorry transport, Euro 4, Total weight >32 t - EU+EFTA+UK: 2.89993; = kg_km_51
- Transport of sodium chlorate // sodium chlorate production // glo by Freight train, average - EU+EFTA+UK: 2.21994; = kg_km_52
- Transport of sodium chlorate // sodium chlorate production // glo by Barge - EU+EFTA+UK: 2.48994; = kg_km_53
- Transport of sodium chlorate // sodium chlorate production // glo by Articulated lorry transport, Euro 4, Total weight >32 t - EU+EFTA+UK: 1.19997; = kg_km_54
- Transport of sodium hydroxide // sodium hydroxide production // eu+efta+uk by Freight train, average - EU+EFTA+UK: 6.84983; = kg_km_55
- Transport of sodium hydroxide // sodium hydroxide production // eu+efta+uk by Barge - EU+EFTA+UK: 7.69981; = kg_km_56
- Transport of sodium hydroxide // sodium hydroxide production // eu+efta+uk by Articulated lorry transport, Euro 4, Total weight >32 t - EU+EFTA+UK: 3.70991; = kg_km_57
- Transport of sulphuric acid // sulphuric acid production // eu+efta+uk by Freight train, average - EU+EFTA+UK: 5.98985; = kg_km_58
- Transport of sulphuric acid // sulphuric acid production // eu+efta+uk by Barge - EU+EFTA+UK: 6.73983; = kg_km_59
- Transport of sulphuric acid // sulphuric acid production // eu+efta+uk by Articulated lorry transport, Euro 4, Total weight >32 t - EU+EFTA+UK: 3.24992; = kg_km_60
- Transport of chlorine dioxide // chlorine dioxide production // glo by Freight train, average - EU+EFTA+UK: 1.84995; = kg_km_61
- Transport of chlorine dioxide // chlorine dioxide production // glo by Barge - EU+EFTA+UK: 2.07995; = kg_km_62
- Transport of chlorine dioxide // chlorine dioxide production // glo by Articulated lorry transport, Euro 4, Total weight >32 t - EU+EFTA+UK: 0.999975; = kg_km_63
- Transport of sodium sulphate // sodium sulphate production // eu+efta+uk by Freight train, average - EU+EFTA+UK: 0.00311992; = kg_km_64
- Transport of sodium sulphate // sodium sulphate production // eu+efta+uk by Barge - EU+EFTA+UK: 0.00349991; = kg_km_65
- Transport of sodium sulphate // sodium sulphate production // eu+efta+uk by Articulated lorry transport, Euro 4, Total weight >32 t - EU+EFTA+UK: 0.00168996; = kg_km_66
- Transport of precipitated calcium carbonate // precipitated calcium carbonate production // eu+efta+uk by Freight train, average - EU+EFTA+UK: 0.367991; = kg_km_67
- Transport of precipitated calcium carbonate // precipitated calcium carbonate production // eu+efta+uk by Barge - EU+EFTA+UK: 0.41399; = kg_km_68
- Transport of precipitated calcium carbonate // precipitated calcium carbonate production // eu+efta+uk by Articulated lorry transport, Euro 4, Total weight >32 t - EU+EFTA+UK: 0.198995; = kg_km_69
- Transport of aluminium sulphate powder // aluminium sulphate powder production // eu+efta+uk by Freight train, average - EU+EFTA+UK: 0.169996; = kg_km_70
- Transport of aluminium sulphate powder // aluminium sulphate powder production // eu+efta+uk by Barge - EU+EFTA+UK: 0.191995; = kg_km_71
- Transport of aluminium sulphate powder // aluminium sulphate powder production // eu+efta+uk by Articulated lorry transport, Euro 4, Total weight >32 t - EU+EFTA+UK: 0.0922977; = kg_km_72
- Transport of methanol // methanol production // eu+efta+uk by Freight train, average - EU+EFTA+UK: 0.0488988; = kg_km_73
- Transport of methanol // methanol production // eu+efta+uk by Barge - EU+EFTA+UK: 0.0549986; = kg_km_74
- Transport of methanol // methanol production // eu+efta+uk by Articulated lorry transport, Euro 4, Total weight >32 t - EU+EFTA+UK: 0.0264993; = kg_km_75
- Transport of edta // edta production // eu+efta+uk by Freight train, average - EU+EFTA+UK: 0.0238994; = kg_km_76
- Transport of edta // edta production // eu+efta+uk by Barge - EU+EFTA+UK: 0.0268993; = kg_km_77
- Transport of edta // edta production // eu+efta+uk by Articulated lorry transport, Euro 4, Total weight >32 t - EU+EFTA+UK: 0.0129997; = kg_km_78
- Electricity from Electricity grid mix 1kV-60kV - EU+EFTA+UK: 0.0769525
- Transport of biodegradable waste to landfill // landfill of biodegradable waste // eu+efta+uk by Articulated lorry transport, Euro 4, Total weight >32 t - EU+EFTA+UK: 1.07367; = kg_km_79
- bleached kraft pulp, hardwood // bleached kraft pulp, hardwood // eu+efta+uk, blackbox: 1
- bleached kraft pulp, hardwood // bleached kraft pulp, hardwood // eu+efta+uk, elementary: 1

## Impact indicators
- Eutrophication marine: 0.000915815
- Ecotoxicity, freshwater: 1.66663
- Land use: 248.958
- Water use: 1.14011
- Resource use, minerals and metals: 2.88086e-6
- Resource use, fossils: 1.07873
- Climate change: 0.0997395
- Ozone depletion: 2.0499e-8
- Human toxicity, cancer: 3.10467e-10
- Human toxicity, non-cancer: 3.14454e-9
- EF-particulate Matter: 4.06535e-8
- Ionising radiation, human health: -0.0153763
- Photochemical ozone formation - human health: 0.00296429
- Acidification: 0.0021164
- Eutrophication, terrestrial: 0.00509212
- Eutrophication, freshwater: 4.74831e-5

## Deviations from the LCI method principle
The background data uses:
- the \xe2\x80\x9cRecycled content cut-off\xe2\x80\x9d approach to allocate end-of-life by-products and secondary materials. This allocation is explained in the description of the recycled content system model (http://www.ecoinvent.org/database/system-models-in-ecoinvent-3/cut-off-system-model/allocation-cut-off-by-classification.html).
OR
- EF compliant data

## Deviations from the LCI method approaches
Background data:
- the \xe2\x80\x9cRecycled content cut-off\xe2\x80\x9d approach to allocate end-of-life by-products and secondary materials. This allocation is explained in the description of the recycled content system model (http://www.ecoinvent.org/database/system-models-in-ecoinvent-3/cut-off-system-model/allocation-cut-off-by-classification.html). The ecoinvent database mostly relies on “Allocation – market values” apart for few exceptions particularly in the energy sector. ecoinvent energy data is replaced with EF3.0 core data as per the EF guidelines version 2.0.
OR
- EF compliant data

## Modelling constants
All modelling constants follow the requirements listed in the Tender Specifications 070201/2020/SER/ENV.B1. Completeness: There are no intentional cut-offs in the inventory no matter how small their contribution to all the EF impact categories is. Eventual cut-offs are in compliance with the Guide for EF compliant data sets (JRC 2020), i.e. only if below the 3% cut-off rule. Water use: water use is modelled at country level using separate flows for water withdrawal, water release and water evaporation. Handling multi-functional processes: the following PEF multi- functionality decision hierarchy is applied for resolving all multi- functionality problems: (1) subdivision or system expansion; (2) allocation based on a relevant underlying physical relationship (substitution may apply here); (3) allocation based on some other relationship. Direct land use change: GHG emissions from direct LUC allocated to good/service for 20 years after the LUC occurs, with IPCC default values. Carbon storage and delayed emissions: credits associated with temporary (carbon) storage or delayed emissions up to 300 years are not be considered. Emissions off-setting: are not included. Capital goods (including infrastructures) and their End of life: they are included. System boundaries: system boundaries include all processes linked to the product supply chain (e.g. maintenance). Time period: emissions and removals are modelled as if released or removed at the beginning of the assessment method. Fossil and biogenic carbon emissions and removals: removals and emissions are modelled as follows: All GHG emissions from fossil fuels (including peat and limestone) are modelled consistently with the most updated ILCD list of elementary flows. The non-fossil (biogenic) carbon flows are modelled consistently with the most updated ILCD list of elementary flows.

## Cut-off and completeness
There are no intentional cut-offs in the inventory no matter how small their contribution to all the EF impact categories is. Eventual cut-offs are in compliance with the Guide for EF compliant data sets (JRC 2020), i.e. only if below the 3% cut-off rule. The dataset dry mass and water balance has been checked to ensure the inventory is complete. Capital goods (e.g. infrastructure) and their end-of-life are included.

## Data selection and combination
These datasets include, in both their foreground and background data, links to EF3.0 compliant data.
The relevant background data on energy, transport, and End of Life are from the LCDN data node (http://lcdn.thinkstep.com/Node/).
All other background data in the supply of this product for which no EF3.0 process was available are from ecoinvent v3.7 database (www.ecoinvent.org) or other data sources.

## Data treatment and extrapolations
Several data sources have been used to model the inventory.

## Review details
Internal reviews have been asked to review the plausibility of the unit process, LCIA scores, and DQRs. Internal reviewers have also been asked to review the data for EF compliancy. The consortium is therefore responsible for aspects such as compliancy with the ILCD format, including validation in Look@LCI, and nomenclature.
Internal reviwers have been asked to judge based on the process name, that the unit process models in a complete and representative way the process in the requested location. The review encompassed the plausability of:
- exchanges with nature (elementary flows) as well as exchanges such as product and waste flows.
- meta information (general comment, technology comment, system boundaries, allocation, cut-off rules, etc.). Reviewers were asked to judge if the provided information is enough to understand the content of the process.
- LCIA scores
- DQRs including precision, technology, time and geography. As well as the overall DQR.
External reviewers have been asked to provide their expertise in the field of interest. External reviewers have been asked to review the unit process, including eventual methodological choices, the LCIA scores (provided with contribution scores as well), and DQRs. External reviewers have been provided all the information in a tool developed by the consortium for the purpose of this project.
External reviewers have been asked to judge based on the process name, that the unit process models in a complete and representative way the process in the requested location. The review encompassed:
- Plausability and completeness of exchanges with nature (elementary flows) as well as exchanges such as product and waste flows.
- Review of meta information (general comment, technology comment, system boundaries, allocation, cut-off rules, etc.). Reviewers were asked to judge if the provided information is enough to understand the content of the process.
- Review of properties (biogenic carbon and water content).
- Review of allocation keys.
- Plausability of LCIA scores calculated by the consortium.
- Plausability of DQRs including precision, technology, time and geography. As well as the overall DQR.

## Data sources
- Background Data for Representative products and organisations. EF 3.0 compliant (data stock)
- The European Pulp Industry Sector Association AISBL (EPIS), (2020). EPIS Life Cycle Inventory data for Northern Bleached Hardwood Kraft Pulp, 2020 Data.

## Intended applications
Implementation of regular Product Environmental Footprint (PEF) studies and Organisation Environmental Footprint (OEF) studies exclusively under the specified Product groups and sectors as defined in the Product Environmental Footprint Category Rules (PEFCR) and Organisation Environmental Footprint Sectorial Rules (OEFSR) listed in http://ec.europa.eu/environment/eussd/smgp/PEFCR_OEFSR.htm
