# dressed finnraccoon fur, farmed, global origin except china; technology mix; production mix, at plant; 1kg

Dataset: ILCD process, Partly terminated system
Geography: GLO
Reference year: 2012
Valid until: 2024
Classification: Materials production / Other materials
LCI method principle: Attributional
LCI method approaches: Allocation - market value
Completeness: All relevant flows quantified
Project: Provision of process-based 3.0 Environmental Footprint-compliant life cycle inventory datasets - Apparel 2 - contract number 070201/2020/840292/SER/ENV.B.1
Generated by: PRé Sustainability B.V.
Owner: PRé Sustainability B.V.
Compliance: ILCD Data Network - Entry-level; Suggestions for updating the PEF method 2019; ISO 14040 Environmental Management – Life Cycle Assessment – Principles and Framework, 2006; ISO 14044:2006. Environmental Management – Life Cycle Assessment – Requirements and guidelines.; Environmental Footprint 3.1
Review: Dependent internal review by Marisa Vieira, Avraam Symeonidis; Independent review panel by Madhuri Nigam
Data quality: Overall quality: Good; Time representativeness: Very good; Geographical representativeness: Very good; Technological representativeness: Very good; Precision: Good; Methodological appropriateness and consistency: Not applicable
Amounts: no units in this file; such an amount is in the reference unit of its flow, which a separate flow dataset defines
copyright: true
licenseType: Free of charge for some user types or use types
accessRestrictions: Free of charge for all final users implementing a regular Product Environmental Footprint (PEF) studies and Organisation Environmental Footprint (OEF) studies exclusively under the specified Product groups and sectors as defined in the Product Environmental Footprint Category Rules (PEFCR) and Organisation Environmental Footprint Sectorial Rules (OEFSR) listed in http://ec.europa.eu/environment/eussd/smgp/PEFCR_OEFSR.htm and in accordance with the terms and conditions of the EULA (available at https://ecoinvent.lca-data.com/) exclusively until 31st December 2024. Any use of this dataset or any derivative data not within the specific context of one of the PEF/OEF projects or after the end of 2024 is not permitted.

## General comment
Notice: this data set supersedes the EF3.0-compliant version (see link under "preceding data set version" below calculated with the EF3.0). The life cycle inventory is not changed from the original EF3.0 data set. The LCIA results are calculated based on the EF3.1 methods which provide updated characterisation factors in the following impact categories: Climate Change, Ecotoxicity freshwater, Photochemical Ozone Formation, Acidification, Human Toxicity non-cancer, and Human Toxicity cancer. The review report and the data quality ratings refer to the original results. The data set has been updated by the European Commission on the basis of the original EF3.0 data set delivered by the data provider.The dressed finnraccoon fur is produced from the processing of raw pelts after auctioning. Raw pelts, due to the preservation techniques that are used, are hard and dry. The hard and dry raw pelts are processed into leather to be used in the apparel industry with simultaneous conservation of the hairs through a process known as fur dressing.
The activity starts when the raw materials enter the process.
Materials entering the process are included as well as energy uses and transportation.
References
Bijleveld M., Korteland M., Sevenster M., (2011). The environmental impact of mink fur production, CE Delft, Delft, Netherlands
The referenced LCA fur study is from the year 2011 and is the best available study on LCA of fur, based on a discussion by call with the International Fur Federation (IFF).
The reference year of the dataset has been set to 2012.

Michael Black, Michele Canova, Stefan Rydin, Bianca Maria Scalet, Serge Roudier, Luis Delgado Sancho (2013). Best Available Techniques (BAT) Reference Document for the Tanning of Hides and Skins. JRC Reference Reports. Industrial Emissions Directive 2010/75/EU (Integrated Pollution Prevention and Control). https://op.europa.eu/en/publication-detail/-/publication/c9c39631-f89f-4bff-a154-fa82f8f8b569

## Technology and included processes
The steps that take place for the processing of raw pelts into dressed chinchilla fur are Soaking, Wetting, Bating, Tanning, Fatliquoring, Washing, Picking. The data from mink fur processing are used. The processing steps and substances used are similar to those of the leather processing. The difference is that for fur, the hairs are preserved and remain attached to the leather. The amounts of the substances used for Nappa soft leather manufacturing process have been used for fur as well as data from tested mink fur samples. Data have been further improved by the addition of electricity and thermal energy flows from a conventional leather tannery.
For the production of 1 kg of finnraccoon fur, 3.7 finnraccoon raw pelts are required. Fox pelt weight is used as a proxy for finnraccoon pelt weight - Exchange with IFF (International fur federation).
References
Bijleveld M., Korteland M., Sevenster M., (2011). The environmental impact of mink fur production, CE Delft, Delft, Netherlands

Michael Black, Michele Canova, Stefan Rydin, Bianca Maria Scalet, Serge Roudier, Luis Delgado Sancho (2013). Best Available Techniques (BAT) Reference Document for the Tanning of Hides and Skins. JRC Reference Reports. Industrial Emissions Directive 2010/75/EU (Integrated Pollution Prevention and Control). https://op.europa.eu/en/publication-detail/-/publication/c9c39631-f89f-4bff-a154-fa82f8f8b569

## Parameters
- kg_0: 4e-8
  Mass in kg, for 2-methylpentane; Transoceanic ship, containers; GLO
- km_0: 634.5
  Distance in km, for 2-methylpentane; Transoceanic ship, containers; GLO
- kg_km_0: 2.538e-5; = kg_0*km_0
  Transport amount in km*km, for 2-methylpentane; Transoceanic ship, containers; GLO
- kg_1: 4e-8
  Mass in kg, for 2-methylpentane; Freight train, diesel traction; EU+EFTA+UK
- km_1: 249.225
  Distance in km, for 2-methylpentane; Freight train, diesel traction; EU+EFTA+UK
- kg_km_1: 9.96898e-6; = kg_1*km_1
  Transport amount in km*km, for 2-methylpentane; Freight train, diesel traction; EU+EFTA+UK
- kg_2: 4e-8
  Mass in kg, for 2-methylpentane; Freight train, electricity traction; EU+EFTA+UK
- km_2: 84.776
  Distance in km, for 2-methylpentane; Freight train, electricity traction; EU+EFTA+UK
- kg_km_2: 3.39104e-6; = kg_2*km_2
  Transport amount in km*km, for 2-methylpentane; Freight train, electricity traction; EU+EFTA+UK
- kg_3: 4e-8
  Mass in kg, for 2-methylpentane; Freight train, average; EU+EFTA+UK
- km_3: 1.99948
  Distance in km, for 2-methylpentane; Freight train, average; EU+EFTA+UK
- kg_km_3: 7.99793e-8; = kg_3*km_3
  Transport amount in km*km, for 2-methylpentane; Freight train, average; EU+EFTA+UK
- kg_4: 4e-8
  Mass in kg, for 2-methylpentane; Barge; EU+EFTA+UK
- km_4: 19.6255
  Distance in km, for 2-methylpentane; Barge; EU+EFTA+UK
- kg_km_4: 7.85022e-7; = kg_4*km_4
  Transport amount in km*km, for 2-methylpentane; Barge; EU+EFTA+UK
- kg_5: 4e-8
  Mass in kg, for 2-methylpentane; Barge; ROW w/o EU+EFTA
- km_5: 40.0745
  Distance in km, for 2-methylpentane; Barge; ROW w/o EU+EFTA
- kg_km_5: 1.60298e-6; = kg_5*km_5
  Transport amount in km*km, for 2-methylpentane; Barge; ROW w/o EU+EFTA
- kg_6: 4e-8
  Mass in kg, for 2-methylpentane; Articulated lorry transport, Euro 4, Total weight >32 t; EU+EFTA+UK
- km_6: 159.266
  Distance in km, for 2-methylpentane; Articulated lorry transport, Euro 4, Total weight >32 t; EU+EFTA+UK
- kg_km_6: 6.37064e-6; = kg_6*km_6
  Transport amount in km*km, for 2-methylpentane; Articulated lorry transport, Euro 4, Total weight >32 t; EU+EFTA+UK
- kg_7: 4e-8
  Mass in kg, for 2-methylpentane; Articulated lorry transport, Total weight >32 t, mix Euro 0-5; ROW w/o EU+EFTA
- km_7: 420.334
  Distance in km, for 2-methylpentane; Articulated lorry transport, Total weight >32 t, mix Euro 0-5; ROW w/o EU+EFTA
- kg_km_7: 1.68134e-5; = kg_7*km_7
  Transport amount in km*km, for 2-methylpentane; Articulated lorry transport, Total weight >32 t, mix Euro 0-5; ROW w/o EU+EFTA
- kg_8: 0.000222143
  Mass in kg, for aluminium sulfate, without water, in 4.33% aluminium solution state; Transoceanic ship, containers; GLO
- km_8: 134823
  Distance in km, for aluminium sulfate, without water, in 4.33% aluminium solution state; Transoceanic ship, containers; GLO
- kg_km_8: 29.95; = kg_8*km_8
  Transport amount in km*km, for aluminium sulfate, without water, in 4.33% aluminium solution state; Transoceanic ship, containers; GLO
- kg_9: 0.000222143
  Mass in kg, for aluminium sulfate, without water, in 4.33% aluminium solution state; Freight train, diesel traction; EU+EFTA+UK
- km_9: 25810.6
  Distance in km, for aluminium sulfate, without water, in 4.33% aluminium solution state; Freight train, diesel traction; EU+EFTA+UK
- kg_km_9: 5.73365; = kg_9*km_9
  Transport amount in km*km, for aluminium sulfate, without water, in 4.33% aluminium solution state; Freight train, diesel traction; EU+EFTA+UK
- kg_10: 0.000222143
  Mass in kg, for aluminium sulfate, without water, in 4.33% aluminium solution state; Freight train, electricity traction; EU+EFTA+UK
- km_10: 8779.72
  Distance in km, for aluminium sulfate, without water, in 4.33% aluminium solution state; Freight train, electricity traction; EU+EFTA+UK
- kg_km_10: 1.95035; = kg_10*km_10
  Transport amount in km*km, for aluminium sulfate, without water, in 4.33% aluminium solution state; Freight train, electricity traction; EU+EFTA+UK
- kg_11: 0.000222143
  Mass in kg, for aluminium sulfate, without water, in 4.33% aluminium solution state; Freight train, average; EU+EFTA+UK
- km_11: 207.074
  Distance in km, for aluminium sulfate, without water, in 4.33% aluminium solution state; Freight train, average; EU+EFTA+UK
- kg_km_11: 0.046; = kg_11*km_11
  Transport amount in km*km, for aluminium sulfate, without water, in 4.33% aluminium solution state; Freight train, average; EU+EFTA+UK
- kg_12: 0.000222143
  Mass in kg, for aluminium sulfate, without water, in 4.33% aluminium solution state; Barge; EU+EFTA+UK
- km_12: 1820.2
  Distance in km, for aluminium sulfate, without water, in 4.33% aluminium solution state; Barge; EU+EFTA+UK
- kg_km_12: 0.404345; = kg_12*km_12
  Transport amount in km*km, for aluminium sulfate, without water, in 4.33% aluminium solution state; Barge; EU+EFTA+UK
- kg_13: 0.000222143
  Mass in kg, for aluminium sulfate, without water, in 4.33% aluminium solution state; Barge; ROW w/o EU+EFTA
- km_13: 3716.77
  Distance in km, for aluminium sulfate, without water, in 4.33% aluminium solution state; Barge; ROW w/o EU+EFTA
- kg_km_13: 0.825655; = kg_13*km_13
  Transport amount in km*km, for aluminium sulfate, without water, in 4.33% aluminium solution state; Barge; ROW w/o EU+EFTA
- kg_14: 0.000222143
  Mass in kg, for aluminium sulfate, without water, in 4.33% aluminium solution state; Articulated lorry transport, Euro 4, Total weight >32 t; EU+EFTA+UK
- km_14: 6457.04
  Distance in km, for aluminium sulfate, without water, in 4.33% aluminium solution state; Articulated lorry transport, Euro 4, Total weight >32 t; EU+EFTA+UK
- kg_km_14: 1.43438; = kg_14*km_14
  Transport amount in km*km, for aluminium sulfate, without water, in 4.33% aluminium solution state; Articulated lorry transport, Euro 4, Total weight >32 t; EU+EFTA+UK
- kg_15: 0.000222143
  Mass in kg, for aluminium sulfate, without water, in 4.33% aluminium solution state; Articulated lorry transport, Total weight >32 t, mix Euro 0-5; ROW w/o EU+EFTA
- km_15: 17041.4
  Distance in km, for aluminium sulfate, without water, in 4.33% aluminium solution state; Articulated lorry transport, Total weight >32 t, mix Euro 0-5; ROW w/o EU+EFTA
- kg_km_15: 3.78562; = kg_15*km_15
  Transport amount in km*km, for aluminium sulfate, without water, in 4.33% aluminium solution state; Articulated lorry transport, Total weight >32 t, mix Euro 0-5; ROW w/o EU+EFTA
- kg_16: 0.007
  Mass in kg, for dimethyl sulfate; Articulated lorry transport, Euro 4, Total weight >32 t; EU+EFTA+UK
- km_16: 51.4
  Distance in km, for dimethyl sulfate; Articulated lorry transport, Euro 4, Total weight >32 t; EU+EFTA+UK
- kg_km_16: 0.3598; = kg_16*km_16
  Transport amount in km*km, for dimethyl sulfate; Articulated lorry transport, Euro 4, Total weight >32 t; EU+EFTA+UK
- kg_17: 0.007
  Mass in kg, for dimethyl sulfate; Freight train, diesel traction; EU+EFTA+UK
- km_17: 5.08292
  Distance in km, for dimethyl sulfate; Freight train, diesel traction; EU+EFTA+UK
- kg_km_17: 0.0355804; = kg_17*km_17
  Transport amount in km*km, for dimethyl sulfate; Freight train, diesel traction; EU+EFTA+UK
- kg_18: 0.007
  Mass in kg, for dimethyl sulfate; Freight train, electricity traction; EU+EFTA+UK
- km_18: 8.01708
  Distance in km, for dimethyl sulfate; Freight train, electricity traction; EU+EFTA+UK
- kg_km_18: 0.0561196; = kg_18*km_18
  Transport amount in km*km, for dimethyl sulfate; Freight train, electricity traction; EU+EFTA+UK
- kg_19: 0.035
  Mass in kg, for ethoxylated alcohol (AE7); Freight train, diesel traction; EU+EFTA+UK
- km_19: 82.1216
  Distance in km, for ethoxylated alcohol (AE7); Freight train, diesel traction; EU+EFTA+UK
- kg_km_19: 2.87426; = kg_19*km_19
  Transport amount in km*km, for ethoxylated alcohol (AE7); Freight train, diesel traction; EU+EFTA+UK
- kg_20: 0.035
  Mass in kg, for ethoxylated alcohol (AE7); Freight train, electricity traction; EU+EFTA+UK
- km_20: 24.7992
  Distance in km, for ethoxylated alcohol (AE7); Freight train, electricity traction; EU+EFTA+UK
- kg_km_20: 0.867973; = kg_20*km_20
  Transport amount in km*km, for ethoxylated alcohol (AE7); Freight train, electricity traction; EU+EFTA+UK
- kg_21: 0.035
  Mass in kg, for ethoxylated alcohol (AE7); Freight train, average; EU+EFTA+UK
- km_21: 0.679178
  Distance in km, for ethoxylated alcohol (AE7); Freight train, average; EU+EFTA+UK
- kg_km_21: 0.0237712; = kg_21*km_21
  Transport amount in km*km, for ethoxylated alcohol (AE7); Freight train, average; EU+EFTA+UK
- kg_22: 0.035
  Mass in kg, for ethoxylated alcohol (AE7); Articulated lorry transport, Total weight >32 t, mix Euro 0-5; ROW w/o EU+EFTA
- km_22: 434.4
  Distance in km, for ethoxylated alcohol (AE7); Articulated lorry transport, Total weight >32 t, mix Euro 0-5; ROW w/o EU+EFTA
- kg_km_22: 15.204; = kg_22*km_22
  Transport amount in km*km, for ethoxylated alcohol (AE7); Articulated lorry transport, Total weight >32 t, mix Euro 0-5; ROW w/o EU+EFTA
- kg_23: 0.035
  Mass in kg, for ethoxylated alcohol (AE7); Transoceanic ship, containers; GLO
- km_23: 310.7
  Distance in km, for ethoxylated alcohol (AE7); Transoceanic ship, containers; GLO
- kg_km_23: 10.8745; = kg_23*km_23
  Transport amount in km*km, for ethoxylated alcohol (AE7); Transoceanic ship, containers; GLO
- kg_24: 0.035
  Mass in kg, for ethoxylated alcohol (AE7); Articulated lorry transport, Total weight <7.5 t, mix Euro 0-5; EU+EFTA+UK
- km_24: 12.739
  Distance in km, for ethoxylated alcohol (AE7); Articulated lorry transport, Total weight <7.5 t, mix Euro 0-5; EU+EFTA+UK
- kg_km_24: 0.445866; = kg_24*km_24
  Transport amount in km*km, for ethoxylated alcohol (AE7); Articulated lorry transport, Total weight <7.5 t, mix Euro 0-5; EU+EFTA+UK
- kg_25: 0.01
  Mass in kg, for polycarboxylates, 40% active substance; Barge; EU+EFTA+UK
- km_25: 21.9
  Distance in km, for polycarboxylates, 40% active substance; Barge; EU+EFTA+UK
- kg_km_25: 0.219; = kg_25*km_25
  Transport amount in km*km, for polycarboxylates, 40% active substance; Barge; EU+EFTA+UK
- kg_26: 0.01
  Mass in kg, for polycarboxylates, 40% active substance; Articulated lorry transport, Euro 4, Total weight >32 t; EU+EFTA+UK
- km_26: 171.3
  Distance in km, for polycarboxylates, 40% active substance; Articulated lorry transport, Euro 4, Total weight >32 t; EU+EFTA+UK
- kg_km_26: 1.713; = kg_26*km_26
  Transport amount in km*km, for polycarboxylates, 40% active substance; Articulated lorry transport, Euro 4, Total weight >32 t; EU+EFTA+UK
- kg_27: 0.01
  Mass in kg, for polycarboxylates, 40% active substance; Freight train, diesel traction; EU+EFTA+UK
- km_27: 16.9948
  Distance in km, for polycarboxylates, 40% active substance; Freight train, diesel traction; EU+EFTA+UK
- kg_km_27: 0.169948; = kg_27*km_27
  Transport amount in km*km, for polycarboxylates, 40% active substance; Freight train, diesel traction; EU+EFTA+UK
- kg_28: 0.01
  Mass in kg, for polycarboxylates, 40% active substance; Freight train, electricity traction; EU+EFTA+UK
- km_28: 26.8052
  Distance in km, for polycarboxylates, 40% active substance; Freight train, electricity traction; EU+EFTA+UK
- kg_km_28: 0.268052; = kg_28*km_28
  Transport amount in km*km, for polycarboxylates, 40% active substance; Freight train, electricity traction; EU+EFTA+UK
- kg_29: 0.015
  Mass in kg, for enzymes // enzymes production // eu+efta+uk; Articulated lorry transport, Euro 4, Total weight >32 t; EU+EFTA+UK
- km_29: 1000
  Distance in km, for enzymes // enzymes production // eu+efta+uk; Articulated lorry transport, Euro 4, Total weight >32 t; EU+EFTA+UK
- kg_km_29: 15; = kg_29*km_29
  Transport amount in km*km, for enzymes // enzymes production // eu+efta+uk; Articulated lorry transport, Euro 4, Total weight >32 t; EU+EFTA+UK
- kg_30: 0.05
  Mass in kg, for sodium dichromate // sodium dichromate production // glo; Articulated lorry transport, Euro 4, Total weight >32 t; EU+EFTA+UK
- km_30: 1000
  Distance in km, for sodium dichromate // sodium dichromate production // glo; Articulated lorry transport, Euro 4, Total weight >32 t; EU+EFTA+UK
- kg_km_30: 50; = kg_30*km_30
  Transport amount in km*km, for sodium dichromate // sodium dichromate production // glo; Articulated lorry transport, Euro 4, Total weight >32 t; EU+EFTA+UK
- kg_31: 0.01
  Mass in kg, for soda ash // soda ash production // glo; Articulated lorry transport, Euro 4, Total weight >32 t; EU+EFTA+UK
- km_31: 1000
  Distance in km, for soda ash // soda ash production // glo; Articulated lorry transport, Euro 4, Total weight >32 t; EU+EFTA+UK
- kg_km_31: 10; = kg_31*km_31
  Transport amount in km*km, for soda ash // soda ash production // glo; Articulated lorry transport, Euro 4, Total weight >32 t; EU+EFTA+UK
- kg_32: 0.01
  Mass in kg, for formic acid // formic acid production // eu+efta+uk; Articulated lorry transport, Euro 4, Total weight >32 t; EU+EFTA+UK
- km_32: 1000
  Distance in km, for formic acid // formic acid production // eu+efta+uk; Articulated lorry transport, Euro 4, Total weight >32 t; EU+EFTA+UK
- kg_km_32: 10; = kg_32*km_32
  Transport amount in km*km, for formic acid // formic acid production // eu+efta+uk; Articulated lorry transport, Euro 4, Total weight >32 t; EU+EFTA+UK
- kg_33: 3.8e-7
  Mass in kg, for formaldehyde // formaldehyde production // glo; Articulated lorry transport, Euro 4, Total weight >32 t; EU+EFTA+UK
- km_33: 1000
  Distance in km, for formaldehyde // formaldehyde production // glo; Articulated lorry transport, Euro 4, Total weight >32 t; EU+EFTA+UK
- kg_km_33: 0.00038; = kg_33*km_33
  Transport amount in km*km, for formaldehyde // formaldehyde production // glo; Articulated lorry transport, Euro 4, Total weight >32 t; EU+EFTA+UK
- kg_34: 6.7e-7
  Mass in kg, for ethyl acetate // ethyl acetate production // glo; Articulated lorry transport, Euro 4, Total weight >32 t; EU+EFTA+UK
- km_34: 1000
  Distance in km, for ethyl acetate // ethyl acetate production // glo; Articulated lorry transport, Euro 4, Total weight >32 t; EU+EFTA+UK
- kg_km_34: 0.00067; = kg_34*km_34
  Transport amount in km*km, for ethyl acetate // ethyl acetate production // glo; Articulated lorry transport, Euro 4, Total weight >32 t; EU+EFTA+UK
- kg_35: 3.31481
  Mass in kg, for finnraccoon raw pelt, at auction // finnraccoon raw pelt preparation and auction // fi; Articulated lorry transport, Euro 5, Total weight 28-32 t, cooled diesel driven; EU+EFTA+UK
- km_35: 270
  Distance in km, for finnraccoon raw pelt, at auction // finnraccoon raw pelt preparation and auction // fi; Articulated lorry transport, Euro 5, Total weight 28-32 t, cooled diesel driven; EU+EFTA+UK
- kg_km_35: 895; = kg_35*km_35
  Transport amount in km*km, for finnraccoon raw pelt, at auction // finnraccoon raw pelt preparation and auction // fi; Articulated lorry transport, Euro 5, Total weight 28-32 t, cooled diesel driven; EU+EFTA+UK
- kg_36: 0.015
  Mass in kg, for enzymes // enzymes production // eu+efta+uk; Transoceanic ship, containers; GLO
- km_36: 18000
  Distance in km, for enzymes // enzymes production // eu+efta+uk; Transoceanic ship, containers; GLO
- kg_km_36: 270; = kg_36*km_36
  Transport amount in km*km, for enzymes // enzymes production // eu+efta+uk; Transoceanic ship, containers; GLO
- kg_37: 3.8e-7
  Mass in kg, for formaldehyde // formaldehyde production // glo; Transoceanic ship, containers; GLO
- km_37: 18000
  Distance in km, for formaldehyde // formaldehyde production // glo; Transoceanic ship, containers; GLO
- kg_km_37: 0.00684; = kg_37*km_37
  Transport amount in km*km, for formaldehyde // formaldehyde production // glo; Transoceanic ship, containers; GLO
- kg_38: 0.01
  Mass in kg, for formic acid // formic acid production // eu+efta+uk; Transoceanic ship, containers; GLO
- km_38: 18000
  Distance in km, for formic acid // formic acid production // eu+efta+uk; Transoceanic ship, containers; GLO
- kg_km_38: 180; = kg_38*km_38
  Transport amount in km*km, for formic acid // formic acid production // eu+efta+uk; Transoceanic ship, containers; GLO
- kg_39: 0.01
  Mass in kg, for soda ash // soda ash production // glo; Transoceanic ship, containers; GLO
- km_39: 18000
  Distance in km, for soda ash // soda ash production // glo; Transoceanic ship, containers; GLO
- kg_km_39: 180; = kg_39*km_39
  Transport amount in km*km, for soda ash // soda ash production // glo; Transoceanic ship, containers; GLO
- kg_40: 3.31481
  Mass in kg, for finnraccoon raw pelt, at auction // finnraccoon raw pelt preparation and auction // fi; Transoceanic ship, containers; GLO
- km_40: 4860
  Distance in km, for finnraccoon raw pelt, at auction // finnraccoon raw pelt preparation and auction // fi; Transoceanic ship, containers; GLO
- kg_km_40: 16110; = kg_40*km_40
  Transport amount in km*km, for finnraccoon raw pelt, at auction // finnraccoon raw pelt preparation and auction // fi; Transoceanic ship, containers; GLO
- kg_41: 0.05
  Mass in kg, for sodium dichromate // sodium dichromate production // glo; Transoceanic ship, containers; GLO
- km_41: 18000
  Distance in km, for sodium dichromate // sodium dichromate production // glo; Transoceanic ship, containers; GLO
- kg_km_41: 900; = kg_41*km_41
  Transport amount in km*km, for sodium dichromate // sodium dichromate production // glo; Transoceanic ship, containers; GLO
- kg_42: 6.7e-7
  Mass in kg, for ethyl acetate // ethyl acetate production // glo; Transoceanic ship, containers; GLO
- km_42: 13525.2
  Distance in km, for ethyl acetate // ethyl acetate production // glo; Transoceanic ship, containers; GLO
- kg_km_42: 0.00906186; = kg_42*km_42
  Transport amount in km*km, for ethyl acetate // ethyl acetate production // glo; Transoceanic ship, containers; GLO

## Reference product
- dressed finnraccoon fur // dressed finnraccoon fur, farmed, global origin except china // glo: 1

## Inputs
- Transport of 2-methylpentane by Transoceanic ship, containers - GLO: 2.538e-5; = kg_km_0
- Transport of 2-methylpentane by Freight train, diesel traction - EU+EFTA+UK: 9.96898e-6; = kg_km_1
- Transport of 2-methylpentane by Freight train, electricity traction - EU+EFTA+UK: 3.39104e-6; = kg_km_2
- Transport of 2-methylpentane by Freight train, average - EU+EFTA+UK: 7.99793e-8; = kg_km_3
- Transport of 2-methylpentane by Barge - EU+EFTA+UK: 7.85022e-7; = kg_km_4
- Transport of 2-methylpentane by Barge - ROW w/o EU+EFTA: 1.60298e-6; = kg_km_5
- Transport of 2-methylpentane by Articulated lorry transport, Euro 4, Total weight >32 t - EU+EFTA+UK: 6.37064e-6; = kg_km_6
- Transport of 2-methylpentane by Articulated lorry transport, Total weight >32 t, mix Euro 0-5 - ROW w/o EU+EFTA: 1.68134e-5; = kg_km_7
- Transport of aluminium sulfate, without water, in 4.33% aluminium solution state by Transoceanic ship, containers - GLO: 29.95; = kg_km_8
- Transport of aluminium sulfate, without water, in 4.33% aluminium solution state by Freight train, diesel traction - EU+EFTA+UK: 5.73365; = kg_km_9
- Transport of aluminium sulfate, without water, in 4.33% aluminium solution state by Freight train, electricity traction - EU+EFTA+UK: 1.95035; = kg_km_10
- Transport of aluminium sulfate, without water, in 4.33% aluminium solution state by Freight train, average - EU+EFTA+UK: 0.046; = kg_km_11
- Transport of aluminium sulfate, without water, in 4.33% aluminium solution state by Barge - EU+EFTA+UK: 0.404345; = kg_km_12
- Transport of aluminium sulfate, without water, in 4.33% aluminium solution state by Barge - ROW w/o EU+EFTA: 0.825655; = kg_km_13
- Transport of aluminium sulfate, without water, in 4.33% aluminium solution state by Articulated lorry transport, Euro 4, Total weight >32 t - EU+EFTA+UK: 1.43438; = kg_km_14
- Transport of aluminium sulfate, without water, in 4.33% aluminium solution state by Articulated lorry transport, Total weight >32 t, mix Euro 0-5 - ROW w/o EU+EFTA: 3.78562; = kg_km_15
- Transport of dimethyl sulfate by Articulated lorry transport, Euro 4, Total weight >32 t - EU+EFTA+UK: 0.3598; = kg_km_16
- Transport of dimethyl sulfate by Freight train, diesel traction - EU+EFTA+UK: 0.0355804; = kg_km_17
- Transport of dimethyl sulfate by Freight train, electricity traction - EU+EFTA+UK: 0.0561196; = kg_km_18
- Electricity from Electricity grid mix 1kV-60kV - AU: 0.1734
- Electricity from Electricity grid mix 1kV-60kV - EU+EFTA+UK: 2.5544
- Electricity from Electricity grid mix 1kV-60kV - NZ: 0.033
- Electricity from Electricity grid mix 1kV-60kV - RAF: 0.5582
- Electricity from Electricity grid mix 1kV-60kV - RNA: 3.7382
- Electricity from Electricity grid mix 1kV-60kV - RSA: 1.2684
- Electricity from Electricity grid mix 1kV-60kV - RU: 0.7475
- Transport of ethoxylated alcohol (AE7) by Freight train, diesel traction - EU+EFTA+UK: 2.87426; = kg_km_19
- Transport of ethoxylated alcohol (AE7) by Freight train, electricity traction - EU+EFTA+UK: 0.867973; = kg_km_20
- Transport of ethoxylated alcohol (AE7) by Freight train, average - EU+EFTA+UK: 0.0237712; = kg_km_21
- Transport of ethoxylated alcohol (AE7) by Articulated lorry transport, Total weight >32 t, mix Euro 0-5 - ROW w/o EU+EFTA: 15.204; = kg_km_22
- Transport of ethoxylated alcohol (AE7) by Transoceanic ship, containers - GLO: 10.8745; = kg_km_23
- Transport of ethoxylated alcohol (AE7) by Articulated lorry transport, Total weight <7.5 t, mix Euro 0-5 - EU+EFTA+UK: 0.445866; = kg_km_24
- Transport of polycarboxylates, 40% active substance by Barge - EU+EFTA+UK: 0.219; = kg_km_25
- Transport of polycarboxylates, 40% active substance by Articulated lorry transport, Euro 4, Total weight >32 t - EU+EFTA+UK: 1.713; = kg_km_26
- Transport of polycarboxylates, 40% active substance by Freight train, diesel traction - EU+EFTA+UK: 0.169948; = kg_km_27
- Transport of polycarboxylates, 40% active substance by Freight train, electricity traction - EU+EFTA+UK: 0.268052; = kg_km_28
- Thermal energy (MJ) from Thermal energy from natural gas - EU+EFTA+UK: 11.97
- Thermal energy (MJ) from Thermal energy from natural gas - ROW: 102.03
- Transport of enzymes // enzymes production // eu+efta+uk by Articulated lorry transport, Euro 4, Total weight >32 t - EU+EFTA+UK: 15; = kg_km_29
- Transport of sodium dichromate // sodium dichromate production // glo by Articulated lorry transport, Euro 4, Total weight >32 t - EU+EFTA+UK: 50; = kg_km_30
- Transport of soda ash // soda ash production // glo by Articulated lorry transport, Euro 4, Total weight >32 t - EU+EFTA+UK: 10; = kg_km_31
- Transport of formic acid // formic acid production // eu+efta+uk by Articulated lorry transport, Euro 4, Total weight >32 t - EU+EFTA+UK: 10; = kg_km_32
- Transport of formaldehyde // formaldehyde production // glo by Articulated lorry transport, Euro 4, Total weight >32 t - EU+EFTA+UK: 0.00038; = kg_km_33
- Transport of ethyl acetate // ethyl acetate production // glo by Articulated lorry transport, Euro 4, Total weight >32 t - EU+EFTA+UK: 0.00067; = kg_km_34
- Transport of finnraccoon raw pelt, at auction // finnraccoon raw pelt preparation and auction // fi by Articulated lorry transport, Euro 5, Total weight 28-32 t, cooled diesel driven - EU+EFTA+UK: 895; = kg_km_35
- Transport of enzymes // enzymes production // eu+efta+uk by Transoceanic ship, containers - GLO: 270; = kg_km_36
- Transport of formaldehyde // formaldehyde production // glo by Transoceanic ship, containers - GLO: 0.00684; = kg_km_37
- Transport of formic acid // formic acid production // eu+efta+uk by Transoceanic ship, containers - GLO: 180; = kg_km_38
- Transport of soda ash // soda ash production // glo by Transoceanic ship, containers - GLO: 180; = kg_km_39
- Transport of finnraccoon raw pelt, at auction // finnraccoon raw pelt preparation and auction // fi by Transoceanic ship, containers - GLO: 16110; = kg_km_40
- Transport of sodium dichromate // sodium dichromate production // glo by Transoceanic ship, containers - GLO: 900; = kg_km_41
- Transport of ethyl acetate // ethyl acetate production // glo by Transoceanic ship, containers - GLO: 0.00906186; = kg_km_42
- Electricity from Electricity grid mix 1kV-60kV - CN: 3.83029
- Electricity from Electricity grid mix 1kV-60kV - RAS w/o CN: 4.19661
- dressed finnraccoon fur // dressed finnraccoon fur, farmed, global origin except china // glo, blackbox: 1
- dressed finnraccoon fur // dressed finnraccoon fur, farmed, global origin except china // glo, elementary: 1

## Impact indicators
- Eutrophication marine: 1.41887
- Ecotoxicity, freshwater: 18248.9
- Land use: 20538.4
- Water use: 202.07
- Resource use, minerals and metals: 0.000264016
- Resource use, fossils: 1878.1
- Climate change: 389.554
- Ozone depletion: 4.50469e-7
- Human toxicity, cancer: 4.76109e-7
- Human toxicity, non-cancer: 5.28712e-6
- EF-particulate Matter: 8.76591e-5
- Ionising radiation, human health: 7.86244
- Photochemical ozone formation - human health: 0.675407
- Acidification: 2.96045
- Eutrophication, terrestrial: 39.1477
- Eutrophication, freshwater: 0.0307153

## Deviations from the LCI method principle
The background data uses:
- the \xe2\x80\x9cRecycled content cut-off\xe2\x80\x9d approach to allocate end-of-life by-products and secondary materials. This allocation is explained in the description of the recycled content system model (http://www.ecoinvent.org/database/system-models-in-ecoinvent-3/cut-off-system-model/allocation-cut-off-by-classification.html).
OR
- EF compliant data

## Deviations from the LCI method approaches
Background data:
- the \xe2\x80\x9cRecycled content cut-off\xe2\x80\x9d approach to allocate end-of-life by-products and secondary materials. This allocation is explained in the description of the recycled content system model (http://www.ecoinvent.org/database/system-models-in-ecoinvent-3/cut-off-system-model/allocation-cut-off-by-classification.html). The ecoinvent database mostly relies on “Allocation – market values” apart for few exceptions particularly in the energy sector. ecoinvent energy data is replaced with EF3.0 core data as per the EF guidelines version 2.0.
OR
- EF compliant data

## Modelling constants
All modelling constants follow the requirements listed in the Tender Specifications 070201/2020/SER/ENV.B1. Completeness: There are no intentional cut-offs in the inventory no matter how small their contribution to all the EF impact categories is. Eventual cut-offs are in compliance with the Guide for EF compliant data sets (JRC 2020), i.e. only if below the 3% cut-off rule. Water use: water use is modelled at country level using separate flows for water withdrawal, water release and water evaporation. Handling multi-functional processes: the following PEF multi- functionality decision hierarchy is applied for resolving all multi- functionality problems: (1) subdivision or system expansion; (2) allocation based on a relevant underlying physical relationship (substitution may apply here); (3) allocation based on some other relationship. Direct land use change: GHG emissions from direct LUC allocated to good/service for 20 years after the LUC occurs, with IPCC default values. Carbon storage and delayed emissions: credits associated with temporary (carbon) storage or delayed emissions up to 300 years are not be considered. Emissions off-setting: are not included. Capital goods (including infrastructures) and their End of life: they are included. System boundaries: system boundaries include all processes linked to the product supply chain (e.g. maintenance). Time period: emissions and removals are modelled as if released or removed at the beginning of the assessment method. Fossil and biogenic carbon emissions and removals: removals and emissions are modelled as follows: All GHG emissions from fossil fuels (including peat and limestone) are modelled consistently with the most updated ILCD list of elementary flows. The non-fossil (biogenic) carbon flows are modelled consistently with the most updated ILCD list of elementary flows.

## Cut-off and completeness
There are no intentional cut-offs in the inventory no matter how small their contribution to all the EF impact categories is. Eventual cut-offs are in compliance with the Guide for EF compliant data sets (JRC 2020), i.e. only if below the 3% cut-off rule. The dataset dry mass and water balance has been checked to ensure the inventory is complete. Capital goods (e.g. infrastructure) and their end-of-life are included.

## Data selection and combination
These datasets include, in both their foreground and background data, links to EF3.0 compliant data.
The relevant background data on energy, transport, and End of Life are from the LCDN data node (http://lcdn.thinkstep.com/Node/).
All other background data in the supply of this product for which no EF3.0 process was available are from ecoinvent v3.7 database (www.ecoinvent.org) or other data sources.

## Data treatment and extrapolations
Several data sources have been used to model the inventory.

## Review details
Internal reviews have been asked to review the plausibility of the unit process, LCIA scores, and DQRs. Internal reviewers have also been asked to review the data for EF compliancy. The consortium is therefore responsible for aspects such as compliancy with the ILCD format, including validation in Look@LCI, and nomenclature.
Internal reviwers have been asked to judge based on the process name, that the unit process models in a complete and representative way the process in the requested location. The review encompassed the plausability of:
- exchanges with nature (elementary flows) as well as exchanges such as product and waste flows.
- meta information (general comment, technology comment, system boundaries, allocation, cut-off rules, etc.). Reviewers were asked to judge if the provided information is enough to understand the content of the process.
- LCIA scores
- DQRs including precision, technology, time and geography. As well as the overall DQR.
External reviewers have been asked to provide their expertise in the field of interest. External reviewers have been asked to review the unit process, including eventual methodological choices, the LCIA scores (provided with contribution scores as well), and DQRs. External reviewers have been provided all the information in a tool developed by the consortium for the purpose of this project.
External reviewers have been asked to judge based on the process name, that the unit process models in a complete and representative way the process in the requested location. The review encompassed:
- Plausability and completeness of exchanges with nature (elementary flows) as well as exchanges such as product and waste flows.
- Review of meta information (general comment, technology comment, system boundaries, allocation, cut-off rules, etc.). Reviewers were asked to judge if the provided information is enough to understand the content of the process.
- Review of properties (biogenic carbon and water content).
- Review of allocation keys.
- Plausability of LCIA scores calculated by the consortium.
- Plausability of DQRs including precision, technology, time and geography. As well as the overall DQR.

## Data sources
- Background Data for Representative products and organisations. EF 3.0 compliant (data stock)
- Bijleveld M., Korteland M., Sevenster M., (2011). The environmental impact of mink fur production, CE Delft, Delft, Netherlands
- Michael Black, Michele Canova, Stefan Rydin, Bianca Maria Scalet, Serge Roudier, Luis Delgado Sancho (2013). Best Available Techniques (BAT) Reference Document for the Tanning of Hides and Skins. JRC Reference Reports. Industrial Emissions Directive 2010/75/EU (Integrated Pollution Prevention and Control). https://op.europa.eu/en/publication-detail/-/publication/c9c39631-f89f-4bff-a154-fa82f8f8b569

## Intended applications
Implementation of regular Product Environmental Footprint (PEF) studies and Organisation Environmental Footprint (OEF) studies exclusively under the specified Product groups and sectors as defined in the Product Environmental Footprint Category Rules (PEFCR) and Organisation Environmental Footprint Sectorial Rules (OEFSR) listed in http://ec.europa.eu/environment/eussd/smgp/PEFCR_OEFSR.htm
