# leather, high environmental practice tannery, elementary; technology mix; production mix, at tannery; m2

Dataset: ILCD process, Unit process, single operation
Geography: EU+EFTA+UK
Reference year: 2021
Valid until: 2024
Classification: Other Services / Other services
LCI method principle: Attributional
LCI method approaches: Allocation - market value
Completeness: All relevant flows quantified
Project: Provision of process-based 3.0 Environmental Footprint-compliant life cycle inventory datasets - Apparel 3 - contract number 070201/2020/840294/SER/ENV.B.1
Generated by: PRé Sustainability B.V.
Owner: PRé Sustainability B.V.
Compliance: Environmental Footprint non-primary supporting data set; Environmental Footprint 3.1
Amounts: no units in this file; such an amount is in the reference unit of its flow, which a separate flow dataset defines
copyright: true
licenseType: Free of charge for some user types or use types
accessRestrictions: Free of charge for all final users implementing a regular Product Environmental Footprint (PEF) studies and Organisation Environmental Footprint (OEF) studies exclusively under the specified Product groups and sectors as defined in the Product Environmental Footprint Category Rules (PEFCR) and Organisation Environmental Footprint Sectorial Rules (OEFSR) listed in http://ec.europa.eu/environment/eussd/smgp/PEFCR_OEFSR.htm and in accordance with the terms and conditions of the EULA (available at https://ecoinvent.lca-data.com/) exclusively until 31st December 2024. Any use of this dataset or any derivative data not within the specific context of one of the PEF/OEF projects or after the end of 2024 is not permitted.

## General comment
Notice: this data set supersedes the EF3.0-compliant version (see link under "preceding data set version" below calculated with the EF3.0). The life cycle inventory is not changed from the original EF3.0 data set. The LCIA results are calculated based on the EF3.1 methods which provide updated characterisation factors in the following impact categories: Climate Change, Ecotoxicity freshwater, Photochemical Ozone Formation, Acidification, Human Toxicity non-cancer, and Human Toxicity cancer. The review report and the data quality ratings refer to the original results. The data set has been updated by the European Commission on the basis of the original EF3.0 data set delivered by the data provider.This sub-process has limited documentation only. For all detailed documentation of the full model to which this data set belongs (such as DQRs, review reports and other technical documentation), please see this process: leather, high environmental practice tannery - EU+EFTA+UK []

## Technology and included processes
System boundaries: The dataset describes the tanning and finishing of cattle leather. The inventory includes the following flows:
- Electricity and heat use
- Chemicals: chromium tanning agent, wetting agents, liming agents, fatliquors and other agents used in the processing of leather
- Water
- Emissions to water
- Transport of chemicals, and raw materials

It does not include:
- Packaging materials
- Certain chemicals have been replaced with proxies where there is no exact match
- Animal leathers for which market share is less than 1% (reptile)

## Reference product
- leather, high environmental practice tannery // leather, high environmental practice tannery // eu+efta+uk, elementary: 1

## Outputs
- ammonia, Emissions to air, unspecified [AL]: 0.000351157
- ammonia, Emissions to air, unspecified [AT]: 0.00452444
- ammonia, Emissions to air, unspecified [BA]: 0.000437767
- ammonia, Emissions to air, unspecified [BE]: 0.00544586
- ammonia, Emissions to air, unspecified [BG]: 0.00139451
- ammonia, Emissions to air, unspecified [BY]: 0.00181075
- ammonia, Emissions to air, unspecified [CH]: 0.00539614
- ammonia, Emissions to air, unspecified [CZ]: 0.00375568
- ammonia, Emissions to air, unspecified [DE]: 0.0408738
- ammonia, Emissions to air, unspecified [DK]: 0.00296381
- ammonia, Emissions to air, unspecified [EE]: 0.000404713
- ammonia, Emissions to air, unspecified [ES]: 0.0175401
- ammonia, Emissions to air, unspecified [FI]: 0.00252807
- ammonia, Emissions to air, unspecified [FR]: 0.0288323
- ammonia, Emissions to air, unspecified [GB]: 0.0286523
- ammonia, Emissions to air, unspecified: 0.00178609
- ammonia, Emissions to air, unspecified [GR]: 0.00325938
- ammonia, Emissions to air, unspecified [HR]: 0.001048
- ammonia, Emissions to air, unspecified [HU]: 0.00274733
- ammonia, Emissions to air, unspecified [IE]: 0.00295941
- ammonia, Emissions to air, unspecified [IT]: 0.0246683
- ammonia, Emissions to air, unspecified [LT]: 0.000864132
- ammonia, Emissions to air, unspecified [LU]: 0.000599883
- ammonia, Emissions to air, unspecified [LV]: 0.000509547
- ammonia, Emissions to air, unspecified [MD]: 0.000269611
- ammonia, Emissions to air, unspecified [MK]: 0.00029998
- ammonia, Emissions to air, unspecified [NL]: 0.00914418
- ammonia, Emissions to air, unspecified [NO]: 0.00346135
- ammonia, Emissions to air, unspecified [PL]: 0.0105239
- ammonia, Emissions to air, unspecified [PT]: 0.00332068
- ammonia, Emissions to air, unspecified [RO]: 0.00461016
- ammonia, Emissions to air, unspecified [SE]: 0.00499468
- ammonia, Emissions to air, unspecified [SI]: 0.000707319
- ammonia, Emissions to air, unspecified [SK]: 0.00166018
- ammonia, Emissions to air, unspecified [UA]: 0.00486767
- biological oxygen demand, Emissions to water, unspecified: 1.06325
- chemical oxygen demand, Emissions to water, unspecified: 0.093024
- chromium (iii), Emissions to fresh water: 0.0022
- Nitrogen oxides, Emissions to air, unspecified: 0.00129898
- sulfur oxides, Emissions to air, unspecified: 0.000324744
- nitrogen, total (excluding N2), Emissions to water, unspecified: 0.0109312
- Suspended solids, unspecified, Emissions to water, unspecified: 0.052008
- sulfate, Emissions to water, unspecified: 0.46048
- volatile organic compound, Emissions to air, unspecified: 0.0309836
- formaldehyde, Emissions to water, unspecified: 0.0242358
- sulfide, Emissions to water, unspecified: 0.002502
- Chlorides, unspecified, Emissions to water, unspecified: 1.24257
- Nitrogen oxides, Emissions to air, unspecified [AL]: 0.000255387
- Nitrogen oxides, Emissions to air, unspecified [AT]: 0.0032905
- Nitrogen oxides, Emissions to air, unspecified [BA]: 0.000318376
- Nitrogen oxides, Emissions to air, unspecified [BE]: 0.00396063
- Nitrogen oxides, Emissions to air, unspecified [BG]: 0.00101419
- Nitrogen oxides, Emissions to air, unspecified [BY]: 0.00131691
- Nitrogen oxides, Emissions to air, unspecified [CH]: 0.00392447
- Nitrogen oxides, Emissions to air, unspecified [CZ]: 0.0027314
- Nitrogen oxides, Emissions to air, unspecified [DE]: 0.0297264
- Nitrogen oxides, Emissions to air, unspecified [DK]: 0.0021555
- Nitrogen oxides, Emissions to air, unspecified [EE]: 0.000294336
- Nitrogen oxides, Emissions to air, unspecified [ES]: 0.0127564
- Nitrogen oxides, Emissions to air, unspecified [FI]: 0.0018386
- Nitrogen oxides, Emissions to air, unspecified [FR]: 0.0209689
- Nitrogen oxides, Emissions to air, unspecified [GB]: 0.020838
- Nitrogen oxides, Emissions to air, unspecified [GR]: 0.00237046
- Nitrogen oxides, Emissions to air, unspecified [HR]: 0.000762181
- Nitrogen oxides, Emissions to air, unspecified [HU]: 0.00199806
- Nitrogen oxides, Emissions to air, unspecified [IE]: 0.0021523
- Nitrogen oxides, Emissions to air, unspecified [IT]: 0.0179406
- Nitrogen oxides, Emissions to air, unspecified [LT]: 0.000628459
- Nitrogen oxides, Emissions to air, unspecified [LU]: 0.000436278
- Nitrogen oxides, Emissions to air, unspecified [LV]: 0.000370579
- Nitrogen oxides, Emissions to air, unspecified [MD]: 0.00019608
- Nitrogen oxides, Emissions to air, unspecified [MK]: 0.000218167
- Nitrogen oxides, Emissions to air, unspecified [NL]: 0.00665032
- Nitrogen oxides, Emissions to air, unspecified [NO]: 0.00251734
- Nitrogen oxides, Emissions to air, unspecified [PL]: 0.00765376
- Nitrogen oxides, Emissions to air, unspecified [PT]: 0.00241504
- Nitrogen oxides, Emissions to air, unspecified [RO]: 0.00335285
- Nitrogen oxides, Emissions to air, unspecified [SE]: 0.0036325
- Nitrogen oxides, Emissions to air, unspecified [SI]: 0.000514414
- Nitrogen oxides, Emissions to air, unspecified [SK]: 0.00120741
- Nitrogen oxides, Emissions to air, unspecified [UA]: 0.00354013
- Dissolved solids, Emissions to water, unspecified: 3.11808
- sulfur oxides, Emissions to air, unspecified [AL]: 6.38467e-5
- sulfur oxides, Emissions to air, unspecified [AT]: 0.000822625
- sulfur oxides, Emissions to air, unspecified [BA]: 7.9594e-5
- sulfur oxides, Emissions to air, unspecified [BE]: 0.000990157
- sulfur oxides, Emissions to air, unspecified [BG]: 0.000253548
- sulfur oxides, Emissions to air, unspecified [BY]: 0.000329228
- sulfur oxides, Emissions to air, unspecified [CH]: 0.000981117
- sulfur oxides, Emissions to air, unspecified [CZ]: 0.00068285
- sulfur oxides, Emissions to air, unspecified [DE]: 0.00743159
- sulfur oxides, Emissions to air, unspecified [DK]: 0.000538875
- sulfur oxides, Emissions to air, unspecified [EE]: 7.35841e-5
- sulfur oxides, Emissions to air, unspecified [ES]: 0.00318911
- sulfur oxides, Emissions to air, unspecified [FI]: 0.000459649
- sulfur oxides, Emissions to air, unspecified [FR]: 0.00524223
- sulfur oxides, Emissions to air, unspecified [GB]: 0.00520951
- sulfur oxides, Emissions to air, unspecified [GR]: 0.000592614
- sulfur oxides, Emissions to air, unspecified [HR]: 0.000190545
- sulfur oxides, Emissions to air, unspecified [HU]: 0.000499514
- sulfur oxides, Emissions to air, unspecified [IE]: 0.000538074
- sulfur oxides, Emissions to air, unspecified [IT]: 0.00448515
- sulfur oxides, Emissions to air, unspecified [LT]: 0.000157115
- sulfur oxides, Emissions to air, unspecified [LU]: 0.00010907
- sulfur oxides, Emissions to air, unspecified [LV]: 9.26449e-5
- sulfur oxides, Emissions to air, unspecified [MD]: 4.90201e-5
- sulfur oxides, Emissions to air, unspecified [MK]: 5.45418e-5
- sulfur oxides, Emissions to air, unspecified [NL]: 0.00166258
- sulfur oxides, Emissions to air, unspecified [NO]: 0.000629336
- sulfur oxides, Emissions to air, unspecified [PL]: 0.00191344
- sulfur oxides, Emissions to air, unspecified [PT]: 0.000603759
- sulfur oxides, Emissions to air, unspecified [RO]: 0.000838211
- sulfur oxides, Emissions to air, unspecified [SE]: 0.000908124
- sulfur oxides, Emissions to air, unspecified [SI]: 0.000128603
- sulfur oxides, Emissions to air, unspecified [SK]: 0.000301851
- sulfur oxides, Emissions to air, unspecified [UA]: 0.000885032

## Impact indicators
- Eutrophication marine: 0.0961155
- Ecotoxicity, freshwater: 510.276
- Human toxicity, cancer: 1.42909e-9
- Human toxicity, non-cancer: 8.51912e-9
- EF-particulate Matter: 5.36636e-6
- Photochemical ozone formation - human health: 0.175877
- Acidification: 0.584457
- Eutrophication, terrestrial: 2.14159
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
## Deviations from the LCI method principle
The background data uses:
- the \xe2\x80\x9cRecycled content cut-off\xe2\x80\x9d approach to allocate end-of-life by-products and secondary materials. This allocation is explained in the description of the recycled content system model (http://www.ecoinvent.org/database/system-models-in-ecoinvent-3/cut-off-system-model/allocation-cut-off-by-classification.html).
OR
- EF compliant data

## Deviations from the LCI method approaches
Background data:
- the \xe2\x80\x9cRecycled content cut-off\xe2\x80\x9d approach to allocate end-of-life by-products and secondary materials. This allocation is explained in the description of the recycled content system model (http://www.ecoinvent.org/database/system-models-in-ecoinvent-3/cut-off-system-model/allocation-cut-off-by-classification.html). The ecoinvent database mostly relies on “Allocation – market values” apart for few exceptions particularly in the energy sector. ecoinvent energy data is replaced with EF3.0 core data as per the EF guidelines version 2.0.
OR
- EF compliant data

## Modelling constants
All modelling constants follow the requirements listed in the Tender Specifications 070201/2020/SER/ENV.B1. Completeness: There are no intentional cut-offs in the inventory no matter how small their contribution to all the EF impact categories is. Eventual cut-offs are in compliance with the Guide for EF compliant data sets (JRC 2020), i.e. only if below the 3% cut-off rule. Water use: water use is modelled at country level using separate flows for water withdrawal, water release and water evaporation. Handling multi-functional processes: the following PEF multi- functionality decision hierarchy is applied for resolving all multi- functionality problems: (1) subdivision or system expansion; (2) allocation based on a relevant underlying physical relationship (substitution may apply here); (3) allocation based on some other relationship. Direct land use change: GHG emissions from direct LUC allocated to good/service for 20 years after the LUC occurs, with IPCC default values. Carbon storage and delayed emissions: credits associated with temporary (carbon) storage or delayed emissions up to 300 years are not be considered. Emissions off-setting: are not included. Capital goods (including infrastructures) and their End of life: they are included. System boundaries: system boundaries include all processes linked to the product supply chain (e.g. maintenance). Time period: emissions and removals are modelled as if released or removed at the beginning of the assessment method. Fossil and biogenic carbon emissions and removals: removals and emissions are modelled as follows: All GHG emissions from fossil fuels (including peat and limestone) are modelled consistently with the most updated ILCD list of elementary flows. The non-fossil (biogenic) carbon flows are modelled consistently with the most updated ILCD list of elementary flows.

## Cut-off and completeness
There are no intentional cut-offs in the inventory no matter how small their contribution to all the EF impact categories is. Eventual cut-offs are in compliance with the Guide for EF compliant data sets (JRC 2020), i.e. only if below the 3% cut-off rule. The dataset dry mass and water balance has been checked to ensure the inventory is complete. Capital goods (e.g. infrastructure) and their end-of-life are included.

## Data selection and combination
These datasets include, in both their foreground and background data, links to EF3.0 compliant data.
The relevant background data on energy, transport, and End of Life are from the LCDN data node (http://lcdn.thinkstep.com/Node/).
All other background data in the supply of this product for which no EF3.0 process was available are from ecoinvent v3.7 database (www.ecoinvent.org) or other data sources.

## Data treatment and extrapolations
Several data sources have been used to model the inventory.

## Use advice
This data set is a supporting sub-data set and must be used exclusively as sub-data set of its corresponding level-1 partly disaggregated data set (see “General comment” field for exact name and UUID).

## Data sources
- Background Data for Representative products and organisations. EF 3.0 compliant (data stock)
- Andrea Fontanella, Benedetta Nucci, Primiano De Rosa-Giglio, and Ioannis Ioannidis. ‘Leather PEF Screening Report in the Context of the EU Product Environmental Footprint Category Rules (PEFCR) Pilots’, 11 November 2015.
- COTANCE and industriAll-Europe. ‘European Leather Industry - SOCIAL & ENVIRONMENTAL REPORT 2020’, 2020. https://www.euroleather.com/doc/SER/European%20Leather%20Industry%20-%20Social%20and%20Environmental%20Report%202020%20-%20EN%20web.pdf.
- COTANCE. ‘COTANCE, Personal Communications’, June 2021.
- Cuiodepur. ‘Description of the Consorzio Cuoiodepur Plant’, 2004. https://web.archive.org/web/20210707082819/http://www.cuoiodepur.it/wp-content/uploads/2016/06/relazione.pdf.
- De Rosa-Giglio, Fontanella, Gonzalez-Quijano, Ioannidis, Nucci, and Brugnoli. ‘PRODUCT ENVIRONMENTAL FOOTPRINT CATEGORY RULES Leather’, 25 April 2018.
- Acque del Chiampo. ‘Acque del Chiampo Wastewater Treatment 2019 Sustainability Report (Italian)’, 2019. https://web.archive.org/web/20210707082948/https://www.acquedelchiampospa.it/FILES/files/Trasparenza/2020/bilanciosolidale2018_compresso.pdf.

## Intended applications
Implementation of regular Product Environmental Footprint (PEF) studies and Organisation Environmental Footprint (OEF) studies exclusively under the specified Product groups and sectors as defined in the Product Environmental Footprint Category Rules (PEFCR) and Organisation Environmental Footprint Sectorial Rules (OEFSR) listed in http://ec.europa.eu/environment/eussd/smgp/PEFCR_OEFSR.htm
