# ramie fibre; technology mix; production mix, at farm; raw fiber

Dataset: ILCD process, Partly terminated system
Geography: GLO
Reference year: 2018
Valid until: 2024
Classification: Materials production / Food and renewable raw materials
LCI method principle: Attributional
LCI method approaches: Allocation - market value
Completeness: All relevant flows quantified
Project: Provision of process-based 3.0 Environmental Footprint-compliant life cycle inventory datasets - Renewable materials - contract number 070201/2020/840085/SER/ENV.B.1
Generated by: ecoinvent
Owner: ecoinvent
Compliance: ILCD Data Network - Entry-level; Suggestions for updating the PEF method 2019; ISO 14040 Environmental Management – Life Cycle Assessment – Principles and Framework, 2006; ISO 14044:2006. Environmental Management – Life Cycle Assessment – Requirements and guidelines.; Environmental Footprint 3.1
Review: Dependent internal review by Lucia Valsasina, Emilia Moreno Ruiz; Independent review panel by Philippa Notten
Data quality: Overall quality: Good; Time representativeness: Very good; Geographical representativeness: Good; Technological representativeness: Good; Precision: Good; Methodological appropriateness and consistency: Not applicable
Amounts: no units in this file; such an amount is in the reference unit of its flow, which a separate flow dataset defines
copyright: true
licenseType: Free of charge for some user types or use types
accessRestrictions: Free of charge for all final users implementing a regular Product Environmental Footprint (PEF) studies and Organisation Environmental Footprint (OEF) studies exclusively under the specified Product groups and sectors as defined in the Product Environmental Footprint Category Rules (PEFCR) and Organisation Environmental Footprint Sectorial Rules (OEFSR) listed in http://ec.europa.eu/environment/eussd/smgp/PEFCR_OEFSR.htm and in accordance with the terms and conditions of the EULA (available at https://ecoinvent.lca-data.com/) exclusively until 31st December 2024. Any use of this dataset or any derivative data not within the specific context of one of the PEF/OEF projects or after the end of 2024 is not permitted.

## General comment
Notice: this data set supersedes the EF3.0-compliant version (see link under "preceding data set version" below calculated with the EF3.0). The life cycle inventory is not changed from the original EF3.0 data set. The LCIA results are calculated based on the EF3.1 methods which provide updated characterisation factors in the following impact categories: Climate Change, Ecotoxicity freshwater, Photochemical Ozone Formation, Acidification, Human Toxicity non-cancer, and Human Toxicity cancer. The review report and the data quality ratings refer to the original results. The data set has been updated by the European Commission on the basis of the original EF3.0 data set delivered by the data provider.This dataset models the production of 1 kg Ramie fibre, also called China grass or white ramie. They are natural, white-coloured, very strong, durable, lustrous, and moisture-absorbent fibres. They are typically used for textile production, industrial sewing thread, packing materials, fishing nets, household furnishings and clothing, frequently in blends with other textile fibres while the shorter fibres and waste are used in paper manufacture .

Reference

Petruzzello M., 2022. ramie plant, Encyclopaedia Britannica, Available at: https://www.britannica.com/plant/ramie

## Technology and included processes
Ramie fibre is produced from a perennial and herbaceous plant, called also ramie. The production process begins after the plant is harvested. Firstly, it is peeled to remove the bark from the stem and them it is degummed to remove any gummy matters such as pectin, hemicellulose and lignin. The fibre is chemically treated with chlorine, sulfuric acid and sodium hydroxide to dissolve the gummy matters and then it is washed with water. During the process, various by-products are generated. The by-products of bark (1.07152143 kg / kg fibre), leaves (5.23827143 kg / kg fibre) and stalk (3.92857857 kg / kg fibre) are considered residues, meaning that according to FAO, 2014 for the cut-off modelling approach applied, upstream emissions shall not be attributes to them. For the by-product of lignin (0.6667 kg /kg fibre), economic allocation is applied attributing an economic value of 0.45 Euros / kg lignin and 0.49 Euros / kg ramie fibre.

Reference

FAO, 2014. Environmental performance of animal feeds supply chain, Guidelines for quantification, Livestock Environmental Assessment and Performance Partnership (LEAP) Available at: https://www.fao.org/3/mj751e/mj751e.pdf

Dong, S., 2018. Life Cycle Assessment of Ramie Fiber Used for FRPs. Aerospace 2018, 5, 81; doi:10.3390/aerospace5030081. Available at: https://www.researchgate.net/publication/326819208_Life_Cycle_Assessment_of_Ramie_Fiber_Used_for_FRPs

## Parameters
- kg_0: 0.00545812
  Mass in kg, for chlorine, liquid; Freight train, diesel traction; EU+EFTA+UK
- km_0: 70.7726
  Distance in km, for chlorine, liquid; Freight train, diesel traction; EU+EFTA+UK
- kg_km_0: 0.386286; = kg_0*km_0
  Transport amount in km*km, for chlorine, liquid; Freight train, diesel traction; EU+EFTA+UK
- kg_1: 0.00545812
  Mass in kg, for chlorine, liquid; Freight train, electricity traction; EU+EFTA+UK
- km_1: 21.372
  Distance in km, for chlorine, liquid; Freight train, electricity traction; EU+EFTA+UK
- kg_km_1: 0.116651; = kg_1*km_1
  Transport amount in km*km, for chlorine, liquid; Freight train, electricity traction; EU+EFTA+UK
- kg_2: 0.00545812
  Mass in kg, for chlorine, liquid; Freight train, average; EU+EFTA+UK
- km_2: 0.585318
  Distance in km, for chlorine, liquid; Freight train, average; EU+EFTA+UK
- kg_km_2: 0.00319474; = kg_2*km_2
  Transport amount in km*km, for chlorine, liquid; Freight train, average; EU+EFTA+UK
- kg_3: 0.00545812
  Mass in kg, for chlorine, liquid; Articulated lorry transport, Total weight >32 t, mix Euro 0-5; ROW w/o EU+EFTA
- km_3: 62.64
  Distance in km, for chlorine, liquid; Articulated lorry transport, Total weight >32 t, mix Euro 0-5; ROW w/o EU+EFTA
- kg_km_3: 0.341897; = kg_3*km_3
  Transport amount in km*km, for chlorine, liquid; Articulated lorry transport, Total weight >32 t, mix Euro 0-5; ROW w/o EU+EFTA
- kg_4: 0.209331
  Mass in kg, for sodium hydroxide, without water, in 50% solution state; Transoceanic ship, containers; GLO
- km_4: 599
  Distance in km, for sodium hydroxide, without water, in 50% solution state; Transoceanic ship, containers; GLO
- kg_km_4: 125.39; = kg_4*km_4
  Transport amount in km*km, for sodium hydroxide, without water, in 50% solution state; Transoceanic ship, containers; GLO
- kg_5: 0.209331
  Mass in kg, for sodium hydroxide, without water, in 50% solution state; Freight train, diesel traction; EU+EFTA+UK
- km_5: 229.272
  Distance in km, for sodium hydroxide, without water, in 50% solution state; Freight train, diesel traction; EU+EFTA+UK
- kg_km_5: 47.9938; = kg_5*km_5
  Transport amount in km*km, for sodium hydroxide, without water, in 50% solution state; Freight train, diesel traction; EU+EFTA+UK
- kg_6: 0.209331
  Mass in kg, for sodium hydroxide, without water, in 50% solution state; Freight train, electricity traction; EU+EFTA+UK
- km_6: 77.9889
  Distance in km, for sodium hydroxide, without water, in 50% solution state; Freight train, electricity traction; EU+EFTA+UK
- kg_km_6: 16.3255; = kg_6*km_6
  Transport amount in km*km, for sodium hydroxide, without water, in 50% solution state; Freight train, electricity traction; EU+EFTA+UK
- kg_7: 0.209331
  Mass in kg, for sodium hydroxide, without water, in 50% solution state; Freight train, average; EU+EFTA+UK
- km_7: 1.8394
  Distance in km, for sodium hydroxide, without water, in 50% solution state; Freight train, average; EU+EFTA+UK
- kg_km_7: 0.385045; = kg_7*km_7
  Transport amount in km*km, for sodium hydroxide, without water, in 50% solution state; Freight train, average; EU+EFTA+UK
- kg_8: 0.209331
  Mass in kg, for sodium hydroxide, without water, in 50% solution state; Barge; EU+EFTA+UK
- km_8: 8.08691
  Distance in km, for sodium hydroxide, without water, in 50% solution state; Barge; EU+EFTA+UK
- kg_km_8: 1.69284; = kg_8*km_8
  Transport amount in km*km, for sodium hydroxide, without water, in 50% solution state; Barge; EU+EFTA+UK
- kg_9: 0.209331
  Mass in kg, for sodium hydroxide, without water, in 50% solution state; Barge; ROW w/o EU+EFTA
- km_9: 16.5131
  Distance in km, for sodium hydroxide, without water, in 50% solution state; Barge; ROW w/o EU+EFTA
- kg_km_9: 3.45671; = kg_9*km_9
  Transport amount in km*km, for sodium hydroxide, without water, in 50% solution state; Barge; ROW w/o EU+EFTA
- kg_10: 0.209331
  Mass in kg, for sodium hydroxide, without water, in 50% solution state; Articulated lorry transport, Euro 4, Total weight >32 t; EU+EFTA+UK
- km_10: 57.3754
  Distance in km, for sodium hydroxide, without water, in 50% solution state; Articulated lorry transport, Euro 4, Total weight >32 t; EU+EFTA+UK
- kg_km_10: 12.0105; = kg_10*km_10
  Transport amount in km*km, for sodium hydroxide, without water, in 50% solution state; Articulated lorry transport, Euro 4, Total weight >32 t; EU+EFTA+UK
- kg_11: 0.209331
  Mass in kg, for sodium hydroxide, without water, in 50% solution state; Articulated lorry transport, Total weight >32 t, mix Euro 0-5; ROW w/o EU+EFTA
- km_11: 151.425
  Distance in km, for sodium hydroxide, without water, in 50% solution state; Articulated lorry transport, Total weight >32 t, mix Euro 0-5; ROW w/o EU+EFTA
- kg_km_11: 31.6979; = kg_11*km_11
  Transport amount in km*km, for sodium hydroxide, without water, in 50% solution state; Articulated lorry transport, Total weight >32 t, mix Euro 0-5; ROW w/o EU+EFTA
- kg_12: 7.38402
  Mass in kg, for ramie plant, harvested // raw ramie // glo; Articulated lorry transport, Euro 4, Total weight >32 t; EU+EFTA+UK
- km_12: 70
  Distance in km, for ramie plant, harvested // raw ramie // glo; Articulated lorry transport, Euro 4, Total weight >32 t; EU+EFTA+UK
- kg_km_12: 516.881; = kg_12*km_12
  Transport amount in km*km, for ramie plant, harvested // raw ramie // glo; Articulated lorry transport, Euro 4, Total weight >32 t; EU+EFTA+UK
- kg_13: 0.11369
  Mass in kg, for sulphuric acid // sulphuric acid production // glo; Articulated lorry transport, Euro 4, Total weight >32 t; EU+EFTA+UK
- km_13: 998.363
  Distance in km, for sulphuric acid // sulphuric acid production // glo; Articulated lorry transport, Euro 4, Total weight >32 t; EU+EFTA+UK
- kg_km_13: 113.504; = kg_13*km_13
  Transport amount in km*km, for sulphuric acid // sulphuric acid production // glo; Articulated lorry transport, Euro 4, Total weight >32 t; EU+EFTA+UK
- kg_14: 0.11369
  Mass in kg, for sulphuric acid // sulphuric acid production // glo; Transoceanic ship, containers; GLO
- km_14: 18003.3
  Distance in km, for sulphuric acid // sulphuric acid production // glo; Transoceanic ship, containers; GLO
- kg_km_14: 2046.8; = kg_14*km_14
  Transport amount in km*km, for sulphuric acid // sulphuric acid production // glo; Transoceanic ship, containers; GLO

## Reference product
- ramie fibre // ramie fibre // glo: 1

## Inputs
- Transport of chlorine, liquid by Freight train, diesel traction - EU+EFTA+UK: 0.386286; = kg_km_0
- Transport of chlorine, liquid by Freight train, electricity traction - EU+EFTA+UK: 0.116651; = kg_km_1
- Transport of chlorine, liquid by Freight train, average - EU+EFTA+UK: 0.00319474; = kg_km_2
- Transport of chlorine, liquid by Articulated lorry transport, Total weight >32 t, mix Euro 0-5 - ROW w/o EU+EFTA: 0.341897; = kg_km_3
- Electricity from Electricity grid mix 1kV-60kV - AU: 0.0397575
- Electricity from Electricity grid mix 1kV-60kV - EU+EFTA+UK: 0.585508
- Electricity from Electricity grid mix 1kV-60kV - NZ: 0.00756694
- Electricity from Electricity grid mix 1kV-60kV - RAF: 0.12777
- Electricity from Electricity grid mix 1kV-60kV - RAS w/o CN: 1.84212
- Electricity from Electricity grid mix 1kV-60kV - RNA: 0.855933
- Electricity from Electricity grid mix 1kV-60kV - RSA: 0.290893
- Electricity from Electricity grid mix 1kV-60kV - RU: 0.171187
- Transport of sodium hydroxide, without water, in 50% solution state by Transoceanic ship, containers - GLO: 125.39; = kg_km_4
- Transport of sodium hydroxide, without water, in 50% solution state by Freight train, diesel traction - EU+EFTA+UK: 47.9938; = kg_km_5
- Transport of sodium hydroxide, without water, in 50% solution state by Freight train, electricity traction - EU+EFTA+UK: 16.3255; = kg_km_6
- Transport of sodium hydroxide, without water, in 50% solution state by Freight train, average - EU+EFTA+UK: 0.385045; = kg_km_7
- Transport of sodium hydroxide, without water, in 50% solution state by Barge - EU+EFTA+UK: 1.69284; = kg_km_8
- Transport of sodium hydroxide, without water, in 50% solution state by Barge - ROW w/o EU+EFTA: 3.45671; = kg_km_9
- Transport of sodium hydroxide, without water, in 50% solution state by Articulated lorry transport, Euro 4, Total weight >32 t - EU+EFTA+UK: 12.0105; = kg_km_10
- Transport of sodium hydroxide, without water, in 50% solution state by Articulated lorry transport, Total weight >32 t, mix Euro 0-5 - ROW w/o EU+EFTA: 31.6979; = kg_km_11
- Transport of ramie plant, harvested // raw ramie // glo by Articulated lorry transport, Euro 4, Total weight >32 t - EU+EFTA+UK: 516.881; = kg_km_12
- Transport of sulphuric acid // sulphuric acid production // glo by Articulated lorry transport, Euro 4, Total weight >32 t - EU+EFTA+UK: 113.504; = kg_km_13
- Transport of sulphuric acid // sulphuric acid production // glo by Transoceanic ship, containers - GLO: 2046.8; = kg_km_14
- ramie fibre // ramie fibre // glo, blackbox: 1
- ramie fibre // ramie fibre // glo, elementary: 1

## Impact indicators
- Eutrophication marine: 0.0640152
- Ecotoxicity, freshwater: 197.054
- Land use: 750.8
- Water use: 8.7846
- Resource use, minerals and metals: 8.13771e-6
- Resource use, fossils: 33.6323
- Climate change: 4.35454
- Ozone depletion: 2.05004e-7
- Human toxicity, cancer: 5.29488e-10
- Human toxicity, non-cancer: 7.87632e-8
- EF-particulate Matter: 9.88583e-7
- Ionising radiation, human health: 0.10237
- Photochemical ozone formation - human health: 0.0223247
- Acidification: 0.0440655
- Eutrophication, terrestrial: 0.168771
- Eutrophication, freshwater: 0.000936276

## Deviations from the LCI method principle
The background data uses:
- the \xe2\x80\x9cRecycled content cut-off\xe2\x80\x9d approach to allocate end-of-life by-products and secondary materials. This allocation is explained in the description of the recycled content system model (http://www.ecoinvent.org/database/system-models-in-ecoinvent-3/cut-off-system-model/allocation-cut-off-by-classification.html).
OR
- EF compliant data

## Deviations from the LCI method approaches
Background data:
- the \xe2\x80\x9cRecycled content cut-off\xe2\x80\x9d approach to allocate end-of-life by-products and secondary materials. This allocation is explained in the description of the recycled content system model (http://www.ecoinvent.org/database/system-models-in-ecoinvent-3/cut-off-system-model/allocation-cut-off-by-classification.html). The ecoinvent database mostly relies on “Allocation – market values” apart for few exceptions particularly in the energy sector. ecoinvent energy data is replaced with EF3.0 core data as per the EF guidelines version 2.0.
OR
- EF compliant data

## Modelling constants
All modelling constants follow the requirements listed in the Tender Specifications 070201/2020/SER/ENV.B1. Completeness: There are no intentional cut-offs in the inventory no matter how small their contribution to all the EF impact categories is. Eventual cut-offs are in compliance with the Guide for EF compliant data sets (JRC 2020), i.e. only if below the 3% cut-off rule. Water use: water use is modelled at country level using separate flows for water withdrawal, water release and water evaporation. Handling multi-functional processes: the following PEF multi- functionality decision hierarchy is applied for resolving all multi- functionality problems: (1) subdivision or system expansion; (2) allocation based on a relevant underlying physical relationship (substitution may apply here); (3) allocation based on some other relationship. Direct land use change: GHG emissions from direct LUC allocated to good/service for 20 years after the LUC occurs, with IPCC default values. Carbon storage and delayed emissions: credits associated with temporary (carbon) storage or delayed emissions up to 300 years are not be considered. Emissions off-setting: are not included. Capital goods (including infrastructures) and their End of life: they are included. System boundaries: system boundaries include all processes linked to the product supply chain (e.g. maintenance). Time period: emissions and removals are modelled as if released or removed at the beginning of the assessment method. Fossil and biogenic carbon emissions and removals: removals and emissions are modelled as follows: All GHG emissions from fossil fuels (including peat and limestone) are modelled consistently with the most updated ILCD list of elementary flows. The non-fossil (biogenic) carbon flows are modelled consistently with the most updated ILCD list of elementary flows.

## Cut-off and completeness
There are no intentional cut-offs in the inventory no matter how small their contribution to all the EF impact categories is. Eventual cut-offs are in compliance with the Guide for EF compliant data sets (JRC 2020), i.e. only if below the 3% cut-off rule. The dataset dry mass and water balance has been checked to ensure the inventory is complete. Capital goods (e.g. infrastructure) and their end-of-life are included.

## Data selection and combination
These datasets include, in both their foreground and background data, links to EF3.0 compliant data.
The relevant background data on energy, transport, and End of Life are from the LCDN data node (http://lcdn.thinkstep.com/Node/).
All other background data in the supply of this product for which no EF3.0 process was available are from ecoinvent v3.7 database (www.ecoinvent.org) or other data sources.

## Data treatment and extrapolations
Several data sources have been used to model the inventory.

## Review details
Internal reviews have been asked to review the plausibility of the unit process, LCIA scores, and DQRs. Internal reviewers have also been asked to review the data for EF compliancy. The consortium is therefore responsible for aspects such as compliancy with the ILCD format, including validation in Look@LCI, and nomenclature.
Internal reviwers have been asked to judge based on the process name, that the unit process models in a complete and representative way the process in the requested location. The review encompassed the plausability of:
- exchanges with nature (elementary flows) as well as exchanges such as product and waste flows.
- meta information (general comment, technology comment, system boundaries, allocation, cut-off rules, etc.). Reviewers were asked to judge if the provided information is enough to understand the content of the process.
- LCIA scores
- DQRs including precision, technology, time and geography. As well as the overall DQR.
External reviewers have been asked to provide their expertise in the field of interest. External reviewers have been asked to review the unit process, including eventual methodological choices, the LCIA scores (provided with contribution scores as well), and DQRs. External reviewers have been provided all the information in a tool developed by the consortium for the purpose of this project.
External reviewers have been asked to judge based on the process name, that the unit process models in a complete and representative way the process in the requested location. The review encompassed:
- Plausability and completeness of exchanges with nature (elementary flows) as well as exchanges such as product and waste flows.
- Review of meta information (general comment, technology comment, system boundaries, allocation, cut-off rules, etc.). Reviewers were asked to judge if the provided information is enough to understand the content of the process.
- Review of properties (biogenic carbon and water content).
- Review of allocation keys.
- Plausability of LCIA scores calculated by the consortium.
- Plausability of DQRs including precision, technology, time and geography. As well as the overall DQR.

## Data sources
- Background Data for Representative products and organisations. EF 3.0 compliant (data stock)
- Dong, S., 2018. Life Cycle Assessment of Ramie Fiber Used for FRPs. Aerospace 2018, 5, 81; doi:10.3390/aerospace5030081. Available at: https://www.researchgate.net/publication/326819208_Life_Cycle_Assessment_of_Ramie_Fiber_Used_for_FRPs
- Pelkans L., 2021. IEA Bioenergy Countries` Report - update 2021, Implementation of bioenergy in the IEA Bioenergy member countries, IEA Bioenergy ExCo Available at: https://www.ieabioenergy.com/wp-content/uploads/2021/11/CountriesReport2021_final.pdf
- Xu, Y., 2014. Kinetics of pyrolysis of ramie fabric wastes from thermogravimetric data. Journal Thermal Analysis and Calorimetry (2015) 119:651–657 Available at: https://www.researchgate.net/publication/273193090_Kinetics_of_pyrolysis_of_ramie_fabric_wastes_from_thermogravimetric_data

## Intended applications
Implementation of regular Product Environmental Footprint (PEF) studies and Organisation Environmental Footprint (OEF) studies exclusively under the specified Product groups and sectors as defined in the Product Environmental Footprint Category Rules (PEFCR) and Organisation Environmental Footprint Sectorial Rules (OEFSR) listed in http://ec.europa.eu/environment/eussd/smgp/PEFCR_OEFSR.htm
