# Residual grid mix; technology mix; consumption mix, to consumer; 1kV - 60kV

Dataset: ILCD process, Partly terminated system
Geography: EU+EFTA+UK
Reference year: 2013
Valid until: 2024
Classification: Energy carriers and technologies / Electricity
Synonyms: Residual power grid mix
LCI method principle: Attributional
LCI method approaches: Allocation - market value; Allocation - net calorific value; Allocation - exergetic content; Allocation - mass
Completeness: All relevant flows quantified
Share of supply or production covered: 95 %
Method details: PEF guide (2013/179/EU); GaBi Modelling Principles; GaBi Water Modelling Principles; GaBi Energy Modelling Principles; GaBi Refinery Modelling Principles; GaBi Agriculture Model Documentation; GaBi Land Use Change Model Documentation; Suggestions for updating the Organisation Environmental Footprint (OEF) method; Guide for EF compliant data sets; GaBi Agrarian Modelling Principles
Project: Provision of product environmental footprint-compliant life cycle inventory datasets. Contract number 070201/2019/802697/SER/ENV.B.1
Generated by: thinkstep
Owner: thinkstep
Compliance: ILCD Data Network - Entry-level; Suggestions for updating the PEF method 2019; ISO 14040 Environmental Management – Life Cycle Assessment – Principles and Framework, 2006; ISO 14044:2006. Environmental Management – Life Cycle Assessment – Requirements and guidelines.; Environmental Footprint 3.1
Review: Independent review panel by Peter Shonfield (PhD), Johannes Kreissig, Dr.-Ing. Wolfram Trinius
Data quality: Technological representativeness: Very good; Time representativeness: Very good; Geographical representativeness: Very good; Completeness: Not applicable; Precision: Good; Methodological appropriateness and consistency: Not applicable; Overall quality: Very good
Amounts: no units in this file; such an amount is in the reference unit of its flow, which a separate flow dataset defines
copyright: true
licenseType: Free of charge for some user types or use types
accessRestrictions: http://www.gabi-software.com/fileadmin/gabi/EULA_European_Commission_-_use_of_thinkstep_LCI_data.pdf

## General comment
The data set represents the country or region specific residual electricity supply for final consumers, including electricity own consumption, transmission/distribution losses of low voltage electricity supply and electricity imports from neighbouring countries. The national energy carrier mixes used for electricity production, the power plant efficiency data, shares on direct to combined heat and power generation (CHP), as well as transmission/distribution losses and own consumption values are taken from official statistics (International Energy Agency, and US-EPA eGRID for USA regions) for the corresponding reference year. Detailed power plant models were used, which combine measured (e.g. NOx) with calculated emission values (e.g. heavy metals). The inventory is partly based on primary industry data, partly on secondary literature data.

## Geography
The data set represents the residual grid mix including main activity producers and autoproducers as well as electricity imports/exports. Main technologies for firing, flue gas cleaning and electricity generation are considered according to the national or region specific situation.The geographical representativeness concerning the related country as well as its DQR is related to relevance of the contributors. Possible geographical variance of minor contributors below the cut-off criteria are not affecting the geographical representativeness of the overall process, but are positively affecting the completeness of the model.

## Time period
Annual average, the most recent data source consistently available for all countries (IEA for 2012) has been used. The DQR of the dataset reflects the quality of the data at the time of release. The user of the dataset should revise the DQR at the moment of application.

## Technology and included processes
Foreground system:
The residual mix is the grid attribute (emission, radioactive waste, etc.) average that is not allocated to a specific individual or end-consumer. If a consumer uses grid electricity without the cancelation of a Guarantee of Origin certificate (or other reliable tracking mechanism) than they are obligated to use the residual mix when calculating/reviewing their consumed electricity attributes (footprint). Organizations that are part of the European E-Track program, like Reliable Disclosure Systems for Europe (www.reliable-disclosure.org) calculate the national residual mixes annually.
Residual mix is used to determine the energy origin of untracked consumption, i.e. consumption, which has not been disclosed with explicit tracking instruments such as Guarantees of Origin. So if all electricity consumption was explicitly tracked to specific generation attributes, residual mix would not be needed.
The electricity is either produced in energy carrier specific power plants and/or combined heat and power plants (CHP). Also considered are the national and regional specific technology standards of the power plants in regard to efficiency, firing technology, flue-gas desulphurisation, NOx removal and de-dusting. The electricity provided by non-combustible renewable energy sources also considers the national or regional situation, such as solar radiation (photovoltaic), annual full load hours (wind power), and share of hydro power stations by type (run-of-river, storage and pumped storage).
The fossil power plant models combine emission data from literature with calculated values for non-measured emissions e.g. organics or heavy metals. For the emissions CO2, SO2, NOx, CO, CH4, N2O, NMVOC and particulate matter (PM) measured/calculated data are used, taken from national inventory reports, emission inventory data bases, utility companies and other sources. The calculation of other emissions within the models are based on energy carrier properties, transfer coefficients and power plant thermodynamics representing the applied flue gas treatment technologies and standards (flue gas desulphurisation, dust filter etc.). Combustion residues from solid fuels, such as gypsum, bottom ash or fly ash are assumed to be reused e.g. in construction work. Waste treatment for these substances is therefore not considered. Radioactive emissions from ashes are not considered in the coal power plant model.
The energy carrier supply considers the whole supply chain of the energy carrier from exploration, production, processing and transport of the fuels to the power plants. The supply chain is modelled in specific national / regional energy carrier consumption mixes (i.e. domestic production and imports), and considers national / regional average energy carrier properties (e.g. elemental composition and energy content).
The residual grid mix includes imported electricity from neighbouring countries, transmission / distribution losses of low voltage electricity supply and the own use of electricity by energy producers (own consumption of power plants, and "other" own consumption e.g. due to pumped storage hydro power etc.). The logic of modelling the residual grid mix is represented in the flow diagram "Modelling of Electricity Consumption Mixes".

The residual grid mixes data is extracted from the report “European Residual Mixes 2013” written in the frame of the RE-DISS II Project. For the use in an LCA dataset however, several issues had to be specified.
handling of the “renewable unspecified” ratio and “fossil unspecified” ratio: In the table 1 of the RE-DISS report, electricity from “renewable unspecified” and “fossil unspecified” are mentioned. In this dataset, the renewable unspecified ratio is modelled as the specific national renewable electricity production mix. Similarly, the fossil unspecified ratio is modelled as the specific national fossil electricity production mix.
handling of technologies which are not available in a specific country:
For the residual grid mix modelling, the country specific technologies are used. However, in some countries, the technology is not available since it is not directly installed in the country itself but listed as contributing to the residual grid mix. This is due to the import of electricity. In order to integrate this missing technology, the specific electricity production technology of the neighbor countries with which the considered country has electricity exchanges are considered. The share between the several countries is based on the contribution of each exporting country (where the technology is available) to the importing country.
For example in Austria no electricity is produced from lignite but it is stated in the data that Austria consumes electricity from lignite. This electricity from lignite is imported from Czech Republic , Germany, Hungary, Italy and Slovenia with their relative share in the quantity of imported electricity.

Background system:
Electricity: Electricity is modelled according to the individual country-specific situations. The country-specific modelling is achieved on multiple levels. Firstly, individual energy carrier specific power plants and plants for renewable energy sources are modelled according to the current national electricity grid mix. Modelling the electricity consumption mix includes transmission / distribution losses and the own use by energy producers (own consumption of power plants and "other" own consumption e.g. due to pumped storage hydro power etc.), as well as imported electricity. Secondly, the national emission and efficiency standards of the power plants are modelled as well as the share of electricity plants and combined heat and power plants (CHP). Thirdly, the country-specific energy carrier supply (share of imports and / or domestic supply) including the country-specific energy carrier properties (e.g. element and energy content) are accounted for. Fourthly, the exploration, mining/production, processing and transport processes of the energy carrier supply chains are modelled according to the specific situation of each electricity producing country. The different production and processing techniques (emissions and efficiencies) in the different energy producing countries are considered, e.g. different crude oil production technologies or different flaring rates at the oil platforms.
Thermal energy, process steam: The thermal energy and process steam supply is modelled according to the individual country-specific situation with regard to emission standards and considered energy carriers. The thermal energy and process steam are produced at heat plants. Efficiencies for thermal energy production are by definition 100% in relation to the corresponding energy carrier input. For process steam the efficiency ranges from 85%, 90% to 95%. The energy carriers used for the generation of thermal energy and process steam are modelled according to the specific import situation (see electricity above).
Transports: All relevant and known transport processes are included. Ocean-going and inland ship transport as well as rail, truck and pipeline transport of bulk commodities are considered.
Energy carriers: The energy carriers are modelled according to the specific supply situation (see electricity above).
Refinery products: Diesel fuel, gasoline, technical gases, fuel oils, lubricants and residues such as bitumen are modelled with a parameterised country-specific refinery model. The refinery model represents the current national standard in refining techniques (e.g. emission level, internal energy consumption, etc.) as well as the individual country-specific product output spectrum, which can be quite different from country to country. The supply of crude oil is modelled, again, according to the country-specific situation with the respective properties of the resources.

## Technical purpose
Supply of 1 kWh medium voltage (1kV - 60kV) electricity to final consumers.

## Model description
For mathematical model details concerning the implementation of the CCF formula see:
http://www.gabi-software.com/fileadmin/GaBi_Databases/PEF_CFF_model_description.pdf

## Reference product
- Electricity: 3.6; estimated

## Inputs
- Electricity PL: 0.165778
- Electricity DE: 0.643946
- Electricity FI: 0.0719758
- Electricity SE: 0.1703
- Electricity LT: 0.00515617
- Electricity NO: 0.151163
- Electricity EE: 0.00231583
- Electricity DK: 0.0314165
- Electricity SK: 0.0293073
- Electricity CZ: 0.0895382
- Electricity CY: 0.00482286
- Electricity MT: 0.00234139
- Electricity IS: 0.0179428
- Electricity AT: 0.0742456
- Electricity FR: 0.576938
- Electricity RO: 0.06037
- Electricity NL: 0.104805
- Electricity BG: 0.0483911
- Electricity SI: 0.016082
- Electricity GB: 0.372002
- Electricity GR: 0.062327
- Electricity IE: 0.0282112
- Electricity HU: 0.0353662
- Electricity PT: 0.0476601
- Electricity IT: 0.305993
- Electricity LV: 0.00630642
- Electricity ES: 0.304237
- Electricity HR: 0.0107939
- Electricity LU: 0.00389959
- Electricity CH: 0.0714339
- Electricity BE: 0.0849352

## Deviations from the LCI method approaches
For the combined heat and power (CHP) production allocation by exergetic content is applied. Electricity and power plant by-products, i.e. gypsum, boiler ash and fly ash are allocated by market value due to no common physical properties. Within the refinery allocation by mass (refinery expenditures) and net calorific value (feedstocks, e.g.crude oil) is used. For the combined crude oil, natural gas and natural gas liquids (NGL) production allocation by net calorific value is applied.

## Modelling constants
Direct land use change: GHG emissions from direct LUC allocated to good/service for 20 years after the LUC occurs.
Carbon storage and delayed emissions: credits associated with temporary (carbon) storage or delayed emissions are not considered in the calculation of the EF for the default impact categories.
Emissions off-setting: not included
Fossil and biogenic carbon emissions and removals: removals and emissions are modelled as follows: All GHG emissions from fossil fuels (including peat and limestone) are modelled consistently with the ILCD list of elementary flows. In the case that the emissions refer to the molecules CO2 and CH4, they are modelled as ‘carbon dioxide (fossil)’ and ‘methane (fossil)’. Biogenic uptake and emissions are modelled separately. For land use change, all carbon emissions and uptakes are inventoried separately for each of the elementary flows. Soil carbon accumulation (uptake) via improved agricultural management is excluded from the model.

## Cut-off and completeness
A cut-off rule based on mass or energy flow or the level of environmental significance of max. 3% is applied and confirmed by the reviewer. An active cut-off within the system has not been applied, no data gaps are known and all elementary flows of environmental effect are included in the inventory.

Capital goods (including infrastructures) and their end of life are included unless the exclusion is clearly documented and conform with the cut-off principles.

System boundaries include all known processes linked to the product supply chain.

## Deviations from cut-off and completeness
The capital goods (power plant construction and EoL) are included.
End-of-Life of the PV-modules is not included in the LCA-model.
Waste is entering the Waste-to-Energy product system without any environmental burden (burdens are allocated to the primary life cycle of the product in which the waste is generated, e.g. burdens of packing material becoming waste are allocated to the product).

## Data selection and combination
The data sources for the complete product system are sufficiently consistent: The electricity grid mix data are based on national statistics. The key emissions e.g. sulphur dioxide, nitrogen oxide, etc., of the power plants / combined heat and power (CHP) plants are based on measured operating data taken from national statistics. All other emissions from the power plants / combined heat and power plants (CHP) are based on literature data and / or calculated via energy carrier composition in combination with (literature-based) combustion models. Detailed power plant models are used, which combine measured (e.g. NOx) with calculated emission values (e.g. heavy metals). The data on the energy carrier supply chain are based on statistics with country / region-specific transport distances and energy carrier composition, as well as industry and literature data on the inventory of exploration, production and processing. Infrastructure data are from literature. Refinery data are also based on statistical data and measurements of major refineries as well as literature data.
For electricity from non-combustional renewable energy sources, like wind, hydro, solar (photovoltaic) and geothermal, also specific LCA modells are used. LCI modelling is fully consistent.

## Data treatment and extrapolations
Energy carrier specific power plants are modelled according to the national / regional firing and flue gas cleaning technology mix.Energy carrier specific power plants are modelled according to the national / regional conversion technology. Published data measured at representative power plants have been used to represent the country / region mix of power plant technologies. Also for electricity from non-combustional renewable energy sources, like wind, hydro, solar (photovoltaic) and geothermal, specific LCA modells are developed and used.

## Use advice
Notice: this data set supersedes the EF3.0-compliant version (see link under "preceding data set version" below calculated with the EF3.0). The life cycle inventory is not changed from the original EF3.0 data set. The LCIA results are calculated based on the EF3.1 methods which provide updated characterisation factors in the following impact categories: Climate Change, Ecotoxicity freshwater, Photochemical Ozone Formation, Acidification, Human Toxicity non-cancer, and Human Toxicity cancer. The review report and the data quality ratings refer to the original results. The data set has been updated by the European Commission on the basis of the original EF3.0 data set delivered by the data provider.Life Cycle Inventory (LCI) datasets to be used for implementing regular Product Environmental Footprint (PEF) studies and Organisation Environmental Footprint (OEF) studies exclusively under the specified Product groups and sectors as defined in the Product Environmental Footprint Category Rules (PEFCR) and Organisation Environmental Footprint Sectorial Rules (OEFSR) listed in http://ec.eiirona.eu/enviiOnment/eussd/smgp/PEFCR OEFSR en.htm and in accordance with the terms and conditions of this EULA exclusively until 31st December 2024 (PERMITTED USE).
The datasets are specifically designed for these methodological requirements (see above) and the related LCIA methods (listed below) recommended in EF.
For use outside this scope, see beforehand the license conditions at http://www.gabi-software.com/fileadmin/gabi/EULA_European_Commission_-_use_of_thinkstep_LCI_data.pdf

## Review details
The dataset is compliant to the 2019 JRC report “Suggestion for updating the PEF method”, the data guide “Guide for EF compliant data sets” and "ILCD Data Network - Entry-level".
This dataset has the following DQRs:
Technological representativeness: very good (1.0)
Time representativeness: very good (1.0)
Geographical representativeness: vey good (1.0)
Precision: good (2.0)
Very good overall quality (1.3)
In the EF context the fields “Methodological appropriateness and consistency” and “Completeness” shall be set as “Not applicable”.
The results are plausible, both for the impact category level results as well as for the most relevant elementary flows. The data set documentation is reflecting what has been modelled and is appropriate in terms of content and level of detail. The system boundaries include all relevant processes and activity types from cradle to gate, the not covered activities and flows (cut-off due to data limitations for less relevant contributors) jointly contribute less than 3% to the overall environmental impacts. An active cut-off, i.e. by excluding available data, has not been found. The LCI modelling choices follow the PEF and OEF guides, such as allocation, consistency of included processes, and LCI methodology in general; further requirements of the PEF guide and the PEF and OEF guidance documents (version 6.3 of 2018) are equally observed. The pre-calculated LCIA results that are provided for the EF3.0 impact categories have been calculated in correspondence of the Input and Output elementary flows (including their geographical validity, e.g. country-specific water consumption) with the applied LCIA method(s).
The DQR results are conservative expert judgements, confirmed or - if necessary - corrected by the reviewers, based on their methodological as well as process understanding and considering semi-quantitatively the contribution of the DQRs of the used EF energy and transport datasets and of EF-related DQRs provided and reviewed within the GaBi databases. The overall DQRs of the datasets consider primarily the quality and representativeness of the foreground technology information and that of the key upstream processes. If datasets are e.g. energy and transport intensive - or gain credits from energy recovery - the DQRs of the used EF energy and transport datasets influence the overall DQR significantly and have been taken into account via expert judgement. In case of doubt, lower (i.e. lower quality) DQRs were assigned.

## Other review details
The review procedure concerning EF 3.0 data is to be understood as additional review on top of the already existing independent panel review for EF 2.0, as far as updates are concerned. The review was undertaken as independent internal review for the update from EF 2.0 to EF 3.0; done by Peter Shonfield and Manfred Russ. Please see related EF 3.0 review details:
http://www.gabi-software.com/fileadmin/GaBi_Databases/Internal_Review_Statement_for_EF_3-0.pdf

## Data sources
- Wind in power 2011 - European statistics
- Wind - 2011 Annual Report
- Statistical Yearbook 2011
- Energy Balances of OECD Countries 2013
- Energy Statistics of OECD Countries 2013
- Energy Balances of Non-OECD Countries 2013
- Energy Statistics of Non-OECD Countries 2013
- World Energy Statistics 2013
- Electricity Information 2013
- K.Weissermel, H.- J. Arpe: Industrial organic chemistry
- Copper development association: Overview of Recycled Copper
- Smelter Tech: The Reverberatory Furnace
- Process for the production of a plasticized polyvinyl butyral for gluing a base onto a glazing
- LookChem: Manufacture of 1.12-Dodecanedioic Acid
- Methods of making cyclododecatriene and
- EPA - Health and Environmental Effects Profile for 2-Chloro-1,3-Butadiene, 1984
- Chlorpropanes, Chlorobutanes, and Chlorobutenes: Chapter in Ullmann's, 2011
- Chloroprene - Données technico-économiques sur les substances chimiques en France - 2006
- Renewables Information 2011
- Energy Balances of Non-OECD Countries 2011
- Energy Statistics of Non-OECD Countries 2011
- eGrid2012 Version 1.0
- Electricity Information 2011
- Update of the Environmental Indicators and Energy Payback Time of CIS Modules in Europe, 2010
- Sustainability Evaluation of Solar Energy Systems: LCA Analysis (LCA of Thin Film Technologies)
- Life Cycle Inventories and Life Cycle Assessments of Photovoltaic Systems, 2011
- Environmental Life Cycle Inventory of Crystalline Silicon Photovoltaic System Production, 2006
- Update of environmental indicators and energy payback time of CdTe PV systems in Europe, 2011
- Energy payback, life cycle CO2 emissions of the BOS in optimized 3.5 MW PV installation
- Methodology Guidelines on Life Cycle Assessment of Photovoltaic Electricity, 2009
- Annual European Union greenhouse gas inventory 1990 - 2008 and inventory report 2010
- Air pollutant emissions in Finland 1990-2008 Informative Inventory report
- Air pollutant emissions from stationary installations using bioenergy in the NLs BOLK Phase 2
- 2da Comunicacion Nacional de la Republica Argentina
- 2006 IPCC Guidelines for National Greenhouse Gas Inventories
- 13. Verordnung zur Durchführung des Bundes-Immissionsschutzgesetzes
- Auswertung PV-Leistung
- Austria's National Inventory Report 2010
- Austria's Informative Inventory Report (IIR) 2010
- Australian National Greenhouse Accounts (NIR)
- Australian electricity generation report 2008
- Appendix H: Calorific Value, Price, and Emission Coefficients of Energy Kinds
- Appendix 17 Thermal values and Emission factors energy.xls GWP conversion factors 2006
- Anthropogenic Emissions from Energy Activities in India
- Emission Estimation Technique Manual for Fossil Fuel Electric Power Generation Version 2.3
- Emisiones atmosféricas de las centrales eléctricas en América del Norte
- EMEP/EEA air pollutant emission inventory guidebook - 2009
- EMEP/CORINAIR Emission Inventory Guidebook - 2006
- Electricity Gas Australia
- Electric Power Industry 2009: Year in Review
- Directive 2009/28/EC of the European Parliament and of the Council of 23 April 2009
- Digest of United Kingdom Energy Statistics 2010
- Denmark's National Inventory report 2010
- Danish Emission inventories for stationary combustion plants
- Compilation of Air Pollutant Emission Factors
- Climate change - Immision Inventory
- BVT - Festlegung in ausgewählten industriellen Bereichen als Beitrag zur Erfüllung der Klimasch...
- Brennstoffe und Verbrennungsrechnung, 2. Auflage
- Brennstoffe und Verbrennungsrechnung
- Belgium's Greenhouse Gas Inventory (1990-2008)
- Greenhouse Gas Emissions in the Netherlands 1990-2008
- Greenhouse Gas Emissions in Finland 1990-2008
- Greenhouse Gas Emissions in Estonia 1990-2008
- Greenhouse Gas Emission in Estonia
- GHG Inventories 2008 - Common Reporting Format (CRF)
- Full fuel cycle greenhouse gas emission analysis for proposed Kwinana CCGT power station
- Ermittlung und Evaluierung von Emissionsfaktoren für Feuerungsanlagen in Deutschland
- Erarbeitung der Grundlagen für das BVT - Merkblatt Großfeuerungsanlagen
- Environmental Report 2008
- Energy Statistics Imports Electricity
- Energy Futures and Urban Air Pollution: Challenges for China and the United States
- Energy Consumption, Energy Savings and Emission Analysis for Industrial Motors
- Emissoes dos Gases Geradores do Efeito Estufa por Termel‚ctricas no Periodo 2000 a 2020
- Emissionsschätzungen für SO2, NO2, NMVOC und NH3 in Deutschland 2000-2020
- Emissionsfaktoren und Kohlenstoffgehalte
- Emissions of greenhouse gases in Iceland from 1990 to 2008
- Evaluation Criteria Investment Proposals (translated from hellenic)
- Greenhouse Gas Emissions Inventory Reports of Spain 1990-2008
- Life Cycle Inventory for Electricity Generation in China
- Liechtenstein`s Greenhouse Gas Inventory Report 1990 -2008
- Latvia's Informative Inventory 1990- 2008
- Italian Greenhouse Gas Inventory 1990-2008
- Ireland - Informative Inventory Report 2010
- Inventory of the U.S. Greenhouse Gas Emissions and Sinks (1990 -2008)
- Inventaire des emissions des grandes installations de combustion en France
- Integrated Report 2010
- Integrated Pollution Prevention and Control (IPPC) - Ref. Doc. on the BAT for Large Combustion Plant
- Integrated Pollution Prevention and Control
- Informative Inventory Report
- India's Initial National Communication to the United Nations Framework Convention on Climate Change
- Organisation et methodes des inventaires nationaux des emission atmospheriques en France
- NIR pour la France au titre de la convention cadre des Nations Unies sur les changements climatiques
- New Zealand's Greenhouse Gas Inventory 1990 - 2007
- National Inventory Report for 1985-2008 - Hungary
- National Inventory Report 2010 Sweden
- National Inventory Report 2010 Norway
- National Inventory Report 2010 for Greenhouse Gas Emissions
- National Inventory Report 2010
- National Inventory Report
- National Greenhouse Gas Inventory Report of the Czech Republic, NIR
- National Greenhouse Gas Inventory Report of Japan
- National Greenhouse Gas Emission Inventory Report 2009 of the Republic of Lithuania
- Luxembourg´s National Inventory Report 2010 (1990 -2008)
- Lithuanians's Informative Inventory 2008
- Switzerland's Greenhouse Gas Inventory 1990-2008
- Sumas Energy 2 Generation Facility Air Quality Issue Summary
- Submission under the UN Framework Convention on Climate Change and under the Kyoto Protocol 2010
- Slovenia's National Inventory Report 2010
- Slovak Republic National Inventory Report 2010
- Romania's Greenhouse Gas Inventory 1989-2008
- Romanian Informative Inventory 2008
- Richtlinie 2009/28/EG des Europäischen Parlaments und des Rates vom 23. April 2009
- Renewables 2010
- Power Hungry: Reinventing The U.S. Electric Grid
- Power Connections: Canadian Electricity Trade and Foreign Policy
- Portuguese National Inventory Report on Grennhouse Gases, 1990-2008
- Portuguese Informative Inventory 1990-2008
- Poland's Informative Inventory 2010
- Verhaltenes Lächeln auf langen Gesichtern
- UK Greenhouse gas inventory, 1990 to 2008
- Turkey Greenhouse gas Inventory, 1990 to 2008
- The European Pollutant Release and Transfer Register
- The CEA Mercury program
- Telefonische Recherche - Preis Kraftwerksnebenprodukte
- Plant-by-Plant emissions of SO2, NOx and dust and energy input to large combustion plants covered...
- Statistical Yearbook (UCTE) 2008
- Electricity Information 2014
- World Energy Statistics 2014
- Energy Statistics of Non-OECD Countries 2014
- Energy Balances of Non-OECD Countries 2014
- Energy Statistics of OECD Countries 2014
- Energy Balances of OECD Countries 2014
- Statistical Yearbook 2012
- IEA Wind - 2012 Annual report
- Wind in power 2012 - European statistics
- Reliable Disclosure in Europe: Status, Improvements and Perspectives
- European Residual Mixes 2013

## Intended applications
Life Cycle Inventory (LCI) datasets to be used in Product Environmental Footprint Category Rules (PEFCRs) and Organisation Environmental Footprint Sectoral Rules (OEFSRs) developed in the context of the Environmental Footprint transition phase launched by the Commission in 2018.
