# pre-dye preparation (scouring, etc), woven textile, natural fibers; Pre-treatment; production mix, at plant; textile service

Dataset: ILCD process, Partly terminated system
Geography: GLO
Reference year: 2017
Valid until: 2024
Classification: Systems / Textiles, furnitures and other interiors
LCI method principle: Attributional
LCI method approaches: Allocation - market value
Completeness: All relevant flows quantified
Project: Provision of process-based 3.0 Environmental Footprint-compliant life cycle inventory datasets - Apparel 1 - contract number 070201/2020/840291/SER/ENV.B.1
Generated by: CADIS
Owner: PRé Sustainability B.V.
Compliance: ILCD Data Network - Entry-level; Suggestions for updating the PEF method 2019; ISO 14040 Environmental Management – Life Cycle Assessment – Principles and Framework, 2006; ISO 14044:2006. Environmental Management – Life Cycle Assessment – Requirements and guidelines.; Environmental Footprint 3.1
Review: Dependent internal review by Avraam Symeonidis, Emilia Moreno Ruiz; Independent review panel by Fábio Valebona
Data quality: Overall quality: Very good; Time representativeness: Very good; Geographical representativeness: Good; Technological representativeness: Very good; Precision: Very good; Methodological appropriateness and consistency: Not applicable
Amounts: no units in this file; such an amount is in the reference unit of its flow, which a separate flow dataset defines
copyright: true
licenseType: Free of charge for some user types or use types
accessRestrictions: Free of charge for all final users implementing a regular Product Environmental Footprint (PEF) studies and Organisation Environmental Footprint (OEF) studies exclusively under the specified Product groups and sectors as defined in the Product Environmental Footprint Category Rules (PEFCR) and Organisation Environmental Footprint Sectorial Rules (OEFSR) listed in http://ec.europa.eu/environment/eussd/smgp/PEFCR_OEFSR.htm and in accordance with the terms and conditions of the EULA (available at https://ecoinvent.lca-data.com/) exclusively until 31st December 2024. Any use of this dataset or any derivative data not within the specific context of one of the PEF/OEF projects or after the end of 2024 is not permitted.

## General comment
Notice: this data set supersedes the EF3.0-compliant version (see link under "preceding data set version" below calculated with the EF3.0). The life cycle inventory is not changed from the original EF3.0 data set. The LCIA results are calculated based on the EF3.1 methods which provide updated characterisation factors in the following impact categories: Climate Change, Ecotoxicity freshwater, Photochemical Ozone Formation, Acidification, Human Toxicity non-cancer, and Human Toxicity cancer. The review report and the data quality ratings refer to the original results. The data set has been updated by the European Commission on the basis of the original EF3.0 data set delivered by the data provider.A user employing this service within their models should use it along with 1.019 kg of material to prepare 1 kg of fabric. Waste fiber should be included by user according to waste management practices for each particular case. Chemicals used, water and energy consumption, wastewater and evaporated water (per kg of prepared fabric) were obtained as an industry average from seven woven textile manufacturers (Thinkstep, 2017). Life expectancy of pretreatment machine is assumed to be 25 years (UNFCCC, 2012) with an average production capacity of 42.5 m/min and a machine weight of 2 tons (QDTONGDA, 2021), assuming a rope yarn weight of 300 g/m and 10 h/d operating time.
Land use from factory building was calculated based on (EUREKA, 2021) from a total area of 325 thousand square meters, divided into five sub-productive areas: knitting, dyeing, printing, and home textiles. The respective area (1/5) of total area (65,000 m2) is divided by the total production capacity of the building in 60 years (assumed life span of the building), with a daily production of 125 ton of dyeing, assuming the same area is needed for pretreatment (EUREKA, 2021).

## Technology and included processes
Textile preparation processes are the first class of wet processes for textiles. Pretreatment processes include: Singeing, Desizing, Scouring, Bleaching, Mercerization. The main objective of fabric pre-treatment is to remove impurities and leave the substrate ready for the next processes such as bleaching or finishing. Some of the impurities that must be removed are protruding fibers, seed husks, fats, oils, dust, etc. Singeing is a process in which fabric is passed over a flame to burn impurities without damaging the main fabric. Desizing is the process through which fiber-bonding substances used during weaving are removed (for example starch, polyacrylate) to increase strength and make fabric more absorbent. Some sizing agents include lubricants, softeners, hygroscopic agents, and wetting agents. Scouring is a process required to remove impurities and leaving the fabric suitable for bleaching, dyeing, and finishing. Cotton is usually scoured with strong alkali and detergents at boiling temperature. Also, calcium and magnesium should be removed, and sequestering agents are used. Enzymes may be used also to promote the degradation of undesired biomolecules. Mercerizing is a process used to cause swelling of the fibers through caustic treatment. Mercerizing improves strength, shrinkage resistance, and dye affinity.

## Parameters
- kg_0: 0.472381
  Mass in kg, for sodium hydroxide, without water, in 50% solution state; Transoceanic ship, containers; GLO
- km_0: 599
  Distance in km, for sodium hydroxide, without water, in 50% solution state; Transoceanic ship, containers; GLO
- kg_km_0: 282.956; = kg_0*km_0
  Transport amount in km*km, for sodium hydroxide, without water, in 50% solution state; Transoceanic ship, containers; GLO
- kg_1: 0.472381
  Mass in kg, for sodium hydroxide, without water, in 50% solution state; Freight train, diesel traction; EU+EFTA+UK
- km_1: 229.272
  Distance in km, for sodium hydroxide, without water, in 50% solution state; Freight train, diesel traction; EU+EFTA+UK
- kg_km_1: 108.304; = kg_1*km_1
  Transport amount in km*km, for sodium hydroxide, without water, in 50% solution state; Freight train, diesel traction; EU+EFTA+UK
- kg_2: 0.472381
  Mass in kg, for sodium hydroxide, without water, in 50% solution state; Freight train, electricity traction; EU+EFTA+UK
- km_2: 77.9889
  Distance in km, for sodium hydroxide, without water, in 50% solution state; Freight train, electricity traction; EU+EFTA+UK
- kg_km_2: 36.8405; = kg_2*km_2
  Transport amount in km*km, for sodium hydroxide, without water, in 50% solution state; Freight train, electricity traction; EU+EFTA+UK
- kg_3: 0.472381
  Mass in kg, for sodium hydroxide, without water, in 50% solution state; Freight train, average; EU+EFTA+UK
- km_3: 1.8394
  Distance in km, for sodium hydroxide, without water, in 50% solution state; Freight train, average; EU+EFTA+UK
- kg_km_3: 0.868899; = kg_3*km_3
  Transport amount in km*km, for sodium hydroxide, without water, in 50% solution state; Freight train, average; EU+EFTA+UK
- kg_4: 0.472381
  Mass in kg, for sodium hydroxide, without water, in 50% solution state; Barge; EU+EFTA+UK
- km_4: 8.08691
  Distance in km, for sodium hydroxide, without water, in 50% solution state; Barge; EU+EFTA+UK
- kg_km_4: 3.8201; = kg_4*km_4
  Transport amount in km*km, for sodium hydroxide, without water, in 50% solution state; Barge; EU+EFTA+UK
- kg_5: 0.472381
  Mass in kg, for sodium hydroxide, without water, in 50% solution state; Barge; ROW w/o EU+EFTA
- km_5: 16.5131
  Distance in km, for sodium hydroxide, without water, in 50% solution state; Barge; ROW w/o EU+EFTA
- kg_km_5: 7.80047; = kg_5*km_5
  Transport amount in km*km, for sodium hydroxide, without water, in 50% solution state; Barge; ROW w/o EU+EFTA
- kg_6: 0.472381
  Mass in kg, for sodium hydroxide, without water, in 50% solution state; Articulated lorry transport, Euro 4, Total weight >32 t; EU+EFTA+UK
- km_6: 57.3754
  Distance in km, for sodium hydroxide, without water, in 50% solution state; Articulated lorry transport, Euro 4, Total weight >32 t; EU+EFTA+UK
- kg_km_6: 27.103; = kg_6*km_6
  Transport amount in km*km, for sodium hydroxide, without water, in 50% solution state; Articulated lorry transport, Euro 4, Total weight >32 t; EU+EFTA+UK
- kg_7: 0.472381
  Mass in kg, for sodium hydroxide, without water, in 50% solution state; Articulated lorry transport, Total weight >32 t, mix Euro 0-5; ROW w/o EU+EFTA
- km_7: 151.425
  Distance in km, for sodium hydroxide, without water, in 50% solution state; Articulated lorry transport, Total weight >32 t, mix Euro 0-5; ROW w/o EU+EFTA
- kg_km_7: 71.5301; = kg_7*km_7
  Transport amount in km*km, for sodium hydroxide, without water, in 50% solution state; Articulated lorry transport, Total weight >32 t, mix Euro 0-5; ROW w/o EU+EFTA
- kg_8: 0.0282857
  Mass in kg, for acetic acid // acetic acid production, product in 98% solution state // glo; Articulated lorry transport, Euro 4, Total weight >32 t; EU+EFTA+UK
- km_8: 1000.51
  Distance in km, for acetic acid // acetic acid production, product in 98% solution state // glo; Articulated lorry transport, Euro 4, Total weight >32 t; EU+EFTA+UK
- kg_km_8: 28.3; = kg_8*km_8
  Transport amount in km*km, for acetic acid // acetic acid production, product in 98% solution state // glo; Articulated lorry transport, Euro 4, Total weight >32 t; EU+EFTA+UK
- kg_9: 0.0048381
  Mass in kg, for enzymes // enzymes production // eu+efta+uk; Articulated lorry transport, Euro 4, Total weight >32 t; EU+EFTA+UK
- km_9: 1000.39
  Distance in km, for enzymes // enzymes production // eu+efta+uk; Articulated lorry transport, Euro 4, Total weight >32 t; EU+EFTA+UK
- kg_km_9: 4.84; = kg_9*km_9
  Transport amount in km*km, for enzymes // enzymes production // eu+efta+uk; Articulated lorry transport, Euro 4, Total weight >32 t; EU+EFTA+UK
- kg_10: 0.0354286
  Mass in kg, for hydrogen peroxide, 50% // hydrogen peroxide, 50% production // eu+efta+uk; Articulated lorry transport, Euro 4, Total weight >32 t; EU+EFTA+UK
- km_10: 999.194
  Distance in km, for hydrogen peroxide, 50% // hydrogen peroxide, 50% production // eu+efta+uk; Articulated lorry transport, Euro 4, Total weight >32 t; EU+EFTA+UK
- kg_km_10: 35.4; = kg_10*km_10
  Transport amount in km*km, for hydrogen peroxide, 50% // hydrogen peroxide, 50% production // eu+efta+uk; Articulated lorry transport, Euro 4, Total weight >32 t; EU+EFTA+UK
- kg_11: 0.00378095
  Mass in kg, for edta // edta production // eu+efta+uk; Articulated lorry transport, Euro 4, Total weight >32 t; EU+EFTA+UK
- km_11: 999.748
  Distance in km, for edta // edta production // eu+efta+uk; Articulated lorry transport, Euro 4, Total weight >32 t; EU+EFTA+UK
- kg_km_11: 3.78; = kg_11*km_11
  Transport amount in km*km, for edta // edta production // eu+efta+uk; Articulated lorry transport, Euro 4, Total weight >32 t; EU+EFTA+UK
- kg_12: 7.38095e-5
  Mass in kg, for surfactant // surfactant production // glo; Articulated lorry transport, Euro 4, Total weight >32 t; EU+EFTA+UK
- km_12: 6137.42
  Distance in km, for surfactant // surfactant production // glo; Articulated lorry transport, Euro 4, Total weight >32 t; EU+EFTA+UK
- kg_km_12: 0.453; = kg_12*km_12
  Transport amount in km*km, for surfactant // surfactant production // glo; Articulated lorry transport, Euro 4, Total weight >32 t; EU+EFTA+UK
- kg_13: 0.000453333
  Mass in kg, for soda ash // soda ash production // glo; Articulated lorry transport, Euro 4, Total weight >32 t; EU+EFTA+UK
- km_13: 999.265
  Distance in km, for soda ash // soda ash production // glo; Articulated lorry transport, Euro 4, Total weight >32 t; EU+EFTA+UK
- kg_km_13: 0.453; = kg_13*km_13
  Transport amount in km*km, for soda ash // soda ash production // glo; Articulated lorry transport, Euro 4, Total weight >32 t; EU+EFTA+UK
- kg_14: 0.00370476
  Mass in kg, for sodium chloride powder // sodium chloride powder production // eu+efta+uk; Articulated lorry transport, Euro 4, Total weight >32 t; EU+EFTA+UK
- km_14: 998.715
  Distance in km, for sodium chloride powder // sodium chloride powder production // eu+efta+uk; Articulated lorry transport, Euro 4, Total weight >32 t; EU+EFTA+UK
- kg_km_14: 3.7; = kg_14*km_14
  Transport amount in km*km, for sodium chloride powder // sodium chloride powder production // eu+efta+uk; Articulated lorry transport, Euro 4, Total weight >32 t; EU+EFTA+UK
- kg_15: 0.00295238
  Mass in kg, for sodium silver thiosulfate // sodium silver thiosulfate production // glo; Articulated lorry transport, Euro 4, Total weight >32 t; EU+EFTA+UK
- km_15: 999.194
  Distance in km, for sodium silver thiosulfate // sodium silver thiosulfate production // glo; Articulated lorry transport, Euro 4, Total weight >32 t; EU+EFTA+UK
- kg_km_15: 2.95; = kg_15*km_15
  Transport amount in km*km, for sodium silver thiosulfate // sodium silver thiosulfate production // glo; Articulated lorry transport, Euro 4, Total weight >32 t; EU+EFTA+UK
- kg_16: 0.0282857
  Mass in kg, for acetic acid // acetic acid production, product in 98% solution state // glo; Transoceanic ship, containers; GLO
- km_16: 17994.9
  Distance in km, for acetic acid // acetic acid production, product in 98% solution state // glo; Transoceanic ship, containers; GLO
- kg_km_16: 509; = kg_16*km_16
  Transport amount in km*km, for acetic acid // acetic acid production, product in 98% solution state // glo; Transoceanic ship, containers; GLO
- kg_17: 0.0048381
  Mass in kg, for enzymes // enzymes production // eu+efta+uk; Transoceanic ship, containers; GLO
- km_17: 18003
  Distance in km, for enzymes // enzymes production // eu+efta+uk; Transoceanic ship, containers; GLO
- kg_km_17: 87.1; = kg_17*km_17
  Transport amount in km*km, for enzymes // enzymes production // eu+efta+uk; Transoceanic ship, containers; GLO
- kg_18: 0.0354286
  Mass in kg, for hydrogen peroxide, 50% // hydrogen peroxide, 50% production // eu+efta+uk; Transoceanic ship, containers; GLO
- km_18: 18008.1
  Distance in km, for hydrogen peroxide, 50% // hydrogen peroxide, 50% production // eu+efta+uk; Transoceanic ship, containers; GLO
- kg_km_18: 638; = kg_18*km_18
  Transport amount in km*km, for hydrogen peroxide, 50% // hydrogen peroxide, 50% production // eu+efta+uk; Transoceanic ship, containers; GLO
- kg_19: 0.00378095
  Mass in kg, for edta // edta production // eu+efta+uk; Transoceanic ship, containers; GLO
- km_19: 18011.3
  Distance in km, for edta // edta production // eu+efta+uk; Transoceanic ship, containers; GLO
- kg_km_19: 68.1; = kg_19*km_19
  Transport amount in km*km, for edta // edta production // eu+efta+uk; Transoceanic ship, containers; GLO
- kg_20: 7.38095e-5
  Mass in kg, for surfactant // surfactant production // glo; Transoceanic ship, containers; GLO
- km_20: 110555
  Distance in km, for surfactant // surfactant production // glo; Transoceanic ship, containers; GLO
- kg_km_20: 8.16; = kg_20*km_20
  Transport amount in km*km, for surfactant // surfactant production // glo; Transoceanic ship, containers; GLO
- kg_21: 0.000453333
  Mass in kg, for soda ash // soda ash production // glo; Transoceanic ship, containers; GLO
- km_21: 18000
  Distance in km, for soda ash // soda ash production // glo; Transoceanic ship, containers; GLO
- kg_km_21: 8.16; = kg_21*km_21
  Transport amount in km*km, for soda ash // soda ash production // glo; Transoceanic ship, containers; GLO
- kg_22: 0.00370476
  Mass in kg, for sodium chloride powder // sodium chloride powder production // eu+efta+uk; Transoceanic ship, containers; GLO
- km_22: 18003.9
  Distance in km, for sodium chloride powder // sodium chloride powder production // eu+efta+uk; Transoceanic ship, containers; GLO
- kg_km_22: 66.7; = kg_22*km_22
  Transport amount in km*km, for sodium chloride powder // sodium chloride powder production // eu+efta+uk; Transoceanic ship, containers; GLO
- kg_23: 0.00295238
  Mass in kg, for sodium silver thiosulfate // sodium silver thiosulfate production // glo; Transoceanic ship, containers; GLO
- km_23: 17985.5
  Distance in km, for sodium silver thiosulfate // sodium silver thiosulfate production // glo; Transoceanic ship, containers; GLO
- kg_km_23: 53.1; = kg_23*km_23
  Transport amount in km*km, for sodium silver thiosulfate // sodium silver thiosulfate production // glo; Transoceanic ship, containers; GLO

## Reference product
- pre-dye preparation (scouring, etc), woven textile, natural fibers // pre-dye preparation (scouring, etc), woven textile, natural fibers // glo: 1

## Inputs
- Electricity from Electricity grid mix 1kV-60kV - AU: 0.016
- Electricity from Electricity grid mix 1kV-60kV - EU+EFTA+UK: 0.2353
- Electricity from Electricity grid mix 1kV-60kV - NZ: 0.003
- Electricity from Electricity grid mix 1kV-60kV - RAF: 0.0514
- Electricity from Electricity grid mix 1kV-60kV - RNA: 0.3444
- Electricity from Electricity grid mix 1kV-60kV - RSA: 0.1168
- Electricity from Electricity grid mix 1kV-60kV - RU: 0.0689
- Transport of sodium hydroxide, without water, in 50% solution state by Transoceanic ship, containers - GLO: 282.956; = kg_km_0
- Transport of sodium hydroxide, without water, in 50% solution state by Freight train, diesel traction - EU+EFTA+UK: 108.304; = kg_km_1
- Transport of sodium hydroxide, without water, in 50% solution state by Freight train, electricity traction - EU+EFTA+UK: 36.8405; = kg_km_2
- Transport of sodium hydroxide, without water, in 50% solution state by Freight train, average - EU+EFTA+UK: 0.868899; = kg_km_3
- Transport of sodium hydroxide, without water, in 50% solution state by Barge - EU+EFTA+UK: 3.8201; = kg_km_4
- Transport of sodium hydroxide, without water, in 50% solution state by Barge - ROW w/o EU+EFTA: 7.80047; = kg_km_5
- Transport of sodium hydroxide, without water, in 50% solution state by Articulated lorry transport, Euro 4, Total weight >32 t - EU+EFTA+UK: 27.103; = kg_km_6
- Transport of sodium hydroxide, without water, in 50% solution state by Articulated lorry transport, Total weight >32 t, mix Euro 0-5 - ROW w/o EU+EFTA: 71.5301; = kg_km_7
- Thermal energy (MJ) from Thermal energy from hard coal - ROW: 0.529524
- Thermal energy (MJ) from Thermal energy from heavy fuel oil (HFO) - ROW: 0.0119048
- Thermal energy (MJ) from Thermal energy from LPG - ROW: 0.025619
- Thermal energy (MJ) from Thermal energy from natural gas - ROW: 4.33333
- Transport of acetic acid // acetic acid production, product in 98% solution state // glo by Articulated lorry transport, Euro 4, Total weight >32 t - EU+EFTA+UK: 28.3; = kg_km_8
- Transport of enzymes // enzymes production // eu+efta+uk by Articulated lorry transport, Euro 4, Total weight >32 t - EU+EFTA+UK: 4.84; = kg_km_9
- Transport of hydrogen peroxide, 50% // hydrogen peroxide, 50% production // eu+efta+uk by Articulated lorry transport, Euro 4, Total weight >32 t - EU+EFTA+UK: 35.4; = kg_km_10
- Transport of edta // edta production // eu+efta+uk by Articulated lorry transport, Euro 4, Total weight >32 t - EU+EFTA+UK: 3.78; = kg_km_11
- Transport of surfactant // surfactant production // glo by Articulated lorry transport, Euro 4, Total weight >32 t - EU+EFTA+UK: 0.453; = kg_km_12
- Transport of soda ash // soda ash production // glo by Articulated lorry transport, Euro 4, Total weight >32 t - EU+EFTA+UK: 0.453; = kg_km_13
- Transport of sodium chloride powder // sodium chloride powder production // eu+efta+uk by Articulated lorry transport, Euro 4, Total weight >32 t - EU+EFTA+UK: 3.7; = kg_km_14
- Transport of sodium silver thiosulfate // sodium silver thiosulfate production // glo by Articulated lorry transport, Euro 4, Total weight >32 t - EU+EFTA+UK: 2.95; = kg_km_15
- Transport of acetic acid // acetic acid production, product in 98% solution state // glo by Transoceanic ship, containers - GLO: 509; = kg_km_16
- Transport of enzymes // enzymes production // eu+efta+uk by Transoceanic ship, containers - GLO: 87.1; = kg_km_17
- Transport of hydrogen peroxide, 50% // hydrogen peroxide, 50% production // eu+efta+uk by Transoceanic ship, containers - GLO: 638; = kg_km_18
- Transport of edta // edta production // eu+efta+uk by Transoceanic ship, containers - GLO: 68.1; = kg_km_19
- Transport of surfactant // surfactant production // glo by Transoceanic ship, containers - GLO: 8.16; = kg_km_20
- Transport of soda ash // soda ash production // glo by Transoceanic ship, containers - GLO: 8.16; = kg_km_21
- Transport of sodium chloride powder // sodium chloride powder production // eu+efta+uk by Transoceanic ship, containers - GLO: 66.7; = kg_km_22
- Transport of sodium silver thiosulfate // sodium silver thiosulfate production // glo by Transoceanic ship, containers - GLO: 53.1; = kg_km_23
- Electricity from Electricity grid mix 1kV-60kV - CN: 0.352828
- Electricity from Electricity grid mix 1kV-60kV - RAS w/o CN: 0.386572
- pre-dye preparation (scouring, etc), woven textile, natural fibers // pre-dye preparation (scouring, etc), woven textile, natural fibers // glo, blackbox: 1
- pre-dye preparation (scouring, etc), woven textile, natural fibers // pre-dye preparation (scouring, etc), woven textile, natural fibers // glo, elementary: 1

## Impact indicators
- Eutrophication marine: 0.00300098
- Ecotoxicity, freshwater: 49.7765
- Land use: 11.1716
- Water use: 2.13043
- Resource use, minerals and metals: 0.000692978
- Resource use, fossils: 26.3383
- Climate change: 1.92443
- Ozone depletion: 3.52462e-7
- Human toxicity, cancer: 2.33895e-9
- Human toxicity, non-cancer: 2.85601e-8
- EF-particulate Matter: 3.45951e-7
- Ionising radiation, human health: 0.119482
- Photochemical ozone formation - human health: 0.00800706
- Acidification: 0.0122336
- Eutrophication, terrestrial: 0.0301459
- Eutrophication, freshwater: 0.00106069

## Deviations from the LCI method principle
The background data uses:
- the \xe2\x80\x9cRecycled content cut-off\xe2\x80\x9d approach to allocate end-of-life by-products and secondary materials. This allocation is explained in the description of the recycled content system model (http://www.ecoinvent.org/database/system-models-in-ecoinvent-3/cut-off-system-model/allocation-cut-off-by-classification.html).
OR
- EF compliant data

## Deviations from the LCI method approaches
Background data:
- the \xe2\x80\x9cRecycled content cut-off\xe2\x80\x9d approach to allocate end-of-life by-products and secondary materials. This allocation is explained in the description of the recycled content system model (http://www.ecoinvent.org/database/system-models-in-ecoinvent-3/cut-off-system-model/allocation-cut-off-by-classification.html). The ecoinvent database mostly relies on “Allocation – market values” apart for few exceptions particularly in the energy sector. ecoinvent energy data is replaced with EF3.0 core data as per the EF guidelines version 2.0.
OR
- EF compliant data

## Modelling constants
All modelling constants follow the requirements listed in the Tender Specifications 070201/2020/SER/ENV.B1. Completeness: There are no intentional cut-offs in the inventory no matter how small their contribution to all the EF impact categories is. Eventual cut-offs are in compliance with the Guide for EF compliant data sets (JRC 2020), i.e. only if below the 3% cut-off rule. Water use: water use is modelled at country level using separate flows for water withdrawal, water release and water evaporation. Handling multi-functional processes: the following PEF multi- functionality decision hierarchy is applied for resolving all multi- functionality problems: (1) subdivision or system expansion; (2) allocation based on a relevant underlying physical relationship (substitution may apply here); (3) allocation based on some other relationship. Direct land use change: GHG emissions from direct LUC allocated to good/service for 20 years after the LUC occurs, with IPCC default values. Carbon storage and delayed emissions: credits associated with temporary (carbon) storage or delayed emissions up to 300 years are not be considered. Emissions off-setting: are not included. Capital goods (including infrastructures) and their End of life: they are included. System boundaries: system boundaries include all processes linked to the product supply chain (e.g. maintenance). Time period: emissions and removals are modelled as if released or removed at the beginning of the assessment method. Fossil and biogenic carbon emissions and removals: removals and emissions are modelled as follows: All GHG emissions from fossil fuels (including peat and limestone) are modelled consistently with the most updated ILCD list of elementary flows. The non-fossil (biogenic) carbon flows are modelled consistently with the most updated ILCD list of elementary flows.

## Cut-off and completeness
There are no intentional cut-offs in the inventory no matter how small their contribution to all the EF impact categories is. Eventual cut-offs are in compliance with the Guide for EF compliant data sets (JRC 2020), i.e. only if below the 3% cut-off rule. The dataset dry mass and water balance has been checked to ensure the inventory is complete. Capital goods (e.g. infrastructure) and their end-of-life are included.

## Data selection and combination
These datasets include, in both their foreground and background data, links to EF3.0 compliant data.
The relevant background data on energy, transport, and End of Life are from the LCDN data node (http://lcdn.thinkstep.com/Node/).
All other background data in the supply of this product for which no EF3.0 process was available are from ecoinvent v3.7 database (www.ecoinvent.org) or other data sources.

## Data treatment and extrapolations
Several data sources have been used to model the inventory.

## Review details
Internal reviews have been asked to review the plausibility of the unit process, LCIA scores, and DQRs. Internal reviewers have also been asked to review the data for EF compliancy. The consortium is therefore responsible for aspects such as compliancy with the ILCD format, including validation in Look@LCI, and nomenclature.
Internal reviwers have been asked to judge based on the process name, that the unit process models in a complete and representative way the process in the requested location. The review encompassed the plausability of:
- exchanges with nature (elementary flows) as well as exchanges such as product and waste flows.
- meta information (general comment, technology comment, system boundaries, allocation, cut-off rules, etc.). Reviewers were asked to judge if the provided information is enough to understand the content of the process.
- LCIA scores
- DQRs including precision, technology, time and geography. As well as the overall DQR.
External reviewers have been asked to provide their expertise in the field of interest. External reviewers have been asked to review the unit process, including eventual methodological choices, the LCIA scores (provided with contribution scores as well), and DQRs. External reviewers have been provided all the information in a tool developed by the consortium for the purpose of this project.
External reviewers have been asked to judge based on the process name, that the unit process models in a complete and representative way the process in the requested location. The review encompassed:
- Plausability and completeness of exchanges with nature (elementary flows) as well as exchanges such as product and waste flows.
- Review of meta information (general comment, technology comment, system boundaries, allocation, cut-off rules, etc.). Reviewers were asked to judge if the provided information is enough to understand the content of the process.
- Review of properties (biogenic carbon and water content).
- Review of allocation keys.
- Plausability of LCIA scores calculated by the consortium.
- Plausability of DQRs including precision, technology, time and geography. As well as the overall DQR.

## Data sources
- Background Data for Representative products and organisations. EF 3.0 compliant (data stock)
- thinkstep AG. 2017. LCA Update of Cotton Fiber and Fabric Life Cycle Inventory.
- UNFCCC (2012) COMPONENT PROJECT ACTIVITIES DESIGN DOCUMENT (CPA-DD). Accessed online August 8th 2021: http://gec.jp/gec/jp/Activities/cdm-fs/2012/2012_cdmfs01_jPear_bangladesh_cpa-dd.pdf
- QDTONGDA (2021) Td638 Bunch Shaped Indigo Rope Dyeing Machine of Fast Dyeing Speed. Accessed online August 8th 2021: https://qdtongda.en.made-in-china.com/product/jyeQIDuEZXcl/China-Td638-Bunch-Shaped-Indigo-Rope-Dyeing-Machine-of-Fast-Dyeing-Speed.html
- EUREKA (2021) Production activities in line with the “green factory” approach in the textile sector. Accessed online August 8th 2021: https://eureka-eurogia-green.eu/offering_expertise/production-activities-in-line-with-the-green-factory-approach-in-the-textile-sector-13-04-2021/

## Intended applications
Implementation of regular Product Environmental Footprint (PEF) studies and Organisation Environmental Footprint (OEF) studies exclusively under the specified Product groups and sectors as defined in the Product Environmental Footprint Category Rules (PEFCR) and Organisation Environmental Footprint Sectorial Rules (OEFSR) listed in http://ec.europa.eu/environment/eussd/smgp/PEFCR_OEFSR.htm
