# leather, pu synthetic, solvent free, elementary; solvent free; production mix, at plant; 1kg

Dataset: ILCD process, Unit process, single operation
Geography: GLO
Reference year: 2018
Valid until: 2024
Classification: Other Services / Other services
LCI method principle: Attributional
LCI method approaches: Other
Completeness: All relevant flows quantified
Project: Provision of process-based 3.0 Environmental Footprint-compliant life cycle inventory datasets - Apparel 1 - contract number 070201/2020/840291/SER/ENV.B.1
Generated by: PRé Sustainability B.V.
Owner: PRé Sustainability B.V.
Compliance: Environmental Footprint non-primary supporting data set; Environmental Footprint 3.1
Amounts: no units in this file; such an amount is in the reference unit of its flow, which a separate flow dataset defines
copyright: true
licenseType: Free of charge for some user types or use types
accessRestrictions: Free of charge for all final users implementing a regular Product Environmental Footprint (PEF) studies and Organisation Environmental Footprint (OEF) studies exclusively under the specified Product groups and sectors as defined in the Product Environmental Footprint Category Rules (PEFCR) and Organisation Environmental Footprint Sectorial Rules (OEFSR) listed in http://ec.europa.eu/environment/eussd/smgp/PEFCR_OEFSR.htm and in accordance with the terms and conditions of the EULA (available at https://ecoinvent.lca-data.com/) exclusively until 31st December 2024. Any use of this dataset or any derivative data not within the specific context of one of the PEF/OEF projects or after the end of 2024 is not permitted.

## General comment
Notice: this data set supersedes the EF3.0-compliant version (see link under "preceding data set version" below calculated with the EF3.0). The life cycle inventory is not changed from the original EF3.0 data set. The LCIA results are calculated based on the EF3.1 methods which provide updated characterisation factors in the following impact categories: Climate Change, Ecotoxicity freshwater, Photochemical Ozone Formation, Acidification, Human Toxicity non-cancer, and Human Toxicity cancer. The review report and the data quality ratings refer to the original results. The data set has been updated by the European Commission on the basis of the original EF3.0 data set delivered by the data provider.This sub-process has limited documentation only. For all detailed documentation of the full model to which this data set belongs (such as DQRs, review reports and other technical documentation), please see this process: leather, pu synthetic, solvent free - GLO []

## Technology and included processes
In this model, the baseline is formed by 30% knitted polyester fabric. The coating, which makes up 60% of the PU leather composition, consists of polyurethane, representing the standard material for PU leather. The remaining 10% of the input is different for solvent and water-based coatings, and illustrates typical inputs of chemicals and additives for the particular coating technology according to Maciel et al. (2017). Electricity and heat inputs for PU leather production are based on confidential data from a company that specializes in the production of both solvent and water-based coated PU leather.

Further information is not available due to confidentiality reasons

## Reference product
- leather, pu synthetic, solvent free // leather, pu synthetic, solvent free // glo, elementary: 1

## Inputs
- water, Renewable material resources from water [AE]: 2.72241e-7
- water, Renewable material resources from water [AF]: 2.79569e-8
- water, Renewable material resources from water [AG]: 8.16413e-10
- water, Renewable material resources from water [AL]: 1.4261e-8
- water, Renewable material resources from water [AM]: 1.26064e-8
- water, Renewable material resources from water [AO]: 8.46849e-8
- water, Renewable material resources from water [AR]: 3.77421e-7
- water, Renewable material resources from water [AT]: 1.83744e-7
- water, Renewable material resources from water [AU]: 4.66046e-7
- water, Renewable material resources from water [AW]: 1.63939e-9
- water, Renewable material resources from water [AZ]: 6.38292e-8
- water, Renewable material resources from water [BA]: 1.77784e-8
- water, Renewable material resources from water [BB]: 1.98579e-9
- water, Renewable material resources from water [BD]: 2.25322e-7
- water, Renewable material resources from water [BE]: 2.21164e-7
- water, Renewable material resources from water [BF]: 1.34526e-8
- water, Renewable material resources from water [BG]: 5.66332e-8
- water, Renewable material resources from water [BH]: 2.86441e-8
- water, Renewable material resources from water [BI]: 3.20114e-9
- water, Renewable material resources from water [BJ]: 1.23942e-8
- water, Renewable material resources from water [BN]: 1.32131e-8
- water, Renewable material resources from water [BO]: 3.18022e-8
- water, Renewable material resources from water [BR]: 1.31645e-6
- water, Renewable material resources from water [BS]: 5.42734e-9
- water, Renewable material resources from water [BT]: 2.77981e-9
- water, Renewable material resources from water [BW]: 1.41765e-8
- water, Renewable material resources from water [BY]: 7.35372e-8
- water, Renewable material resources from water [BZ]: 1.12924e-9
- water, Renewable material resources from water [CA]: 6.91852e-7
- water, Renewable material resources from water [CD]: 2.70128e-8
- water, Renewable material resources from water [CF]: 1.77346e-9
- water, Renewable material resources from water [CG]: 1.04657e-8
- water, Renewable material resources from water [CH]: 2.19145e-7
- water, Renewable material resources from water [CI]: 3.58425e-8
- water, Renewable material resources from water [CL]: 1.69334e-7
- water, Renewable material resources from water [CM]: 3.10663e-8
- water, Renewable material resources from water [CN]: 7.24704e-6
- water, Renewable material resources from water [CO]: 2.64946e-7
- water, Renewable material resources from water [CR]: 3.30909e-8
- water, Renewable material resources from water [CV]: 1.38409e-9
- water, Renewable material resources from water [CY]: 1.27231e-8
- water, Renewable material resources from water [CZ]: 1.52523e-7
- water, Renewable material resources from water [DE]: 1.65994e-6
- water, Renewable material resources from water [DJ]: 1.78037e-9
- water, Renewable material resources from water [DK]: 1.20365e-7
- water, Renewable material resources from water [DM]: 3.37532e-10
- water, Renewable material resources from water [DO]: 6.17614e-8
- water, Renewable material resources from water [DZ]: 2.14736e-7
- water, Renewable material resources from water [EC]: 7.50655e-8
- water, Renewable material resources from water [EE]: 1.6436e-8
- water, Renewable material resources from water [EG]: 4.25174e-7
- water, Renewable material resources from water [ER]: 2.25819e-9
- water, Renewable material resources from water [ES]: 7.12328e-7
- water, Renewable material resources from water [ET]: 6.48927e-8
- water, Renewable material resources from water [FI]: 1.02669e-7
- water, Renewable material resources from water [FJ]: 4.08322e-9
- water, Renewable material resources from water [FR]: 1.17092e-6
- water, Renewable material resources from water [GA]: 1.22195e-8
- water, Renewable material resources from water [GB]: 1.16361e-6
- water, Renewable material resources from water [GD]: 6.33236e-10
- water, Renewable material resources from water [GE]: 1.78634e-8
- water, Renewable material resources from water [GH]: 5.30486e-8
- water, Renewable material resources from water: 2.3247e-7
- water, Renewable material resources from water [GM]: 1.91871e-9
- water, Renewable material resources from water [GN]: 9.554e-9
- water, Renewable material resources from water [GQ]: 1.42147e-8
- water, Renewable material resources from water [GR]: 1.32368e-7
- water, Renewable material resources from water [GT]: 5.13981e-8
- water, Renewable material resources from water [GW]: 1.1553e-9
- water, Renewable material resources from water [GY]: 3.64266e-9
- water, Renewable material resources from water [HN]: 1.79424e-8
- water, Renewable material resources from water [HR]: 4.25608e-8
- water, Renewable material resources from water [HT]: 1.33036e-8
- water, Renewable material resources from water [HU]: 1.11573e-7
- water, Renewable material resources from water [ID]: 1.11348e-6
- water, Renewable material resources from water [IE]: 1.20186e-7
- water, Renewable material resources from water [IL]: 1.23272e-7
- water, Renewable material resources from water [IN]: 2.97217e-6
- water, Renewable material resources from water [IQ]: 1.85586e-7
- water, Renewable material resources from water [IR]: 5.24603e-7
- water, Renewable material resources from water [IS]: 6.85816e-9
- water, Renewable material resources from water [IT]: 1.00182e-6
- water, Renewable material resources from water [JM]: 1.10106e-8
- water, Renewable material resources from water [JO]: 3.63033e-8
- water, Renewable material resources from water [JP]: 2.15071e-6
- water, Renewable material resources from water [KE]: 6.34282e-8
- water, Renewable material resources from water [KG]: 1.05343e-8
- water, Renewable material resources from water [KH]: 2.1433e-8
- water, Renewable material resources from water [KM]: 8.84053e-10
- water, Renewable material resources from water [KN]: 5.26822e-10
- water, Renewable material resources from water [KR]: 8.00973e-7
- water, Renewable material resources from water [KW]: 1.00929e-7
- water, Renewable material resources from water [KZ]: 1.73363e-7
- water, Renewable material resources from water [LA]: 1.63916e-8
- water, Renewable material resources from water [LB]: 3.9978e-8
- water, Renewable material resources from water [LC]: 1.07462e-9
- water, Renewable material resources from water [LK]: 9.84805e-8
- water, Renewable material resources from water [LR]: 2.44432e-9
- water, Renewable material resources from water [LS]: 2.37361e-9
- water, Renewable material resources from water [LT]: 3.50936e-8
- water, Renewable material resources from water [LU]: 2.43621e-8
- water, Renewable material resources from water [LV]: 2.06934e-8
- water, Renewable material resources from water [LY]: 5.04659e-8
- water, Renewable material resources from water [MA]: 1.04623e-7
- water, Renewable material resources from water [MD]: 1.09493e-8
- water, Renewable material resources from water [ME]: 4.41098e-9
- water, Renewable material resources from water [MG]: 1.61693e-8
- water, Renewable material resources from water [MK]: 1.21826e-8
- water, Renewable material resources from water [ML]: 1.46801e-8
- water, Renewable material resources from water [MM]: 9.33859e-8
- water, Renewable material resources from water [MN]: 1.3061e-8
- water, Renewable material resources from water [MR]: 7.70088e-9
- water, Renewable material resources from water [MT]: 6.73926e-9
- water, Renewable material resources from water [MU]: 1.02822e-8
- water, Renewable material resources from water [MW]: 7.42873e-9
- water, Renewable material resources from water [MX]: 9.37817e-7
- water, Renewable material resources from water [MY]: 3.13207e-7
- water, Renewable material resources from water [MZ]: 1.32811e-8
- water, Renewable material resources from water [NA]: 9.60488e-9
- water, Renewable material resources from water [NE]: 9.49596e-9
- water, Renewable material resources from water [NG]: 3.94198e-7
- water, Renewable material resources from water [NI]: 1.3268e-8
- water, Renewable material resources from water [NL]: 3.71359e-7
- water, Renewable material resources from water [NO]: 1.4057e-7
- water, Renewable material resources from water [NP]: 2.94677e-8
- water, Renewable material resources from water [NZ]: 7.30863e-8
- water, Renewable material resources from water [OM]: 6.2625e-8
- water, Renewable material resources from water [PA]: 3.89122e-8
- water, Renewable material resources from water [PE]: 1.49642e-7
- water, Renewable material resources from water [PG]: 1.26037e-8
- water, Renewable material resources from water [PH]: 3.03354e-7
- water, Renewable material resources from water [PK]: 3.63794e-7
- water, Renewable material resources from water [PL]: 4.27392e-7
- water, Renewable material resources from water [PR]: 5.14857e-8
- water, Renewable material resources from water [PS]: 9.74381e-9
- water, Renewable material resources from water [PT]: 1.34857e-7
- water, Renewable material resources from water [PY]: 3.24047e-8
- water, Renewable material resources from water [QA]: 1.17256e-7
- water, Renewable material resources from water [RO]: 1.87225e-7
- water, Renewable material resources from water [RS]: 4.64607e-8
- water, Renewable material resources from water [RU]: 1.55008e-6
- water, Renewable material resources from water [RW]: 8.17398e-9
- water, Renewable material resources from water [SA]: 6.91349e-7
- water, Renewable material resources from water [SB]: 6.26252e-10
- water, Renewable material resources from water [SD]: 7.25358e-8
- water, Renewable material resources from water [SE]: 2.02841e-7
- water, Renewable material resources from water [SG]: 2.01372e-7
- water, Renewable material resources from water [SI]: 2.87253e-8
- water, Renewable material resources from water [SK]: 6.74224e-8
- water, Renewable material resources from water [SL]: 4.61667e-9
- water, Renewable material resources from water [SM]: 8.39139e-10
- water, Renewable material resources from water [SN]: 1.80754e-8
- water, Renewable material resources from water [SR]: 3.76456e-9
- water, Renewable material resources from water [ST]: 2.9773e-10
- water, Renewable material resources from water [SV]: 2.00786e-8
- water, Renewable material resources from water [SZ]: 4.05199e-9
- water, Renewable material resources from water [TC]: 3.62026e-10
- water, Renewable material resources from water [TD]: 1.0059e-8
- water, Renewable material resources from water [TG]: 4.16696e-9
- water, Renewable material resources from water [TH]: 4.62548e-7
- water, Renewable material resources from water [TJ]: 1.04399e-8
- water, Renewable material resources from water [TL]: 1.33889e-9
- water, Renewable material resources from water [TM]: 3.02795e-8
- water, Renewable material resources from water [TN]: 5.03209e-8
- water, Renewable material resources from water [TO]: 2.51021e-10
- water, Renewable material resources from water [TR]: 7.83324e-7
- water, Renewable material resources from water [TT]: 1.72528e-8
- water, Renewable material resources from water [TZ]: 4.88629e-8
- water, Renewable material resources from water [UA]: 1.97683e-7
- water, Renewable material resources from water [UG]: 3.38529e-8
- water, Renewable material resources from water [US]: 7.63073e-6
- water, Renewable material resources from water [UY]: 2.88771e-8
- water, Renewable material resources from water [UZ]: 8.06866e-8
- water, Renewable material resources from water [VC]: 5.42805e-10
- water, Renewable material resources from water [VE]: 2.2134e-7
- water, Renewable material resources from water [VN]: 2.29251e-7
- water, Renewable material resources from water [VU]: 3.44805e-10
- water, Renewable material resources from water [WS]: 4.90496e-10
- water, Renewable material resources from water [YE]: 4.03657e-8
- water, Renewable material resources from water [ZA]: 2.95106e-7
- water, Renewable material resources from water [ZM]: 2.28913e-8
- water, Renewable material resources from water [ZW]: 1.48691e-8

## Outputs
- Water, Emissions to air, unspecified: 4.63e-5

## Impact indicators
- Water use: 0.00127895
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
## Deviations from the LCI method approaches
Background data:
- the \xe2\x80\x9cRecycled content cut-off\xe2\x80\x9d approach to allocate end-of-life by-products and secondary materials. This allocation is explained in the description of the recycled content system model (http://www.ecoinvent.org/database/system-models-in-ecoinvent-3/cut-off-system-model/allocation-cut-off-by-classification.html). The ecoinvent database mostly relies on “Allocation – market values” apart for few exceptions particularly in the energy sector. ecoinvent energy data is replaced with EF3.0 core data as per the EF guidelines version 2.0.
OR
- EF compliant data

## Modelling constants
All modelling constants follow the requirements listed in the Tender Specifications ENV.B.1/SER/2016/0038vl. Completeness: All known environmental flows are included. All known resource uses and emissions are listed in the inventory. Water use: water use is modelled at country level using separate flows for water withdrawal, water release and water evaporation. Cut-off: All known environmental flows are included. All known resource uses and emissions are listed in the inventory. Handling multi-functional processes: the following PEF multi- functionality decision hierarchy is applied for resolving all multi- functionality problems: (1) subdivision or system expansion; (2) allocation based on a relevant underlying physical relationship (substitution may apply here); (3) allocation based on some other relationship. Direct land use change: GHG emissions from direct LUC allocated to good/service for 20 years after the LUC occurs, with IPCC default values. Carbon storage and delayed emissions: credits associated with temporary (carbon) storage or delayed emissions up to 300 years are not be considered. Emissions off-setting: are not included. Capital goods (including infrastructures) and their End of life: they are included. System boundaries: system boundaries include all processes linked to the product supply chain (e.g. maintenance). Time period: emissions and removals are modelled as if released or removed at the beginning of the assessment method. Fossil and biogenic carbon emissions and removals: removals and emissions are modelled as follows: All GHG emissions from fossil fuels (including peat and limestone) are modelled consistently with the most updated ILCD list of elementary flows. The non-fossil (biogenic) carbon flows are modelled consistently with the most updated ILCD list of elementary flows.

## Cut-off and completeness
All known environmental flows are included. All known resource uses and emissions are listed in the inventory. The dataset dry mass balance has been checked to ensure the inventory is complete. Capital goods (e.g. infrastructure) and their end-of-life are included.

## Data selection and combination
These datasets include, in both their foreground and background data, links to EF3.0 compliant data.
The relevant background data on energy, transport, and End of Life are from the LCDN data node (http://lcdn.thinkstep.com/Node/).
All other background data in the supply of this product for which no EF3.0 process was available are from ecoinvent v3.7 database (www.ecoinvent.org) or other data sources.

## Data treatment and extrapolations
Several data sources have been used to model the inventory.

## Use advice
This data set is a supporting sub-data set and must be used exclusively as sub-data set of its corresponding level-1 partly disaggregated data set (see “General comment” field for exact name and UUID).

## Data sources
- Background Data for Representative products and organisations. EF 3.0 compliant (data stock)
- Maciel VG, Bockorny G, Domingues N, et al (2017) Comparative Life Cycle Assessment among Three Polyurethane Adhesive Technologies for the Footwear Industry.
- Quantis International. ‘World Apparel and Footwear Life Cycle Assessment Database (WALDB: Apparel + Footwear)’. Quantis. Accessed 21 July 2021. https://quantis-intl.com/metrics/databases/waldb-apparel-footwear/.

## Intended applications
Implementation of regular Product Environmental Footprint (PEF) studies and Organisation Environmental Footprint (OEF) studies exclusively under the specified Product groups and sectors as defined in the Product Environmental Footprint Category Rules (PEFCR) and Organisation Environmental Footprint Sectorial Rules (OEFSR) listed in http://ec.europa.eu/environment/eussd/smgp/PEFCR_OEFSR.htm
