# wool; sheep; production mix, at farm; 1 kg wool

Dataset: ILCD process, Partly terminated system
Geography: AU
Reference year: 2013
Valid until: 2024
Classification: Materials production / Food and renewable raw materials
LCI method principle: Attributional
LCI method approaches: Allocation - market value
Completeness: All relevant flows quantified
Project: Provision of process-based 3.0 Environmental Footprint-compliant life cycle inventory datasets - Renewable materials - contract number 070201/2020/840085/SER/ENV.B.1
Generated by: Blonk Sustainability Tools
Owner: Blonk Sustainability Tools
Compliance: ILCD Data Network - Entry-level; Suggestions for updating the PEF method 2019; ISO 14040 Environmental Management – Life Cycle Assessment – Principles and Framework, 2006; ISO 14044:2006. Environmental Management – Life Cycle Assessment – Requirements and guidelines.; Environmental Footprint 3.1
Review: Dependent internal review by Hans Blonk, Emilia Moreno Ruiz; Independent review panel by Laura Batlle Bayer
Data quality: Overall quality: Very good; Time representativeness: Very good; Geographical representativeness: Very good; Technological representativeness: Very good; Precision: Fair; Methodological appropriateness and consistency: Not applicable
Amounts: no units in this file; such an amount is in the reference unit of its flow, which a separate flow dataset defines
copyright: true
licenseType: Free of charge for some user types or use types
accessRestrictions: Free of charge for all final users implementing a regular Product Environmental Footprint (PEF) studies and Organisation Environmental Footprint (OEF) studies exclusively under the specified Product groups and sectors as defined in the Product Environmental Footprint Category Rules (PEFCR) and Organisation Environmental Footprint Sectorial Rules (OEFSR) listed in http://ec.europa.eu/environment/eussd/smgp/PEFCR_OEFSR.htm and in accordance with the terms and conditions of the EULA (available at https://ecoinvent.lca-data.com/) exclusively until 31st December 2024. Any use of this dataset or any derivative data not within the specific context of one of the PEF/OEF projects or after the end of 2024 is not permitted.

## General comment
Notice: this data set supersedes the EF3.0-compliant version (see link under "preceding data set version" below calculated with the EF3.0). The life cycle inventory is not changed from the original EF3.0 data set. The LCIA results are calculated based on the EF3.1 methods which provide updated characterisation factors in the following impact categories: Climate Change, Ecotoxicity freshwater, Photochemical Ozone Formation, Acidification, Human Toxicity non-cancer, and Human Toxicity cancer. The review report and the data quality ratings refer to the original results. The data set has been updated by the European Commission on the basis of the original EF3.0 data set delivered by the data provider.Wool is produced from sheep kept in extensive grazing systems in Australia. Production data are based on extensive sheep production in New Zealand (Ledgard et al. 2010). The flock remains outdoors year-round without housing or feed concentrates provided. The lambs graze on summer brassica to cover a part of its energy needs. On average 6-7 kg of wool is produced per animal per year.

## Technology and included processes
This dataset aims at representing the production of one kg of wool from sheep produced in Australia. The activity starts with sheep on grassland. Inputs also include energy, water, land use and enteric methane emissions. The activity ends with the finished sheep ready for slaughter, this is a mixture of lambs, ewes and hoggets. Biophysical allocation is applied to assign the environmental impact to wool (54%) and animals (46%) produced. System boundaries applied are from cradle to farm gate.

## Parameters
- kg_0: 353.366
  Mass in kg, for ewe-hogget compound feed, at processing/au economic; Articulated lorry transport, Total weight 28-32 t, mix Euro 0-5; ROW w/o EU+EFTA
- km_0: 100
  Distance in km, for ewe-hogget compound feed, at processing/au economic; Articulated lorry transport, Total weight 28-32 t, mix Euro 0-5; ROW w/o EU+EFTA
- kg_km_0: 35336.6; = kg_0*km_0
  Transport amount in km*km, for ewe-hogget compound feed, at processing/au economic; Articulated lorry transport, Total weight 28-32 t, mix Euro 0-5; ROW w/o EU+EFTA
- kg_1: 93.6522
  Mass in kg, for lamb compound feed, at processing/au economic; Articulated lorry transport, Total weight 28-32 t, mix Euro 0-5; ROW w/o EU+EFTA
- km_1: 100
  Distance in km, for lamb compound feed, at processing/au economic; Articulated lorry transport, Total weight 28-32 t, mix Euro 0-5; ROW w/o EU+EFTA
- kg_km_1: 9365.22; = kg_1*km_1
  Transport amount in km*km, for lamb compound feed, at processing/au economic; Articulated lorry transport, Total weight 28-32 t, mix Euro 0-5; ROW w/o EU+EFTA

## Reference product
- wool, sheep // wool // au: 1

## Inputs
- Transport of ewe-hogget compound feed, at processing/au economic by Articulated lorry transport, Total weight 28-32 t, mix Euro 0-5 - ROW w/o EU+EFTA: 35336.6; = kg_km_0
- Transport of lamb compound feed, at processing/au economic by Articulated lorry transport, Total weight 28-32 t, mix Euro 0-5 - ROW w/o EU+EFTA: 9365.22; = kg_km_1
- Electricity from Electricity grid mix 1kV-60kV - AU: 4.45627
- wool, sheep // wool // au, blackbox: 1
- wool, sheep // wool // au, elementary: 1

## Impact indicators
- Eutrophication marine: 1.05706
- Ecotoxicity, freshwater: 10630.6
- Land use: 12541.1
- Water use: 337.455
- Resource use, minerals and metals: 3.75161e-5
- Resource use, fossils: 225.474
- Climate change: 70.5354
- Ozone depletion: 2.30082e-7
- Human toxicity, cancer: 1.48718e-8
- Human toxicity, non-cancer: 1.83956e-6
- EF-particulate Matter: 1.48201e-5
- Ionising radiation, human health: 0.353143
- Photochemical ozone formation - human health: 0.136093
- Acidification: 1.94199
- Eutrophication, terrestrial: 8.63893
- Eutrophication, freshwater: 0.0147982

## Deviations from the LCI method principle
The background data uses:
- the \xe2\x80\x9cRecycled content cut-off\xe2\x80\x9d approach to allocate end-of-life by-products and secondary materials. This allocation is explained in the description of the recycled content system model (http://www.ecoinvent.org/database/system-models-in-ecoinvent-3/cut-off-system-model/allocation-cut-off-by-classification.html).
OR
- EF compliant data

## Deviations from the LCI method approaches
Background data:
- the \xe2\x80\x9cRecycled content cut-off\xe2\x80\x9d approach to allocate end-of-life by-products and secondary materials. This allocation is explained in the description of the recycled content system model (http://www.ecoinvent.org/database/system-models-in-ecoinvent-3/cut-off-system-model/allocation-cut-off-by-classification.html). The ecoinvent database mostly relies on “Allocation – market values” apart for few exceptions particularly in the energy sector. ecoinvent energy data is replaced with EF3.0 core data as per the EF guidelines version 2.0.
OR
- EF compliant data

## Modelling constants
All modelling constants follow the requirements listed in the Tender Specifications 070201/2020/SER/ENV.B1. Completeness: There are no intentional cut-offs in the inventory no matter how small their contribution to all the EF impact categories is. Eventual cut-offs are in compliance with the Guide for EF compliant data sets (JRC 2020), i.e. only if below the 3% cut-off rule. Water use: water use is modelled at country level using separate flows for water withdrawal, water release and water evaporation. Handling multi-functional processes: the following PEF multi- functionality decision hierarchy is applied for resolving all multi- functionality problems: (1) subdivision or system expansion; (2) allocation based on a relevant underlying physical relationship (substitution may apply here); (3) allocation based on some other relationship. Direct land use change: GHG emissions from direct LUC allocated to good/service for 20 years after the LUC occurs, with IPCC default values. Carbon storage and delayed emissions: credits associated with temporary (carbon) storage or delayed emissions up to 300 years are not be considered. Emissions off-setting: are not included. Capital goods (including infrastructures) and their End of life: they are included. System boundaries: system boundaries include all processes linked to the product supply chain (e.g. maintenance). Time period: emissions and removals are modelled as if released or removed at the beginning of the assessment method. Fossil and biogenic carbon emissions and removals: removals and emissions are modelled as follows: All GHG emissions from fossil fuels (including peat and limestone) are modelled consistently with the most updated ILCD list of elementary flows. The non-fossil (biogenic) carbon flows are modelled consistently with the most updated ILCD list of elementary flows.

## Cut-off and completeness
There are no intentional cut-offs in the inventory no matter how small their contribution to all the EF impact categories is. Eventual cut-offs are in compliance with the Guide for EF compliant data sets (JRC 2020), i.e. only if below the 3% cut-off rule. The dataset dry mass and water balance has been checked to ensure the inventory is complete. Capital goods (e.g. infrastructure) and their end-of-life are included.

## Data selection and combination
These datasets include, in both their foreground and background data, links to EF3.0 compliant data.
The relevant background data on energy, transport, and End of Life are from the LCDN data node (http://lcdn.thinkstep.com/Node/).
All other background data in the supply of this product for which no EF3.0 process was available are from ecoinvent v3.7 database (www.ecoinvent.org) or other data sources.

## Data treatment and extrapolations
Several data sources have been used to model the inventory.

## Review details
Internal reviews have been asked to review the plausibility of the unit process, LCIA scores, and DQRs. Internal reviewers have also been asked to review the data for EF compliancy. The consortium is therefore responsible for aspects such as compliancy with the ILCD format, including validation in Look@LCI, and nomenclature.
Internal reviwers have been asked to judge based on the process name, that the unit process models in a complete and representative way the process in the requested location. The review encompassed the plausability of:
- exchanges with nature (elementary flows) as well as exchanges such as product and waste flows.
- meta information (general comment, technology comment, system boundaries, allocation, cut-off rules, etc.). Reviewers were asked to judge if the provided information is enough to understand the content of the process.
- LCIA scores
- DQRs including precision, technology, time and geography. As well as the overall DQR.
External reviewers have been asked to provide their expertise in the field of interest. External reviewers have been asked to review the unit process, including eventual methodological choices, the LCIA scores (provided with contribution scores as well), and DQRs. External reviewers have been provided all the information in a tool developed by the consortium for the purpose of this project.
External reviewers have been asked to judge based on the process name, that the unit process models in a complete and representative way the process in the requested location. The review encompassed:
- Plausability and completeness of exchanges with nature (elementary flows) as well as exchanges such as product and waste flows.
- Review of meta information (general comment, technology comment, system boundaries, allocation, cut-off rules, etc.). Reviewers were asked to judge if the provided information is enough to understand the content of the process.
- Review of properties (biogenic carbon and water content).
- Review of allocation keys.
- Plausability of LCIA scores calculated by the consortium.
- Plausability of DQRs including precision, technology, time and geography. As well as the overall DQR.

## Data sources
- Background Data for Representative products and organisations. EF 3.0 compliant (data stock)
- Ledgard, S. F., Lieffering, M., McDevitt, J., Boyes, M., & Kemp, R. (2010). A Greenhouse Gas Footprint Study for Exported New Zealand Lamb, 26.
- TS Red meat pilot. (2016). PEF pilot Red Meat; screening study.
- Broekema, R., Kuling, L., & Scholten, J. (2015). Life Cycle Inventories of dairy- and animal products consumed in the Netherlands. Blonk Consultants.
- European Commission, PEFCR Guidance document, - Guidance for the development of Product Environmental Footprint Category Rules (PEFCRs), version 6.3, December 2017.
- FAO LEAP. (2015). Greenhouse gas emissions and fossil energy use from small ruminant supply chains - Guidelines for assessment. http://www.fao.org/partnerships/leap/resources/resources/en/
- Barcelos, S. S., Vargas, J. A. C., Mezzomo, R., Gionbelli, M. P., Gomes, D. I., Oliveira, L. R. S., Luz, J. B., Maciel, D. L., & Alves, K. S. (2021). Predicting the chemical composition of the body and the carcass of hair sheep using body parts and carcass measurements. Animal, 15(3), 100139. https://doi.org/10.1016/j.animal.2020.100139
- GDV (1998-2021) Cargo information, TIS Transport Information Service, Germany, https://www.tis-gdv.de/tis_e/ware/fasern/wolle
- Marchelli, F., Rovero, G., Curti, M., Arato, E., Bosio, B., & Moliner, C. (2021). An integrated approach to convert lignocellulosic and wool residues into balanced fertilisers. Energies, 14(2), 1–15. https://doi.org/10.3390/en14020497

## Intended applications
Implementation of regular Product Environmental Footprint (PEF) studies and Organisation Environmental Footprint (OEF) studies exclusively under the specified Product groups and sectors as defined in the Product Environmental Footprint Category Rules (PEFCR) and Organisation Environmental Footprint Sectorial Rules (OEFSR) listed in http://ec.europa.eu/environment/eussd/smgp/PEFCR_OEFSR.htm
