# shoe lace; braiding; Production mix, at plant; Shoe lace (PES, Cotton, Nylon)

Dataset: ILCD process, Partly terminated system
Geography: GLO
Reference year: 2021
Valid until: 2024
Classification: Systems / Textiles, furnitures and other interiors
LCI method principle: Attributional
LCI method approaches: Allocation - market value
Completeness: All relevant flows quantified
Project: Provision of process-based 3.0 Environmental Footprint-compliant life cycle inventory datasets - Others - contract number 070201/2020/840235/SER/ENV.B.1
Generated by: Metsims Sustainability Consulting
Owner: PRé Sustainability B.V.
Compliance: ILCD Data Network - Entry-level; Suggestions for updating the PEF method 2019; ISO 14040 Environmental Management – Life Cycle Assessment – Principles and Framework, 2006; ISO 14044:2006. Environmental Management – Life Cycle Assessment – Requirements and guidelines.; Environmental Footprint 3.1
Review: Dependent internal review by Avraam Symeonidis, Emilia Moreno Ruiz; Independent review panel by Madhuri Nigam
Data quality: Overall quality: Good; Time representativeness: Very good; Geographical representativeness: Good; Technological representativeness: Good; Precision: Good; Methodological appropriateness and consistency: Not applicable
Amounts: no units in this file; such an amount is in the reference unit of its flow, which a separate flow dataset defines
copyright: true
licenseType: Free of charge for some user types or use types
accessRestrictions: Free of charge for all final users implementing a regular Product Environmental Footprint (PEF) studies and Organisation Environmental Footprint (OEF) studies exclusively under the specified Product groups and sectors as defined in the Product Environmental Footprint Category Rules (PEFCR) and Organisation Environmental Footprint Sectorial Rules (OEFSR) listed in http://ec.europa.eu/environment/eussd/smgp/PEFCR_OEFSR.htm and in accordance with the terms and conditions of the EULA (available at https://ecoinvent.lca-data.com/) exclusively until 31st December 2024. Any use of this dataset or any derivative data not within the specific context of one of the PEF/OEF projects or after the end of 2024 is not permitted.

## General comment
Notice: this data set supersedes the EF3.0-compliant version (see link under "preceding data set version" below calculated with the EF3.0). The life cycle inventory is not changed from the original EF3.0 data set. The LCIA results are calculated based on the EF3.1 methods which provide updated characterisation factors in the following impact categories: Climate Change, Ecotoxicity freshwater, Photochemical Ozone Formation, Acidification, Human Toxicity non-cancer, and Human Toxicity cancer. The review report and the data quality ratings refer to the original results. The data set has been updated by the European Commission on the basis of the original EF3.0 data set delivered by the data provider.Braiding consists of three or more yarns mechanically intertwined. The braids are continuous, which enables the load to be evenly distributed throughout the structure. Fibers are coiled into a helix, similar to wire in a spring.

The data covers raw material of shoelace consist of PES, Cotton, Nylon yarn mixture and, covers electricity consumption of braiding machine.

Electricity consumption of braiding machine was calculated according to declaration of producers at online marketing websites.

Reference:
1. Kyosev, Y. (2015). Braiding technology for textiles, Mönchengladbach.

## Technology and included processes
This data covers the production of shoe lace (end product) by braiding technique. The process includes the spinning of yarns (average yarn mix) through spinning for PET, Cotton and Nylon yarns.

A braiding machine is a device that interlaces three or more strands of yarn or wire to create lace. In braiding machine, bobbins of thread pass one another to the left and right on pseudo-sinusoidal tracks. The bobbins are mounted on spool carriers that are driven by a series of horn gears. A horn gear is a notched disk driven by a spur gear below on the same shaft; bobbins are transferred between notches of adjacent gears. These gears lie below the track plate that the bobbin carriers ride on. The gears must be driven at multiple points on machines that use two or more bobbin sets and cross-shafts.

Waste processing model was generated from global waste collection rate. Global waste collection rate is 65%. 75% of waste collected are delivered to recycle facility and, 25% of collected waste are delivered to landfill areas. Uncollected part of waste (35%) was assumed that it is dropped to landfill areas. From production facility to landfill transport was assumed as 70 km.

## Parameters
- A_cotton: 0.8
  The amount of waste cotton produced is 0.0286764705882353kg. The assumed percentage of losses of the recycling process is 0.166666666666667. R2 has been calculated as the original amount of waste minues losses, i.e. 0.0238970588235294kg. The value for A has been taken from the default values for the CFF. The default value for textiles is 0.8. Being pre-consumer waste, Qsout/Qp is assumed to be 1. The E*v part of the formula is modelled as a negative input of the relevant virgin material.
- Qsout/Qp_cotton: 1
  (same comment as for A_cotton)
- CFF_cotton: 0.0286765; = (1-A_cotton)*R2_cotton
  (same comment as for A_cotton)
- avoid_cotton: 0.166667; = CFF_cotton*Qsout/Qp_cotton
  (same comment as for A_cotton)
- A_PET: 0.5
  The amount of waste PET produced is 0.0050257731958763kg. The assumed percentage of losses of the recycling process is 0.0999999999999999. R2 has been calculated as the original amount of waste minues losses, i.e. 0.00452319587628867kg. The value for A has been taken from the default values for the CFF. The default value for plastics is 0.5. Being pre-consumer waste, Qsout/Qp is assumed to be 1. The E*v part of the formula is modelled as a negative input of the relevant virgin material.
- Qsout/Qp_PET: 1
  (same comment as for A_PET)
- CFF_PET: 0.00502577; = (1-A_PET)*R2_PET
  (same comment as for A_PET)
- avoid_PET: 0.1; = CFF_PET*Qsout/Qp_PET
  (same comment as for A_PET)
- R2_PET: 0.0045232
  The amount of waste produced is 0.0050257731958763kg. The assumed percentage of losses of the recycling process is 0.0999999999999999. R2 has been calculated as the original amount of waste minues losses, i.e. 0.00452319587628867kg. The value for A has been taken from the default values for the CFF. The default value for plastics is 0.5. Being pre-consumer waste, Qsout/Qp is assumed to be 1. The E*v part of the formula is modelled as a negative input of the relevant virgin material.
- R2_cotton: 0.0238971
  The amount of waste produced is 0.0286764705882353kg. The assumed percentage of losses of the recycling process is 0.166666666666667. R2 has been calculated as the original amount of waste minues losses, i.e. 0.0238970588235294kg. The value for A has been taken from the default values for the CFF. The default value for textiles is 0.8. Being pre-consumer waste, Qsout/Qp is assumed to be 1. The E*v part of the formula is modelled as a negative input of the relevant virgin material.
- A_nylon: 0.5
  The amount of waste nylon produced is 0.0050257731958763kg. The assumed percentage of losses of the recycling process is 0.1. R2 has been calculated as the original amount of waste minues losses, i.e. 0.00452319587628867kg. The value for A has been taken from the default values for the CFF. The default value for plastics is 0.5. Being pre-consumer waste, Qsout/Qp is assumed to be 1. The E*v part of the formula is modelled as a negative input of the relevant virgin material.
- Qsout/Qp_nylon: 1
  (same comment as for A_nylon)
- CFF_nylon: 0.00502577; = (1-A_nylon)*R2_nylon
  (same comment as for A_nylon)
- avoid_nylon: 0.1; = CFF_nylon*Qsout/Qp_nylon
  (same comment as for A_nylon)
- R2_nylon: 0.0045232
  The amount of waste produced is 0.0050257731958763kg. The assumed percentage of losses of the recycling process is 0.1. R2 has been calculated as the original amount of waste minues losses, i.e. 0.00452319587628867kg. The value for A has been taken from the default values for the CFF. The default value for plastics is 0.5. Being pre-consumer waste, Qsout/Qp is assumed to be 1. The E*v part of the formula is modelled as a negative input of the relevant virgin material.
- kg_0: 0.392157
  Mass in kg, for cotton fibre // cotton fibre // glo; Articulated lorry transport, Euro 4, Total weight >32 t; EU+EFTA+UK
- km_0: 999.6
  Distance in km, for cotton fibre // cotton fibre // glo; Articulated lorry transport, Euro 4, Total weight >32 t; EU+EFTA+UK
- kg_km_0: 392; = kg_0*km_0
  Transport amount in km*km, for cotton fibre // cotton fibre // glo; Articulated lorry transport, Euro 4, Total weight >32 t; EU+EFTA+UK
- kg_1: 0.171821
  Mass in kg, for nylon 6 // nylon 6 production, fossil fuel-based // glo; Articulated lorry transport, Euro 4, Total weight >32 t; EU+EFTA+UK
- km_1: 1001.04
  Distance in km, for nylon 6 // nylon 6 production, fossil fuel-based // glo; Articulated lorry transport, Euro 4, Total weight >32 t; EU+EFTA+UK
- kg_km_1: 172; = kg_1*km_1
  Transport amount in km*km, for nylon 6 // nylon 6 production, fossil fuel-based // glo; Articulated lorry transport, Euro 4, Total weight >32 t; EU+EFTA+UK
- kg_2: 0.171821
  Mass in kg, for polyamide 6.6 // nylon 6.6 production, fossil fuel-based // glo; Articulated lorry transport, Euro 4, Total weight >32 t; EU+EFTA+UK
- km_2: 1001.04
  Distance in km, for polyamide 6.6 // nylon 6.6 production, fossil fuel-based // glo; Articulated lorry transport, Euro 4, Total weight >32 t; EU+EFTA+UK
- kg_km_2: 172; = kg_2*km_2
  Transport amount in km*km, for polyamide 6.6 // nylon 6.6 production, fossil fuel-based // glo; Articulated lorry transport, Euro 4, Total weight >32 t; EU+EFTA+UK
- kg_3: 0.343643
  Mass in kg, for polyethylene terephthalate, mix // polyethylene terephthalate (pet) production, blend of bio- based and fossil // glo; Articulated lorry transport, Euro 4, Total weight >32 t; EU+EFTA+UK
- km_3: 1001.04
  Distance in km, for polyethylene terephthalate, mix // polyethylene terephthalate (pet) production, blend of bio- based and fossil // glo; Articulated lorry transport, Euro 4, Total weight >32 t; EU+EFTA+UK
- kg_km_3: 344; = kg_3*km_3
  Transport amount in km*km, for polyethylene terephthalate, mix // polyethylene terephthalate (pet) production, blend of bio- based and fossil // glo; Articulated lorry transport, Euro 4, Total weight >32 t; EU+EFTA+UK
- kg_4: 0.0407141
  Mass in kg, for waste (unspecified) // landfill of plastic waste // eu+efta+uk; Articulated lorry transport, Euro 4, Total weight >32 t; EU+EFTA+UK
- km_4: 70
  Distance in km, for waste (unspecified) // landfill of plastic waste // eu+efta+uk; Articulated lorry transport, Euro 4, Total weight >32 t; EU+EFTA+UK
- kg_km_4: 2.84998; = kg_4*km_4
  Transport amount in km*km, for waste (unspecified) // landfill of plastic waste // eu+efta+uk; Articulated lorry transport, Euro 4, Total weight >32 t; EU+EFTA+UK
- kg_5: 0.392157
  Mass in kg, for cotton fibre // cotton fibre // glo; Transoceanic ship, containers; GLO
- km_5: 18003
  Distance in km, for cotton fibre // cotton fibre // glo; Transoceanic ship, containers; GLO
- kg_km_5: 7060; = kg_5*km_5
  Transport amount in km*km, for cotton fibre // cotton fibre // glo; Transoceanic ship, containers; GLO
- kg_6: 0.171821
  Mass in kg, for nylon 6 // nylon 6 production, fossil fuel-based // glo; Transoceanic ship, containers; GLO
- km_6: 17983.8
  Distance in km, for nylon 6 // nylon 6 production, fossil fuel-based // glo; Transoceanic ship, containers; GLO
- kg_km_6: 3090; = kg_6*km_6
  Transport amount in km*km, for nylon 6 // nylon 6 production, fossil fuel-based // glo; Transoceanic ship, containers; GLO
- kg_7: 0.171821
  Mass in kg, for polyamide 6.6 // nylon 6.6 production, fossil fuel-based // glo; Transoceanic ship, containers; GLO
- km_7: 17983.8
  Distance in km, for polyamide 6.6 // nylon 6.6 production, fossil fuel-based // glo; Transoceanic ship, containers; GLO
- kg_km_7: 3090; = kg_7*km_7
  Transport amount in km*km, for polyamide 6.6 // nylon 6.6 production, fossil fuel-based // glo; Transoceanic ship, containers; GLO
- kg_8: 0.343643
  Mass in kg, for polyethylene terephthalate, mix // polyethylene terephthalate (pet) production, blend of bio- based and fossil // glo; Transoceanic ship, containers; GLO
- km_8: 18012.9
  Distance in km, for polyethylene terephthalate, mix // polyethylene terephthalate (pet) production, blend of bio- based and fossil // glo; Transoceanic ship, containers; GLO
- kg_km_8: 6190; = kg_8*km_8
  Transport amount in km*km, for polyethylene terephthalate, mix // polyethylene terephthalate (pet) production, blend of bio- based and fossil // glo; Transoceanic ship, containers; GLO

## Reference product
- shoe lace // shoe lace // glo: 1

## Inputs
- Electricity from Electricity grid mix 1kV-60kV - AU: 0.0027
- Electricity from Electricity grid mix 1kV-60kV - EU+EFTA+UK: 0.04
- Electricity from Electricity grid mix 1kV-60kV - NZ: 0.0005
- Electricity from Electricity grid mix 1kV-60kV - RAF: 0.0087
- Electricity from Electricity grid mix 1kV-60kV - RNA: 0.0586
- Electricity from Electricity grid mix 1kV-60kV - RSA: 0.0199
- Electricity from Electricity grid mix 1kV-60kV - RU: 0.0117
- Transport of cotton fibre // cotton fibre // glo by Articulated lorry transport, Euro 4, Total weight >32 t - EU+EFTA+UK: 392; = kg_km_0
- Transport of nylon 6 // nylon 6 production, fossil fuel-based // glo by Articulated lorry transport, Euro 4, Total weight >32 t - EU+EFTA+UK: 172; = kg_km_1
- Transport of polyamide 6.6 // nylon 6.6 production, fossil fuel-based // glo by Articulated lorry transport, Euro 4, Total weight >32 t - EU+EFTA+UK: 172; = kg_km_2
- Transport of polyethylene terephthalate, mix // polyethylene terephthalate (pet) production, blend of bio- based and fossil // glo by Articulated lorry transport, Euro 4, Total weight >32 t - EU+EFTA+UK: 344; = kg_km_3
- Transport of waste (unspecified) // landfill of plastic waste // eu+efta+uk by Articulated lorry transport, Euro 4, Total weight >32 t - EU+EFTA+UK: 2.84998; = kg_km_4
- Transport of cotton fibre // cotton fibre // glo by Transoceanic ship, containers - GLO: 7060; = kg_km_5
- Transport of nylon 6 // nylon 6 production, fossil fuel-based // glo by Transoceanic ship, containers - GLO: 3090; = kg_km_6
- Transport of polyamide 6.6 // nylon 6.6 production, fossil fuel-based // glo by Transoceanic ship, containers - GLO: 3090; = kg_km_7
- Transport of polyethylene terephthalate, mix // polyethylene terephthalate (pet) production, blend of bio- based and fossil // glo by Transoceanic ship, containers - GLO: 6190; = kg_km_8
- cotton fibre, recycled, pre-consumer // cotton fibre, recycled, pre-consumer // glo: 0.00477941; = CFF_cotton
- Electricity from Electricity grid mix 1kV-60kV - CN: 0.0599817
- Electricity from Electricity grid mix 1kV-60kV - RAS w/o CN: 0.0657183
- nylon, recycled // nylon production, recycled, mechanical // glo: 0.0022616; = CFF_nylon
- polyethylene terephthalate, recycled, pre-consumer // polyethylene terephthalate (pet) production, recycled, semi-mechanical, pre-consumer // glo: 0.0022616; = CFF_PET
- shoe lace // shoe lace // glo, blackbox: 1
- shoe lace // shoe lace // glo, elementary: 1

## Outputs
- avoided product system, cotton from shoe lace // avoided product system cotton in shoe lace // glo: 0.00477941; = avoid_cotton
- avoided product system, nylon from shoe lace // avoided product system nylon in shoe lace // glo: 0.0022616; = avoid_nylon
- avoided product system, pet from shoe lace // avoided product system pet in shoe lace // glo: 0.0022616; = avoid_PET

## Impact indicators
- Eutrophication marine: 0.038147
- Ecotoxicity, freshwater: 122.894
- Land use: 322.701
- Water use: 36.0369
- Resource use, minerals and metals: 0.00019653
- Resource use, fossils: 118.623
- Climate change: 8.80271
- Ozone depletion: 9.02493e-8
- Human toxicity, cancer: 7.45798e-9
- Human toxicity, non-cancer: 1.51506e-7
- EF-particulate Matter: 1.69766e-6
- Ionising radiation, human health: 0.260591
- Photochemical ozone formation - human health: 0.0389697
- Acidification: 0.0795077
- Eutrophication, terrestrial: 0.218407
- Eutrophication, freshwater: 0.00241883

## Deviations from the LCI method principle
The background data uses:
- the \xe2\x80\x9cRecycled content cut-off\xe2\x80\x9d approach to allocate end-of-life by-products and secondary materials. This allocation is explained in the description of the recycled content system model (http://www.ecoinvent.org/database/system-models-in-ecoinvent-3/cut-off-system-model/allocation-cut-off-by-classification.html).
OR
- EF compliant data

## Deviations from the LCI method approaches
Background data:
- the \xe2\x80\x9cRecycled content cut-off\xe2\x80\x9d approach to allocate end-of-life by-products and secondary materials. This allocation is explained in the description of the recycled content system model (http://www.ecoinvent.org/database/system-models-in-ecoinvent-3/cut-off-system-model/allocation-cut-off-by-classification.html). The ecoinvent database mostly relies on “Allocation – market values” apart for few exceptions particularly in the energy sector. ecoinvent energy data is replaced with EF3.0 core data as per the EF guidelines version 2.0.
OR
- EF compliant data

CFF implementation:
-For recycling of waste cotton. The original amount of waste material was 0.0286764705882353kg. The default A of 0.8 for textile shirt was used. 20% of the original amount is therefore considered to reflect the implementation of the CFF formula. Being pre-consumer waste, Qsout/Qp is assumed to be 1. The E*v part of the formula is modelled as a negative input of the relevant virgin material. The efficiency of the recycling activity is taken into account that is why the amount of the virgin input differs from the amount of waste sent to recycling.

## Modelling constants
All modelling constants follow the requirements listed in the Tender Specifications 070201/2020/SER/ENV.B1. Completeness: There are no intentional cut-offs in the inventory no matter how small their contribution to all the EF impact categories is. Eventual cut-offs are in compliance with the Guide for EF compliant data sets (JRC 2020), i.e. only if below the 3% cut-off rule. Water use: water use is modelled at country level using separate flows for water withdrawal, water release and water evaporation. Handling multi-functional processes: the following PEF multi- functionality decision hierarchy is applied for resolving all multi- functionality problems: (1) subdivision or system expansion; (2) allocation based on a relevant underlying physical relationship (substitution may apply here); (3) allocation based on some other relationship. Direct land use change: GHG emissions from direct LUC allocated to good/service for 20 years after the LUC occurs, with IPCC default values. Carbon storage and delayed emissions: credits associated with temporary (carbon) storage or delayed emissions up to 300 years are not be considered. Emissions off-setting: are not included. Capital goods (including infrastructures) and their End of life: they are included. System boundaries: system boundaries include all processes linked to the product supply chain (e.g. maintenance). Time period: emissions and removals are modelled as if released or removed at the beginning of the assessment method. Fossil and biogenic carbon emissions and removals: removals and emissions are modelled as follows: All GHG emissions from fossil fuels (including peat and limestone) are modelled consistently with the most updated ILCD list of elementary flows. The non-fossil (biogenic) carbon flows are modelled consistently with the most updated ILCD list of elementary flows.

## Cut-off and completeness
There are no intentional cut-offs in the inventory no matter how small their contribution to all the EF impact categories is. Eventual cut-offs are in compliance with the Guide for EF compliant data sets (JRC 2020), i.e. only if below the 3% cut-off rule. The dataset dry mass and water balance has been checked to ensure the inventory is complete. Capital goods (e.g. infrastructure) and their end-of-life are included.

## Data selection and combination
These datasets include, in both their foreground and background data, links to EF3.0 compliant data.
The relevant background data on energy, transport, and End of Life are from the LCDN data node (http://lcdn.thinkstep.com/Node/).
All other background data in the supply of this product for which no EF3.0 process was available are from ecoinvent v3.7 database (www.ecoinvent.org) or other data sources.

## Data treatment and extrapolations
Several data sources have been used to model the inventory.

## Review details
Internal reviews have been asked to review the plausibility of the unit process, LCIA scores, and DQRs. Internal reviewers have also been asked to review the data for EF compliancy. The consortium is therefore responsible for aspects such as compliancy with the ILCD format, including validation in Look@LCI, and nomenclature.
Internal reviwers have been asked to judge based on the process name, that the unit process models in a complete and representative way the process in the requested location. The review encompassed the plausability of:
- exchanges with nature (elementary flows) as well as exchanges such as product and waste flows.
- meta information (general comment, technology comment, system boundaries, allocation, cut-off rules, etc.). Reviewers were asked to judge if the provided information is enough to understand the content of the process.
- LCIA scores
- DQRs including precision, technology, time and geography. As well as the overall DQR.
External reviewers have been asked to provide their expertise in the field of interest. External reviewers have been asked to review the unit process, including eventual methodological choices, the LCIA scores (provided with contribution scores as well), and DQRs. External reviewers have been provided all the information in a tool developed by the consortium for the purpose of this project.
External reviewers have been asked to judge based on the process name, that the unit process models in a complete and representative way the process in the requested location. The review encompassed:
- Plausability and completeness of exchanges with nature (elementary flows) as well as exchanges such as product and waste flows.
- Review of meta information (general comment, technology comment, system boundaries, allocation, cut-off rules, etc.). Reviewers were asked to judge if the provided information is enough to understand the content of the process.
- Review of properties (biogenic carbon and water content).
- Review of allocation keys.
- Plausability of LCIA scores calculated by the consortium.
- Plausability of DQRs including precision, technology, time and geography. As well as the overall DQR.

## Data sources
- Background Data for Representative products and organisations. EF 3.0 compliant (data stock)
- Kyang Yhe Delicate Machine Co. Ltd., https://www.kyangyhe.com/en/product/Flat-Tape-Braiding-Machine/KYTP_flat-braiding-machine.html, Access Date: 22.03.2021
- Shanghai Qipang Industrial Co. Ltd., https://www.alibaba.com/product-detail/QIPANG-16-spindle-90-series-high_62480702725.html?spm=a2700.galleryofferlist.normal_offer.d_title.47e72daepPmpUv, Access Date: 22.03.2021
- Manufacturer,Trading Company, https://www.alibaba.com/product-detail/Shoe-Lace-Shoe-Laces-Cheap-China_476083058.html?spm=a2700.galleryofferlist.normal_offer.d_title.5f6b39e0HiuSNb&s=p, Access Date: 22.03.2021
- Dongguan City Zonesin Gift Company Limited, https://www.alibaba.com/product-detail/Wholesale-Fashion-Transparent-Tube-Packing-Sport_62175127942.html?spm=a2700.galleryofferlist.normal_offer.d_title.5f6b39e0XSPjKK, Access Date: 22.03.2021
- Kyosev, Y. (2015). Braiding technology for textiles, Mönchengladbach.
- Vignesh, K. S., Rajadesingu, S., & Arunachalam, K. D. (2021). Challenges, issues, and problems with zero-waste tools. In Concepts of Advanced Zero Waste Tools (pp. 69-90). Elsevier.
- Rosato, D. V. (1998). Blown film. In Extruding Plastics (pp. 305-348). Springer, Boston, MA.
- Altun, S. (2012). Prediction of textile waste profile and recycling opportunities in Turk. Fibres & Textiles in Eastern Europe.

## Intended applications
Implementation of regular Product Environmental Footprint (PEF) studies and Organisation Environmental Footprint (OEF) studies exclusively under the specified Product groups and sectors as defined in the Product Environmental Footprint Category Rules (PEFCR) and Organisation Environmental Footprint Sectorial Rules (OEFSR) listed in http://ec.europa.eu/environment/eussd/smgp/PEFCR_OEFSR.htm
