# polyethylene (pe) foam production, bio-based, elementary; foam extrusion; production mix, at plant; bio-based

Dataset: ILCD process, Unit process, single operation
Geography: GLO
Reference year: 2016
Valid until: 2024
Classification: Other Services / Other services
LCI method principle: Attributional
LCI method approaches: Allocation - market value
Completeness: All relevant flows quantified
Project: Provision of process-based 3.0 Environmental Footprint-compliant life cycle inventory datasets - Apparel 2 - contract number 070201/2020/840292/SER/ENV.B.1
Generated by: ecoinvent
Owner: PRé Sustainability B.V.
Compliance: Environmental Footprint non-primary supporting data set; Environmental Footprint 3.1
Amounts: no units in this file; such an amount is in the reference unit of its flow, which a separate flow dataset defines
copyright: true
licenseType: Free of charge for some user types or use types
accessRestrictions: Free of charge for all final users implementing a regular Product Environmental Footprint (PEF) studies and Organisation Environmental Footprint (OEF) studies exclusively under the specified Product groups and sectors as defined in the Product Environmental Footprint Category Rules (PEFCR) and Organisation Environmental Footprint Sectorial Rules (OEFSR) listed in http://ec.europa.eu/environment/eussd/smgp/PEFCR_OEFSR.htm and in accordance with the terms and conditions of the EULA (available at https://ecoinvent.lca-data.com/) exclusively until 31st December 2024. Any use of this dataset or any derivative data not within the specific context of one of the PEF/OEF projects or after the end of 2024 is not permitted.

## General comment
Notice: this data set supersedes the EF3.0-compliant version (see link under "preceding data set version" below calculated with the EF3.0). The life cycle inventory is not changed from the original EF3.0 data set. The LCIA results are calculated based on the EF3.1 methods which provide updated characterisation factors in the following impact categories: Climate Change, Ecotoxicity freshwater, Photochemical Ozone Formation, Acidification, Human Toxicity non-cancer, and Human Toxicity cancer. The review report and the data quality ratings refer to the original results. The data set has been updated by the European Commission on the basis of the original EF3.0 data set delivered by the data provider.This sub-process has limited documentation only. For all detailed documentation of the full model to which this data set belongs (such as DQRs, review reports and other technical documentation), please see this process: polyethylene (pe) foam production, bio-based - GLO []

## Technology and included processes
Polyethylene (PE) foam biogenic is produced from a direct foam extrusion process which is cross-linked. A typical formulation includes the use of biobased low-density PE (LDPE) resin, nucleating agent, permeation modifier, and a blowing agent to expand the polymer matrix. Biobased PE foam is manufactured as with conventional petrochemical process in terms of the extrusion process (temperature, pressure, polymer concentration, blowing agent, etc.). The only significant difference lies in the feedstock or the process route. The feedstock for the biogenic PE could come from sugar (sugar beets, sugar crane, molasse, etc), starch (potato, corn, wheat, etc), vegetable oil or second-generation feedstock like lignocellulosic biomass (agricultural wastes, wood, and grasses).
The process is performed in a batch reactor in order to produce moulded, cross-linked foam. In this method, preformed polyethylene boards containing cross-linking agents are placed in a mould and exposed to the blowing agent, azodicarbonamide, at ca. 38 MPa and 180 °C. After cooling and careful pressure reduction, the blowing agent remains dissolved in the melt. When heated to 100 – 130 °C, the partially cross-linked board foams to yield a foamed plastic. Its cells are very fine (0.1 mm), and its density is 24 – 70 kg/m3. The gel is removed from the mould rapidly while it is still hot and somewhat larger cells result. Depending on the application the foam will be used for, a number of additives are also being added to the formulation to control its properties, density and cell-size

References:
Wagemann, K. and Tippkötter, N. eds., 2019. Biorefineries. Springer.
Wiley-VCH. (2016). Ullmann's Polymers and Plastics - Products and Processes, 4 Volume Set. John Wiley & Sons

## Reference product
- polyethylene (pe) foam, bio-based // polyethylene (pe) foam production, bio-based // glo, elementary: 1

## Impact indicators
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
## Deviations from the LCI method principle
The background data use the \xe2\x80\x9cRecycled content cut-off\xe2\x80\x9d approach to allocate end-of-life by-products and secondary materials. This allocation is explained in the description of the recycled content system model (http://www.ecoinvent.org/database/system-models-in-ecoinvent-3/cut-off-system-model/allocation-cut-off-by-classification.html).

## Deviations from the LCI method approaches
Background data:
- the \xe2\x80\x9cRecycled content cut-off\xe2\x80\x9d approach to allocate end-of-life by-products and secondary materials. This allocation is explained in the description of the recycled content system model (http://www.ecoinvent.org/database/system-models-in-ecoinvent-3/cut-off-system-model/allocation-cut-off-by-classification.html). The ecoinvent database mostly relies on “Allocation – market values” apart for few exceptions particularly in the energy sector. ecoinvent energy data is replaced with EF3.0 core data as per the EF guidelines version 2.0.
OR
- EF compliant data

## Modelling constants
All modelling constants follow the requirements listed in the Tender Specifications ENV.B.1/SER/2016/0038vl. Completeness: All known environmental flows are included. All known resource uses and emissions are listed in the inventory. Water use: water use is modelled at country level using separate flows for water withdrawal, water release and water evaporation. Cut-off: All known environmental flows are included. All known resource uses and emissions are listed in the inventory. Handling multi-functional processes: the following PEF multi- functionality decision hierarchy is applied for resolving all multi- functionality problems: (1) subdivision or system expansion; (2) allocation based on a relevant underlying physical relationship (substitution may apply here); (3) allocation based on some other relationship. Direct land use change: GHG emissions from direct LUC allocated to good/service for 20 years after the LUC occurs, with IPCC default values. Carbon storage and delayed emissions: credits associated with temporary (carbon) storage or delayed emissions up to 300 years are not be considered. Emissions off-setting: are not included. Capital goods (including infrastructures) and their End of life: they are included. System boundaries: system boundaries include all processes linked to the product supply chain (e.g. maintenance). Time period: emissions and removals are modelled as if released or removed at the beginning of the assessment method. Fossil and biogenic carbon emissions and removals: removals and emissions are modelled as follows: All GHG emissions from fossil fuels (including peat and limestone) are modelled consistently with the most updated ILCD list of elementary flows. The non-fossil (biogenic) carbon flows are modelled consistently with the most updated ILCD list of elementary flows.

## Cut-off and completeness
All known environmental flows are included. All known resource uses and emissions are listed in the inventory. The dataset dry mass balance has been checked to ensure the inventory is complete. Capital goods (e.g. infrastructure) and their end-of-life are included.

## Data selection and combination
These datasets include, in both their foreground and background data, links to EF3.0 compliant data.
The relevant background data on energy, transport, and End of Life are from the LCDN data node (http://lcdn.thinkstep.com/Node/).
All other background data in the supply of this product for which no EF3.0 process was available are from ecoinvent v3.7 database (www.ecoinvent.org) or other data sources.

## Data treatment and extrapolations
Several data sources have been used to model the inventory.

## Use advice
This data set is a supporting sub-data set and must be used exclusively as sub-data set of its corresponding level-1 partly disaggregated data set (see “General comment” field for exact name and UUID).

## Data sources
- Background Data for Representative products and organisations. EF 3.0 compliant (data stock)
- Laguna-Gutierrez, E., Saiz-Arroyo, C., Velasco, J.I. and Rodriguez-Perez, M.A., 2016. Low density polyethylenesilica nanocomposite foams. Relationship between chemical composition, particle dispersion, cellular struc
- Gendorf, 2020, Umwelterkärung, www.gendorf.de
- Trocellen, 2021. TR-EECell – Bio-based XL PE Available at: https://tr-eecell.trocellen.com/
- ecoinvent (2017-2020). azodicarbonamide production, GLO, 4decedaa-9cc7-468f-a01d-758628e8d55d, 03.00.008. ecoinvent (2017) Data on the Production of Chemicals created for the EU Product Environmental Footprint (PEF) pilot phase implementation, www.ecoinvent.org, ecoinvent Association, Zürich, Switzerland. Restricted use. Download from http://ecoinvent.lcadata.com/
- ecoinvent (2017-2020). zinc oxide production, GLO, 3a02fc65-8a9b-476e-b1b6-49cbced95117, 03.00.008. ecoinvent (2017) Data on the Production of Chemicals created for the EU Product Environmental Footprint (PEF) pilot phase implementation, www.ecoinvent.org, ecoinvent Association, Zürich, Switzerland. Restricted use. Download from http://ecoinvent.lcadata.com/

## Intended applications
Implementation of regular Product Environmental Footprint (PEF) studies and Organisation Environmental Footprint (OEF) studies exclusively under the specified Product groups and sectors as defined in the Product Environmental Footprint Category Rules (PEFCR) and Organisation Environmental Footprint Sectorial Rules (OEFSR) listed in http://ec.europa.eu/environment/eussd/smgp/PEFCR_OEFSR.htm
