# foaming, free, by coating (1 side), elementary; technology mix; production mix, at plant; 100% active substance

Dataset: ILCD process, Unit process, single operation
Geography: GLO
Reference year: 2021
Valid until: 2024
Classification: Other Services / Other services
LCI method principle: Attributional
LCI method approaches: Allocation - market value
Completeness: All relevant flows quantified
Project: Provision of process-based 3.0 Environmental Footprint-compliant life cycle inventory datasets - Apparel 1 - contract number 070201/2020/840291/SER/ENV.B.1
Generated by: Life Cycle Indonesia
Owner: PRé Sustainability B.V.
Compliance: Environmental Footprint non-primary supporting data set; Environmental Footprint 3.1
Amounts: no units in this file; such an amount is in the reference unit of its flow, which a separate flow dataset defines
copyright: true
licenseType: Free of charge for some user types or use types
accessRestrictions: Free of charge for all final users implementing a regular Product Environmental Footprint (PEF) studies and Organisation Environmental Footprint (OEF) studies exclusively under the specified Product groups and sectors as defined in the Product Environmental Footprint Category Rules (PEFCR) and Organisation Environmental Footprint Sectorial Rules (OEFSR) listed in http://ec.europa.eu/environment/eussd/smgp/PEFCR_OEFSR.htm and in accordance with the terms and conditions of the EULA (available at https://ecoinvent.lca-data.com/) exclusively until 31st December 2024. Any use of this dataset or any derivative data not within the specific context of one of the PEF/OEF projects or after the end of 2024 is not permitted.

## General comment
Notice: this data set supersedes the EF3.0-compliant version (see link under "preceding data set version" below calculated with the EF3.0). The life cycle inventory is not changed from the original EF3.0 data set. The LCIA results are calculated based on the EF3.1 methods which provide updated characterisation factors in the following impact categories: Climate Change, Ecotoxicity freshwater, Photochemical Ozone Formation, Acidification, Human Toxicity non-cancer, and Human Toxicity cancer. The review report and the data quality ratings refer to the original results. The data set has been updated by the European Commission on the basis of the original EF3.0 data set delivered by the data provider.This sub-process has limited documentation only. For all detailed documentation of the full model to which this data set belongs (such as DQRs, review reports and other technical documentation), please see this process: foaming, free, by coating (1 side) - GLO []

## Technology and included processes
In this model, the foam aplicator for 1 side dyeing is doctor blade coating machine. As the industrial specification of machine is limited, lab-scale machine is used as a proxy. foam generator is used to generate foam mechanically. Machine for steam fixation and drying process is proxy to stenter, drying, and curing machine as the nature of the process is quite similiar. Treatment process before dyeing (Pre-dyeing process) and washing process after dyeing are not included in the model.

The dye used in this model is recipe for reactive dye. One of the example of reactive dye is CI RED Reactive 120 (Yu, et al., 2014), and can be classfied as organic chemical as most dyes contains carbon. Several auxiliaries chemicals also needed to make the dyeing foam.

The model represents the process itself, hence the input raw materials are not included in the model. The user will use this dataset along with the input raw materials. Energy uses, infrastructure, steam and compressed air consumption are included. There is no direct emission to soil, emission to air resulted from the drying process and it is assumed all water evaporate while dye and chemicals generated as product. Emission to water resulted from cooling water for foam generator and the hazardous waste comes from waste lube oil. In the model, energy sources of machines used solely from electricity. The consumption of lubricating oil for foam generator and stenter using a thermobonding oven as a proxy, while lubricating oil for doctor blade coating machine is not accounted in the model as it is a lab-scale machine hence industrial machine cannot be used as a proxy.

Yu. H, Wang Y.F., Zhong Y., Mao Z., Tan S., (2014), Foam properties and application in dyeing cotton fabrics with reactive dyes, doi: 10.1111/cote.12088, Key Laboratory of Science and Technology of Eco-Textile (Ministry of Education), Sanghai: Donghua University, China

## Reference product
- foaming, free, by coating (1 side) // foaming, free, by coating (1 side) // glo, elementary: 1

## Outputs
- Water, Emissions to air, unspecified: 0.000230814

## Impact indicators
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
## Deviations from the LCI method principle
The background data uses:
- the \xe2\x80\x9cRecycled content cut-off\xe2\x80\x9d approach to allocate end-of-life by-products and secondary materials. This allocation is explained in the description of the recycled content system model (http://www.ecoinvent.org/database/system-models-in-ecoinvent-3/cut-off-system-model/allocation-cut-off-by-classification.html).
OR
- EF compliant data

## Deviations from the LCI method approaches
Background data:
- the \xe2\x80\x9cRecycled content cut-off\xe2\x80\x9d approach to allocate end-of-life by-products and secondary materials. This allocation is explained in the description of the recycled content system model (http://www.ecoinvent.org/database/system-models-in-ecoinvent-3/cut-off-system-model/allocation-cut-off-by-classification.html). The ecoinvent database mostly relies on “Allocation – market values” apart for few exceptions particularly in the energy sector. ecoinvent energy data is replaced with EF3.0 core data as per the EF guidelines version 2.0.
OR
- EF compliant data

## Modelling constants
All modelling constants follow the requirements listed in the Tender Specifications 070201/2020/SER/ENV.B1. Completeness: There are no intentional cut-offs in the inventory no matter how small their contribution to all the EF impact categories is. Eventual cut-offs are in compliance with the Guide for EF compliant data sets (JRC 2020), i.e. only if below the 3% cut-off rule. Water use: water use is modelled at country level using separate flows for water withdrawal, water release and water evaporation. Handling multi-functional processes: the following PEF multi- functionality decision hierarchy is applied for resolving all multi- functionality problems: (1) subdivision or system expansion; (2) allocation based on a relevant underlying physical relationship (substitution may apply here); (3) allocation based on some other relationship. Direct land use change: GHG emissions from direct LUC allocated to good/service for 20 years after the LUC occurs, with IPCC default values. Carbon storage and delayed emissions: credits associated with temporary (carbon) storage or delayed emissions up to 300 years are not be considered. Emissions off-setting: are not included. Capital goods (including infrastructures) and their End of life: they are included. System boundaries: system boundaries include all processes linked to the product supply chain (e.g. maintenance). Time period: emissions and removals are modelled as if released or removed at the beginning of the assessment method. Fossil and biogenic carbon emissions and removals: removals and emissions are modelled as follows: All GHG emissions from fossil fuels (including peat and limestone) are modelled consistently with the most updated ILCD list of elementary flows. The non-fossil (biogenic) carbon flows are modelled consistently with the most updated ILCD list of elementary flows.

## Cut-off and completeness
There are no intentional cut-offs in the inventory no matter how small their contribution to all the EF impact categories is. Eventual cut-offs are in compliance with the Guide for EF compliant data sets (JRC 2020), i.e. only if below the 3% cut-off rule. The dataset dry mass and water balance has been checked to ensure the inventory is complete. Capital goods (e.g. infrastructure) and their end-of-life are included.

## Data selection and combination
These datasets include, in both their foreground and background data, links to EF3.0 compliant data.
The relevant background data on energy, transport, and End of Life are from the LCDN data node (http://lcdn.thinkstep.com/Node/).
All other background data in the supply of this product for which no EF3.0 process was available are from ecoinvent v3.7 database (www.ecoinvent.org) or other data sources.

## Data treatment and extrapolations
Several data sources have been used to model the inventory.

## Use advice
This data set is a supporting sub-data set and must be used exclusively as sub-data set of its corresponding level-1 partly disaggregated data set (see “General comment” field for exact name and UUID).

## Data sources
- Background Data for Representative products and organisations. EF 3.0 compliant (data stock)
- UN Data (2018) Statistics Data for Lubricants Productions, http://data.un.org/Data.aspx?q=Lubricants&d=EDATA&f=cmID%3aLU, United Nations Statistics Division, Global.
- Gemata (2021) FOAM GENERATOR FOR WATER BASED CHEMICALS, https://www.gemata.it/a_ENG_260_1.html, GE.MA.TA. SpA, Italy
- Chowdhury, Kawser Parveen (2018) Effect of Special Finishes on the Functional Properties of Cotton Fabrics, Journal of Textile Science and Technology, 4, 49-66, https://file.scirp.org/pdf/JTST_2018050815303131.pdf, Bangladesh
- Finestart (2017) Open Width Compactor(Dryer, Stenter and Compactor 3in1), http://www.finestart.com.cn/index.php?m=content&c=index&a=show&catid=55&id=62, Shandong Finestart Imp.& Exp. Co.,Ltd., Shandong, China
- Lebon (2021) Nonwoven Oven Machine, Catalog and Company Messages, Qingdao Lebon Industry Co., Ltd., China
- America’s Cotton Producers and Importers (2011). Foam Applications on Textiles, https://www.cottonworks.com/wp-content/uploads/2018/07/Foam-Applications_Finishing.pdf, Cary, North Carolina.
- Hong Yu, Yuanfeng Wang, Yi Zhong, Zhiping Mao, Sisi Tan (2014) Foam properties and application in dyeing cotton fabrics with reactive dyes, doi: 10.1111/cote.12088, Society of Dyers and Colourists, Sanghai, China
- CYKY (2021) High-precision Roll-to-Roll doctor blade film coater, https://www.cysi.wang/Doctor-Blade-Film-Coater/high-precision-roll-to-roll-doctor-blade-film-coater.html, Zhengzhou CY Scientific Instrument Co., Ltd., Henan, China
- Lab Manager (2010) Instrument Life-Cycle Management, https://www.labmanager.com/business-management/instrument-life-cycle-management-19179#:~:text=The%20product%20life%20cycle%20for,seven%20years%20and%20often%20shorter., Lab Manager, Delaware, Unite States
- G.H.J Van Der Walt, N.H.H Van Rensburg (1984) A review of low add-on and foam application techniques, South African Wool And Textile Research Institute Of The CSIR, South Africa

## Intended applications
Implementation of regular Product Environmental Footprint (PEF) studies and Organisation Environmental Footprint (OEF) studies exclusively under the specified Product groups and sectors as defined in the Product Environmental Footprint Category Rules (PEFCR) and Organisation Environmental Footprint Sectorial Rules (OEFSR) listed in http://ec.europa.eu/environment/eussd/smgp/PEFCR_OEFSR.htm
