# unbleached kraft pulp, hardwood; technology mix; production mix, at plant; dry mass 0.9, carbon content, non-fossil 0.494

Dataset: ILCD process, Partly terminated system
Geography: WORLD (WITHOUT EU+EFTA+UK, US AND CA)
Reference year: 2020
Valid until: 2024
Classification: Materials production / Paper and cardboards
LCI method principle: Attributional
LCI method approaches: Allocation - market value
Completeness: All relevant flows quantified
Project: Provision of process-based 3.0 Environmental Footprint-compliant life cycle inventory datasets - Renewable materials - contract number 070201/2020/840085/SER/ENV.B.1
Generated by: EPIS
Owner: EPIS
Compliance: ILCD Data Network - Entry-level; Suggestions for updating the PEF method 2019; ISO 14040 Environmental Management – Life Cycle Assessment – Principles and Framework, 2006; ISO 14044:2006. Environmental Management – Life Cycle Assessment – Requirements and guidelines.; Environmental Footprint 3.1
Review: Dependent internal review by Marisa Vieira, Emilia Moreno Ruiz; Independent review panel by Michael Sturges
Data quality: Overall quality: Good; Time representativeness: Very good; Geographical representativeness: Good; Technological representativeness: Good; Precision: Good; Methodological appropriateness and consistency: Not applicable
Amounts: no units in this file; such an amount is in the reference unit of its flow, which a separate flow dataset defines
copyright: true
licenseType: Free of charge for some user types or use types
accessRestrictions: Free of charge for all final users implementing a regular Product Environmental Footprint (PEF) studies and Organisation Environmental Footprint (OEF) studies exclusively under the specified Product groups and sectors as defined in the Product Environmental Footprint Category Rules (PEFCR) and Organisation Environmental Footprint Sectorial Rules (OEFSR) listed in http://ec.europa.eu/environment/eussd/smgp/PEFCR_OEFSR.htm and in accordance with the terms and conditions of the EULA (available at https://ecoinvent.lca-data.com/) exclusively until 31st December 2024. Any use of this dataset or any derivative data not within the specific context of one of the PEF/OEF projects or after the end of 2024 is not permitted.

## General comment
Notice: this data set supersedes the EF3.0-compliant version (see link under "preceding data set version" below calculated with the EF3.0). The life cycle inventory is not changed from the original EF3.0 data set. The LCIA results are calculated based on the EF3.1 methods which provide updated characterisation factors in the following impact categories: Climate Change, Ecotoxicity freshwater, Photochemical Ozone Formation, Acidification, Human Toxicity non-cancer, and Human Toxicity cancer. The review report and the data quality ratings refer to the original results. The data set has been updated by the European Commission on the basis of the original EF3.0 data set delivered by the data provider.This dataset represents the production of unbleached hardwood kraft pulp for the geography World (without EU+EFTA+UK, US and CA) for the year 2020. Pulp is a clean, wood-based, renewable and biodegradable raw material to make different paper, board and other products. Main end uses for market pulp are tissue (toilet paper), graphic papers, specialty products, packaging, fluff pulp, viscose, CMC etc. Hardwood pulp is made from non-coniferous trees, in Nordic countries primarily of birch. Hardwood fibres are short and can be rounder than softwood fibres and their number per gram of pulp is much larger; they give the end product its smoothness, softness and optical properties like opacity (that you cannot see through the paper).
This activity starts with the transport of raw material to the pulp factory. The activity ends when the kraft pulp is ready to be sold.
Due to a lack of data, the production of unbleached hardwood pulp is approximated with European data for bleached hardwood kraft pulp. Bleaching chemicals were excluded. European data for bleached hardwood kraft pulp is based on industry data provided by the European Pulp Industry Sector Association AISBL (EPIS). Due to a lack of data, the World (without EU+EFTA+UK, US and CA) dataset has been extrapolated from European data.
The dataset has been allocated based on the following products: Unbleached kraft pulp, hardwood // Unbleached kraft pulp, hardwood // World (without EU+EFTA+UK, US and CA) with allocation factor of 99.9975%, methanol, from biomass with allocation factor of 0.0023%, Sodium hydroxide with allocation factor of 0.0002%.

## Technology and included processes
The pulp, or fibres from the wood are separated in a kraft cooking process in a so-called fibre line. In a recovery line, the chemicals used in the cooking process are recovered to be used again and energy is produced. The third process is effluent treatment where gaseous and liquid discharges to the environment are continuously minimized and monitored.
The process includes transports to the pulp mill, wood handling, chemical pulping, drying process, energy production on-site, recovery cycles of chemicals and internal waste water treatment.
The following air emissions were reported in the study:
CO2 (fossil and biogenic), CO, SOx (as SO2), NOx, TRS (as S), SO2 (reported as S), Dust (unspecified). Next to these key emissions, additional emissions from on-site energy production from external and internal fuels were calculated, using emission profiles from ecoinvent combustion processes. Internal biogenic fuels are represented by the calculated emissions but do not have the corresponding fuel input from technosphere, because they are supplied from within the system boundaries. The amounts of internal fuels used in the process are: Biogas (6.34E+01 MJ/t), Bark (1.34E+02MJ/t), Black liquor(1.98E+04MJ/t), Sludge (3.64E+00MJ/t), Methanol (1.73E+02MJ/t), Biomass (1.12E+02 MJ/t), tall oil pitch (4.14E+02 MJ/t)

The following ecoinvent combustion processes were used to estimate additional air emissions:
Biofuel - Biogas: heat production, natural gas, at industrial furnace >100kW, Europe without Switzerland; Peat: heat production, lignite briquette, at stove 5-15kW; Hard coal: heat production, at hard coal industrial furnace 1-10MW, Europe without Switzerland; Heavy fuel oil: heat production, heavy fuel oil, at industrial furnace 1MW, Europe without Switzerland; Light fuel oil: heat production, light fuel oil, at industrial furnace 1MW, Europe without Switzerland; Methanol: heat production, natural gas, at industrial furnace >100kW, Europe without Switzerland; Natural gas: heat production, natural gas, at industrial furnace >100kW, Europe without Switzerland; Biofuel - Bark : heat production, wood chips from industry, at furnace 1000kW, CH; Biofuel - Biomass: heat production, wood chips from industry, at furnace 1000kW, CH;

Black liquor, sludge, tall oil pitch, tar oil and sodium formiate were not included in the emissions calculations because no specific emission profiles, e.g. for the black liquor recovery process, were available. Emissions from these internal energy generation processes are therefore only reflected in the key emission factors provided by the industry, other emissions constitute a data gap.
Emissions of stemming from biogas are approximated with the combustion of natural gas, whereby CO2, CO and CH4 emissions stemming from biogas were modelled as non-fossil. Tar oil which is an external fuel (4.44E+01 MJ/t) has also no corresponding fuel input from technosphere because no appropriate proxy could be found.
The amount of infrastructure (pulp factory) was taken from the dataset “The European Pulp Industry Sector Association AISBL, sulfate pulp production, from hardwood, bleached, RER, Undefined, ecoinvent database version 3.7.1.”

## Parameters
- kg_0: 3.11357
  Mass in kg, for hardwood under bark // hardwood forestry // world (without eu+efta+uk, us and ca); Articulated lorry transport, Euro 4, Total weight >32 t; EU+EFTA+UK
- km_0: 72.6042
  Distance in km, for hardwood under bark // hardwood forestry // world (without eu+efta+uk, us and ca); Articulated lorry transport, Euro 4, Total weight >32 t; EU+EFTA+UK
- kg_km_0: 226.059; = kg_0*km_0
  Transport amount in km*km, for hardwood under bark // hardwood forestry // world (without eu+efta+uk, us and ca); Articulated lorry transport, Euro 4, Total weight >32 t; EU+EFTA+UK
- kg_1: 3.11357
  Mass in kg, for hardwood under bark // hardwood forestry // world (without eu+efta+uk, us and ca); Barge; ROW w/o EU+EFTA
- km_1: 14.05
  Distance in km, for hardwood under bark // hardwood forestry // world (without eu+efta+uk, us and ca); Barge; ROW w/o EU+EFTA
- kg_km_1: 43.7457; = kg_1*km_1
  Transport amount in km*km, for hardwood under bark // hardwood forestry // world (without eu+efta+uk, us and ca); Barge; ROW w/o EU+EFTA
- kg_2: 3.11357
  Mass in kg, for hardwood under bark // hardwood forestry // world (without eu+efta+uk, us and ca); Freight train, average; EU+EFTA+UK
- km_2: 107.728
  Distance in km, for hardwood under bark // hardwood forestry // world (without eu+efta+uk, us and ca); Freight train, average; EU+EFTA+UK
- kg_km_2: 335.419; = kg_2*km_2
  Transport amount in km*km, for hardwood under bark // hardwood forestry // world (without eu+efta+uk, us and ca); Freight train, average; EU+EFTA+UK
- kg_3: 3.11357
  Mass in kg, for hardwood under bark // hardwood forestry // world (without eu+efta+uk, us and ca); Transoceanic ship, bulk; GLO
- km_3: 170.04
  Distance in km, for hardwood under bark // hardwood forestry // world (without eu+efta+uk, us and ca); Transoceanic ship, bulk; GLO
- kg_km_3: 529.432; = kg_3*km_3
  Transport amount in km*km, for hardwood under bark // hardwood forestry // world (without eu+efta+uk, us and ca); Transoceanic ship, bulk; GLO
- kg_4: 0.104136
  Mass in kg, for wood chips, hardwood // wood chips, hardwood // world (without eu+efta+uk, us and ca); Articulated lorry transport, Euro 4, Total weight >32 t; EU+EFTA+UK
- km_4: 1750
  Distance in km, for wood chips, hardwood // wood chips, hardwood // world (without eu+efta+uk, us and ca); Articulated lorry transport, Euro 4, Total weight >32 t; EU+EFTA+UK
- kg_km_4: 182.237; = kg_4*km_4
  Transport amount in km*km, for wood chips, hardwood // wood chips, hardwood // world (without eu+efta+uk, us and ca); Articulated lorry transport, Euro 4, Total weight >32 t; EU+EFTA+UK
- kg_5: 0.104136
  Mass in kg, for wood chips, hardwood // wood chips, hardwood // world (without eu+efta+uk, us and ca); Transoceanic ship, containers; GLO
- km_5: 31499.9
  Distance in km, for wood chips, hardwood // wood chips, hardwood // world (without eu+efta+uk, us and ca); Transoceanic ship, containers; GLO
- kg_km_5: 3280.27; = kg_5*km_5
  Transport amount in km*km, for wood chips, hardwood // wood chips, hardwood // world (without eu+efta+uk, us and ca); Transoceanic ship, containers; GLO
- kg_6: 0.0270934
  Mass in kg, for wood chips, softwood // wood chips, softwood // world (without eu+efta+uk, us and ca); Articulated lorry transport, Euro 4, Total weight >32 t; EU+EFTA+UK
- km_6: 1750.01
  Distance in km, for wood chips, softwood // wood chips, softwood // world (without eu+efta+uk, us and ca); Articulated lorry transport, Euro 4, Total weight >32 t; EU+EFTA+UK
- kg_km_6: 47.4138; = kg_6*km_6
  Transport amount in km*km, for wood chips, softwood // wood chips, softwood // world (without eu+efta+uk, us and ca); Articulated lorry transport, Euro 4, Total weight >32 t; EU+EFTA+UK
- kg_7: 0.0270934
  Mass in kg, for wood chips, softwood // wood chips, softwood // world (without eu+efta+uk, us and ca); Transoceanic ship, containers; GLO
- km_7: 31500.3
  Distance in km, for wood chips, softwood // wood chips, softwood // world (without eu+efta+uk, us and ca); Transoceanic ship, containers; GLO
- kg_km_7: 853.448; = kg_7*km_7
  Transport amount in km*km, for wood chips, softwood // wood chips, softwood // world (without eu+efta+uk, us and ca); Transoceanic ship, containers; GLO
- kg_8: 0.00975743
  Mass in kg, for biogas for bioenergy // biogas for bioenergy // cn; Articulated lorry transport, Euro 4, Total weight >32 t; EU+EFTA+UK
- km_8: 1000.24
  Distance in km, for biogas for bioenergy // biogas for bioenergy // cn; Articulated lorry transport, Euro 4, Total weight >32 t; EU+EFTA+UK
- kg_km_8: 9.75975; = kg_8*km_8
  Transport amount in km*km, for biogas for bioenergy // biogas for bioenergy // cn; Articulated lorry transport, Euro 4, Total weight >32 t; EU+EFTA+UK
- kg_9: 0.00975743
  Mass in kg, for biogas for bioenergy // biogas for bioenergy // cn; Transoceanic ship, containers; GLO
- km_9: 18037.1
  Distance in km, for biogas for bioenergy // biogas for bioenergy // cn; Transoceanic ship, containers; GLO
- kg_km_9: 175.996; = kg_9*km_9
  Transport amount in km*km, for biogas for bioenergy // biogas for bioenergy // cn; Transoceanic ship, containers; GLO
- kg_10: 0.00084557
  Mass in kg, for biogas for bioenergy // biogas for bioenergy // ras w/o cn; Articulated lorry transport, Euro 4, Total weight >32 t; EU+EFTA+UK
- km_10: 1000.48
  Distance in km, for biogas for bioenergy // biogas for bioenergy // ras w/o cn; Articulated lorry transport, Euro 4, Total weight >32 t; EU+EFTA+UK
- kg_km_10: 0.845979; = kg_10*km_10
  Transport amount in km*km, for biogas for bioenergy // biogas for bioenergy // ras w/o cn; Articulated lorry transport, Euro 4, Total weight >32 t; EU+EFTA+UK
- kg_11: 0.00084557
  Mass in kg, for biogas for bioenergy // biogas for bioenergy // ras w/o cn; Transoceanic ship, containers; GLO
- km_11: 17975.6
  Distance in km, for biogas for bioenergy // biogas for bioenergy // ras w/o cn; Transoceanic ship, containers; GLO
- kg_km_11: 15.1996; = kg_11*km_11
  Transport amount in km*km, for biogas for bioenergy // biogas for bioenergy // ras w/o cn; Transoceanic ship, containers; GLO
- kg_12: 0.000522918
  Mass in kg, for biogas for bioenergy // biogas for bioenergy // in; Articulated lorry transport, Euro 4, Total weight >32 t; EU+EFTA+UK
- km_12: 1000.13
  Distance in km, for biogas for bioenergy // biogas for bioenergy // in; Articulated lorry transport, Euro 4, Total weight >32 t; EU+EFTA+UK
- kg_km_12: 0.522987; = kg_12*km_12
  Transport amount in km*km, for biogas for bioenergy // biogas for bioenergy // in; Articulated lorry transport, Euro 4, Total weight >32 t; EU+EFTA+UK
- kg_13: 0.000522918
  Mass in kg, for biogas for bioenergy // biogas for bioenergy // in; Transoceanic ship, containers; GLO
- km_13: 17994.7
  Distance in km, for biogas for bioenergy // biogas for bioenergy // in; Transoceanic ship, containers; GLO
- kg_km_13: 9.40976; = kg_13*km_13
  Transport amount in km*km, for biogas for bioenergy // biogas for bioenergy // in; Transoceanic ship, containers; GLO
- kg_14: 0.00267614
  Mass in kg, for bark, hardwood // bark, hardwood // eu+efta+uk; Articulated lorry transport, Euro 4, Total weight >32 t; EU+EFTA+UK
- km_14: 1700.17
  Distance in km, for bark, hardwood // bark, hardwood // eu+efta+uk; Articulated lorry transport, Euro 4, Total weight >32 t; EU+EFTA+UK
- kg_km_14: 4.54988; = kg_14*km_14
  Transport amount in km*km, for bark, hardwood // bark, hardwood // eu+efta+uk; Articulated lorry transport, Euro 4, Total weight >32 t; EU+EFTA+UK
- kg_15: 0.00267614
  Mass in kg, for bark, hardwood // bark, hardwood // eu+efta+uk; Transoceanic ship, containers; GLO
- km_15: 30603
  Distance in km, for bark, hardwood // bark, hardwood // eu+efta+uk; Transoceanic ship, containers; GLO
- kg_km_15: 81.8979; = kg_15*km_15
  Transport amount in km*km, for bark, hardwood // bark, hardwood // eu+efta+uk; Transoceanic ship, containers; GLO
- kg_16: 0.00267614
  Mass in kg, for bark, softwood // bark, softwood // eu+efta+uk; Articulated lorry transport, Euro 4, Total weight >32 t; EU+EFTA+UK
- km_16: 1700.17
  Distance in km, for bark, softwood // bark, softwood // eu+efta+uk; Articulated lorry transport, Euro 4, Total weight >32 t; EU+EFTA+UK
- kg_km_16: 4.54988; = kg_16*km_16
  Transport amount in km*km, for bark, softwood // bark, softwood // eu+efta+uk; Articulated lorry transport, Euro 4, Total weight >32 t; EU+EFTA+UK
- kg_17: 0.00267614
  Mass in kg, for bark, softwood // bark, softwood // eu+efta+uk; Transoceanic ship, containers; GLO
- km_17: 30603
  Distance in km, for bark, softwood // bark, softwood // eu+efta+uk; Transoceanic ship, containers; GLO
- kg_km_17: 81.8979; = kg_17*km_17
  Transport amount in km*km, for bark, softwood // bark, softwood // eu+efta+uk; Transoceanic ship, containers; GLO
- kg_18: 0.000128155
  Mass in kg, for heavy fuel oil (1.0 wt.% s) // heavy fuel oil at refinery // in; Articulated lorry transport, Euro 4, Total weight >32 t; EU+EFTA+UK
- km_18: 998.768
  Distance in km, for heavy fuel oil (1.0 wt.% s) // heavy fuel oil at refinery // in; Articulated lorry transport, Euro 4, Total weight >32 t; EU+EFTA+UK
- kg_km_18: 0.127997; = kg_18*km_18
  Transport amount in km*km, for heavy fuel oil (1.0 wt.% s) // heavy fuel oil at refinery // in; Articulated lorry transport, Euro 4, Total weight >32 t; EU+EFTA+UK
- kg_19: 0.000128155
  Mass in kg, for heavy fuel oil (1.0 wt.% s) // heavy fuel oil at refinery // in; Transoceanic ship, containers; GLO
- km_19: 18024.6
  Distance in km, for heavy fuel oil (1.0 wt.% s) // heavy fuel oil at refinery // in; Transoceanic ship, containers; GLO
- kg_km_19: 2.30994; = kg_19*km_19
  Transport amount in km*km, for heavy fuel oil (1.0 wt.% s) // heavy fuel oil at refinery // in; Transoceanic ship, containers; GLO
- kg_20: 0.000216877
  Mass in kg, for heavy fuel oil (1.0 wt.% s) // heavy fuel oil at refinery // jp; Articulated lorry transport, Euro 4, Total weight >32 t; EU+EFTA+UK
- km_20: 1000.54
  Distance in km, for heavy fuel oil (1.0 wt.% s) // heavy fuel oil at refinery // jp; Articulated lorry transport, Euro 4, Total weight >32 t; EU+EFTA+UK
- kg_km_20: 0.216995; = kg_20*km_20
  Transport amount in km*km, for heavy fuel oil (1.0 wt.% s) // heavy fuel oil at refinery // jp; Articulated lorry transport, Euro 4, Total weight >32 t; EU+EFTA+UK
- kg_21: 0.000216877
  Mass in kg, for heavy fuel oil (1.0 wt.% s) // heavy fuel oil at refinery // jp; Transoceanic ship, containers; GLO
- km_21: 17982.1
  Distance in km, for heavy fuel oil (1.0 wt.% s) // heavy fuel oil at refinery // jp; Transoceanic ship, containers; GLO
- kg_km_21: 3.8999; = kg_21*km_21
  Transport amount in km*km, for heavy fuel oil (1.0 wt.% s) // heavy fuel oil at refinery // jp; Transoceanic ship, containers; GLO
- kg_22: 0.00131112
  Mass in kg, for heavy fuel oil (1.0 wt.% s) // heavy fuel oil at refinery // ras w/o cn; Articulated lorry transport, Euro 4, Total weight >32 t; EU+EFTA+UK
- km_22: 999.12
  Distance in km, for heavy fuel oil (1.0 wt.% s) // heavy fuel oil at refinery // ras w/o cn; Articulated lorry transport, Euro 4, Total weight >32 t; EU+EFTA+UK
- kg_km_22: 1.30997; = kg_22*km_22
  Transport amount in km*km, for heavy fuel oil (1.0 wt.% s) // heavy fuel oil at refinery // ras w/o cn; Articulated lorry transport, Euro 4, Total weight >32 t; EU+EFTA+UK
- kg_23: 0.00131112
  Mass in kg, for heavy fuel oil (1.0 wt.% s) // heavy fuel oil at refinery // ras w/o cn; Transoceanic ship, containers; GLO
- km_23: 17999.4
  Distance in km, for heavy fuel oil (1.0 wt.% s) // heavy fuel oil at refinery // ras w/o cn; Transoceanic ship, containers; GLO
- kg_km_23: 23.5994; = kg_23*km_23
  Transport amount in km*km, for heavy fuel oil (1.0 wt.% s) // heavy fuel oil at refinery // ras w/o cn; Transoceanic ship, containers; GLO
- kg_24: 1.31441e-5
  Mass in kg, for heavy fuel oil (1.0 wt.% s) // heavy fuel oil at refinery // au; Articulated lorry transport, Euro 4, Total weight >32 t; EU+EFTA+UK
- km_24: 996.622
  Distance in km, for heavy fuel oil (1.0 wt.% s) // heavy fuel oil at refinery // au; Articulated lorry transport, Euro 4, Total weight >32 t; EU+EFTA+UK
- kg_km_24: 0.0130997; = kg_24*km_24
  Transport amount in km*km, for heavy fuel oil (1.0 wt.% s) // heavy fuel oil at refinery // au; Articulated lorry transport, Euro 4, Total weight >32 t; EU+EFTA+UK
- kg_25: 1.31441e-5
  Mass in kg, for heavy fuel oil (1.0 wt.% s) // heavy fuel oil at refinery // au; Transoceanic ship, containers; GLO
- km_25: 18030.5
  Distance in km, for heavy fuel oil (1.0 wt.% s) // heavy fuel oil at refinery // au; Transoceanic ship, containers; GLO
- kg_km_25: 0.236994; = kg_25*km_25
  Transport amount in km*km, for heavy fuel oil (1.0 wt.% s) // heavy fuel oil at refinery // au; Transoceanic ship, containers; GLO
- kg_26: 0.000134727
  Mass in kg, for heavy fuel oil (1.0 wt.% s) // heavy fuel oil at refinery // cn; Articulated lorry transport, Euro 4, Total weight >32 t; EU+EFTA+UK
- km_26: 1002
  Distance in km, for heavy fuel oil (1.0 wt.% s) // heavy fuel oil at refinery // cn; Articulated lorry transport, Euro 4, Total weight >32 t; EU+EFTA+UK
- kg_km_26: 0.134997; = kg_26*km_26
  Transport amount in km*km, for heavy fuel oil (1.0 wt.% s) // heavy fuel oil at refinery // cn; Articulated lorry transport, Euro 4, Total weight >32 t; EU+EFTA+UK
- kg_27: 0.000134727
  Mass in kg, for heavy fuel oil (1.0 wt.% s) // heavy fuel oil at refinery // cn; Transoceanic ship, containers; GLO
- km_27: 18036.1
  Distance in km, for heavy fuel oil (1.0 wt.% s) // heavy fuel oil at refinery // cn; Transoceanic ship, containers; GLO
- kg_km_27: 2.42994; = kg_27*km_27
  Transport amount in km*km, for heavy fuel oil (1.0 wt.% s) // heavy fuel oil at refinery // cn; Transoceanic ship, containers; GLO
- kg_28: 0.000673634
  Mass in kg, for heavy fuel oil (1.0 wt.% s) // heavy fuel oil at refinery // ru; Articulated lorry transport, Euro 4, Total weight >32 t; EU+EFTA+UK
- km_28: 1000.52
  Distance in km, for heavy fuel oil (1.0 wt.% s) // heavy fuel oil at refinery // ru; Articulated lorry transport, Euro 4, Total weight >32 t; EU+EFTA+UK
- kg_km_28: 0.673983; = kg_28*km_28
  Transport amount in km*km, for heavy fuel oil (1.0 wt.% s) // heavy fuel oil at refinery // ru; Articulated lorry transport, Euro 4, Total weight >32 t; EU+EFTA+UK
- kg_29: 0.000673634
  Mass in kg, for heavy fuel oil (1.0 wt.% s) // heavy fuel oil at refinery // ru; Transoceanic ship, containers; GLO
- km_29: 17961.8
  Distance in km, for heavy fuel oil (1.0 wt.% s) // heavy fuel oil at refinery // ru; Transoceanic ship, containers; GLO
- kg_km_29: 12.0997; = kg_29*km_29
  Transport amount in km*km, for heavy fuel oil (1.0 wt.% s) // heavy fuel oil at refinery // ru; Transoceanic ship, containers; GLO
- kg_30: 0.000239879
  Mass in kg, for heavy fuel oil (1.0 wt.% s) // heavy fuel oil at refinery // raf; Articulated lorry transport, Euro 4, Total weight >32 t; EU+EFTA+UK
- km_30: 1000.48
  Distance in km, for heavy fuel oil (1.0 wt.% s) // heavy fuel oil at refinery // raf; Articulated lorry transport, Euro 4, Total weight >32 t; EU+EFTA+UK
- kg_km_30: 0.239994; = kg_30*km_30
  Transport amount in km*km, for heavy fuel oil (1.0 wt.% s) // heavy fuel oil at refinery // raf; Articulated lorry transport, Euro 4, Total weight >32 t; EU+EFTA+UK
- kg_31: 0.000239879
  Mass in kg, for heavy fuel oil (1.0 wt.% s) // heavy fuel oil at refinery // raf; Transoceanic ship, containers; GLO
- km_31: 18008.6
  Distance in km, for heavy fuel oil (1.0 wt.% s) // heavy fuel oil at refinery // raf; Transoceanic ship, containers; GLO
- kg_km_31: 4.31989; = kg_31*km_31
  Transport amount in km*km, for heavy fuel oil (1.0 wt.% s) // heavy fuel oil at refinery // raf; Transoceanic ship, containers; GLO
- kg_32: 0.000115011
  Mass in kg, for heavy fuel oil (1.0 wt.% s) // heavy fuel oil at refinery // br; Articulated lorry transport, Euro 4, Total weight >32 t; EU+EFTA+UK
- km_32: 999.883
  Distance in km, for heavy fuel oil (1.0 wt.% s) // heavy fuel oil at refinery // br; Articulated lorry transport, Euro 4, Total weight >32 t; EU+EFTA+UK
- kg_km_32: 0.114997; = kg_32*km_32
  Transport amount in km*km, for heavy fuel oil (1.0 wt.% s) // heavy fuel oil at refinery // br; Articulated lorry transport, Euro 4, Total weight >32 t; EU+EFTA+UK
- kg_33: 0.000115011
  Mass in kg, for heavy fuel oil (1.0 wt.% s) // heavy fuel oil at refinery // br; Transoceanic ship, containers; GLO
- km_33: 17997.9
  Distance in km, for heavy fuel oil (1.0 wt.% s) // heavy fuel oil at refinery // br; Transoceanic ship, containers; GLO
- kg_km_33: 2.06995; = kg_33*km_33
  Transport amount in km*km, for heavy fuel oil (1.0 wt.% s) // heavy fuel oil at refinery // br; Transoceanic ship, containers; GLO
- kg_34: 0.000456756
  Mass in kg, for heavy fuel oil (1.0 wt.% s) // heavy fuel oil at refinery // rsa; Articulated lorry transport, Euro 4, Total weight >32 t; EU+EFTA+UK
- km_34: 1000.51
  Distance in km, for heavy fuel oil (1.0 wt.% s) // heavy fuel oil at refinery // rsa; Articulated lorry transport, Euro 4, Total weight >32 t; EU+EFTA+UK
- kg_km_34: 0.456988; = kg_34*km_34
  Transport amount in km*km, for heavy fuel oil (1.0 wt.% s) // heavy fuel oil at refinery // rsa; Articulated lorry transport, Euro 4, Total weight >32 t; EU+EFTA+UK
- kg_35: 0.000456756
  Mass in kg, for heavy fuel oil (1.0 wt.% s) // heavy fuel oil at refinery // rsa; Transoceanic ship, containers; GLO
- km_35: 17996
  Distance in km, for heavy fuel oil (1.0 wt.% s) // heavy fuel oil at refinery // rsa; Transoceanic ship, containers; GLO
- kg_km_35: 8.21979; = kg_35*km_35
  Transport amount in km*km, for heavy fuel oil (1.0 wt.% s) // heavy fuel oil at refinery // rsa; Transoceanic ship, containers; GLO
- kg_36: 3.46687e-6
  Mass in kg, for light fuel oil // light fuel oil at refinery // in; Articulated lorry transport, Euro 4, Total weight >32 t; EU+EFTA+UK
- km_36: 1000.88
  Distance in km, for light fuel oil // light fuel oil at refinery // in; Articulated lorry transport, Euro 4, Total weight >32 t; EU+EFTA+UK
- kg_km_36: 0.00346991; = kg_36*km_36
  Transport amount in km*km, for light fuel oil // light fuel oil at refinery // in; Articulated lorry transport, Euro 4, Total weight >32 t; EU+EFTA+UK
- kg_37: 3.46687e-6
  Mass in kg, for light fuel oil // light fuel oil at refinery // in; Transoceanic ship, containers; GLO
- km_37: 17998.5
  Distance in km, for light fuel oil // light fuel oil at refinery // in; Transoceanic ship, containers; GLO
- kg_km_37: 0.0623984; = kg_37*km_37
  Transport amount in km*km, for light fuel oil // light fuel oil at refinery // in; Transoceanic ship, containers; GLO
- kg_38: 1.71887e-6
  Mass in kg, for light fuel oil // light fuel oil at refinery // jp; Articulated lorry transport, Euro 4, Total weight >32 t; EU+EFTA+UK
- km_38: 1000.63
  Distance in km, for light fuel oil // light fuel oil at refinery // jp; Articulated lorry transport, Euro 4, Total weight >32 t; EU+EFTA+UK
- kg_km_38: 0.00171996; = kg_38*km_38
  Transport amount in km*km, for light fuel oil // light fuel oil at refinery // jp; Articulated lorry transport, Euro 4, Total weight >32 t; EU+EFTA+UK
- kg_39: 1.71887e-6
  Mass in kg, for light fuel oil // light fuel oil at refinery // jp; Transoceanic ship, containers; GLO
- km_39: 17976.5
  Distance in km, for light fuel oil // light fuel oil at refinery // jp; Transoceanic ship, containers; GLO
- kg_km_39: 0.0308992; = kg_39*km_39
  Transport amount in km*km, for light fuel oil // light fuel oil at refinery // jp; Transoceanic ship, containers; GLO
- kg_40: 9.35182e-6
  Mass in kg, for light fuel oil // light fuel oil at refinery // ras w/o cn; Articulated lorry transport, Euro 4, Total weight >32 t; EU+EFTA+UK
- km_40: 999.781
  Distance in km, for light fuel oil // light fuel oil at refinery // ras w/o cn; Articulated lorry transport, Euro 4, Total weight >32 t; EU+EFTA+UK
- kg_km_40: 0.00934976; = kg_40*km_40
  Transport amount in km*km, for light fuel oil // light fuel oil at refinery // ras w/o cn; Articulated lorry transport, Euro 4, Total weight >32 t; EU+EFTA+UK
- kg_41: 9.35182e-6
  Mass in kg, for light fuel oil // light fuel oil at refinery // ras w/o cn; Transoceanic ship, containers; GLO
- km_41: 17964
  Distance in km, for light fuel oil // light fuel oil at refinery // ras w/o cn; Transoceanic ship, containers; GLO
- kg_km_41: 0.167996; = kg_41*km_41
  Transport amount in km*km, for light fuel oil // light fuel oil at refinery // ras w/o cn; Transoceanic ship, containers; GLO
- kg_42: 4.95267e-7
  Mass in kg, for light fuel oil // light fuel oil at refinery // au; Articulated lorry transport, Euro 4, Total weight >32 t; EU+EFTA+UK
- km_42: 999.435
  Distance in km, for light fuel oil // light fuel oil at refinery // au; Articulated lorry transport, Euro 4, Total weight >32 t; EU+EFTA+UK
- kg_km_42: 0.000494987; = kg_42*km_42
  Transport amount in km*km, for light fuel oil // light fuel oil at refinery // au; Articulated lorry transport, Euro 4, Total weight >32 t; EU+EFTA+UK
- kg_43: 4.95267e-7
  Mass in kg, for light fuel oil // light fuel oil at refinery // au; Transoceanic ship, containers; GLO
- km_43: 18010
  Distance in km, for light fuel oil // light fuel oil at refinery // au; Transoceanic ship, containers; GLO
- kg_km_43: 0.00891977; = kg_43*km_43
  Transport amount in km*km, for light fuel oil // light fuel oil at refinery // au; Transoceanic ship, containers; GLO
- kg_44: 6.43848e-6
  Mass in kg, for light fuel oil // light fuel oil at refinery // cn; Articulated lorry transport, Euro 4, Total weight >32 t; EU+EFTA+UK
- km_44: 1000.21
  Distance in km, for light fuel oil // light fuel oil at refinery // cn; Articulated lorry transport, Euro 4, Total weight >32 t; EU+EFTA+UK
- kg_km_44: 0.00643984; = kg_44*km_44
  Transport amount in km*km, for light fuel oil // light fuel oil at refinery // cn; Articulated lorry transport, Euro 4, Total weight >32 t; EU+EFTA+UK
- kg_45: 6.43848e-6
  Mass in kg, for light fuel oil // light fuel oil at refinery // cn; Transoceanic ship, containers; GLO
- km_45: 18016.2
  Distance in km, for light fuel oil // light fuel oil at refinery // cn; Transoceanic ship, containers; GLO
- kg_km_45: 0.115997; = kg_45*km_45
  Transport amount in km*km, for light fuel oil // light fuel oil at refinery // cn; Transoceanic ship, containers; GLO
- kg_46: 2.65114e-6
  Mass in kg, for light fuel oil // light fuel oil at refinery // ru; Articulated lorry transport, Euro 4, Total weight >32 t; EU+EFTA+UK
- km_46: 999.546
  Distance in km, for light fuel oil // light fuel oil at refinery // ru; Articulated lorry transport, Euro 4, Total weight >32 t; EU+EFTA+UK
- kg_km_46: 0.00264993; = kg_46*km_46
  Transport amount in km*km, for light fuel oil // light fuel oil at refinery // ru; Articulated lorry transport, Euro 4, Total weight >32 t; EU+EFTA+UK
- kg_47: 2.65114e-6
  Mass in kg, for light fuel oil // light fuel oil at refinery // ru; Transoceanic ship, containers; GLO
- km_47: 17991.8
  Distance in km, for light fuel oil // light fuel oil at refinery // ru; Transoceanic ship, containers; GLO
- kg_km_47: 0.0476988; = kg_47*km_47
  Transport amount in km*km, for light fuel oil // light fuel oil at refinery // ru; Transoceanic ship, containers; GLO
- kg_48: 1.19447e-6
  Mass in kg, for light fuel oil // light fuel oil at refinery // raf; Articulated lorry transport, Euro 4, Total weight >32 t; EU+EFTA+UK
- km_48: 996.234
  Distance in km, for light fuel oil // light fuel oil at refinery // raf; Articulated lorry transport, Euro 4, Total weight >32 t; EU+EFTA+UK
- kg_km_48: 0.00118997; = kg_48*km_48
  Transport amount in km*km, for light fuel oil // light fuel oil at refinery // raf; Articulated lorry transport, Euro 4, Total weight >32 t; EU+EFTA+UK
- kg_49: 1.19447e-6
  Mass in kg, for light fuel oil // light fuel oil at refinery // raf; Transoceanic ship, containers; GLO
- km_49: 17999.2
  Distance in km, for light fuel oil // light fuel oil at refinery // raf; Transoceanic ship, containers; GLO
- kg_km_49: 0.0214995; = kg_49*km_49
  Transport amount in km*km, for light fuel oil // light fuel oil at refinery // raf; Transoceanic ship, containers; GLO
- kg_50: 1.54407e-6
  Mass in kg, for light fuel oil // light fuel oil at refinery // br; Articulated lorry transport, Euro 4, Total weight >32 t; EU+EFTA+UK
- km_50: 997.339
  Distance in km, for light fuel oil // light fuel oil at refinery // br; Articulated lorry transport, Euro 4, Total weight >32 t; EU+EFTA+UK
- kg_km_50: 0.00153996; = kg_50*km_50
  Transport amount in km*km, for light fuel oil // light fuel oil at refinery // br; Articulated lorry transport, Euro 4, Total weight >32 t; EU+EFTA+UK
- kg_51: 1.54407e-6
  Mass in kg, for light fuel oil // light fuel oil at refinery // br; Transoceanic ship, containers; GLO
- km_51: 18003.9
  Distance in km, for light fuel oil // light fuel oil at refinery // br; Transoceanic ship, containers; GLO
- kg_km_51: 0.0277993; = kg_51*km_51
  Transport amount in km*km, for light fuel oil // light fuel oil at refinery // br; Transoceanic ship, containers; GLO
- kg_52: 2.24327e-6
  Mass in kg, for light fuel oil // light fuel oil at refinery // rsa; Articulated lorry transport, Euro 4, Total weight >32 t; EU+EFTA+UK
- km_52: 998.517
  Distance in km, for light fuel oil // light fuel oil at refinery // rsa; Articulated lorry transport, Euro 4, Total weight >32 t; EU+EFTA+UK
- kg_km_52: 0.00223994; = kg_52*km_52
  Transport amount in km*km, for light fuel oil // light fuel oil at refinery // rsa; Articulated lorry transport, Euro 4, Total weight >32 t; EU+EFTA+UK
- kg_53: 2.24327e-6
  Mass in kg, for light fuel oil // light fuel oil at refinery // rsa; Transoceanic ship, containers; GLO
- km_53: 18009
  Distance in km, for light fuel oil // light fuel oil at refinery // rsa; Transoceanic ship, containers; GLO
- kg_km_53: 0.040399; = kg_53*km_53
  Transport amount in km*km, for light fuel oil // light fuel oil at refinery // rsa; Transoceanic ship, containers; GLO
- kg_54: 1.3712e-5
  Mass in kg, for hard coal, at consumer russia // hard coal mix // ru; Articulated lorry transport, Euro 4, Total weight >32 t; EU+EFTA+UK
- km_54: 999.099
  Distance in km, for hard coal, at consumer russia // hard coal mix // ru; Articulated lorry transport, Euro 4, Total weight >32 t; EU+EFTA+UK
- kg_km_54: 0.0136997; = kg_54*km_54
  Transport amount in km*km, for hard coal, at consumer russia // hard coal mix // ru; Articulated lorry transport, Euro 4, Total weight >32 t; EU+EFTA+UK
- kg_55: 1.3712e-5
  Mass in kg, for hard coal, at consumer russia // hard coal mix // ru; Transoceanic ship, containers; GLO
- km_55: 18012.9
  Distance in km, for hard coal, at consumer russia // hard coal mix // ru; Transoceanic ship, containers; GLO
- kg_km_55: 0.246994; = kg_55*km_55
  Transport amount in km*km, for hard coal, at consumer russia // hard coal mix // ru; Transoceanic ship, containers; GLO
- kg_56: 2.20787e-5
  Mass in kg, for hard coal, at consumer ras w/o cn // hard coal mix // ras w/o cn; Articulated lorry transport, Euro 4, Total weight >32 t; EU+EFTA+UK
- km_56: 1000.94
  Distance in km, for hard coal, at consumer ras w/o cn // hard coal mix // ras w/o cn; Articulated lorry transport, Euro 4, Total weight >32 t; EU+EFTA+UK
- kg_km_56: 0.0220994; = kg_56*km_56
  Transport amount in km*km, for hard coal, at consumer ras w/o cn // hard coal mix // ras w/o cn; Articulated lorry transport, Euro 4, Total weight >32 t; EU+EFTA+UK
- kg_57: 2.20787e-5
  Mass in kg, for hard coal, at consumer ras w/o cn // hard coal mix // ras w/o cn; Transoceanic ship, containers; GLO
- km_57: 17980.7
  Distance in km, for hard coal, at consumer ras w/o cn // hard coal mix // ras w/o cn; Transoceanic ship, containers; GLO
- kg_km_57: 0.39699; = kg_57*km_57
  Transport amount in km*km, for hard coal, at consumer ras w/o cn // hard coal mix // ras w/o cn; Transoceanic ship, containers; GLO
- kg_58: 1.83601e-5
  Mass in kg, for hard coal, at consumer australia // hard coal mix // au; Articulated lorry transport, Euro 4, Total weight >32 t; EU+EFTA+UK
- km_58: 1002.15
  Distance in km, for hard coal, at consumer australia // hard coal mix // au; Articulated lorry transport, Euro 4, Total weight >32 t; EU+EFTA+UK
- kg_km_58: 0.0183995; = kg_58*km_58
  Transport amount in km*km, for hard coal, at consumer australia // hard coal mix // au; Articulated lorry transport, Euro 4, Total weight >32 t; EU+EFTA+UK
- kg_59: 1.83601e-5
  Mass in kg, for hard coal, at consumer australia // hard coal mix // au; Transoceanic ship, containers; GLO
- km_59: 17973.3
  Distance in km, for hard coal, at consumer australia // hard coal mix // au; Transoceanic ship, containers; GLO
- kg_km_59: 0.329992; = kg_59*km_59
  Transport amount in km*km, for hard coal, at consumer australia // hard coal mix // au; Transoceanic ship, containers; GLO
- kg_60: 0.000137353
  Mass in kg, for hard coal, at consumer china // hard coal mix // cn; Articulated lorry transport, Euro 4, Total weight >32 t; EU+EFTA+UK
- km_60: 997.408
  Distance in km, for hard coal, at consumer china // hard coal mix // cn; Articulated lorry transport, Euro 4, Total weight >32 t; EU+EFTA+UK
- kg_km_60: 0.136997; = kg_60*km_60
  Transport amount in km*km, for hard coal, at consumer china // hard coal mix // cn; Articulated lorry transport, Euro 4, Total weight >32 t; EU+EFTA+UK
- kg_61: 0.000137353
  Mass in kg, for hard coal, at consumer china // hard coal mix // cn; Transoceanic ship, containers; GLO
- km_61: 17982.5
  Distance in km, for hard coal, at consumer china // hard coal mix // cn; Transoceanic ship, containers; GLO
- kg_km_61: 2.46994; = kg_61*km_61
  Transport amount in km*km, for hard coal, at consumer china // hard coal mix // cn; Transoceanic ship, containers; GLO
- kg_62: 3.2537e-6
  Mass in kg, for hard coal, at consumer rsa // hard coal mix // rsa; Articulated lorry transport, Euro 4, Total weight >32 t; EU+EFTA+UK
- km_62: 998.838
  Distance in km, for hard coal, at consumer rsa // hard coal mix // rsa; Articulated lorry transport, Euro 4, Total weight >32 t; EU+EFTA+UK
- kg_km_62: 0.00324992; = kg_62*km_62
  Transport amount in km*km, for hard coal, at consumer rsa // hard coal mix // rsa; Articulated lorry transport, Euro 4, Total weight >32 t; EU+EFTA+UK
- kg_63: 3.2537e-6
  Mass in kg, for hard coal, at consumer rsa // hard coal mix // rsa; Transoceanic ship, containers; GLO
- km_63: 18009.8
  Distance in km, for hard coal, at consumer rsa // hard coal mix // rsa; Transoceanic ship, containers; GLO
- kg_km_63: 0.0585985; = kg_63*km_63
  Transport amount in km*km, for hard coal, at consumer rsa // hard coal mix // rsa; Transoceanic ship, containers; GLO
- kg_64: 9.76109e-6
  Mass in kg, for hard coal, at consumer raf // hard coal mix // raf; Articulated lorry transport, Euro 4, Total weight >32 t; EU+EFTA+UK
- km_64: 999.863
  Distance in km, for hard coal, at consumer raf // hard coal mix // raf; Articulated lorry transport, Euro 4, Total weight >32 t; EU+EFTA+UK
- kg_km_64: 0.00975975; = kg_64*km_64
  Transport amount in km*km, for hard coal, at consumer raf // hard coal mix // raf; Articulated lorry transport, Euro 4, Total weight >32 t; EU+EFTA+UK
- kg_65: 9.76109e-6
  Mass in kg, for hard coal, at consumer raf // hard coal mix // raf; Transoceanic ship, containers; GLO
- km_65: 18030.3
  Distance in km, for hard coal, at consumer raf // hard coal mix // raf; Transoceanic ship, containers; GLO
- kg_km_65: 0.175996; = kg_65*km_65
  Transport amount in km*km, for hard coal, at consumer raf // hard coal mix // raf; Transoceanic ship, containers; GLO
- kg_66: 2.83536e-5
  Mass in kg, for hard coal, at consumer india // hard coal mix // in; Articulated lorry transport, Euro 4, Total weight >32 t; EU+EFTA+UK
- km_66: 1001.61
  Distance in km, for hard coal, at consumer india // hard coal mix // in; Articulated lorry transport, Euro 4, Total weight >32 t; EU+EFTA+UK
- kg_km_66: 0.0283993; = kg_66*km_66
  Transport amount in km*km, for hard coal, at consumer india // hard coal mix // in; Articulated lorry transport, Euro 4, Total weight >32 t; EU+EFTA+UK
- kg_67: 2.83536e-5
  Mass in kg, for hard coal, at consumer india // hard coal mix // in; Transoceanic ship, containers; GLO
- km_67: 17986.6
  Distance in km, for hard coal, at consumer india // hard coal mix // in; Transoceanic ship, containers; GLO
- kg_km_67: 0.509987; = kg_67*km_67
  Transport amount in km*km, for hard coal, at consumer india // hard coal mix // in; Transoceanic ship, containers; GLO
- kg_68: 0.000262936
  Mass in kg, for lignite india // lignite mix // in; Articulated lorry transport, Euro 4, Total weight >32 t; EU+EFTA+UK
- km_68: 654.134
  Distance in km, for lignite india // lignite mix // in; Articulated lorry transport, Euro 4, Total weight >32 t; EU+EFTA+UK
- kg_km_68: 0.171996; = kg_68*km_68
  Transport amount in km*km, for lignite india // lignite mix // in; Articulated lorry transport, Euro 4, Total weight >32 t; EU+EFTA+UK
- kg_69: 0.000262936
  Mass in kg, for lignite india // lignite mix // in; Transoceanic ship, containers; GLO
- km_69: 11751.6
  Distance in km, for lignite india // lignite mix // in; Transoceanic ship, containers; GLO
- kg_km_69: 3.08992; = kg_69*km_69
  Transport amount in km*km, for lignite india // lignite mix // in; Transoceanic ship, containers; GLO
- kg_70: 0.000413186
  Mass in kg, for lignite australia // lignite mix // au; Articulated lorry transport, Euro 4, Total weight >32 t; EU+EFTA+UK
- km_70: 653.442
  Distance in km, for lignite australia // lignite mix // au; Articulated lorry transport, Euro 4, Total weight >32 t; EU+EFTA+UK
- kg_km_70: 0.269993; = kg_70*km_70
  Transport amount in km*km, for lignite australia // lignite mix // au; Articulated lorry transport, Euro 4, Total weight >32 t; EU+EFTA+UK
- kg_71: 0.000413186
  Mass in kg, for lignite australia // lignite mix // au; Transoceanic ship, containers; GLO
- km_71: 11762
  Distance in km, for lignite australia // lignite mix // au; Transoceanic ship, containers; GLO
- kg_km_71: 4.85988; = kg_71*km_71
  Transport amount in km*km, for lignite australia // lignite mix // au; Transoceanic ship, containers; GLO
- kg_72: 0.000582216
  Mass in kg, for lignite ru // lignite mix // ru; Articulated lorry transport, Euro 4, Total weight >32 t; EU+EFTA+UK
- km_72: 654.379
  Distance in km, for lignite ru // lignite mix // ru; Articulated lorry transport, Euro 4, Total weight >32 t; EU+EFTA+UK
- kg_km_72: 0.38099; = kg_72*km_72
  Transport amount in km*km, for lignite ru // lignite mix // ru; Articulated lorry transport, Euro 4, Total weight >32 t; EU+EFTA+UK
- kg_73: 0.000582216
  Mass in kg, for lignite ru // lignite mix // ru; Transoceanic ship, containers; GLO
- km_73: 11765.1
  Distance in km, for lignite ru // lignite mix // ru; Transoceanic ship, containers; GLO
- kg_km_73: 6.84983; = kg_73*km_73
  Transport amount in km*km, for lignite ru // lignite mix // ru; Transoceanic ship, containers; GLO
- kg_74: 0.000582216
  Mass in kg, for lignite ras // lignite mix // ras w/o cn; Articulated lorry transport, Euro 4, Total weight >32 t; EU+EFTA+UK
- km_74: 693.882
  Distance in km, for lignite ras // lignite mix // ras w/o cn; Articulated lorry transport, Euro 4, Total weight >32 t; EU+EFTA+UK
- kg_km_74: 0.40399; = kg_74*km_74
  Transport amount in km*km, for lignite ras // lignite mix // ras w/o cn; Articulated lorry transport, Euro 4, Total weight >32 t; EU+EFTA+UK
- kg_75: 0.000582216
  Mass in kg, for lignite ras // lignite mix // ras w/o cn; Transoceanic ship, containers; GLO
- km_75: 12486.4
  Distance in km, for lignite ras // lignite mix // ras w/o cn; Transoceanic ship, containers; GLO
- kg_km_75: 7.26982; = kg_75*km_75
  Transport amount in km*km, for lignite ras // lignite mix // ras w/o cn; Transoceanic ship, containers; GLO
- kg_76: 3.28772e-5
  Mass in kg, for sodium formate // sodium formate production // eu+efta+uk; Articulated lorry transport, Euro 4, Total weight >32 t; EU+EFTA+UK
- km_76: 2001.33
  Distance in km, for sodium formate // sodium formate production // eu+efta+uk; Articulated lorry transport, Euro 4, Total weight >32 t; EU+EFTA+UK
- kg_km_76: 0.0657983; = kg_76*km_76
  Transport amount in km*km, for sodium formate // sodium formate production // eu+efta+uk; Articulated lorry transport, Euro 4, Total weight >32 t; EU+EFTA+UK
- kg_77: 3.28772e-5
  Mass in kg, for sodium formate // sodium formate production // eu+efta+uk; Transoceanic ship, containers; GLO
- km_77: 36011.9
  Distance in km, for sodium formate // sodium formate production // eu+efta+uk; Transoceanic ship, containers; GLO
- kg_km_77: 1.18397; = kg_77*km_77
  Transport amount in km*km, for sodium formate // sodium formate production // eu+efta+uk; Transoceanic ship, containers; GLO
- kg_78: 0.00721596
  Mass in kg, for hydrogen peroxide, 100% // hydrogen peroxide, 100% production // eu+efta+uk; Articulated lorry transport, Euro 4, Total weight >32 t; EU+EFTA+UK
- km_78: 1000.53
  Distance in km, for hydrogen peroxide, 100% // hydrogen peroxide, 100% production // eu+efta+uk; Articulated lorry transport, Euro 4, Total weight >32 t; EU+EFTA+UK
- kg_km_78: 7.21982; = kg_78*km_78
  Transport amount in km*km, for hydrogen peroxide, 100% // hydrogen peroxide, 100% production // eu+efta+uk; Articulated lorry transport, Euro 4, Total weight >32 t; EU+EFTA+UK
- kg_79: 0.00721596
  Mass in kg, for hydrogen peroxide, 100% // hydrogen peroxide, 100% production // eu+efta+uk; Transoceanic ship, containers; GLO
- km_79: 18015.2
  Distance in km, for hydrogen peroxide, 100% // hydrogen peroxide, 100% production // eu+efta+uk; Transoceanic ship, containers; GLO
- kg_km_79: 129.997; = kg_79*km_79
  Transport amount in km*km, for hydrogen peroxide, 100% // hydrogen peroxide, 100% production // eu+efta+uk; Transoceanic ship, containers; GLO
- kg_80: 0.022288
  Mass in kg, for oxygen // oxygen production // eu+efta+uk; Articulated lorry transport, Euro 4, Total weight >32 t; EU+EFTA+UK
- km_80: 1000.51
  Distance in km, for oxygen // oxygen production // eu+efta+uk; Articulated lorry transport, Euro 4, Total weight >32 t; EU+EFTA+UK
- kg_km_80: 22.2994; = kg_80*km_80
  Transport amount in km*km, for oxygen // oxygen production // eu+efta+uk; Articulated lorry transport, Euro 4, Total weight >32 t; EU+EFTA+UK
- kg_81: 0.022288
  Mass in kg, for oxygen // oxygen production // eu+efta+uk; Transoceanic ship, containers; GLO
- km_81: 17991.3
  Distance in km, for oxygen // oxygen production // eu+efta+uk; Transoceanic ship, containers; GLO
- kg_km_81: 400.99; = kg_81*km_81
  Transport amount in km*km, for oxygen // oxygen production // eu+efta+uk; Transoceanic ship, containers; GLO
- kg_82: 0.0285261
  Mass in kg, for sodium hydroxide // sodium hydroxide production // eu+efta+uk; Articulated lorry transport, Euro 4, Total weight >32 t; EU+EFTA+UK
- km_82: 999.059
  Distance in km, for sodium hydroxide // sodium hydroxide production // eu+efta+uk; Articulated lorry transport, Euro 4, Total weight >32 t; EU+EFTA+UK
- kg_km_82: 28.4993; = kg_82*km_82
  Transport amount in km*km, for sodium hydroxide // sodium hydroxide production // eu+efta+uk; Articulated lorry transport, Euro 4, Total weight >32 t; EU+EFTA+UK
- kg_83: 0.0285261
  Mass in kg, for sodium hydroxide // sodium hydroxide production // eu+efta+uk; Transoceanic ship, containers; GLO
- km_83: 17983.1
  Distance in km, for sodium hydroxide // sodium hydroxide production // eu+efta+uk; Transoceanic ship, containers; GLO
- kg_km_83: 512.987; = kg_83*km_83
  Transport amount in km*km, for sodium hydroxide // sodium hydroxide production // eu+efta+uk; Transoceanic ship, containers; GLO
- kg_84: 0.0249632
  Mass in kg, for sulphuric acid // sulphuric acid production // eu+efta+uk; Articulated lorry transport, Euro 4, Total weight >32 t; EU+EFTA+UK
- km_84: 1001.45
  Distance in km, for sulphuric acid // sulphuric acid production // eu+efta+uk; Articulated lorry transport, Euro 4, Total weight >32 t; EU+EFTA+UK
- kg_km_84: 24.9994; = kg_84*km_84
  Transport amount in km*km, for sulphuric acid // sulphuric acid production // eu+efta+uk; Articulated lorry transport, Euro 4, Total weight >32 t; EU+EFTA+UK
- kg_85: 0.0249632
  Mass in kg, for sulphuric acid // sulphuric acid production // eu+efta+uk; Transoceanic ship, containers; GLO
- km_85: 17986
  Distance in km, for sulphuric acid // sulphuric acid production // eu+efta+uk; Transoceanic ship, containers; GLO
- kg_km_85: 448.989; = kg_85*km_85
  Transport amount in km*km, for sulphuric acid // sulphuric acid production // eu+efta+uk; Transoceanic ship, containers; GLO
- kg_86: 0.00153313
  Mass in kg, for precipitated calcium carbonate // precipitated calcium carbonate production // eu+efta+uk; Articulated lorry transport, Euro 4, Total weight >32 t; EU+EFTA+UK
- km_86: 997.934
  Distance in km, for precipitated calcium carbonate // precipitated calcium carbonate production // eu+efta+uk; Articulated lorry transport, Euro 4, Total weight >32 t; EU+EFTA+UK
- kg_km_86: 1.52996; = kg_86*km_86
  Transport amount in km*km, for precipitated calcium carbonate // precipitated calcium carbonate production // eu+efta+uk; Articulated lorry transport, Euro 4, Total weight >32 t; EU+EFTA+UK
- kg_87: 0.00153313
  Mass in kg, for precipitated calcium carbonate // precipitated calcium carbonate production // eu+efta+uk; Transoceanic ship, containers; GLO
- km_87: 18002
  Distance in km, for precipitated calcium carbonate // precipitated calcium carbonate production // eu+efta+uk; Transoceanic ship, containers; GLO
- kg_km_87: 27.5993; = kg_87*km_87
  Transport amount in km*km, for precipitated calcium carbonate // precipitated calcium carbonate production // eu+efta+uk; Transoceanic ship, containers; GLO
- kg_88: 0.0120931
  Mass in kg, for lime // lime production // eu+efta+uk; Articulated lorry transport, Euro 4, Total weight >32 t; EU+EFTA+UK
- km_88: 999.717
  Distance in km, for lime // lime production // eu+efta+uk; Articulated lorry transport, Euro 4, Total weight >32 t; EU+EFTA+UK
- kg_km_88: 12.0897; = kg_88*km_88
  Transport amount in km*km, for lime // lime production // eu+efta+uk; Articulated lorry transport, Euro 4, Total weight >32 t; EU+EFTA+UK
- kg_89: 0.0120931
  Mass in kg, for lime // lime production // eu+efta+uk; Transoceanic ship, containers; GLO
- km_89: 17994.9
  Distance in km, for lime // lime production // eu+efta+uk; Transoceanic ship, containers; GLO
- kg_km_89: 217.614; = kg_89*km_89
  Transport amount in km*km, for lime // lime production // eu+efta+uk; Transoceanic ship, containers; GLO
- kg_90: 0.0139437
  Mass in kg, for biodegradable waste to landfill // landfill of biodegradable waste // eu+efta+uk; Articulated lorry transport, Euro 4, Total weight >32 t; EU+EFTA+UK
- km_90: 77
  Distance in km, for biodegradable waste to landfill // landfill of biodegradable waste // eu+efta+uk; Articulated lorry transport, Euro 4, Total weight >32 t; EU+EFTA+UK
- kg_km_90: 1.07367; = kg_90*km_90
  Transport amount in km*km, for biodegradable waste to landfill // landfill of biodegradable waste // eu+efta+uk; Articulated lorry transport, Euro 4, Total weight >32 t; EU+EFTA+UK

## Reference product
- unbleached kraft pulp, hardwood // unbleached kraft pulp, hardwood // world (without eu+efta+uk, us and ca): 1

## Inputs
- Electricity from Electricity grid mix 1kV-60kV - AU: 0.00119997
- Thermal energy (MJ) from Thermal energy from natural gas - ROW: 0.0582974
- Electricity from Electricity grid mix 1kV-60kV - NZ: 0.000199995
- Electricity from Electricity grid mix 1kV-60kV - RU: 0.00529987
- Electricity from Electricity grid mix 1kV-60kV - RAF: 0.0039999
- Electricity from Electricity grid mix 1kV-60kV - RSA: 0.00899977
- Transport of hardwood under bark // hardwood forestry // world (without eu+efta+uk, us and ca) by Articulated lorry transport, Euro 4, Total weight >32 t - EU+EFTA+UK: 226.059; = kg_km_0
- Transport of hardwood under bark // hardwood forestry // world (without eu+efta+uk, us and ca) by Barge - ROW w/o EU+EFTA: 43.7457; = kg_km_1
- Transport of hardwood under bark // hardwood forestry // world (without eu+efta+uk, us and ca) by Freight train, average - EU+EFTA+UK: 335.419; = kg_km_2
- Transport of hardwood under bark // hardwood forestry // world (without eu+efta+uk, us and ca) by Transoceanic ship, bulk - GLO: 529.432; = kg_km_3
- Transport of wood chips, hardwood // wood chips, hardwood // world (without eu+efta+uk, us and ca) by Articulated lorry transport, Euro 4, Total weight >32 t - EU+EFTA+UK: 182.237; = kg_km_4
- Transport of wood chips, hardwood // wood chips, hardwood // world (without eu+efta+uk, us and ca) by Transoceanic ship, containers - GLO: 3280.27; = kg_km_5
- Transport of wood chips, softwood // wood chips, softwood // world (without eu+efta+uk, us and ca) by Articulated lorry transport, Euro 4, Total weight >32 t - EU+EFTA+UK: 47.4138; = kg_km_6
- Transport of wood chips, softwood // wood chips, softwood // world (without eu+efta+uk, us and ca) by Transoceanic ship, containers - GLO: 853.448; = kg_km_7
- Transport of biogas for bioenergy // biogas for bioenergy // cn by Articulated lorry transport, Euro 4, Total weight >32 t - EU+EFTA+UK: 9.75975; = kg_km_8
- Transport of biogas for bioenergy // biogas for bioenergy // cn by Transoceanic ship, containers - GLO: 175.996; = kg_km_9
- Transport of biogas for bioenergy // biogas for bioenergy // ras w/o cn by Articulated lorry transport, Euro 4, Total weight >32 t - EU+EFTA+UK: 0.845979; = kg_km_10
- Transport of biogas for bioenergy // biogas for bioenergy // ras w/o cn by Transoceanic ship, containers - GLO: 15.1996; = kg_km_11
- Transport of biogas for bioenergy // biogas for bioenergy // in by Articulated lorry transport, Euro 4, Total weight >32 t - EU+EFTA+UK: 0.522987; = kg_km_12
- Transport of biogas for bioenergy // biogas for bioenergy // in by Transoceanic ship, containers - GLO: 9.40976; = kg_km_13
- Transport of bark, hardwood // bark, hardwood // eu+efta+uk by Articulated lorry transport, Euro 4, Total weight >32 t - EU+EFTA+UK: 4.54988; = kg_km_14
- Transport of bark, hardwood // bark, hardwood // eu+efta+uk by Transoceanic ship, containers - GLO: 81.8979; = kg_km_15
- Transport of bark, softwood // bark, softwood // eu+efta+uk by Articulated lorry transport, Euro 4, Total weight >32 t - EU+EFTA+UK: 4.54988; = kg_km_16
- Transport of bark, softwood // bark, softwood // eu+efta+uk by Transoceanic ship, containers - GLO: 81.8979; = kg_km_17
- Transport of heavy fuel oil (1.0 wt.% s) // heavy fuel oil at refinery // in by Articulated lorry transport, Euro 4, Total weight >32 t - EU+EFTA+UK: 0.127997; = kg_km_18
- Transport of heavy fuel oil (1.0 wt.% s) // heavy fuel oil at refinery // in by Transoceanic ship, containers - GLO: 2.30994; = kg_km_19
- Transport of heavy fuel oil (1.0 wt.% s) // heavy fuel oil at refinery // jp by Articulated lorry transport, Euro 4, Total weight >32 t - EU+EFTA+UK: 0.216995; = kg_km_20
- Transport of heavy fuel oil (1.0 wt.% s) // heavy fuel oil at refinery // jp by Transoceanic ship, containers - GLO: 3.8999; = kg_km_21
- Transport of heavy fuel oil (1.0 wt.% s) // heavy fuel oil at refinery // ras w/o cn by Articulated lorry transport, Euro 4, Total weight >32 t - EU+EFTA+UK: 1.30997; = kg_km_22
- Transport of heavy fuel oil (1.0 wt.% s) // heavy fuel oil at refinery // ras w/o cn by Transoceanic ship, containers - GLO: 23.5994; = kg_km_23
- Transport of heavy fuel oil (1.0 wt.% s) // heavy fuel oil at refinery // au by Articulated lorry transport, Euro 4, Total weight >32 t - EU+EFTA+UK: 0.0130997; = kg_km_24
- Transport of heavy fuel oil (1.0 wt.% s) // heavy fuel oil at refinery // au by Transoceanic ship, containers - GLO: 0.236994; = kg_km_25
- Transport of heavy fuel oil (1.0 wt.% s) // heavy fuel oil at refinery // cn by Articulated lorry transport, Euro 4, Total weight >32 t - EU+EFTA+UK: 0.134997; = kg_km_26
- Transport of heavy fuel oil (1.0 wt.% s) // heavy fuel oil at refinery // cn by Transoceanic ship, containers - GLO: 2.42994; = kg_km_27
- Transport of heavy fuel oil (1.0 wt.% s) // heavy fuel oil at refinery // ru by Articulated lorry transport, Euro 4, Total weight >32 t - EU+EFTA+UK: 0.673983; = kg_km_28
- Transport of heavy fuel oil (1.0 wt.% s) // heavy fuel oil at refinery // ru by Transoceanic ship, containers - GLO: 12.0997; = kg_km_29
- Transport of heavy fuel oil (1.0 wt.% s) // heavy fuel oil at refinery // raf by Articulated lorry transport, Euro 4, Total weight >32 t - EU+EFTA+UK: 0.239994; = kg_km_30
- Transport of heavy fuel oil (1.0 wt.% s) // heavy fuel oil at refinery // raf by Transoceanic ship, containers - GLO: 4.31989; = kg_km_31
- Transport of heavy fuel oil (1.0 wt.% s) // heavy fuel oil at refinery // br by Articulated lorry transport, Euro 4, Total weight >32 t - EU+EFTA+UK: 0.114997; = kg_km_32
- Transport of heavy fuel oil (1.0 wt.% s) // heavy fuel oil at refinery // br by Transoceanic ship, containers - GLO: 2.06995; = kg_km_33
- Transport of heavy fuel oil (1.0 wt.% s) // heavy fuel oil at refinery // rsa by Articulated lorry transport, Euro 4, Total weight >32 t - EU+EFTA+UK: 0.456988; = kg_km_34
- Transport of heavy fuel oil (1.0 wt.% s) // heavy fuel oil at refinery // rsa by Transoceanic ship, containers - GLO: 8.21979; = kg_km_35
- Transport of light fuel oil // light fuel oil at refinery // in by Articulated lorry transport, Euro 4, Total weight >32 t - EU+EFTA+UK: 0.00346991; = kg_km_36
- Transport of light fuel oil // light fuel oil at refinery // in by Transoceanic ship, containers - GLO: 0.0623984; = kg_km_37
- Transport of light fuel oil // light fuel oil at refinery // jp by Articulated lorry transport, Euro 4, Total weight >32 t - EU+EFTA+UK: 0.00171996; = kg_km_38
- Transport of light fuel oil // light fuel oil at refinery // jp by Transoceanic ship, containers - GLO: 0.0308992; = kg_km_39
- Transport of light fuel oil // light fuel oil at refinery // ras w/o cn by Articulated lorry transport, Euro 4, Total weight >32 t - EU+EFTA+UK: 0.00934976; = kg_km_40
- Transport of light fuel oil // light fuel oil at refinery // ras w/o cn by Transoceanic ship, containers - GLO: 0.167996; = kg_km_41
- Transport of light fuel oil // light fuel oil at refinery // au by Articulated lorry transport, Euro 4, Total weight >32 t - EU+EFTA+UK: 0.000494987; = kg_km_42
- Transport of light fuel oil // light fuel oil at refinery // au by Transoceanic ship, containers - GLO: 0.00891977; = kg_km_43
- Transport of light fuel oil // light fuel oil at refinery // cn by Articulated lorry transport, Euro 4, Total weight >32 t - EU+EFTA+UK: 0.00643984; = kg_km_44
- Transport of light fuel oil // light fuel oil at refinery // cn by Transoceanic ship, containers - GLO: 0.115997; = kg_km_45
- Transport of light fuel oil // light fuel oil at refinery // ru by Articulated lorry transport, Euro 4, Total weight >32 t - EU+EFTA+UK: 0.00264993; = kg_km_46
- Transport of light fuel oil // light fuel oil at refinery // ru by Transoceanic ship, containers - GLO: 0.0476988; = kg_km_47
- Transport of light fuel oil // light fuel oil at refinery // raf by Articulated lorry transport, Euro 4, Total weight >32 t - EU+EFTA+UK: 0.00118997; = kg_km_48
- Transport of light fuel oil // light fuel oil at refinery // raf by Transoceanic ship, containers - GLO: 0.0214995; = kg_km_49
- Transport of light fuel oil // light fuel oil at refinery // br by Articulated lorry transport, Euro 4, Total weight >32 t - EU+EFTA+UK: 0.00153996; = kg_km_50
- Transport of light fuel oil // light fuel oil at refinery // br by Transoceanic ship, containers - GLO: 0.0277993; = kg_km_51
- Transport of light fuel oil // light fuel oil at refinery // rsa by Articulated lorry transport, Euro 4, Total weight >32 t - EU+EFTA+UK: 0.00223994; = kg_km_52
- Transport of light fuel oil // light fuel oil at refinery // rsa by Transoceanic ship, containers - GLO: 0.040399; = kg_km_53
- Transport of hard coal, at consumer russia // hard coal mix // ru by Articulated lorry transport, Euro 4, Total weight >32 t - EU+EFTA+UK: 0.0136997; = kg_km_54
- Transport of hard coal, at consumer russia // hard coal mix // ru by Transoceanic ship, containers - GLO: 0.246994; = kg_km_55
- Transport of hard coal, at consumer ras w/o cn // hard coal mix // ras w/o cn by Articulated lorry transport, Euro 4, Total weight >32 t - EU+EFTA+UK: 0.0220994; = kg_km_56
- Transport of hard coal, at consumer ras w/o cn // hard coal mix // ras w/o cn by Transoceanic ship, containers - GLO: 0.39699; = kg_km_57
- Transport of hard coal, at consumer australia // hard coal mix // au by Articulated lorry transport, Euro 4, Total weight >32 t - EU+EFTA+UK: 0.0183995; = kg_km_58
- Transport of hard coal, at consumer australia // hard coal mix // au by Transoceanic ship, containers - GLO: 0.329992; = kg_km_59
- Transport of hard coal, at consumer china // hard coal mix // cn by Articulated lorry transport, Euro 4, Total weight >32 t - EU+EFTA+UK: 0.136997; = kg_km_60
- Transport of hard coal, at consumer china // hard coal mix // cn by Transoceanic ship, containers - GLO: 2.46994; = kg_km_61
- Transport of hard coal, at consumer rsa // hard coal mix // rsa by Articulated lorry transport, Euro 4, Total weight >32 t - EU+EFTA+UK: 0.00324992; = kg_km_62
- Transport of hard coal, at consumer rsa // hard coal mix // rsa by Transoceanic ship, containers - GLO: 0.0585985; = kg_km_63
- Transport of hard coal, at consumer raf // hard coal mix // raf by Articulated lorry transport, Euro 4, Total weight >32 t - EU+EFTA+UK: 0.00975975; = kg_km_64
- Transport of hard coal, at consumer raf // hard coal mix // raf by Transoceanic ship, containers - GLO: 0.175996; = kg_km_65
- Transport of hard coal, at consumer india // hard coal mix // in by Articulated lorry transport, Euro 4, Total weight >32 t - EU+EFTA+UK: 0.0283993; = kg_km_66
- Transport of hard coal, at consumer india // hard coal mix // in by Transoceanic ship, containers - GLO: 0.509987; = kg_km_67
- Transport of lignite india // lignite mix // in by Articulated lorry transport, Euro 4, Total weight >32 t - EU+EFTA+UK: 0.171996; = kg_km_68
- Transport of lignite india // lignite mix // in by Transoceanic ship, containers - GLO: 3.08992; = kg_km_69
- Transport of lignite australia // lignite mix // au by Articulated lorry transport, Euro 4, Total weight >32 t - EU+EFTA+UK: 0.269993; = kg_km_70
- Transport of lignite australia // lignite mix // au by Transoceanic ship, containers - GLO: 4.85988; = kg_km_71
- Transport of lignite ru // lignite mix // ru by Articulated lorry transport, Euro 4, Total weight >32 t - EU+EFTA+UK: 0.38099; = kg_km_72
- Transport of lignite ru // lignite mix // ru by Transoceanic ship, containers - GLO: 6.84983; = kg_km_73
- Transport of lignite ras // lignite mix // ras w/o cn by Articulated lorry transport, Euro 4, Total weight >32 t - EU+EFTA+UK: 0.40399; = kg_km_74
- Transport of lignite ras // lignite mix // ras w/o cn by Transoceanic ship, containers - GLO: 7.26982; = kg_km_75
- Transport of sodium formate // sodium formate production // eu+efta+uk by Articulated lorry transport, Euro 4, Total weight >32 t - EU+EFTA+UK: 0.0657983; = kg_km_76
- Transport of sodium formate // sodium formate production // eu+efta+uk by Transoceanic ship, containers - GLO: 1.18397; = kg_km_77
- Transport of hydrogen peroxide, 100% // hydrogen peroxide, 100% production // eu+efta+uk by Articulated lorry transport, Euro 4, Total weight >32 t - EU+EFTA+UK: 7.21982; = kg_km_78
- Transport of hydrogen peroxide, 100% // hydrogen peroxide, 100% production // eu+efta+uk by Transoceanic ship, containers - GLO: 129.997; = kg_km_79
- Transport of oxygen // oxygen production // eu+efta+uk by Articulated lorry transport, Euro 4, Total weight >32 t - EU+EFTA+UK: 22.2994; = kg_km_80
- Transport of oxygen // oxygen production // eu+efta+uk by Transoceanic ship, containers - GLO: 400.99; = kg_km_81
- Transport of sodium hydroxide // sodium hydroxide production // eu+efta+uk by Articulated lorry transport, Euro 4, Total weight >32 t - EU+EFTA+UK: 28.4993; = kg_km_82
- Transport of sodium hydroxide // sodium hydroxide production // eu+efta+uk by Transoceanic ship, containers - GLO: 512.987; = kg_km_83
- Transport of sulphuric acid // sulphuric acid production // eu+efta+uk by Articulated lorry transport, Euro 4, Total weight >32 t - EU+EFTA+UK: 24.9994; = kg_km_84
- Transport of sulphuric acid // sulphuric acid production // eu+efta+uk by Transoceanic ship, containers - GLO: 448.989; = kg_km_85
- Transport of precipitated calcium carbonate // precipitated calcium carbonate production // eu+efta+uk by Articulated lorry transport, Euro 4, Total weight >32 t - EU+EFTA+UK: 1.52996; = kg_km_86
- Transport of precipitated calcium carbonate // precipitated calcium carbonate production // eu+efta+uk by Transoceanic ship, containers - GLO: 27.5993; = kg_km_87
- Transport of lime // lime production // eu+efta+uk by Articulated lorry transport, Euro 4, Total weight >32 t - EU+EFTA+UK: 12.0897; = kg_km_88
- Transport of lime // lime production // eu+efta+uk by Transoceanic ship, containers - GLO: 217.614; = kg_km_89
- Transport of biodegradable waste to landfill // landfill of biodegradable waste // eu+efta+uk by Articulated lorry transport, Euro 4, Total weight >32 t - EU+EFTA+UK: 1.07367; = kg_km_90
- Electricity from Electricity grid mix 1kV-60kV - CN: 0.0272941
- Electricity from Electricity grid mix 1kV-60kV - RAS w/o CN: 0.0299045
- unbleached kraft pulp, hardwood // unbleached kraft pulp, hardwood // world (without eu+efta+uk, us and ca), blackbox: 1
- unbleached kraft pulp, hardwood // unbleached kraft pulp, hardwood // world (without eu+efta+uk, us and ca), elementary: 1

## Impact indicators
- Eutrophication marine: 0.00124159
- Ecotoxicity, freshwater: 0.766127
- Land use: 32.6381
- Water use: 2.14422
- Resource use, minerals and metals: 2.23289e-6
- Resource use, fossils: 0.415087
- Climate change: 0.0122723
- Ozone depletion: 1.94158e-8
- Human toxicity, cancer: -2.42878e-11
- Human toxicity, non-cancer: 1.7417e-9
- EF-particulate Matter: 7.78129e-9
- Ionising radiation, human health: 0.0145721
- Photochemical ozone formation - human health: 0.00378188
- Acidification: 0.00246996
- Eutrophication, terrestrial: 0.012338
- Eutrophication, freshwater: 4.15576e-5

## Deviations from the LCI method principle
The background data uses:
- the \xe2\x80\x9cRecycled content cut-off\xe2\x80\x9d approach to allocate end-of-life by-products and secondary materials. This allocation is explained in the description of the recycled content system model (http://www.ecoinvent.org/database/system-models-in-ecoinvent-3/cut-off-system-model/allocation-cut-off-by-classification.html).
OR
- EF compliant data

## Deviations from the LCI method approaches
Background data:
- the \xe2\x80\x9cRecycled content cut-off\xe2\x80\x9d approach to allocate end-of-life by-products and secondary materials. This allocation is explained in the description of the recycled content system model (http://www.ecoinvent.org/database/system-models-in-ecoinvent-3/cut-off-system-model/allocation-cut-off-by-classification.html). The ecoinvent database mostly relies on “Allocation – market values” apart for few exceptions particularly in the energy sector. ecoinvent energy data is replaced with EF3.0 core data as per the EF guidelines version 2.0.
OR
- EF compliant data

## Modelling constants
All modelling constants follow the requirements listed in the Tender Specifications 070201/2020/SER/ENV.B1. Completeness: There are no intentional cut-offs in the inventory no matter how small their contribution to all the EF impact categories is. Eventual cut-offs are in compliance with the Guide for EF compliant data sets (JRC 2020), i.e. only if below the 3% cut-off rule. Water use: water use is modelled at country level using separate flows for water withdrawal, water release and water evaporation. Handling multi-functional processes: the following PEF multi- functionality decision hierarchy is applied for resolving all multi- functionality problems: (1) subdivision or system expansion; (2) allocation based on a relevant underlying physical relationship (substitution may apply here); (3) allocation based on some other relationship. Direct land use change: GHG emissions from direct LUC allocated to good/service for 20 years after the LUC occurs, with IPCC default values. Carbon storage and delayed emissions: credits associated with temporary (carbon) storage or delayed emissions up to 300 years are not be considered. Emissions off-setting: are not included. Capital goods (including infrastructures) and their End of life: they are included. System boundaries: system boundaries include all processes linked to the product supply chain (e.g. maintenance). Time period: emissions and removals are modelled as if released or removed at the beginning of the assessment method. Fossil and biogenic carbon emissions and removals: removals and emissions are modelled as follows: All GHG emissions from fossil fuels (including peat and limestone) are modelled consistently with the most updated ILCD list of elementary flows. The non-fossil (biogenic) carbon flows are modelled consistently with the most updated ILCD list of elementary flows.

## Cut-off and completeness
There are no intentional cut-offs in the inventory no matter how small their contribution to all the EF impact categories is. Eventual cut-offs are in compliance with the Guide for EF compliant data sets (JRC 2020), i.e. only if below the 3% cut-off rule. The dataset dry mass and water balance has been checked to ensure the inventory is complete. Capital goods (e.g. infrastructure) and their end-of-life are included.

## Data selection and combination
These datasets include, in both their foreground and background data, links to EF3.0 compliant data.
The relevant background data on energy, transport, and End of Life are from the LCDN data node (http://lcdn.thinkstep.com/Node/).
All other background data in the supply of this product for which no EF3.0 process was available are from ecoinvent v3.7 database (www.ecoinvent.org) or other data sources.

## Data treatment and extrapolations
Several data sources have been used to model the inventory.

## Review details
Internal reviews have been asked to review the plausibility of the unit process, LCIA scores, and DQRs. Internal reviewers have also been asked to review the data for EF compliancy. The consortium is therefore responsible for aspects such as compliancy with the ILCD format, including validation in Look@LCI, and nomenclature.
Internal reviwers have been asked to judge based on the process name, that the unit process models in a complete and representative way the process in the requested location. The review encompassed the plausability of:
- exchanges with nature (elementary flows) as well as exchanges such as product and waste flows.
- meta information (general comment, technology comment, system boundaries, allocation, cut-off rules, etc.). Reviewers were asked to judge if the provided information is enough to understand the content of the process.
- LCIA scores
- DQRs including precision, technology, time and geography. As well as the overall DQR.
External reviewers have been asked to provide their expertise in the field of interest. External reviewers have been asked to review the unit process, including eventual methodological choices, the LCIA scores (provided with contribution scores as well), and DQRs. External reviewers have been provided all the information in a tool developed by the consortium for the purpose of this project.
External reviewers have been asked to judge based on the process name, that the unit process models in a complete and representative way the process in the requested location. The review encompassed:
- Plausability and completeness of exchanges with nature (elementary flows) as well as exchanges such as product and waste flows.
- Review of meta information (general comment, technology comment, system boundaries, allocation, cut-off rules, etc.). Reviewers were asked to judge if the provided information is enough to understand the content of the process.
- Review of properties (biogenic carbon and water content).
- Review of allocation keys.
- Plausability of LCIA scores calculated by the consortium.
- Plausability of DQRs including precision, technology, time and geography. As well as the overall DQR.

## Data sources
- Background Data for Representative products and organisations. EF 3.0 compliant (data stock)
- The European Pulp Industry Sector Association AISBL (EPIS), (2020). EPIS Life Cycle Inventory data for Northern Bleached Hardwood Kraft Pulp, 2020 Data.

## Intended applications
Implementation of regular Product Environmental Footprint (PEF) studies and Organisation Environmental Footprint (OEF) studies exclusively under the specified Product groups and sectors as defined in the Product Environmental Footprint Category Rules (PEFCR) and Organisation Environmental Footprint Sectorial Rules (OEFSR) listed in http://ec.europa.eu/environment/eussd/smgp/PEFCR_OEFSR.htm
