# bamboo fibre; technology mix; production mix, at farm

Dataset: ILCD process, Partly terminated system
Geography: EU+EFTA+UK
Reference year: 2016
Valid until: 2024
Classification: Materials production / Food and renewable raw materials
LCI method principle: Attributional
LCI method approaches: Allocation - market value
Completeness: All relevant flows quantified
Project: Provision of process-based 3.0 Environmental Footprint-compliant life cycle inventory datasets - Renewable materials - contract number 070201/2020/840085/SER/ENV.B.1
Generated by: Blonk Sustainability Tools
Owner: Blonk Sustainability Tools
Compliance: ILCD Data Network - Entry-level; Suggestions for updating the PEF method 2019; ISO 14040 Environmental Management – Life Cycle Assessment – Principles and Framework, 2006; ISO 14044:2006. Environmental Management – Life Cycle Assessment – Requirements and guidelines.; Environmental Footprint 3.1
Review: Dependent internal review by Lucia Valsasina, Emilia Moreno Ruiz; Independent review panel by Philippa Notten
Data quality: Overall quality: Good; Time representativeness: Very good; Geographical representativeness: Very good; Technological representativeness: Good; Precision: Good; Methodological appropriateness and consistency: Not applicable
Amounts: no units in this file; such an amount is in the reference unit of its flow, which a separate flow dataset defines
copyright: true
licenseType: Free of charge for some user types or use types
accessRestrictions: Free of charge for all final users implementing a regular Product Environmental Footprint (PEF) studies and Organisation Environmental Footprint (OEF) studies exclusively under the specified Product groups and sectors as defined in the Product Environmental Footprint Category Rules (PEFCR) and Organisation Environmental Footprint Sectorial Rules (OEFSR) listed in http://ec.europa.eu/environment/eussd/smgp/PEFCR_OEFSR.htm and in accordance with the terms and conditions of the EULA (available at https://ecoinvent.lca-data.com/) exclusively until 31st December 2024. Any use of this dataset or any derivative data not within the specific context of one of the PEF/OEF projects or after the end of 2024 is not permitted.

## General comment
Notice: this data set supersedes the EF3.0-compliant version (see link under "preceding data set version" below calculated with the EF3.0). The life cycle inventory is not changed from the original EF3.0 data set. The LCIA results are calculated based on the EF3.1 methods which provide updated characterisation factors in the following impact categories: Climate Change, Ecotoxicity freshwater, Photochemical Ozone Formation, Acidification, Human Toxicity non-cancer, and Human Toxicity cancer. The review report and the data quality ratings refer to the original results. The data set has been updated by the European Commission on the basis of the original EF3.0 data set delivered by the data provider.The yields of bamboo plantations vary considerably depending on species, management and location. Very productive species may yield more than 30 t/ha /yr dry matter. A well-managed bamboo plantation yields on average 25 t/ha/ yr. Bamboo fibre is a regenerated cellulosic fibre produced from bamboo. It is widely used in many industries from building to textile.

## Technology and included processes
This process takes into account only the cultivation and the processing of bamboo using Alkali extraction process based on a viscose fibre processing proxy. No bamboo is cultivated in EU+EFTA+UK region. Therefore, this model is for bamboo produced globally (India, Brazil and China with respective percentages of 59, 18 and 23%). The processing takes place in Europe. No transport of bamboo was taken into account.

## Parameters
- kg_0: 0.0665898
  Mass in kg, for carbon disulfide; Transoceanic ship, containers; GLO
- km_0: 599
  Distance in km, for carbon disulfide; Transoceanic ship, containers; GLO
- kg_km_0: 39.8873; = kg_0*km_0
  Transport amount in km*km, for carbon disulfide; Transoceanic ship, containers; GLO
- kg_1: 0.0665898
  Mass in kg, for carbon disulfide; Freight train, diesel traction; EU+EFTA+UK
- km_1: 229.272
  Distance in km, for carbon disulfide; Freight train, diesel traction; EU+EFTA+UK
- kg_km_1: 15.2672; = kg_1*km_1
  Transport amount in km*km, for carbon disulfide; Freight train, diesel traction; EU+EFTA+UK
- kg_2: 0.0665898
  Mass in kg, for carbon disulfide; Freight train, electricity traction; EU+EFTA+UK
- km_2: 77.9889
  Distance in km, for carbon disulfide; Freight train, electricity traction; EU+EFTA+UK
- kg_km_2: 5.19326; = kg_2*km_2
  Transport amount in km*km, for carbon disulfide; Freight train, electricity traction; EU+EFTA+UK
- kg_3: 0.0665898
  Mass in kg, for carbon disulfide; Freight train, average; EU+EFTA+UK
- km_3: 1.8394
  Distance in km, for carbon disulfide; Freight train, average; EU+EFTA+UK
- kg_km_3: 0.122486; = kg_3*km_3
  Transport amount in km*km, for carbon disulfide; Freight train, average; EU+EFTA+UK
- kg_4: 0.0665898
  Mass in kg, for carbon disulfide; Barge; EU+EFTA+UK
- km_4: 8.08691
  Distance in km, for carbon disulfide; Barge; EU+EFTA+UK
- kg_km_4: 0.538506; = kg_4*km_4
  Transport amount in km*km, for carbon disulfide; Barge; EU+EFTA+UK
- kg_5: 0.0665898
  Mass in kg, for carbon disulfide; Barge; ROW w/o EU+EFTA
- km_5: 16.5131
  Distance in km, for carbon disulfide; Barge; ROW w/o EU+EFTA
- kg_km_5: 1.0996; = kg_5*km_5
  Transport amount in km*km, for carbon disulfide; Barge; ROW w/o EU+EFTA
- kg_6: 0.0665898
  Mass in kg, for carbon disulfide; Articulated lorry transport, Euro 4, Total weight >32 t; EU+EFTA+UK
- km_6: 57.3754
  Distance in km, for carbon disulfide; Articulated lorry transport, Euro 4, Total weight >32 t; EU+EFTA+UK
- kg_km_6: 3.82062; = kg_6*km_6
  Transport amount in km*km, for carbon disulfide; Articulated lorry transport, Euro 4, Total weight >32 t; EU+EFTA+UK
- kg_7: 0.0665898
  Mass in kg, for carbon disulfide; Articulated lorry transport, Total weight >32 t, mix Euro 0-5; ROW w/o EU+EFTA
- km_7: 151.425
  Distance in km, for carbon disulfide; Articulated lorry transport, Total weight >32 t, mix Euro 0-5; ROW w/o EU+EFTA
- kg_km_7: 10.0833; = kg_7*km_7
  Transport amount in km*km, for carbon disulfide; Articulated lorry transport, Total weight >32 t, mix Euro 0-5; ROW w/o EU+EFTA

## Reference product
- bamboo fibre // bamboo fibre // eu+efta+uk: 1

## Inputs
- Transport of carbon disulfide by Transoceanic ship, containers - GLO: 39.8873; = kg_km_0
- Transport of carbon disulfide by Freight train, diesel traction - EU+EFTA+UK: 15.2672; = kg_km_1
- Transport of carbon disulfide by Freight train, electricity traction - EU+EFTA+UK: 5.19326; = kg_km_2
- Transport of carbon disulfide by Freight train, average - EU+EFTA+UK: 0.122486; = kg_km_3
- Transport of carbon disulfide by Barge - EU+EFTA+UK: 0.538506; = kg_km_4
- Transport of carbon disulfide by Barge - ROW w/o EU+EFTA: 1.0996; = kg_km_5
- Transport of carbon disulfide by Articulated lorry transport, Euro 4, Total weight >32 t - EU+EFTA+UK: 3.82062; = kg_km_6
- Transport of carbon disulfide by Articulated lorry transport, Total weight >32 t, mix Euro 0-5 - ROW w/o EU+EFTA: 10.0833; = kg_km_7
- Electricity from Electricity grid mix 1kV-60kV - EU+EFTA+UK: 2.68846
- Thermal energy (MJ) from Thermal energy from natural gas - EU+EFTA+UK: 3.678
- Thermal energy (MJ) from Thermal energy from biogas - EU+EFTA+UK: 0.832068
- Thermal energy (MJ) from Thermal energy from hard coal - EU+EFTA+UK: 7.68673
- Thermal energy (MJ) from Thermal energy from heavy fuel oil (HFO) - EU+EFTA+UK: 0.0495279
- Thermal energy (MJ) from Thermal energy from light fuel oil (LFO) - EU+EFTA+UK: 0.643862
- Thermal energy (MJ) from Thermal energy from lignite - EU+EFTA+UK: 0.663674
- Thermal energy (MJ) from Thermal energy from LPG - EU+EFTA+UK: 0.0396223
- bamboo fibre // bamboo fibre // eu+efta+uk, blackbox: 1
- bamboo fibre // bamboo fibre // eu+efta+uk, elementary: 1

## Impact indicators
- Eutrophication marine: 0.00415592
- Ecotoxicity, freshwater: 68.3962
- Land use: 65.5819
- Water use: 3.72605
- Resource use, minerals and metals: 1.63727e-5
- Resource use, fossils: 39.2709
- Climate change: 2.83545
- Ozone depletion: 4.87546e-7
- Human toxicity, cancer: 1.22204e-9
- Human toxicity, non-cancer: 3.35513e-8
- EF-particulate Matter: 3.21984e-7
- Ionising radiation, human health: 0.25889
- Photochemical ozone formation - human health: 0.00719464
- Acidification: 0.0238506
- Eutrophication, terrestrial: 0.0359759
- Eutrophication, freshwater: 0.000111948

## Deviations from the LCI method principle
The background data uses: the Recycled content cut-off approach to allocate end-of-life by-products and secondary materials. This allocation is explained in the description of the recycled content system model (http://www.ecoinvent.org/database/system-models-in-ecoinvent-3/cut-off-system-model/allocation-cut-off-by-classification.html) or EF compliant data

## Deviations from the LCI method approaches
Background data:
- the Recycled content cut-off approach to allocate end-of-life by-products and secondary materials. This allocation is explained in the description of the recycled content system model (http://www.ecoinvent.org/database/system-models-in-ecoinvent-3/cut-off-system-model/allocation-cut-off-by-classification.html). The ecoinvent database mostly relies on “Allocation – market values” apart for few exceptions particularly in the energy sector. ecoinvent energy data is replaced with EF3.0 core data as per the EF guidelines version 2.0.
OR
- EF compliant data

## Modelling constants
All modelling constants follow the requirements listed in the Tender Specifications 070201/2020/SER/ENV.B1. Completeness: There are no intentional cut-offs in the inventory no matter how small their contribution to all the EF impact categories is. Eventual cut-offs are in compliance with the Guide for EF compliant data sets (JRC 2020), i.e. only if below the 3% cut-off rule. Water use: water use is modelled at country level using separate flows for water withdrawal, water release and water evaporation. Handling multi-functional processes: the following PEF multi- functionality decision hierarchy is applied for resolving all multi- functionality problems: (1) subdivision or system expansion; (2) allocation based on a relevant underlying physical relationship (substitution may apply here); (3) allocation based on some other relationship. Direct land use change: GHG emissions from direct LUC allocated to good/service for 20 years after the LUC occurs, with IPCC default values. Carbon storage and delayed emissions: credits associated with temporary (carbon) storage or delayed emissions up to 300 years are not be considered. Emissions off-setting: are not included. Capital goods (including infrastructures) and their End of life: they are included. System boundaries: system boundaries include all processes linked to the product supply chain (e.g. maintenance). Time period: emissions and removals are modelled as if released or removed at the beginning of the assessment method. Fossil and biogenic carbon emissions and removals: removals and emissions are modelled as follows: All GHG emissions from fossil fuels (including peat and limestone) are modelled consistently with the most updated ILCD list of elementary flows. The non-fossil (biogenic) carbon flows are modelled consistently with the most updated ILCD list of elementary flows.

## Cut-off and completeness
There are no intentional cut-offs in the inventory no matter how small their contribution to all the EF impact categories is. Eventual cut-offs are in compliance with the Guide for EF compliant data sets (JRC 2020), i.e. only if below the 3% cut-off rule. The dataset dry mass and water balance has been checked to ensure the inventory is complete. Capital goods (e.g. infrastructure) and their end-of-life are included.

## Data selection and combination
These datasets include, in both their foreground and background data, links to EF3.0 compliant data.
The relevant background data on energy, transport, and End of Life are from the LCDN data node (http://lcdn.thinkstep.com/Node/).
All other background data in the supply of this product for which no EF3.0 process was available are from ecoinvent v3.7 database (www.ecoinvent.org) or other data sources.

## Data treatment and extrapolations
Several data sources have been used to model the inventory.

## Review details
Internal reviews have been asked to review the plausibility of the unit process, LCIA scores, and DQRs. Internal reviewers have also been asked to review the data for EF compliancy. The consortium is therefore responsible for aspects such as compliancy with the ILCD format, including validation in Look@LCI, and nomenclature.
Internal reviwers have been asked to judge based on the process name, that the unit process models in a complete and representative way the process in the requested location. The review encompassed the plausability of:
- exchanges with nature (elementary flows) as well as exchanges such as product and waste flows.
- meta information (general comment, technology comment, system boundaries, allocation, cut-off rules, etc.). Reviewers were asked to judge if the provided information is enough to understand the content of the process.
- LCIA scores
- DQRs including precision, technology, time and geography. As well as the overall DQR.
External reviewers have been asked to provide their expertise in the field of interest. External reviewers have been asked to review the unit process, including eventual methodological choices, the LCIA scores (provided with contribution scores as well), and DQRs. External reviewers have been provided all the information in a tool developed by the consortium for the purpose of this project.
External reviewers have been asked to judge based on the process name, that the unit process models in a complete and representative way the process in the requested location. The review encompassed:
- Plausability and completeness of exchanges with nature (elementary flows) as well as exchanges such as product and waste flows.
- Review of meta information (general comment, technology comment, system boundaries, allocation, cut-off rules, etc.). Reviewers were asked to judge if the provided information is enough to understand the content of the process.
- Review of properties (biogenic carbon and water content).
- Review of allocation keys.
- Plausability of LCIA scores calculated by the consortium.
- Plausability of DQRs including precision, technology, time and geography. As well as the overall DQR.

## Data sources
- Background Data for Representative products and organisations. EF 3.0 compliant (data stock)
- JaingHua X., XiaoSheng Y., (2001). Medium and large scale Bamboo. International network for bamboo and rattan.China
- Marinussen M., Kernebeek H ., van Broekema R., Groen E., Kool A., van Zeist WJ., Dolman M., Blonk, H., (2012). LCI data for the calculation tool Feedprint for greenhouse gas emissions of feed production and utilization: Cultivation oil seeds and oil fruits. Blonk Consultants and WUR Livestock Research.
- Mekonnen M., Hoekstra A. (2010). The green, blue and grey water footprint of crops and derived crop products - Volume 1: Main Report volume 1.(41)
- Blonk Consultants., (2019). Agrifootprint database v5.0
- Blonk Consultants. (2018). The Direct Land Use Change Assessment Tool v.2018
- IPCC., (2006). IPCC Guidelines for National Greenhouse Gas Inventories. http://www.ipcc-nggip.iges.or.jp/public/2006gl/index.html
- European Environment Agency., (2013). EMEP/EEA Air Pollutant Emission Inventory Guidebook 2013. 12. http://www.eea.europa.eu/publications/emep-eea-guidebook-2013
- PRé consultants., Radboud University Nijmegen., Leiden University ., RIVM., (2013). ReCiPe 1.08: Characterisation factors spreadsheet.
- Nemecek T., Schnetzer J., (2012). Methods of assessment of direct field emissions for LCIs of agricultural production systems.
- Banik RL., (2016). Introduction to South Asian Bamboos (pp. 3–14). https://doi.org/10.1007/978-981-10-0569-5_1
- Bonilla SH., Guarnetti RL., Almeida CM., Giannetti, BF., (2010). Sustainability assessment of a giant bamboo plantation in Brazil: exploring the influence of labour, time and space. Journal of Cleaner Production, 18(1), 83–91. https://doi.org/10.1016/j.jclepro.2009.07.012
- FEA., (2004) Fibre production. Lenzing AG, Austria.

## Intended applications
Implementation of regular Product Environmental Footprint (PEF) studies and Organisation Environmental Footprint (OEF) studies exclusively under the specified Product groups and sectors as defined in the Product Environmental Footprint Category Rules (PEFCR) and Organisation Environmental Footprint Sectorial Rules (OEFSR) listed in http://ec.europa.eu/environment/eussd/smgp/PEFCR_OEFSR.htm
