# bleached sulphite pulp, softwood, elementary; technology mix; production mix, at plant; dry mass 0.9 kg, carbon content, non fossil 0.494

Dataset: ILCD process, Unit process, single operation
Geography: EU+EFTA+UK
Reference year: 2016
Valid until: 2024
Classification: Other Services / Other services
LCI method principle: Attributional
LCI method approaches: Allocation - market value
Completeness: All relevant flows quantified
Project: Provision of process-based 3.0 Environmental Footprint-compliant life cycle inventory datasets - Renewable materials - contract number 070201/2020/840085/SER/ENV.B.1
Generated by: ecoinvent
Owner: ecoinvent
Compliance: Environmental Footprint non-primary supporting data set; Environmental Footprint 3.1
Amounts: no units in this file; such an amount is in the reference unit of its flow, which a separate flow dataset defines
copyright: true
licenseType: Free of charge for some user types or use types
accessRestrictions: Free of charge for all final users implementing a regular Product Environmental Footprint (PEF) studies and Organisation Environmental Footprint (OEF) studies exclusively under the specified Product groups and sectors as defined in the Product Environmental Footprint Category Rules (PEFCR) and Organisation Environmental Footprint Sectorial Rules (OEFSR) listed in http://ec.europa.eu/environment/eussd/smgp/PEFCR_OEFSR.htm and in accordance with the terms and conditions of the EULA (available at https://ecoinvent.lca-data.com/) exclusively until 31st December 2024. Any use of this dataset or any derivative data not within the specific context of one of the PEF/OEF projects or after the end of 2024 is not permitted.

## General comment
Notice: this data set supersedes the EF3.0-compliant version (see link under "preceding data set version" below calculated with the EF3.0). The life cycle inventory is not changed from the original EF3.0 data set. The LCIA results are calculated based on the EF3.1 methods which provide updated characterisation factors in the following impact categories: Climate Change, Ecotoxicity freshwater, Photochemical Ozone Formation, Acidification, Human Toxicity non-cancer, and Human Toxicity cancer. The review report and the data quality ratings refer to the original results. The data set has been updated by the European Commission on the basis of the original EF3.0 data set delivered by the data provider.This sub-process has limited documentation only. For all detailed documentation of the full model to which this data set belongs (such as DQRs, review reports and other technical documentation), please see this process: bleached sulphite pulp, softwood - EU+EFTA+UK []

## Technology and included processes
The activity represents the average production of bleached chemical pulp following the acidic sulfite process in Europe. The dataset aggregates the most common bleaching technologies: Total Chlorine Free (TCF) and Elemental Chlorine Free (ECF).This dataset is modelled according to the activity Hischier, R sulfite pulp production, bleached, RER, Allocation, cut-off by classification, ecoinvent database version 3.8. The dataset is updated with electricity and thermal energy requirements reported by Bajpai (2016) as well as pulp yield retrieved from Suhr et al. (2015).

## Reference product
- bleached sulphite pulp, softwood // bleached sulphite pulp, softwood // eu+efta+uk, elementary: 1

## Inputs
- Water to Cooling, Renewable material resources from water [AL]: 2.70462e-5
- Water to Cooling, Renewable material resources from water [AT]: 0.000348473
- Water to Cooling, Renewable material resources from water [BA]: 3.37169e-5
- Water to Cooling, Renewable material resources from water [BE]: 0.000419441
- Water to Cooling, Renewable material resources from water [BG]: 0.000107406
- Water to Cooling, Renewable material resources from water [BY]: 0.000139464
- Water to Cooling, Renewable material resources from water [CH]: 0.000415612
- Water to Cooling, Renewable material resources from water [CZ]: 0.000289263
- Water to Cooling, Renewable material resources from water [DE]: 0.0031481
- Water to Cooling, Renewable material resources from water [DK]: 0.000228274
- Water to Cooling, Renewable material resources from water [EE]: 3.11711e-5
- Water to Cooling, Renewable material resources from water [ES]: 0.00135094
- Water to Cooling, Renewable material resources from water [FI]: 0.000194713
- Water to Cooling, Renewable material resources from water [FR]: 0.00222067
- Water to Cooling, Renewable material resources from water [GB]: 0.0022068
- Water to Cooling, Renewable material resources from water: 1.37073e-5
- Water to Cooling, Renewable material resources from water [GR]: 0.000251038
- Water to Cooling, Renewable material resources from water [HR]: 8.07171e-5
- Water to Cooling, Renewable material resources from water [HU]: 0.0002116
- Water to Cooling, Renewable material resources from water [IE]: 0.000227934
- Water to Cooling, Renewable material resources from water [IS]: 1.30066e-5
- Water to Cooling, Renewable material resources from water [IT]: 0.00189996
- Water to Cooling, Renewable material resources from water [LT]: 6.65556e-5
- Water to Cooling, Renewable material resources from water [LU]: 4.62031e-5
- Water to Cooling, Renewable material resources from water [LV]: 3.92454e-5
- Water to Cooling, Renewable material resources from water [MD]: 2.07655e-5
- Water to Cooling, Renewable material resources from water [ME]: 8.36549e-6
- Water to Cooling, Renewable material resources from water [MK]: 2.31045e-5
- Water to Cooling, Renewable material resources from water [MT]: 1.27811e-5
- Water to Cooling, Renewable material resources from water [NL]: 0.000704287
- Water to Cooling, Renewable material resources from water [NO]: 0.000266594
- Water to Cooling, Renewable material resources from water [PL]: 0.000810555
- Water to Cooling, Renewable material resources from water [PT]: 0.000255759
- Water to Cooling, Renewable material resources from water [RO]: 0.000355076
- Water to Cooling, Renewable material resources from water [RS]: 8.81134e-5
- Water to Cooling, Renewable material resources from water [SE]: 0.000384691
- Water to Cooling, Renewable material resources from water [SI]: 5.44779e-5
- Water to Cooling, Renewable material resources from water [SK]: 0.000127868
- Water to Cooling, Renewable material resources from water [SM]: 1.59144e-6
- Water to Cooling, Renewable material resources from water [UA]: 0.000374909
- river water, Renewable material resources from water [AL]: 0.000112048
- river water, Renewable material resources from water [AT]: 0.00144367
- river water, Renewable material resources from water [BA]: 0.000139684
- river water, Renewable material resources from water [BE]: 0.00173769
- river water, Renewable material resources from water [BG]: 0.000444966
- river water, Renewable material resources from water [BY]: 0.000577781
- river water, Renewable material resources from water [CH]: 0.00172182
- river water, Renewable material resources from water [CZ]: 0.00119838
- river water, Renewable material resources from water [DE]: 0.0130421
- river water, Renewable material resources from water [DK]: 0.000945705
- river water, Renewable material resources from water [EE]: 0.000129137
- river water, Renewable material resources from water [ES]: 0.00559675
- river water, Renewable material resources from water [FI]: 0.000806667
- river water, Renewable material resources from water [FR]: 0.00919991
- river water, Renewable material resources from water [GB]: 0.00914248
- river water, Renewable material resources from water: 5.67874e-5
- river water, Renewable material resources from water [GR]: 0.00104001
- river water, Renewable material resources from water [HR]: 0.000334399
- river water, Renewable material resources from water [HU]: 0.000876628
- river water, Renewable material resources from water [IE]: 0.000944299
- river water, Renewable material resources from water [IS]: 5.38845e-5
- river water, Renewable material resources from water [IT]: 0.00787126
- river water, Renewable material resources from water [LT]: 0.00027573
- river water, Renewable material resources from water [LU]: 0.000191413
- river water, Renewable material resources from water [LV]: 0.000162588
- river water, Renewable material resources from water [MD]: 8.60283e-5
- river water, Renewable material resources from water [ME]: 3.4657e-5
- river water, Renewable material resources from water [MK]: 9.57188e-5
- river water, Renewable material resources from water [MT]: 5.29503e-5
- river water, Renewable material resources from water [NL]: 0.00291776
- river water, Renewable material resources from water [NO]: 0.00110446
- river water, Renewable material resources from water [PL]: 0.00335801
- river water, Renewable material resources from water [PT]: 0.00105957
- river water, Renewable material resources from water [RO]: 0.00147103
- river water, Renewable material resources from water [RS]: 0.000365041
- river water, Renewable material resources from water [SE]: 0.00159372
- river water, Renewable material resources from water [SI]: 0.000225694
- river water, Renewable material resources from water [SK]: 0.000529737
- river water, Renewable material resources from water [SM]: 6.5931e-6
- river water, Renewable material resources from water [UA]: 0.0015532

## Outputs
- Water, Emissions to air, unspecified: 0.0235957
- Water, Emissions to water, unspecified [AL]: 0.000102628
- Water, Emissions to water, unspecified [AT]: 0.00132229
- Water, Emissions to water, unspecified [BA]: 0.00012794
- Water, Emissions to water, unspecified [BE]: 0.00159158
- Water, Emissions to water, unspecified [BG]: 0.000407554
- Water, Emissions to water, unspecified [BY]: 0.000529203
- Water, Emissions to water, unspecified [CH]: 0.00157705
- Water, Emissions to water, unspecified [CZ]: 0.00109762
- Water, Emissions to water, unspecified [DE]: 0.0119456
- Water, Emissions to water, unspecified [DK]: 0.000866192
- Water, Emissions to water, unspecified [EE]: 0.00011828
- Water, Emissions to water, unspecified [ES]: 0.00512619
- Water, Emissions to water, unspecified [FI]: 0.000738843
- Water, Emissions to water, unspecified [FR]: 0.00842639
- Water, Emissions to water, unspecified [GB]: 0.00837379
- Water, Emissions to water, unspecified: 5.20128e-5
- Water, Emissions to water, unspecified [GR]: 0.000952572
- Water, Emissions to water, unspecified [HR]: 0.000306284
- Water, Emissions to water, unspecified [HU]: 0.000802922
- Water, Emissions to water, unspecified [IE]: 0.000864904
- Water, Emissions to water, unspecified [IS]: 4.9354e-5
- Water, Emissions to water, unspecified [IT]: 0.00720946
- Water, Emissions to water, unspecified [LT]: 0.000252547
- Water, Emissions to water, unspecified [LU]: 0.000175319
- Water, Emissions to water, unspecified [LV]: 0.000148918
- Water, Emissions to water, unspecified [MD]: 7.87952e-5
- Water, Emissions to water, unspecified [ME]: 3.17431e-5
- Water, Emissions to water, unspecified [MK]: 8.76709e-5
- Water, Emissions to water, unspecified [MT]: 4.84983e-5
- Water, Emissions to water, unspecified [NL]: 0.00267244
- Water, Emissions to water, unspecified [NO]: 0.0010116
- Water, Emissions to water, unspecified [PL]: 0.00307568
- Water, Emissions to water, unspecified [PT]: 0.000970486
- Water, Emissions to water, unspecified [RO]: 0.00134735
- Water, Emissions to water, unspecified [RS]: 0.000334349
- Water, Emissions to water, unspecified [SE]: 0.00145972
- Water, Emissions to water, unspecified [SI]: 0.000206718
- Water, Emissions to water, unspecified [SK]: 0.000485198
- Water, Emissions to water, unspecified [SM]: 6.03877e-6
- Water, Emissions to water, unspecified [UA]: 0.00142261
- Phosphorus, Emissions to water, unspecified: 4e-5
- biological oxygen demand, Emissions to water, unspecified: 0.00421
- chemical oxygen demand, Emissions to water, unspecified: 0.0534
- total organic carbon, Emissions to water, unspecified: 0.0197778
- DOC, Dissolved Organic Carbon, Emissions to water, unspecified: 0.0197778
- Nitrogen oxides, Emissions to air, unspecified: 1.1241e-5
- nitrogen, total (excluding N2), Emissions to water, unspecified: 0.00051
- Suspended solids, unspecified, Emissions to water, unspecified: 0.0051
- adsorbable organic halogen compounds, Emissions to water, unspecified: 0.0002
- sulfate, Emissions to water, unspecified: 0.0235
- sulfur dioxide, Emissions to air, unspecified (long-term): 1.92591e-5
- Nitrogen oxides, Emissions to air, unspecified [AL]: 2.21006e-6
- Nitrogen oxides, Emissions to air, unspecified [AT]: 2.84752e-5
- Nitrogen oxides, Emissions to air, unspecified [BA]: 2.75515e-6
- Nitrogen oxides, Emissions to air, unspecified [BE]: 3.42744e-5
- Nitrogen oxides, Emissions to air, unspecified [BG]: 8.77658e-6
- Nitrogen oxides, Emissions to air, unspecified [BY]: 1.13962e-5
- Nitrogen oxides, Emissions to air, unspecified [CH]: 3.39614e-5
- Nitrogen oxides, Emissions to air, unspecified [CZ]: 2.36369e-5
- Nitrogen oxides, Emissions to air, unspecified [DE]: 0.000257245
- Nitrogen oxides, Emissions to air, unspecified [DK]: 1.86532e-5
- Nitrogen oxides, Emissions to air, unspecified [EE]: 2.54712e-6
- Nitrogen oxides, Emissions to air, unspecified [ES]: 0.000110391
- Nitrogen oxides, Emissions to air, unspecified [FI]: 1.59108e-5
- Nitrogen oxides, Emissions to air, unspecified [FR]: 0.00018146
- Nitrogen oxides, Emissions to air, unspecified [GB]: 0.000180327
- Nitrogen oxides, Emissions to air, unspecified [GR]: 2.05134e-5
- Nitrogen oxides, Emissions to air, unspecified [HR]: 6.59574e-6
- Nitrogen oxides, Emissions to air, unspecified [HU]: 1.72907e-5
- Nitrogen oxides, Emissions to air, unspecified [IE]: 1.86255e-5
- Nitrogen oxides, Emissions to air, unspecified [IT]: 0.000155254
- Nitrogen oxides, Emissions to air, unspecified [LT]: 5.43854e-6
- Nitrogen oxides, Emissions to air, unspecified [LU]: 3.77545e-6
- Nitrogen oxides, Emissions to air, unspecified [LV]: 3.20691e-6
- Nitrogen oxides, Emissions to air, unspecified [MD]: 1.69683e-6
- Nitrogen oxides, Emissions to air, unspecified [MK]: 1.88797e-6
- Nitrogen oxides, Emissions to air, unspecified [NL]: 5.75503e-5
- Nitrogen oxides, Emissions to air, unspecified [NO]: 2.17845e-5
- Nitrogen oxides, Emissions to air, unspecified [PL]: 6.62339e-5
- Nitrogen oxides, Emissions to air, unspecified [PT]: 2.08992e-5
- Nitrogen oxides, Emissions to air, unspecified [RO]: 2.90148e-5
- Nitrogen oxides, Emissions to air, unspecified [SE]: 3.14348e-5
- Nitrogen oxides, Emissions to air, unspecified [SI]: 4.45162e-6
- Nitrogen oxides, Emissions to air, unspecified [SK]: 1.04486e-5
- Nitrogen oxides, Emissions to air, unspecified [UA]: 3.06354e-5
- sulfur dioxide, Emissions to air, unspecified (long-term) [AL]: 3.78647e-6
- sulfur dioxide, Emissions to air, unspecified (long-term) [AT]: 4.87862e-5
- sulfur dioxide, Emissions to air, unspecified (long-term) [BA]: 4.72037e-6
- sulfur dioxide, Emissions to air, unspecified (long-term) [BE]: 5.87218e-5
- sulfur dioxide, Emissions to air, unspecified (long-term) [BG]: 1.50368e-5
- sulfur dioxide, Emissions to air, unspecified (long-term) [BY]: 1.9525e-5
- sulfur dioxide, Emissions to air, unspecified (long-term) [CH]: 5.81857e-5
- sulfur dioxide, Emissions to air, unspecified (long-term) [CZ]: 4.04968e-5
- sulfur dioxide, Emissions to air, unspecified (long-term) [DE]: 0.000440735
- sulfur dioxide, Emissions to air, unspecified (long-term) [DK]: 3.19583e-5
- sulfur dioxide, Emissions to air, unspecified (long-term) [EE]: 4.36395e-6
- sulfur dioxide, Emissions to air, unspecified (long-term) [ES]: 0.000189132
- sulfur dioxide, Emissions to air, unspecified (long-term) [FI]: 2.72598e-5
- sulfur dioxide, Emissions to air, unspecified (long-term) [FR]: 0.000310893
- sulfur dioxide, Emissions to air, unspecified (long-term) [GB]: 0.000308953
- sulfur dioxide, Emissions to air, unspecified (long-term) [GR]: 3.51453e-5
- sulfur dioxide, Emissions to air, unspecified (long-term) [HR]: 1.13004e-5
- sulfur dioxide, Emissions to air, unspecified (long-term) [HU]: 2.9624e-5
- sulfur dioxide, Emissions to air, unspecified (long-term) [IE]: 3.19108e-5
- sulfur dioxide, Emissions to air, unspecified (long-term) [IT]: 0.000265994
- sulfur dioxide, Emissions to air, unspecified (long-term) [LT]: 9.31778e-6
- sulfur dioxide, Emissions to air, unspecified (long-term) [LU]: 6.46843e-6
- sulfur dioxide, Emissions to air, unspecified (long-term) [LV]: 5.49436e-6
- sulfur dioxide, Emissions to air, unspecified (long-term) [MD]: 2.90716e-6
- sulfur dioxide, Emissions to air, unspecified (long-term) [MK]: 3.23463e-6
- sulfur dioxide, Emissions to air, unspecified (long-term) [NL]: 9.86002e-5
- sulfur dioxide, Emissions to air, unspecified (long-term) [NO]: 3.73231e-5
- sulfur dioxide, Emissions to air, unspecified (long-term) [PL]: 0.000113478
- sulfur dioxide, Emissions to air, unspecified (long-term) [PT]: 3.58063e-5
- sulfur dioxide, Emissions to air, unspecified (long-term) [RO]: 4.97106e-5
- sulfur dioxide, Emissions to air, unspecified (long-term) [SE]: 5.38568e-5
- sulfur dioxide, Emissions to air, unspecified (long-term) [SI]: 7.6269e-6
- sulfur dioxide, Emissions to air, unspecified (long-term) [SK]: 1.79015e-5
- sulfur dioxide, Emissions to air, unspecified (long-term) [UA]: 5.24873e-5

## Impact indicators
- Eutrophication marine: 0.00106627
- Ecotoxicity, freshwater: 0.737921
- Water use: 0.373788
- Human toxicity, non-cancer: 4.65904e-11
- EF-particulate Matter: 2.1888e-8
- Photochemical ozone formation - human health: 0.0016287
- Acidification: 0.00340968
- Eutrophication, terrestrial: 0.00271654
- Eutrophication, freshwater: 4e-5
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
## Deviations from the LCI method principle
The background data uses:
- the \xe2\x80\x9cRecycled content cut-off\xe2\x80\x9d approach to allocate end-of-life by-products and secondary materials. This allocation is explained in the description of the recycled content system model (http://www.ecoinvent.org/database/system-models-in-ecoinvent-3/cut-off-system-model/allocation-cut-off-by-classification.html).
OR
- EF compliant data

## Deviations from the LCI method approaches
Background data:
- the \xe2\x80\x9cRecycled content cut-off\xe2\x80\x9d approach to allocate end-of-life by-products and secondary materials. This allocation is explained in the description of the recycled content system model (http://www.ecoinvent.org/database/system-models-in-ecoinvent-3/cut-off-system-model/allocation-cut-off-by-classification.html). The ecoinvent database mostly relies on “Allocation – market values” apart for few exceptions particularly in the energy sector. ecoinvent energy data is replaced with EF3.0 core data as per the EF guidelines version 2.0.
OR
- EF compliant data

## Modelling constants
All modelling constants follow the requirements listed in the Tender Specifications 070201/2020/SER/ENV.B1. Completeness: There are no intentional cut-offs in the inventory no matter how small their contribution to all the EF impact categories is. Eventual cut-offs are in compliance with the Guide for EF compliant data sets (JRC 2020), i.e. only if below the 3% cut-off rule. Water use: water use is modelled at country level using separate flows for water withdrawal, water release and water evaporation. Handling multi-functional processes: the following PEF multi- functionality decision hierarchy is applied for resolving all multi- functionality problems: (1) subdivision or system expansion; (2) allocation based on a relevant underlying physical relationship (substitution may apply here); (3) allocation based on some other relationship. Direct land use change: GHG emissions from direct LUC allocated to good/service for 20 years after the LUC occurs, with IPCC default values. Carbon storage and delayed emissions: credits associated with temporary (carbon) storage or delayed emissions up to 300 years are not be considered. Emissions off-setting: are not included. Capital goods (including infrastructures) and their End of life: they are included. System boundaries: system boundaries include all processes linked to the product supply chain (e.g. maintenance). Time period: emissions and removals are modelled as if released or removed at the beginning of the assessment method. Fossil and biogenic carbon emissions and removals: removals and emissions are modelled as follows: All GHG emissions from fossil fuels (including peat and limestone) are modelled consistently with the most updated ILCD list of elementary flows. The non-fossil (biogenic) carbon flows are modelled consistently with the most updated ILCD list of elementary flows.

## Cut-off and completeness
There are no intentional cut-offs in the inventory no matter how small their contribution to all the EF impact categories is. Eventual cut-offs are in compliance with the Guide for EF compliant data sets (JRC 2020), i.e. only if below the 3% cut-off rule. The dataset dry mass and water balance has been checked to ensure the inventory is complete. Capital goods (e.g. infrastructure) and their end-of-life are included.

## Data selection and combination
These datasets include, in both their foreground and background data, links to EF3.0 compliant data.
The relevant background data on energy, transport, and End of Life are from the LCDN data node (http://lcdn.thinkstep.com/Node/).
All other background data in the supply of this product for which no EF3.0 process was available are from ecoinvent v3.7 database (www.ecoinvent.org) or other data sources.

## Data treatment and extrapolations
Several data sources have been used to model the inventory.

## Use advice
This data set is a supporting sub-data set and must be used exclusively as sub-data set of its corresponding level-1 partly disaggregated data set (see “General comment” field for exact name and UUID).

## Data sources
- Background Data for Representative products and organisations. EF 3.0 compliant (data stock)
- Hischier, R sulfite pulp production, bleached, RER, Allocation, cut-off by classification, ecoinvent database version 3.8.
- Bajpai, P. (2016). Chapter 3 - Pulp and paper production processes and energy overview. Pulp and Paper Industry. Pages 15-49. ISBN 9780128034118. https://doi.org/10.1016/B978-0-12-803411-8.00003-2. Elsevier.
- Suhr et al. (2015). Best Available Techniques (BAT) Reference Document for the Production of Pulp, Paper and Board. Industrial Emissions Directive 2010/75/EU (Integrated Pollution Prevention and Control). European Commission. Joint Research Centre.

## Intended applications
Implementation of regular Product Environmental Footprint (PEF) studies and Organisation Environmental Footprint (OEF) studies exclusively under the specified Product groups and sectors as defined in the Product Environmental Footprint Category Rules (PEFCR) and Organisation Environmental Footprint Sectorial Rules (OEFSR) listed in http://ec.europa.eu/environment/eussd/smgp/PEFCR_OEFSR.htm
