# crease marking; anti-creasing, urea-formaldehyde; production mix, at plant; service

Dataset: ILCD process, Partly terminated system
Geography: GLO
Reference year: 2021
Valid until: 2024
Classification: Systems / Textiles, furnitures and other interiors
LCI method principle: Attributional
LCI method approaches: Allocation - market value
Completeness: All relevant flows quantified
Project: Provision of process-based 3.0 Environmental Footprint-compliant life cycle inventory datasets - Apparel 2 - contract number 070201/2020/840292/SER/ENV.B.1
Generated by: Life Cycle Indonesia
Owner: PRé Sustainability B.V.
Compliance: ILCD Data Network - Entry-level; Suggestions for updating the PEF method 2019; ISO 14040 Environmental Management – Life Cycle Assessment – Principles and Framework, 2006; ISO 14044:2006. Environmental Management – Life Cycle Assessment – Requirements and guidelines.; Environmental Footprint 3.1
Review: Dependent internal review by Avraam Symeonidis, Emilia Moreno Ruiz; Independent review panel by Fábio Valebona
Data quality: Overall quality: Good; Time representativeness: Very good; Geographical representativeness: Good; Technological representativeness: Good; Precision: Good; Methodological appropriateness and consistency: Not applicable
Amounts: no units in this file; such an amount is in the reference unit of its flow, which a separate flow dataset defines
copyright: true
licenseType: Free of charge for some user types or use types
accessRestrictions: Free of charge for all final users implementing a regular Product Environmental Footprint (PEF) studies and Organisation Environmental Footprint (OEF) studies exclusively under the specified Product groups and sectors as defined in the Product Environmental Footprint Category Rules (PEFCR) and Organisation Environmental Footprint Sectorial Rules (OEFSR) listed in http://ec.europa.eu/environment/eussd/smgp/PEFCR_OEFSR.htm and in accordance with the terms and conditions of the EULA (available at https://ecoinvent.lca-data.com/) exclusively until 31st December 2024. Any use of this dataset or any derivative data not within the specific context of one of the PEF/OEF projects or after the end of 2024 is not permitted.

## General comment
Notice: this data set supersedes the EF3.0-compliant version (see link under "preceding data set version" below calculated with the EF3.0). The life cycle inventory is not changed from the original EF3.0 data set. The LCIA results are calculated based on the EF3.1 methods which provide updated characterisation factors in the following impact categories: Climate Change, Ecotoxicity freshwater, Photochemical Ozone Formation, Acidification, Human Toxicity non-cancer, and Human Toxicity cancer. The review report and the data quality ratings refer to the original results. The data set has been updated by the European Commission on the basis of the original EF3.0 data set delivered by the data provider.Anti-crease finishes on cotton are normally applied to reduce its swelling and shrinkage, to enhance the smoothness, and to improve its wet and dry wrinkle recovery (Sadeghi-Kiakhani, et al., 2017). Resistance to creasing depends on rigidity, and recovery from creasing depends on elasticity. Cellulosic fabrics, such as cotton, flax, rayon, and ramie, tend to wrinkle under distortion and moist conditions. Usually, formaldehyde resin was used to prevent wrinkling. Fabrics are treated with urea-formaldehyde resins to give them all sorts of easy-care properties such as antiwrinkle, and so on. Rayon, blended cotton, corduroy, and any synthetic blended polymer are likely to have been treated with formaldehyde resins. These formaldehyde resins include urea-formaldehyde, melamine-formaldehyde, and phenol-formaldehyde. (Choudhury. 2017).

Sadeghi-Kiakhani, M., Tehrani-Bagha, A. R., & Safapour, S. (2017). Enhanced anti-microbial, anti-creasing, and dye absorption properties of cotton fabric treated with Chitosan–Cyanuric Chloride hybrid. Cellulose, 25(1), 883–893. doi:10.1007/s10570-017-1591-4
259
Choudhury, Asim Kumar Roy. 2017. Principle of textile finishing. United Kingdom: Elsevier. pp 252- 495

## Technology and included processes
In this model, urea-formaldehyde was used as the cross-linking agent for anti-crease properties. The M:L ratio is assumed to be 6:1. Auxiliary chemicals are added such as magnesium chloride as catalyst, citric acid to adjust pH, softener, and wetting agent. The finishing chemical application process using a pad dry-cure method. The process includes the use of balloon padder, dryer, and stenter for curing. The process includes chemicals, energy, lube oil consumption, and infrastructure. The chemicals used are assumed to be carried by the wastewater, while hazardous waste comes from the waste lube oil. In the model, the energy sources of machines are used from electricity and steam. The consumption of lubricating oil using a thermobonding oven as a proxy. The GSM of the fabric is assumed to be 135 GSM cotton fabric

## Parameters
- kg_0: 0.212093
  Mass in kg, for esterquat; Barge; EU+EFTA+UK
- km_0: 24.7816
  Distance in km, for esterquat; Barge; EU+EFTA+UK
- kg_km_0: 5.256; = kg_0*km_0
  Transport amount in km*km, for esterquat; Barge; EU+EFTA+UK
- kg_1: 0.212093
  Mass in kg, for esterquat; Articulated lorry transport, Euro 4, Total weight >32 t; EU+EFTA+UK
- km_1: 193.839
  Distance in km, for esterquat; Articulated lorry transport, Euro 4, Total weight >32 t; EU+EFTA+UK
- kg_km_1: 41.112; = kg_1*km_1
  Transport amount in km*km, for esterquat; Articulated lorry transport, Euro 4, Total weight >32 t; EU+EFTA+UK
- kg_2: 0.212093
  Mass in kg, for esterquat; Freight train, diesel traction; EU+EFTA+UK
- km_2: 19.231
  Distance in km, for esterquat; Freight train, diesel traction; EU+EFTA+UK
- kg_km_2: 4.07875; = kg_2*km_2
  Transport amount in km*km, for esterquat; Freight train, diesel traction; EU+EFTA+UK
- kg_3: 0.212093
  Mass in kg, for esterquat; Freight train, electricity traction; EU+EFTA+UK
- km_3: 30.3322
  Distance in km, for esterquat; Freight train, electricity traction; EU+EFTA+UK
- kg_km_3: 6.43325; = kg_3*km_3
  Transport amount in km*km, for esterquat; Freight train, electricity traction; EU+EFTA+UK
- kg_4: 0.0018
  Mass in kg, for citric acid // citric acid production // glo; Articulated lorry transport, Euro 4, Total weight >32 t; EU+EFTA+UK
- km_4: 1000
  Distance in km, for citric acid // citric acid production // glo; Articulated lorry transport, Euro 4, Total weight >32 t; EU+EFTA+UK
- kg_km_4: 1.8; = kg_4*km_4
  Transport amount in km*km, for citric acid // citric acid production // glo; Articulated lorry transport, Euro 4, Total weight >32 t; EU+EFTA+UK
- kg_5: 4.13282e-7
  Mass in kg, for lubricating oil // lubricants at refinery // cn; Articulated lorry transport, Euro 4, Total weight >32 t; EU+EFTA+UK
- km_5: 1000
  Distance in km, for lubricating oil // lubricants at refinery // cn; Articulated lorry transport, Euro 4, Total weight >32 t; EU+EFTA+UK
- kg_km_5: 0.000413282; = kg_5*km_5
  Transport amount in km*km, for lubricating oil // lubricants at refinery // cn; Articulated lorry transport, Euro 4, Total weight >32 t; EU+EFTA+UK
- kg_6: 1.32587e-6
  Mass in kg, for lubricating oil // lubricants at refinery // eu+efta+uk; Articulated lorry transport, Euro 4, Total weight >32 t; EU+EFTA+UK
- km_6: 1000
  Distance in km, for lubricating oil // lubricants at refinery // eu+efta+uk; Articulated lorry transport, Euro 4, Total weight >32 t; EU+EFTA+UK
- kg_km_6: 0.00132587; = kg_6*km_6
  Transport amount in km*km, for lubricating oil // lubricants at refinery // eu+efta+uk; Articulated lorry transport, Euro 4, Total weight >32 t; EU+EFTA+UK
- kg_7: 9.93295e-8
  Mass in kg, for lubricating oil // lubricants at refinery // raf; Articulated lorry transport, Euro 4, Total weight >32 t; EU+EFTA+UK
- km_7: 1000
  Distance in km, for lubricating oil // lubricants at refinery // raf; Articulated lorry transport, Euro 4, Total weight >32 t; EU+EFTA+UK
- kg_km_7: 9.93295e-5; = kg_7*km_7
  Transport amount in km*km, for lubricating oil // lubricants at refinery // raf; Articulated lorry transport, Euro 4, Total weight >32 t; EU+EFTA+UK
- kg_8: 2.60297e-6
  Mass in kg, for lubricating oil // lubricants at refinery // ras w/o cn; Articulated lorry transport, Euro 4, Total weight >32 t; EU+EFTA+UK
- km_8: 1000
  Distance in km, for lubricating oil // lubricants at refinery // ras w/o cn; Articulated lorry transport, Euro 4, Total weight >32 t; EU+EFTA+UK
- kg_km_8: 0.00260297; = kg_8*km_8
  Transport amount in km*km, for lubricating oil // lubricants at refinery // ras w/o cn; Articulated lorry transport, Euro 4, Total weight >32 t; EU+EFTA+UK
- kg_9: 2.03182e-6
  Mass in kg, for lubricating oil // lubricants at refinery // rna; Articulated lorry transport, Euro 4, Total weight >32 t; EU+EFTA+UK
- km_9: 1000
  Distance in km, for lubricating oil // lubricants at refinery // rna; Articulated lorry transport, Euro 4, Total weight >32 t; EU+EFTA+UK
- kg_km_9: 0.00203182; = kg_9*km_9
  Transport amount in km*km, for lubricating oil // lubricants at refinery // rna; Articulated lorry transport, Euro 4, Total weight >32 t; EU+EFTA+UK
- kg_10: 2.42116e-7
  Mass in kg, for lubricating oil // lubricants at refinery // rsa; Articulated lorry transport, Euro 4, Total weight >32 t; EU+EFTA+UK
- km_10: 1000
  Distance in km, for lubricating oil // lubricants at refinery // rsa; Articulated lorry transport, Euro 4, Total weight >32 t; EU+EFTA+UK
- kg_km_10: 0.000242116; = kg_10*km_10
  Transport amount in km*km, for lubricating oil // lubricants at refinery // rsa; Articulated lorry transport, Euro 4, Total weight >32 t; EU+EFTA+UK
- kg_11: 2.15244e-6
  Mass in kg, for lubricating oil // lubricants at refinery // ru; Articulated lorry transport, Euro 4, Total weight >32 t; EU+EFTA+UK
- km_11: 1000
  Distance in km, for lubricating oil // lubricants at refinery // ru; Articulated lorry transport, Euro 4, Total weight >32 t; EU+EFTA+UK
- kg_km_11: 0.00215244; = kg_11*km_11
  Transport amount in km*km, for lubricating oil // lubricants at refinery // ru; Articulated lorry transport, Euro 4, Total weight >32 t; EU+EFTA+UK
- kg_12: 0.006
  Mass in kg, for soap // soap production // glo; Articulated lorry transport, Euro 4, Total weight >32 t; EU+EFTA+UK
- km_12: 1000
  Distance in km, for soap // soap production // glo; Articulated lorry transport, Euro 4, Total weight >32 t; EU+EFTA+UK
- kg_km_12: 6; = kg_12*km_12
  Transport amount in km*km, for soap // soap production // glo; Articulated lorry transport, Euro 4, Total weight >32 t; EU+EFTA+UK
- kg_13: 0.48
  Mass in kg, for urea-formaldehyde resin // urea-formaldehyde resin production // eu+efta+uk; Articulated lorry transport, Euro 4, Total weight >32 t; EU+EFTA+UK
- km_13: 1000
  Distance in km, for urea-formaldehyde resin // urea-formaldehyde resin production // eu+efta+uk; Articulated lorry transport, Euro 4, Total weight >32 t; EU+EFTA+UK
- kg_km_13: 480; = kg_13*km_13
  Transport amount in km*km, for urea-formaldehyde resin // urea-formaldehyde resin production // eu+efta+uk; Articulated lorry transport, Euro 4, Total weight >32 t; EU+EFTA+UK
- kg_14: 0.0018
  Mass in kg, for citric acid // citric acid production // glo; Transoceanic ship, containers; GLO
- km_14: 18000
  Distance in km, for citric acid // citric acid production // glo; Transoceanic ship, containers; GLO
- kg_km_14: 32.4; = kg_14*km_14
  Transport amount in km*km, for citric acid // citric acid production // glo; Transoceanic ship, containers; GLO
- kg_15: 4.13282e-7
  Mass in kg, for lubricating oil // lubricants at refinery // cn; Transoceanic ship, containers; GLO
- km_15: 18000
  Distance in km, for lubricating oil // lubricants at refinery // cn; Transoceanic ship, containers; GLO
- kg_km_15: 0.00743907; = kg_15*km_15
  Transport amount in km*km, for lubricating oil // lubricants at refinery // cn; Transoceanic ship, containers; GLO
- kg_16: 1.32587e-6
  Mass in kg, for lubricating oil // lubricants at refinery // eu+efta+uk; Transoceanic ship, containers; GLO
- km_16: 18000
  Distance in km, for lubricating oil // lubricants at refinery // eu+efta+uk; Transoceanic ship, containers; GLO
- kg_km_16: 0.0238657; = kg_16*km_16
  Transport amount in km*km, for lubricating oil // lubricants at refinery // eu+efta+uk; Transoceanic ship, containers; GLO
- kg_17: 9.93295e-8
  Mass in kg, for lubricating oil // lubricants at refinery // raf; Transoceanic ship, containers; GLO
- km_17: 18000
  Distance in km, for lubricating oil // lubricants at refinery // raf; Transoceanic ship, containers; GLO
- kg_km_17: 0.00178793; = kg_17*km_17
  Transport amount in km*km, for lubricating oil // lubricants at refinery // raf; Transoceanic ship, containers; GLO
- kg_18: 2.60297e-6
  Mass in kg, for lubricating oil // lubricants at refinery // ras w/o cn; Transoceanic ship, containers; GLO
- km_18: 18000
  Distance in km, for lubricating oil // lubricants at refinery // ras w/o cn; Transoceanic ship, containers; GLO
- kg_km_18: 0.0468534; = kg_18*km_18
  Transport amount in km*km, for lubricating oil // lubricants at refinery // ras w/o cn; Transoceanic ship, containers; GLO
- kg_19: 2.03182e-6
  Mass in kg, for lubricating oil // lubricants at refinery // rna; Transoceanic ship, containers; GLO
- km_19: 18000
  Distance in km, for lubricating oil // lubricants at refinery // rna; Transoceanic ship, containers; GLO
- kg_km_19: 0.0365728; = kg_19*km_19
  Transport amount in km*km, for lubricating oil // lubricants at refinery // rna; Transoceanic ship, containers; GLO
- kg_20: 2.42116e-7
  Mass in kg, for lubricating oil // lubricants at refinery // rsa; Transoceanic ship, containers; GLO
- km_20: 18000
  Distance in km, for lubricating oil // lubricants at refinery // rsa; Transoceanic ship, containers; GLO
- kg_km_20: 0.00435808; = kg_20*km_20
  Transport amount in km*km, for lubricating oil // lubricants at refinery // rsa; Transoceanic ship, containers; GLO
- kg_21: 2.15244e-6
  Mass in kg, for lubricating oil // lubricants at refinery // ru; Transoceanic ship, containers; GLO
- km_21: 18000
  Distance in km, for lubricating oil // lubricants at refinery // ru; Transoceanic ship, containers; GLO
- kg_km_21: 0.0387438; = kg_21*km_21
  Transport amount in km*km, for lubricating oil // lubricants at refinery // ru; Transoceanic ship, containers; GLO
- kg_22: 0.006
  Mass in kg, for soap // soap production // glo; Transoceanic ship, containers; GLO
- km_22: 18000
  Distance in km, for soap // soap production // glo; Transoceanic ship, containers; GLO
- kg_km_22: 108; = kg_22*km_22
  Transport amount in km*km, for soap // soap production // glo; Transoceanic ship, containers; GLO
- kg_23: 0.48
  Mass in kg, for urea-formaldehyde resin // urea-formaldehyde resin production // eu+efta+uk; Transoceanic ship, containers; GLO
- km_23: 18000
  Distance in km, for urea-formaldehyde resin // urea-formaldehyde resin production // eu+efta+uk; Transoceanic ship, containers; GLO
- kg_km_23: 8640; = kg_23*km_23
  Transport amount in km*km, for urea-formaldehyde resin // urea-formaldehyde resin production // eu+efta+uk; Transoceanic ship, containers; GLO

## Reference product
- crease marking // crease marking // glo: 1

## Inputs
- Electricity from Electricity grid mix 1kV-60kV - AU: 0.0067
- Electricity from Electricity grid mix 1kV-60kV - NZ: 0.0013
- Electricity from Electricity grid mix 1kV-60kV - RAF: 0.0216
- Electricity from Electricity grid mix 1kV-60kV - RNA: 0.1444
- Electricity from Electricity grid mix 1kV-60kV - RSA: 0.049
- Electricity from Electricity grid mix 1kV-60kV - RU: 0.0288
- Transport of esterquat by Barge - EU+EFTA+UK: 5.256; = kg_km_0
- Transport of esterquat by Articulated lorry transport, Euro 4, Total weight >32 t - EU+EFTA+UK: 41.112; = kg_km_1
- Transport of esterquat by Freight train, diesel traction - EU+EFTA+UK: 4.07875; = kg_km_2
- Transport of esterquat by Freight train, electricity traction - EU+EFTA+UK: 6.43325; = kg_km_3
- Transport of citric acid // citric acid production // glo by Articulated lorry transport, Euro 4, Total weight >32 t - EU+EFTA+UK: 1.8; = kg_km_4
- Transport of lubricating oil // lubricants at refinery // cn by Articulated lorry transport, Euro 4, Total weight >32 t - EU+EFTA+UK: 0.000413282; = kg_km_5
- Transport of lubricating oil // lubricants at refinery // eu+efta+uk by Articulated lorry transport, Euro 4, Total weight >32 t - EU+EFTA+UK: 0.00132587; = kg_km_6
- Transport of lubricating oil // lubricants at refinery // raf by Articulated lorry transport, Euro 4, Total weight >32 t - EU+EFTA+UK: 9.93295e-5; = kg_km_7
- Transport of lubricating oil // lubricants at refinery // ras w/o cn by Articulated lorry transport, Euro 4, Total weight >32 t - EU+EFTA+UK: 0.00260297; = kg_km_8
- Transport of lubricating oil // lubricants at refinery // rna by Articulated lorry transport, Euro 4, Total weight >32 t - EU+EFTA+UK: 0.00203182; = kg_km_9
- Transport of lubricating oil // lubricants at refinery // rsa by Articulated lorry transport, Euro 4, Total weight >32 t - EU+EFTA+UK: 0.000242116; = kg_km_10
- Transport of lubricating oil // lubricants at refinery // ru by Articulated lorry transport, Euro 4, Total weight >32 t - EU+EFTA+UK: 0.00215244; = kg_km_11
- Transport of soap // soap production // glo by Articulated lorry transport, Euro 4, Total weight >32 t - EU+EFTA+UK: 6; = kg_km_12
- Transport of urea-formaldehyde resin // urea-formaldehyde resin production // eu+efta+uk by Articulated lorry transport, Euro 4, Total weight >32 t - EU+EFTA+UK: 480; = kg_km_13
- Transport of citric acid // citric acid production // glo by Transoceanic ship, containers - GLO: 32.4; = kg_km_14
- Transport of lubricating oil // lubricants at refinery // cn by Transoceanic ship, containers - GLO: 0.00743907; = kg_km_15
- Transport of lubricating oil // lubricants at refinery // eu+efta+uk by Transoceanic ship, containers - GLO: 0.0238657; = kg_km_16
- Transport of lubricating oil // lubricants at refinery // raf by Transoceanic ship, containers - GLO: 0.00178793; = kg_km_17
- Transport of lubricating oil // lubricants at refinery // ras w/o cn by Transoceanic ship, containers - GLO: 0.0468534; = kg_km_18
- Transport of lubricating oil // lubricants at refinery // rna by Transoceanic ship, containers - GLO: 0.0365728; = kg_km_19
- Transport of lubricating oil // lubricants at refinery // rsa by Transoceanic ship, containers - GLO: 0.00435808; = kg_km_20
- Transport of lubricating oil // lubricants at refinery // ru by Transoceanic ship, containers - GLO: 0.0387438; = kg_km_21
- Transport of soap // soap production // glo by Transoceanic ship, containers - GLO: 108; = kg_km_22
- Transport of urea-formaldehyde resin // urea-formaldehyde resin production // eu+efta+uk by Transoceanic ship, containers - GLO: 8640; = kg_km_23
- Electricity from Electricity grid mix 1kV-60kV - CN: 0.194976
- Electricity from Electricity grid mix 1kV-60kV - RAS w/o CN: 0.213624
- crease marking // crease marking // glo, blackbox: 1
- crease marking // crease marking // glo, elementary: 1

## Impact indicators
- Eutrophication marine: 0.00571712
- Ecotoxicity, freshwater: 29.4235
- Land use: 98.0387
- Water use: 3.29748
- Resource use, minerals and metals: 2.01483e-5
- Resource use, fossils: 40.5812
- Climate change: 2.57156
- Ozone depletion: 1.68956e-8
- Human toxicity, cancer: 1.57501e-8
- Human toxicity, non-cancer: 2.40135e-8
- EF-particulate Matter: 3.45288e-7
- Ionising radiation, human health: 0.0663601
- Photochemical ozone formation - human health: 0.00852861
- Acidification: 0.0172813
- Eutrophication, terrestrial: 0.0494627
- Eutrophication, freshwater: 0.000219072

## Deviations from the LCI method principle
The background data uses:
- the \xe2\x80\x9cRecycled content cut-off\xe2\x80\x9d approach to allocate end-of-life by-products and secondary materials. This allocation is explained in the description of the recycled content system model (http://www.ecoinvent.org/database/system-models-in-ecoinvent-3/cut-off-system-model/allocation-cut-off-by-classification.html).
OR
- EF compliant data

## Deviations from the LCI method approaches
Background data:
- the \xe2\x80\x9cRecycled content cut-off\xe2\x80\x9d approach to allocate end-of-life by-products and secondary materials. This allocation is explained in the description of the recycled content system model (http://www.ecoinvent.org/database/system-models-in-ecoinvent-3/cut-off-system-model/allocation-cut-off-by-classification.html). The ecoinvent database mostly relies on “Allocation – market values” apart for few exceptions particularly in the energy sector. ecoinvent energy data is replaced with EF3.0 core data as per the EF guidelines version 2.0.
OR
- EF compliant data

## Modelling constants
All modelling constants follow the requirements listed in the Tender Specifications 070201/2020/SER/ENV.B1. Completeness: There are no intentional cut-offs in the inventory no matter how small their contribution to all the EF impact categories is. Eventual cut-offs are in compliance with the Guide for EF compliant data sets (JRC 2020), i.e. only if below the 3% cut-off rule. Water use: water use is modelled at country level using separate flows for water withdrawal, water release and water evaporation. Handling multi-functional processes: the following PEF multi- functionality decision hierarchy is applied for resolving all multi- functionality problems: (1) subdivision or system expansion; (2) allocation based on a relevant underlying physical relationship (substitution may apply here); (3) allocation based on some other relationship. Direct land use change: GHG emissions from direct LUC allocated to good/service for 20 years after the LUC occurs, with IPCC default values. Carbon storage and delayed emissions: credits associated with temporary (carbon) storage or delayed emissions up to 300 years are not be considered. Emissions off-setting: are not included. Capital goods (including infrastructures) and their End of life: they are included. System boundaries: system boundaries include all processes linked to the product supply chain (e.g. maintenance). Time period: emissions and removals are modelled as if released or removed at the beginning of the assessment method. Fossil and biogenic carbon emissions and removals: removals and emissions are modelled as follows: All GHG emissions from fossil fuels (including peat and limestone) are modelled consistently with the most updated ILCD list of elementary flows. The non-fossil (biogenic) carbon flows are modelled consistently with the most updated ILCD list of elementary flows.

## Cut-off and completeness
There are no intentional cut-offs in the inventory no matter how small their contribution to all the EF impact categories is. Eventual cut-offs are in compliance with the Guide for EF compliant data sets (JRC 2020), i.e. only if below the 3% cut-off rule. The dataset dry mass and water balance has been checked to ensure the inventory is complete. Capital goods (e.g. infrastructure) and their end-of-life are included.

## Data selection and combination
These datasets include, in both their foreground and background data, links to EF3.0 compliant data.
The relevant background data on energy, transport, and End of Life are from the LCDN data node (http://lcdn.thinkstep.com/Node/).
All other background data in the supply of this product for which no EF3.0 process was available are from ecoinvent v3.7 database (www.ecoinvent.org) or other data sources.

## Data treatment and extrapolations
Several data sources have been used to model the inventory.

## Review details
Internal reviews have been asked to review the plausibility of the unit process, LCIA scores, and DQRs. Internal reviewers have also been asked to review the data for EF compliancy. The consortium is therefore responsible for aspects such as compliancy with the ILCD format, including validation in Look@LCI, and nomenclature.
Internal reviwers have been asked to judge based on the process name, that the unit process models in a complete and representative way the process in the requested location. The review encompassed the plausability of:
- exchanges with nature (elementary flows) as well as exchanges such as product and waste flows.
- meta information (general comment, technology comment, system boundaries, allocation, cut-off rules, etc.). Reviewers were asked to judge if the provided information is enough to understand the content of the process.
- LCIA scores
- DQRs including precision, technology, time and geography. As well as the overall DQR.
External reviewers have been asked to provide their expertise in the field of interest. External reviewers have been asked to review the unit process, including eventual methodological choices, the LCIA scores (provided with contribution scores as well), and DQRs. External reviewers have been provided all the information in a tool developed by the consortium for the purpose of this project.
External reviewers have been asked to judge based on the process name, that the unit process models in a complete and representative way the process in the requested location. The review encompassed:
- Plausability and completeness of exchanges with nature (elementary flows) as well as exchanges such as product and waste flows.
- Review of meta information (general comment, technology comment, system boundaries, allocation, cut-off rules, etc.). Reviewers were asked to judge if the provided information is enough to understand the content of the process.
- Review of properties (biogenic carbon and water content).
- Review of allocation keys.
- Plausability of LCIA scores calculated by the consortium.
- Plausability of DQRs including precision, technology, time and geography. As well as the overall DQR.

## Data sources
- Background Data for Representative products and organisations. EF 3.0 compliant (data stock)
- UN Data (2018) Statistics Data for Lubricants Productions, http://data.un.org/Data.aspx?q=Lubricants&d=EDATA&f=cmID%3aLU, United Nations Statistics Division, Global
- Expert interview (2021)
- Choudhury, Asim Kumar Roy. 2017. Principle of textile finishing. United Kingdom: Elsevier, pp 455
- Lebon (2021) Nonwoven Oven Machine, Catalog and Company Messages, Qingdao Lebon Industry Co., Ltd., China
- Chowdhury, Kawser Parveen (2018) Effect of Special Finishes on the Functional Properties of Cotton Fabrics, Journal of Textile Science and Technology, 4, 49-66, https://file.scirp.org/pdf/JTST_2018050815303131.pdf, Bangladesh
- Deguan (2018) Balloon Padder with Detwister and Squeezer for tubular fabric only, http://www.textilemachinery.com.cn/index.php?m=content&c=index&a=show&catid=59&id=82, Dezhou Deguan TextileMachinery Co.,Ltd., Shandong, China
- Finestart (2017) Open Width Compactor(Dryer, Stenter and Compactor 3in1), http://www.finestart.com.cn/index.php?m=content&c=index&a=show&catid=55&id=62, Shandong Finestart Imp.& Exp. Co.,Ltd., Shandong, China

## Intended applications
Implementation of regular Product Environmental Footprint (PEF) studies and Organisation Environmental Footprint (OEF) studies exclusively under the specified Product groups and sectors as defined in the Product Environmental Footprint Category Rules (PEFCR) and Organisation Environmental Footprint Sectorial Rules (OEFSR) listed in http://ec.europa.eu/environment/eussd/smgp/PEFCR_OEFSR.htm
