# glass fiber; technology mix; production mix, at plant; 1 kg

Dataset: ILCD process, Partly terminated system
Geography: GLO
Reference year: 2021
Valid until: 2024
Classification: Systems / Textiles, furnitures and other interiors
LCI method principle: Attributional
LCI method approaches: Allocation - market value
Completeness: All relevant flows quantified
Project: Provision of process-based 3.0 Environmental Footprint-compliant life cycle inventory datasets - Apparel 2 - contract number 070201/2020/840292/SER/ENV.B.1
Generated by: Life Cycle Indonesia
Owner: PRé Sustainability B.V.
Compliance: ILCD Data Network - Entry-level; Suggestions for updating the PEF method 2019; ISO 14040 Environmental Management – Life Cycle Assessment – Principles and Framework, 2006; ISO 14044:2006. Environmental Management – Life Cycle Assessment – Requirements and guidelines.; Environmental Footprint 3.1
Review: Dependent internal review by Avraam Symeonidis, Emilia Moreno Ruiz; Independent review panel by Philippa Notten
Data quality: Overall quality: Good; Time representativeness: Good; Geographical representativeness: Good; Technological representativeness: Good; Precision: Good; Methodological appropriateness and consistency: Not applicable
Amounts: no units in this file; such an amount is in the reference unit of its flow, which a separate flow dataset defines
copyright: true
licenseType: Free of charge for some user types or use types
accessRestrictions: Free of charge for all final users implementing a regular Product Environmental Footprint (PEF) studies and Organisation Environmental Footprint (OEF) studies exclusively under the specified Product groups and sectors as defined in the Product Environmental Footprint Category Rules (PEFCR) and Organisation Environmental Footprint Sectorial Rules (OEFSR) listed in http://ec.europa.eu/environment/eussd/smgp/PEFCR_OEFSR.htm and in accordance with the terms and conditions of the EULA (available at https://ecoinvent.lca-data.com/) exclusively until 31st December 2024. Any use of this dataset or any derivative data not within the specific context of one of the PEF/OEF projects or after the end of 2024 is not permitted.

## General comment
Notice: this data set supersedes the EF3.0-compliant version (see link under "preceding data set version" below calculated with the EF3.0). The life cycle inventory is not changed from the original EF3.0 data set. The LCIA results are calculated based on the EF3.1 methods which provide updated characterisation factors in the following impact categories: Climate Change, Ecotoxicity freshwater, Photochemical Ozone Formation, Acidification, Human Toxicity non-cancer, and Human Toxicity cancer. The review report and the data quality ratings refer to the original results. The data set has been updated by the European Commission on the basis of the original EF3.0 data set delivered by the data provider.Glass fibers reinforced polymer composites are used in various products and manufacturing processes. Some of its most common use are in electronics, aviation and automobile application etc. Its popularity is due to it's excellent properties like high strength, flexibility, stiffness and resistance to chemical harm. Glass fiber can be further divided into two sub-sectors: textile glass fiber and glass wool. The former is used as reinforcing materials for composites, while the latter is used as insulation materials for construction.

Dai, Q., Kelly, J., Sullivan, J. and Elgowainy, A., 2015. Life-Cycle Analysis Update of Glass and Glass Fiber for the GREETTM Model.
Sathishkumar, T.P., Satheeshkumar, S. and Naveen, J., 2014. Glass fiber-reinforced polymer composites–a review. Journal of reinforced plastics and composites, 33(13), pp.1258-1275.

## Technology and included processes
There are 4 steps in making glass fiber: batch preparation, melting and refining, forming, and post-forming. During batch preparation, the pretreated raw materials are mixed together. Then, once in the melting process, they will be mixed together in elevated temperatures. This is followed up by the refining process, where the molten glass is homogenized and conditioned after it is freed of bubbles that could harm its formation. After refining, the molten glass flows to bushings, where it is drawn through openings in the bushings by a mechanical force to be fiberized. Immediately after leaving the bushings, the fibers are subjected to rapid cooling by air and water spray. A coating also referred to as size, is applied to the fibers before they enter the subsequent post-forming processes to protect and lubricate the brittle filaments. This process usually known as sizing process. The size applied also dictates the performance of the fibers in a composite, notably the interface interaction between the matrix and the filaments. The size is generally an aqueous mixture of polymers, lubricants, coupling agents, and additives. The exact composition, however, depends on the glass fiber being manufactured and remains proprietary. After sizing, the filaments are wound into a spun. Based on final application, additional post-processing steps may follow, such as roving assembly, twisting, strand chopping, etc.

The activity starts when the material enter the process. The materials entering the process are water, chemicals, energy uses and infrastructure. In this model, the infrastructure covered is the furnace and the sizing machine. Others were not included due to data limitations. There is no direct emission to soil, but there are the direct emission to air such as CO2, SOx, NOx, and PM comes from melting & refining process also water vapour comes from spraying in forming process and drying in post-forming process. The sizing materials (i.e. epoxy resins, boric oxide, dimethyldichlorosilane, and ethylene glycol) consumption is accounted as well in this model. The sizing materials remain the property of the glass fiber. The sizing materials that do not coat the final product assumed to be generated along with wastewater. The hazardous waste comes from waste lube oil. The consumption of lubricating oil using a thermalbonding machine as a proxy.

Dai, Q., Kelly, J., Sullivan, J. and Elgowainy, A., 2015. Life-Cycle Analysis Update of Glass and Glass Fiber for the GREETTM Model.

## Parameters
- kg_0: 0.0664824
  Mass in kg, for boric oxide; Transoceanic ship, containers; GLO
- km_0: 599
  Distance in km, for boric oxide; Transoceanic ship, containers; GLO
- kg_km_0: 39.823; = kg_0*km_0
  Transport amount in km*km, for boric oxide; Transoceanic ship, containers; GLO
- kg_1: 0.0664824
  Mass in kg, for boric oxide; Freight train, diesel traction; EU+EFTA+UK
- km_1: 229.272
  Distance in km, for boric oxide; Freight train, diesel traction; EU+EFTA+UK
- kg_km_1: 15.2425; = kg_1*km_1
  Transport amount in km*km, for boric oxide; Freight train, diesel traction; EU+EFTA+UK
- kg_2: 0.0664824
  Mass in kg, for boric oxide; Freight train, electricity traction; EU+EFTA+UK
- km_2: 77.9889
  Distance in km, for boric oxide; Freight train, electricity traction; EU+EFTA+UK
- kg_km_2: 5.18489; = kg_2*km_2
  Transport amount in km*km, for boric oxide; Freight train, electricity traction; EU+EFTA+UK
- kg_3: 0.0664824
  Mass in kg, for boric oxide; Freight train, average; EU+EFTA+UK
- km_3: 1.8394
  Distance in km, for boric oxide; Freight train, average; EU+EFTA+UK
- kg_km_3: 0.122288; = kg_3*km_3
  Transport amount in km*km, for boric oxide; Freight train, average; EU+EFTA+UK
- kg_4: 0.0664824
  Mass in kg, for boric oxide; Barge; EU+EFTA+UK
- km_4: 8.08691
  Distance in km, for boric oxide; Barge; EU+EFTA+UK
- kg_km_4: 0.537637; = kg_4*km_4
  Transport amount in km*km, for boric oxide; Barge; EU+EFTA+UK
- kg_5: 0.0664824
  Mass in kg, for boric oxide; Barge; ROW w/o EU+EFTA
- km_5: 16.5131
  Distance in km, for boric oxide; Barge; ROW w/o EU+EFTA
- kg_km_5: 1.09783; = kg_5*km_5
  Transport amount in km*km, for boric oxide; Barge; ROW w/o EU+EFTA
- kg_6: 0.0664824
  Mass in kg, for boric oxide; Articulated lorry transport, Euro 4, Total weight >32 t; EU+EFTA+UK
- km_6: 57.3754
  Distance in km, for boric oxide; Articulated lorry transport, Euro 4, Total weight >32 t; EU+EFTA+UK
- kg_km_6: 3.81445; = kg_6*km_6
  Transport amount in km*km, for boric oxide; Articulated lorry transport, Euro 4, Total weight >32 t; EU+EFTA+UK
- kg_7: 0.0664824
  Mass in kg, for boric oxide; Articulated lorry transport, Total weight >32 t, mix Euro 0-5; ROW w/o EU+EFTA
- km_7: 151.425
  Distance in km, for boric oxide; Articulated lorry transport, Total weight >32 t, mix Euro 0-5; ROW w/o EU+EFTA
- kg_km_7: 10.0671; = kg_7*km_7
  Transport amount in km*km, for boric oxide; Articulated lorry transport, Total weight >32 t, mix Euro 0-5; ROW w/o EU+EFTA
- kg_8: 0.393
  Mass in kg, for sand; Freight train, diesel traction; EU+EFTA+UK
- km_8: 8.99129
  Distance in km, for sand; Freight train, diesel traction; EU+EFTA+UK
- kg_km_8: 3.53358; = kg_8*km_8
  Transport amount in km*km, for sand; Freight train, diesel traction; EU+EFTA+UK
- kg_9: 0.393
  Mass in kg, for sand; Freight train, electricity traction; EU+EFTA+UK
- km_9: 3.03656
  Distance in km, for sand; Freight train, electricity traction; EU+EFTA+UK
- kg_km_9: 1.19337; = kg_9*km_9
  Transport amount in km*km, for sand; Freight train, electricity traction; EU+EFTA+UK
- kg_10: 0.393
  Mass in kg, for sand; Freight train, average; EU+EFTA+UK
- km_10: 0.0721431
  Distance in km, for sand; Freight train, average; EU+EFTA+UK
- kg_km_10: 0.0283522; = kg_10*km_10
  Transport amount in km*km, for sand; Freight train, average; EU+EFTA+UK
- kg_11: 0.393
  Mass in kg, for sand; Barge; EU+EFTA+UK
- km_11: 0.690346
  Distance in km, for sand; Barge; EU+EFTA+UK
- kg_km_11: 0.271306; = kg_11*km_11
  Transport amount in km*km, for sand; Barge; EU+EFTA+UK
- kg_12: 0.393
  Mass in kg, for sand; Articulated lorry transport, Total weight >32 t, mix Euro 0-5; ROW w/o EU+EFTA
- km_12: 32.3
  Distance in km, for sand; Articulated lorry transport, Total weight >32 t, mix Euro 0-5; ROW w/o EU+EFTA
- kg_km_12: 12.6939; = kg_12*km_12
  Transport amount in km*km, for sand; Articulated lorry transport, Total weight >32 t, mix Euro 0-5; ROW w/o EU+EFTA
- kg_13: 0.393
  Mass in kg, for sand; Transoceanic ship, bulk; GLO
- km_13: 72.7
  Distance in km, for sand; Transoceanic ship, bulk; GLO
- kg_km_13: 28.5711; = kg_13*km_13
  Transport amount in km*km, for sand; Transoceanic ship, bulk; GLO
- kg_14: 0.393
  Mass in kg, for sand; Articulated lorry transport, Total weight <7.5 t, mix Euro 0-5; EU+EFTA+UK
- km_14: 0.950673
  Distance in km, for sand; Articulated lorry transport, Total weight <7.5 t, mix Euro 0-5; EU+EFTA+UK
- kg_km_14: 0.373615; = kg_14*km_14
  Transport amount in km*km, for sand; Articulated lorry transport, Total weight <7.5 t, mix Euro 0-5; EU+EFTA+UK
- kg_15: 0.393
  Mass in kg, for sand; Barge; ROW w/o EU+EFTA
- km_15: 1.40965
  Distance in km, for sand; Barge; ROW w/o EU+EFTA
- kg_km_15: 0.553994; = kg_15*km_15
  Transport amount in km*km, for sand; Barge; ROW w/o EU+EFTA
- kg_16: 0.010452
  Mass in kg, for epoxy resin // epoxy resin production // glo; Articulated lorry transport, Euro 4, Total weight >32 t; EU+EFTA+UK
- km_16: 1000
  Distance in km, for epoxy resin // epoxy resin production // glo; Articulated lorry transport, Euro 4, Total weight >32 t; EU+EFTA+UK
- kg_km_16: 10.452; = kg_16*km_16
  Transport amount in km*km, for epoxy resin // epoxy resin production // glo; Articulated lorry transport, Euro 4, Total weight >32 t; EU+EFTA+UK
- kg_17: 0.0028944
  Mass in kg, for ethylene glycol // ethylene glycol production // glo; Articulated lorry transport, Euro 4, Total weight >32 t; EU+EFTA+UK
- km_17: 1000
  Distance in km, for ethylene glycol // ethylene glycol production // glo; Articulated lorry transport, Euro 4, Total weight >32 t; EU+EFTA+UK
- kg_km_17: 2.8944; = kg_17*km_17
  Transport amount in km*km, for ethylene glycol // ethylene glycol production // glo; Articulated lorry transport, Euro 4, Total weight >32 t; EU+EFTA+UK
- kg_18: 0.327
  Mass in kg, for kaolin // kaolin production // eu+efta+uk; Articulated lorry transport, Euro 4, Total weight >32 t; EU+EFTA+UK
- km_18: 1000
  Distance in km, for kaolin // kaolin production // eu+efta+uk; Articulated lorry transport, Euro 4, Total weight >32 t; EU+EFTA+UK
- kg_km_18: 327; = kg_18*km_18
  Transport amount in km*km, for kaolin // kaolin production // eu+efta+uk; Articulated lorry transport, Euro 4, Total weight >32 t; EU+EFTA+UK
- kg_19: 1.2794e-6
  Mass in kg, for lubricating oil // lubricants at refinery // eu+efta+uk; Articulated lorry transport, Euro 4, Total weight >32 t; EU+EFTA+UK
- km_19: 1000.47
  Distance in km, for lubricating oil // lubricants at refinery // eu+efta+uk; Articulated lorry transport, Euro 4, Total weight >32 t; EU+EFTA+UK
- kg_km_19: 0.00128; = kg_19*km_19
  Transport amount in km*km, for lubricating oil // lubricants at refinery // eu+efta+uk; Articulated lorry transport, Euro 4, Total weight >32 t; EU+EFTA+UK
- kg_20: 2.3363e-7
  Mass in kg, for lubricating oil // lubricants at refinery // rsa; Articulated lorry transport, Euro 4, Total weight >32 t; EU+EFTA+UK
- km_20: 1000
  Distance in km, for lubricating oil // lubricants at refinery // rsa; Articulated lorry transport, Euro 4, Total weight >32 t; EU+EFTA+UK
- kg_km_20: 0.00023363; = kg_20*km_20
  Transport amount in km*km, for lubricating oil // lubricants at refinery // rsa; Articulated lorry transport, Euro 4, Total weight >32 t; EU+EFTA+UK
- kg_21: 9.58483e-8
  Mass in kg, for lubricating oil // lubricants at refinery // raf; Articulated lorry transport, Euro 4, Total weight >32 t; EU+EFTA+UK
- km_21: 1000
  Distance in km, for lubricating oil // lubricants at refinery // raf; Articulated lorry transport, Euro 4, Total weight >32 t; EU+EFTA+UK
- kg_km_21: 9.58483e-5; = kg_21*km_21
  Transport amount in km*km, for lubricating oil // lubricants at refinery // raf; Articulated lorry transport, Euro 4, Total weight >32 t; EU+EFTA+UK
- kg_22: 2.51174e-6
  Mass in kg, for lubricating oil // lubricants at refinery // ras w/o cn; Articulated lorry transport, Euro 4, Total weight >32 t; EU+EFTA+UK
- km_22: 1000
  Distance in km, for lubricating oil // lubricants at refinery // ras w/o cn; Articulated lorry transport, Euro 4, Total weight >32 t; EU+EFTA+UK
- kg_km_22: 0.00251174; = kg_22*km_22
  Transport amount in km*km, for lubricating oil // lubricants at refinery // ras w/o cn; Articulated lorry transport, Euro 4, Total weight >32 t; EU+EFTA+UK
- kg_23: 2.077e-6
  Mass in kg, for lubricating oil // lubricants at refinery // ru; Articulated lorry transport, Euro 4, Total weight >32 t; EU+EFTA+UK
- km_23: 1000
  Distance in km, for lubricating oil // lubricants at refinery // ru; Articulated lorry transport, Euro 4, Total weight >32 t; EU+EFTA+UK
- kg_km_23: 0.002077; = kg_23*km_23
  Transport amount in km*km, for lubricating oil // lubricants at refinery // ru; Articulated lorry transport, Euro 4, Total weight >32 t; EU+EFTA+UK
- kg_24: 1.96061e-6
  Mass in kg, for lubricating oil // lubricants at refinery // rna; Articulated lorry transport, Euro 4, Total weight >32 t; EU+EFTA+UK
- km_24: 1000
  Distance in km, for lubricating oil // lubricants at refinery // rna; Articulated lorry transport, Euro 4, Total weight >32 t; EU+EFTA+UK
- kg_km_24: 0.00196061; = kg_24*km_24
  Transport amount in km*km, for lubricating oil // lubricants at refinery // rna; Articulated lorry transport, Euro 4, Total weight >32 t; EU+EFTA+UK
- kg_25: 3.98797e-7
  Mass in kg, for lubricating oil // lubricants at refinery // cn; Articulated lorry transport, Euro 4, Total weight >32 t; EU+EFTA+UK
- km_25: 1000
  Distance in km, for lubricating oil // lubricants at refinery // cn; Articulated lorry transport, Euro 4, Total weight >32 t; EU+EFTA+UK
- kg_km_25: 0.000398797; = kg_25*km_25
  Transport amount in km*km, for lubricating oil // lubricants at refinery // cn; Articulated lorry transport, Euro 4, Total weight >32 t; EU+EFTA+UK
- kg_26: 1.2794e-6
  Mass in kg, for lubricating oil // lubricants at refinery // eu+efta+uk; Transoceanic ship, containers; GLO
- km_26: 17977.1
  Distance in km, for lubricating oil // lubricants at refinery // eu+efta+uk; Transoceanic ship, containers; GLO
- kg_km_26: 0.023; = kg_26*km_26
  Transport amount in km*km, for lubricating oil // lubricants at refinery // eu+efta+uk; Transoceanic ship, containers; GLO
- kg_27: 0.395
  Mass in kg, for lime // lime production // eu+efta+uk; Articulated lorry transport, Euro 4, Total weight >32 t; EU+EFTA+UK
- km_27: 1000
  Distance in km, for lime // lime production // eu+efta+uk; Articulated lorry transport, Euro 4, Total weight >32 t; EU+EFTA+UK
- kg_km_27: 395; = kg_27*km_27
  Transport amount in km*km, for lime // lime production // eu+efta+uk; Articulated lorry transport, Euro 4, Total weight >32 t; EU+EFTA+UK
- kg_28: 0.395
  Mass in kg, for lime // lime production // eu+efta+uk; Transoceanic ship, containers; GLO
- km_28: 18000
  Distance in km, for lime // lime production // eu+efta+uk; Transoceanic ship, containers; GLO
- kg_km_28: 7110; = kg_28*km_28
  Transport amount in km*km, for lime // lime production // eu+efta+uk; Transoceanic ship, containers; GLO
- kg_29: 0.010452
  Mass in kg, for epoxy resin // epoxy resin production // glo; Transoceanic ship, containers; GLO
- km_29: 18000
  Distance in km, for epoxy resin // epoxy resin production // glo; Transoceanic ship, containers; GLO
- kg_km_29: 188.136; = kg_29*km_29
  Transport amount in km*km, for epoxy resin // epoxy resin production // glo; Transoceanic ship, containers; GLO
- kg_30: 0.0028944
  Mass in kg, for ethylene glycol // ethylene glycol production // glo; Transoceanic ship, containers; GLO
- km_30: 18000
  Distance in km, for ethylene glycol // ethylene glycol production // glo; Transoceanic ship, containers; GLO
- kg_km_30: 52.0992; = kg_30*km_30
  Transport amount in km*km, for ethylene glycol // ethylene glycol production // glo; Transoceanic ship, containers; GLO
- kg_31: 0.327
  Mass in kg, for kaolin // kaolin production // eu+efta+uk; Transoceanic ship, containers; GLO
- km_31: 18000
  Distance in km, for kaolin // kaolin production // eu+efta+uk; Transoceanic ship, containers; GLO
- kg_km_31: 5886; = kg_31*km_31
  Transport amount in km*km, for kaolin // kaolin production // eu+efta+uk; Transoceanic ship, containers; GLO
- kg_32: 2.3363e-7
  Mass in kg, for lubricating oil // lubricants at refinery // rsa; Transoceanic ship, containers; GLO
- km_32: 18000
  Distance in km, for lubricating oil // lubricants at refinery // rsa; Transoceanic ship, containers; GLO
- kg_km_32: 0.00420534; = kg_32*km_32
  Transport amount in km*km, for lubricating oil // lubricants at refinery // rsa; Transoceanic ship, containers; GLO
- kg_33: 9.58483e-8
  Mass in kg, for lubricating oil // lubricants at refinery // raf; Transoceanic ship, containers; GLO
- km_33: 18000
  Distance in km, for lubricating oil // lubricants at refinery // raf; Transoceanic ship, containers; GLO
- kg_km_33: 0.00172527; = kg_33*km_33
  Transport amount in km*km, for lubricating oil // lubricants at refinery // raf; Transoceanic ship, containers; GLO
- kg_34: 2.51174e-6
  Mass in kg, for lubricating oil // lubricants at refinery // ras w/o cn; Transoceanic ship, containers; GLO
- km_34: 18000
  Distance in km, for lubricating oil // lubricants at refinery // ras w/o cn; Transoceanic ship, containers; GLO
- kg_km_34: 0.0452113; = kg_34*km_34
  Transport amount in km*km, for lubricating oil // lubricants at refinery // ras w/o cn; Transoceanic ship, containers; GLO
- kg_35: 2.077e-6
  Mass in kg, for lubricating oil // lubricants at refinery // ru; Transoceanic ship, containers; GLO
- km_35: 18000
  Distance in km, for lubricating oil // lubricants at refinery // ru; Transoceanic ship, containers; GLO
- kg_km_35: 0.037386; = kg_35*km_35
  Transport amount in km*km, for lubricating oil // lubricants at refinery // ru; Transoceanic ship, containers; GLO
- kg_36: 1.96061e-6
  Mass in kg, for lubricating oil // lubricants at refinery // rna; Transoceanic ship, containers; GLO
- km_36: 18000
  Distance in km, for lubricating oil // lubricants at refinery // rna; Transoceanic ship, containers; GLO
- kg_km_36: 0.035291; = kg_36*km_36
  Transport amount in km*km, for lubricating oil // lubricants at refinery // rna; Transoceanic ship, containers; GLO
- kg_37: 3.98797e-7
  Mass in kg, for lubricating oil // lubricants at refinery // cn; Transoceanic ship, containers; GLO
- km_37: 18000
  Distance in km, for lubricating oil // lubricants at refinery // cn; Transoceanic ship, containers; GLO
- kg_km_37: 0.00717835; = kg_37*km_37
  Transport amount in km*km, for lubricating oil // lubricants at refinery // cn; Transoceanic ship, containers; GLO

## Reference product
- glass fiber // glass fiber // glo: 1

## Inputs
- Transport of boric oxide by Transoceanic ship, containers - GLO: 39.823; = kg_km_0
- Transport of boric oxide by Freight train, diesel traction - EU+EFTA+UK: 15.2425; = kg_km_1
- Transport of boric oxide by Freight train, electricity traction - EU+EFTA+UK: 5.18489; = kg_km_2
- Transport of boric oxide by Freight train, average - EU+EFTA+UK: 0.122288; = kg_km_3
- Transport of boric oxide by Barge - EU+EFTA+UK: 0.537637; = kg_km_4
- Transport of boric oxide by Barge - ROW w/o EU+EFTA: 1.09783; = kg_km_5
- Transport of boric oxide by Articulated lorry transport, Euro 4, Total weight >32 t - EU+EFTA+UK: 3.81445; = kg_km_6
- Transport of boric oxide by Articulated lorry transport, Total weight >32 t, mix Euro 0-5 - ROW w/o EU+EFTA: 10.0671; = kg_km_7
- Electricity from Electricity grid mix 1kV-60kV - AU: 0.0337
- Electricity from Electricity grid mix 1kV-60kV - EU+EFTA+UK: 0.4965
- Electricity from Electricity grid mix 1kV-60kV - NZ: 0.0064
- Electricity from Electricity grid mix 1kV-60kV - RAF: 0.1085
- Electricity from Electricity grid mix 1kV-60kV - RNA: 0.7265
- Electricity from Electricity grid mix 1kV-60kV - RSA: 0.2465
- Electricity from Electricity grid mix 1kV-60kV - RU: 0.1453
- Transport of sand by Freight train, diesel traction - EU+EFTA+UK: 3.53358; = kg_km_8
- Transport of sand by Freight train, electricity traction - EU+EFTA+UK: 1.19337; = kg_km_9
- Transport of sand by Freight train, average - EU+EFTA+UK: 0.0283522; = kg_km_10
- Transport of sand by Barge - EU+EFTA+UK: 0.271306; = kg_km_11
- Transport of sand by Articulated lorry transport, Total weight >32 t, mix Euro 0-5 - ROW w/o EU+EFTA: 12.6939; = kg_km_12
- Transport of sand by Transoceanic ship, bulk - GLO: 28.5711; = kg_km_13
- Transport of sand by Articulated lorry transport, Total weight <7.5 t, mix Euro 0-5 - EU+EFTA+UK: 0.373615; = kg_km_14
- Transport of sand by Barge - ROW w/o EU+EFTA: 0.553994; = kg_km_15
- Transport of epoxy resin // epoxy resin production // glo by Articulated lorry transport, Euro 4, Total weight >32 t - EU+EFTA+UK: 10.452; = kg_km_16
- Transport of ethylene glycol // ethylene glycol production // glo by Articulated lorry transport, Euro 4, Total weight >32 t - EU+EFTA+UK: 2.8944; = kg_km_17
- Transport of kaolin // kaolin production // eu+efta+uk by Articulated lorry transport, Euro 4, Total weight >32 t - EU+EFTA+UK: 327; = kg_km_18
- Transport of lubricating oil // lubricants at refinery // eu+efta+uk by Articulated lorry transport, Euro 4, Total weight >32 t - EU+EFTA+UK: 0.00128; = kg_km_19
- Transport of lubricating oil // lubricants at refinery // rsa by Articulated lorry transport, Euro 4, Total weight >32 t - EU+EFTA+UK: 0.00023363; = kg_km_20
- Transport of lubricating oil // lubricants at refinery // raf by Articulated lorry transport, Euro 4, Total weight >32 t - EU+EFTA+UK: 9.58483e-5; = kg_km_21
- Transport of lubricating oil // lubricants at refinery // ras w/o cn by Articulated lorry transport, Euro 4, Total weight >32 t - EU+EFTA+UK: 0.00251174; = kg_km_22
- Transport of lubricating oil // lubricants at refinery // ru by Articulated lorry transport, Euro 4, Total weight >32 t - EU+EFTA+UK: 0.002077; = kg_km_23
- Transport of lubricating oil // lubricants at refinery // rna by Articulated lorry transport, Euro 4, Total weight >32 t - EU+EFTA+UK: 0.00196061; = kg_km_24
- Transport of lubricating oil // lubricants at refinery // cn by Articulated lorry transport, Euro 4, Total weight >32 t - EU+EFTA+UK: 0.000398797; = kg_km_25
- Transport of lubricating oil // lubricants at refinery // eu+efta+uk by Transoceanic ship, containers - GLO: 0.023; = kg_km_26
- Transport of lime // lime production // eu+efta+uk by Articulated lorry transport, Euro 4, Total weight >32 t - EU+EFTA+UK: 395; = kg_km_27
- Transport of lime // lime production // eu+efta+uk by Transoceanic ship, containers - GLO: 7110; = kg_km_28
- Transport of epoxy resin // epoxy resin production // glo by Transoceanic ship, containers - GLO: 188.136; = kg_km_29
- Transport of ethylene glycol // ethylene glycol production // glo by Transoceanic ship, containers - GLO: 52.0992; = kg_km_30
- Transport of kaolin // kaolin production // eu+efta+uk by Transoceanic ship, containers - GLO: 5886; = kg_km_31
- Transport of lubricating oil // lubricants at refinery // rsa by Transoceanic ship, containers - GLO: 0.00420534; = kg_km_32
- Transport of lubricating oil // lubricants at refinery // raf by Transoceanic ship, containers - GLO: 0.00172527; = kg_km_33
- Transport of lubricating oil // lubricants at refinery // ras w/o cn by Transoceanic ship, containers - GLO: 0.0452113; = kg_km_34
- Transport of lubricating oil // lubricants at refinery // ru by Transoceanic ship, containers - GLO: 0.037386; = kg_km_35
- Transport of lubricating oil // lubricants at refinery // rna by Transoceanic ship, containers - GLO: 0.035291; = kg_km_36
- Transport of lubricating oil // lubricants at refinery // cn by Transoceanic ship, containers - GLO: 0.00717835; = kg_km_37
- Electricity from Electricity grid mix 1kV-60kV - CN: 0.744403
- Electricity from Electricity grid mix 1kV-60kV - RAS w/o CN: 0.815597
- glass fiber // glass fiber // glo, blackbox: 1
- glass fiber // glass fiber // glo, elementary: 1

## Impact indicators
- Eutrophication marine: 0.00302119
- Ecotoxicity, freshwater: 11.1679
- Land use: 2.84081
- Water use: 0.587867
- Resource use, minerals and metals: 7.79904e-6
- Resource use, fossils: 17.1214
- Climate change: 2.06354
- Ozone depletion: 1.41918e-6
- Human toxicity, cancer: 7.92802e-10
- Human toxicity, non-cancer: 8.58938e-9
- EF-particulate Matter: 3.16272e-7
- Ionising radiation, human health: 0.0726335
- Photochemical ozone formation - human health: 0.00885241
- Acidification: 0.0154599
- Eutrophication, terrestrial: 0.0321036
- Eutrophication, freshwater: 3.18079e-5

## Deviations from the LCI method principle
The background data use the \xe2\x80\x9cRecycled content cut-off\xe2\x80\x9d approach to allocate end-of-life by-products and secondary materials. This allocation is explained in the description of the recycled content system model (http://www.ecoinvent.org/database/system-models-in-ecoinvent-3/cut-off-system-model/allocation-cut-off-by-classification.html).

## Deviations from the LCI method approaches
Background data:
- the \xe2\x80\x9cRecycled content cut-off\xe2\x80\x9d approach to allocate end-of-life by-products and secondary materials. This allocation is explained in the description of the recycled content system model (http://www.ecoinvent.org/database/system-models-in-ecoinvent-3/cut-off-system-model/allocation-cut-off-by-classification.html). The ecoinvent database mostly relies on “Allocation – market values” apart for few exceptions particularly in the energy sector. ecoinvent energy data is replaced with EF3.0 core data as per the EF guidelines version 2.0.
OR
- EF compliant data

## Modelling constants
All modelling constants follow the requirements listed in the Tender Specifications ENV.B.1/SER/2016/0038vl. Completeness: All known environmental flows are included. All known resource uses and emissions are listed in the inventory. Water use: water use is modelled at country level using separate flows for water withdrawal, water release and water evaporation. Cut-off: All known environmental flows are included. All known resource uses and emissions are listed in the inventory. Handling multi-functional processes: the following PEF multi- functionality decision hierarchy is applied for resolving all multi- functionality problems: (1) subdivision or system expansion; (2) allocation based on a relevant underlying physical relationship (substitution may apply here); (3) allocation based on some other relationship. Direct land use change: GHG emissions from direct LUC allocated to good/service for 20 years after the LUC occurs, with IPCC default values. Carbon storage and delayed emissions: credits associated with temporary (carbon) storage or delayed emissions up to 300 years are not be considered. Emissions off-setting: are not included. Capital goods (including infrastructures) and their End of life: they are included. System boundaries: system boundaries include all processes linked to the product supply chain (e.g. maintenance). Time period: emissions and removals are modelled as if released or removed at the beginning of the assessment method. Fossil and biogenic carbon emissions and removals: removals and emissions are modelled as follows: All GHG emissions from fossil fuels (including peat and limestone) are modelled consistently with the most updated ILCD list of elementary flows. The non-fossil (biogenic) carbon flows are modelled consistently with the most updated ILCD list of elementary flows.

## Cut-off and completeness
All known environmental flows are included. All known resource uses and emissions are listed in the inventory. The dataset dry mass balance has been checked to ensure the inventory is complete. Capital goods (e.g. infrastructure) and their end-of-life are included.

## Data selection and combination
These datasets include, in both their foreground and background data, links to EF3.0 compliant data.
The relevant background data on energy, transport, and End of Life are from the LCDN data node (http://lcdn.thinkstep.com/Node/).
All other background data in the supply of this product for which no EF3.0 process was available are from ecoinvent v3.7 database (www.ecoinvent.org) or other data sources.

## Data treatment and extrapolations
Several data sources have been used to model the inventory.

## Review details
Internal reviews have been asked to review the plausibility of the unit process, LCIA scores, and DQRs. Internal reviewers have also been asked to review the data for EF compliancy. The consortium is therefore responsible for aspects such as compliancy with the ILCD format, including validation in Look@LCI, and nomenclature.
Internal reviwers have been asked to judge based on the process name, that the unit process models in a complete and representative way the process in the requested location. The review encompassed the plausability of:
- exchanges with nature (elementary flows) as well as exchanges such as product and waste flows.
- meta information (general comment, technology comment, system boundaries, allocation, cut-off rules, etc.). Reviewers were asked to judge if the provided information is enough to understand the content of the process.
- LCIA scores
- DQRs including precision, technology, time and geography. As well as the overall DQR.
External reviewers have been asked to provide their expertise in the field of interest. External reviewers have been asked to review the unit process, including eventual methodological choices, the LCIA scores (provided with contribution scores as well), and DQRs. External reviewers have been provided all the information in a tool developed by the consortium for the purpose of this project.
External reviewers have been asked to judge based on the process name, that the unit process models in a complete and representative way the process in the requested location. The review encompassed:
- Plausability and completeness of exchanges with nature (elementary flows) as well as exchanges such as product and waste flows.
- Review of meta information (general comment, technology comment, system boundaries, allocation, cut-off rules, etc.). Reviewers were asked to judge if the provided information is enough to understand the content of the process.
- Review of properties (biogenic carbon and water content).
- Review of allocation keys.
- Plausability of LCIA scores calculated by the consortium.
- Plausability of DQRs including precision, technology, time and geography. As well as the overall DQR.

## Data sources
- Background Data for Representative products and organisations. EF 3.0 compliant (data stock)
- UN Data (2018) Statistics Data for Lubricants Productions, http://data.un.org/Data.aspx?q=Lubricants&d=EDATA&f=cmID%3aLU, United Nations Statistics Division, Global.
- Dai, Q., Kelly, J., Sullivan, J. and Elgowainy, A., 2015. Life-Cycle Analysis Update of Glass and Glass Fiber for the GREETTM Model, United States
- Scalet, B. M., Garcia Munoz, M., Sissa, A. Q., Roudier, W., Delgado Sancho, L., 2013. Best available techniques reference document for the manufacture of glass, Europian Union. http://eippcb.jrc.ec.europa.eu/reference/BREF/GLS_Adopted_03_2012.pdf
- Willy Piret, Nadia Masson, Luc Peters. 2013. Glass fibre sizing composition, European Patent Application. Battice, Belgium
- Joint Research Center, 2013. Best Available Techniques (BAT) Reference Document for the Manufacture of Glass. JRC Reference Report. Seville, Spain: European Commission.
- Lebon (2021) Nonwoven Oven Machine, Catalog and Company Messages, Qingdao Lebon Industry Co., Ltd., China
- T-Tech Japan (2021) Single-End-Sizing System, http://www.t-techjapan.co.jp/en/catalog/index.html, T-Tech Japan Corp., Ishikawa, Japan
- Izumi International (2021). Single End Sizing Machine KS7, https://www.izumiinternational.com/media/wysiwyg/brochure/KS7-SingleEndSizing-(BroF).pdf, Izumi International, Inc., Global
- Deltech Furnaces (2021) Glass Melt Furnaces, https://www.deltechfurnaces.com/products/glass-melt-furnaces/, Deltech Inc., USA
- Gardiner, Ginger (2009) The makinf of glass fiber, https://www.compositesworld.com/articles/the-making-of-glass-fiber, Gardner Business Media, Inc., USA

## Intended applications
Implementation of regular Product Environmental Footprint (PEF) studies and Organisation Environmental Footprint (OEF) studies exclusively under the specified Product groups and sectors as defined in the Product Environmental Footprint Category Rules (PEFCR) and Organisation Environmental Footprint Sectorial Rules (OEFSR) listed in http://ec.europa.eu/environment/eussd/smgp/PEFCR_OEFSR.htm
