# dyeing, foam; Dyeing; production mix, at plant; textile service for 1 kg of fabric

Dataset: ILCD process, Partly terminated system
Geography: GLO
Reference year: 2019
Valid until: 2024
Classification: Systems / Textiles, furnitures and other interiors
LCI method principle: Attributional
LCI method approaches: Allocation - market value
Completeness: All relevant flows quantified
Project: Provision of process-based 3.0 Environmental Footprint-compliant life cycle inventory datasets - Apparel 3 - contract number 070201/2020/840294/SER/ENV.B.1
Generated by: CADIS
Owner: PRé Sustainability B.V.
Compliance: ILCD Data Network - Entry-level; Suggestions for updating the PEF method 2019; ISO 14040 Environmental Management – Life Cycle Assessment – Principles and Framework, 2006; ISO 14044:2006. Environmental Management – Life Cycle Assessment – Requirements and guidelines.; Environmental Footprint 3.1
Review: Dependent internal review by Avraam Symeonidis, Emilia Moreno Ruiz; Independent review panel by Fábio Valebona
Data quality: Overall quality: Good; Time representativeness: Very good; Geographical representativeness: Good; Technological representativeness: Very good; Precision: Good; Methodological appropriateness and consistency: Not applicable
Amounts: no units in this file; such an amount is in the reference unit of its flow, which a separate flow dataset defines
copyright: true
licenseType: Free of charge for some user types or use types
accessRestrictions: Free of charge for all final users implementing a regular Product Environmental Footprint (PEF) studies and Organisation Environmental Footprint (OEF) studies exclusively under the specified Product groups and sectors as defined in the Product Environmental Footprint Category Rules (PEFCR) and Organisation Environmental Footprint Sectorial Rules (OEFSR) listed in http://ec.europa.eu/environment/eussd/smgp/PEFCR_OEFSR.htm and in accordance with the terms and conditions of the EULA (available at https://ecoinvent.lca-data.com/) exclusively until 31st December 2024. Any use of this dataset or any derivative data not within the specific context of one of the PEF/OEF projects or after the end of 2024 is not permitted.

## General comment
Notice: this data set supersedes the EF3.0-compliant version (see link under "preceding data set version" below calculated with the EF3.0). The life cycle inventory is not changed from the original EF3.0 data set. The LCIA results are calculated based on the EF3.1 methods which provide updated characterisation factors in the following impact categories: Climate Change, Ecotoxicity freshwater, Photochemical Ozone Formation, Acidification, Human Toxicity non-cancer, and Human Toxicity cancer. The review report and the data quality ratings refer to the original results. The data set has been updated by the European Commission on the basis of the original EF3.0 data set delivered by the data provider.This activity is modeled as a service, so no input of textile is considered. Users of this datasets should include in its modelling an input of 1 kg of fabric. A batch dyeing process using direct or reactive dyes is modeled. This activity includes dyeing and post-dyeing washing. Drying operation is not included in this dataset. Average dyeing recipe was obtained from Mohsin & Sardar (2019) including: 2.6% shade dye (w/w), sodium chloride (3%) and foaming agent (1%). A liquor ratio of 1.5:1 [liters liquor/kg fabric] was obtained from Roy Choudhury (2017). Water use for washing (14.2 L/kg) was obtained from Hoque E, Faysal GM (2019). Energy use per kg dyed material was obtained from batch processes industry average (Thinkstep, 2017) using direct and reactive dyes and considering 65% reduction thanks to foaming technology (Hasanbeigi & Price, 2015). It is assumed that water contained in liquor is lost due to evaporation and water used for washing ends up in wastewater treatment process. Life expectancy of dyeing machine is assumed to be 25 years (UNFCCC, 2012) with an average production capacity of 2500 meters/day (Inspire, 2016) in a 2.3 tons machine (GEMATA, 2021), assuming a fabric weight of 300 g/m. Land use from factory building was calculated based on (EUREKA, 2021) from a total area of 325 thousand square meters, divided into five sub-productive areas: knitting, dyeing, printing, and home textiles. The respective area (1/5) of total area (65,000 m2) is divided by the total production capacity of the building in 60 years (assumed life span of the building), with a daily production of 125 ton of dyeing (EUREKA, 2021).

## Technology and included processes
Foam technology is a low add-on technology used as a driving tool to apply various chemicals (dye, finishing agent, etc.) on textile substrates). Foam technology can be applied to yarn, knit or woven fabric. In this technology, air is used to carry the chemicals to the fiber instead of water. The low moisture content results in faster drying and lower energy requirements. It has been claimed that foam technology can lead up to 80% reduction in water consumption and up to 65% reduction in energy consumption as compared to the conventional padding processes. During dyeing, the foam is formed and constantly collapse as the bubble break and transfer the dye liquor to the substrate. Fixation and washing processes are conducted in practically the same way as in traditional dyeing process. To use with: cotton, viscose

## Parameters
- kg_0: 0.03
  Mass in kg, for sodium chloride powder // sodium chloride powder production // eu+efta+uk; Articulated lorry transport, Euro 4, Total weight >32 t; EU+EFTA+UK
- km_0: 1000
  Distance in km, for sodium chloride powder // sodium chloride powder production // eu+efta+uk; Articulated lorry transport, Euro 4, Total weight >32 t; EU+EFTA+UK
- kg_km_0: 30; = kg_0*km_0
  Transport amount in km*km, for sodium chloride powder // sodium chloride powder production // eu+efta+uk; Articulated lorry transport, Euro 4, Total weight >32 t; EU+EFTA+UK
- kg_1: 0.005
  Mass in kg, for soda ash // soda ash production // glo; Articulated lorry transport, Euro 4, Total weight >32 t; EU+EFTA+UK
- km_1: 1000
  Distance in km, for soda ash // soda ash production // glo; Articulated lorry transport, Euro 4, Total weight >32 t; EU+EFTA+UK
- kg_km_1: 5; = kg_1*km_1
  Transport amount in km*km, for soda ash // soda ash production // glo; Articulated lorry transport, Euro 4, Total weight >32 t; EU+EFTA+UK
- kg_2: 0.01
  Mass in kg, for surfactant // surfactant production // glo; Articulated lorry transport, Euro 4, Total weight >32 t; EU+EFTA+UK
- km_2: 1000
  Distance in km, for surfactant // surfactant production // glo; Articulated lorry transport, Euro 4, Total weight >32 t; EU+EFTA+UK
- kg_km_2: 10; = kg_2*km_2
  Transport amount in km*km, for surfactant // surfactant production // glo; Articulated lorry transport, Euro 4, Total weight >32 t; EU+EFTA+UK
- kg_3: 0.03
  Mass in kg, for sodium chloride powder // sodium chloride powder production // eu+efta+uk; Transoceanic ship, containers; GLO
- km_3: 18000
  Distance in km, for sodium chloride powder // sodium chloride powder production // eu+efta+uk; Transoceanic ship, containers; GLO
- kg_km_3: 540; = kg_3*km_3
  Transport amount in km*km, for sodium chloride powder // sodium chloride powder production // eu+efta+uk; Transoceanic ship, containers; GLO
- kg_4: 0.005
  Mass in kg, for soda ash // soda ash production // glo; Transoceanic ship, containers; GLO
- km_4: 18000
  Distance in km, for soda ash // soda ash production // glo; Transoceanic ship, containers; GLO
- kg_km_4: 90; = kg_4*km_4
  Transport amount in km*km, for soda ash // soda ash production // glo; Transoceanic ship, containers; GLO
- kg_5: 0.01
  Mass in kg, for surfactant // surfactant production // glo; Transoceanic ship, containers; GLO
- km_5: 18000
  Distance in km, for surfactant // surfactant production // glo; Transoceanic ship, containers; GLO
- kg_km_5: 180; = kg_5*km_5
  Transport amount in km*km, for surfactant // surfactant production // glo; Transoceanic ship, containers; GLO

## Reference product
- dyeing, foam // dyeing, foam // glo: 1

## Inputs
- Electricity from Electricity grid mix 1kV-60kV - AU: 0.0047
- Electricity from Electricity grid mix 1kV-60kV - EU+EFTA+UK: 0.0685
- Electricity from Electricity grid mix 1kV-60kV - NZ: 0.0009
- Electricity from Electricity grid mix 1kV-60kV - RAF: 0.015
- Electricity from Electricity grid mix 1kV-60kV - RNA: 0.1003
- Electricity from Electricity grid mix 1kV-60kV - RSA: 0.034
- Electricity from Electricity grid mix 1kV-60kV - RU: 0.0201
- Thermal energy (MJ) from Thermal energy from LPG - ROW: 0.402941
- Thermal energy (MJ) from Thermal energy from natural gas - ROW: 2.25
- Transport of sodium chloride powder // sodium chloride powder production // eu+efta+uk by Articulated lorry transport, Euro 4, Total weight >32 t - EU+EFTA+UK: 30; = kg_km_0
- Transport of soda ash // soda ash production // glo by Articulated lorry transport, Euro 4, Total weight >32 t - EU+EFTA+UK: 5; = kg_km_1
- Transport of surfactant // surfactant production // glo by Articulated lorry transport, Euro 4, Total weight >32 t - EU+EFTA+UK: 10; = kg_km_2
- Transport of sodium chloride powder // sodium chloride powder production // eu+efta+uk by Transoceanic ship, containers - GLO: 540; = kg_km_3
- Transport of soda ash // soda ash production // glo by Transoceanic ship, containers - GLO: 90; = kg_km_4
- Transport of surfactant // surfactant production // glo by Transoceanic ship, containers - GLO: 180; = kg_km_5
- Electricity from Electricity grid mix 1kV-60kV - CN: 0.102785
- Electricity from Electricity grid mix 1kV-60kV - RAS w/o CN: 0.112615
- dyeing, foam // dyeing, foam // glo, blackbox: 1
- dyeing, foam // dyeing, foam // glo, elementary: 1

## Impact indicators
- Eutrophication marine: 0.000805343
- Ecotoxicity, freshwater: 5.22419
- Land use: 2.61751
- Water use: 0.584327
- Resource use, minerals and metals: 1.07752e-6
- Resource use, fossils: 11.8573
- Climate change: 0.770294
- Ozone depletion: 3.43043e-9
- Human toxicity, cancer: 7.93417e-10
- Human toxicity, non-cancer: 4.8664e-9
- EF-particulate Matter: 5.03072e-8
- Ionising radiation, human health: 0.158528
- Photochemical ozone formation - human health: 0.00184504
- Acidification: 0.00285767
- Eutrophication, terrestrial: 0.00675506
- Eutrophication, freshwater: 3.006e-5

## Deviations from the LCI method principle
The background data uses:
- the \xe2\x80\x9cRecycled content cut-off\xe2\x80\x9d approach to allocate end-of-life by-products and secondary materials. This allocation is explained in the description of the recycled content system model (http://www.ecoinvent.org/database/system-models-in-ecoinvent-3/cut-off-system-model/allocation-cut-off-by-classification.html).
OR
- EF compliant data

## Deviations from the LCI method approaches
Background data:
- the \xe2\x80\x9cRecycled content cut-off\xe2\x80\x9d approach to allocate end-of-life by-products and secondary materials. This allocation is explained in the description of the recycled content system model (http://www.ecoinvent.org/database/system-models-in-ecoinvent-3/cut-off-system-model/allocation-cut-off-by-classification.html). The ecoinvent database mostly relies on “Allocation – market values” apart for few exceptions particularly in the energy sector. ecoinvent energy data is replaced with EF3.0 core data as per the EF guidelines version 2.0.
OR
- EF compliant data

## Modelling constants
All modelling constants follow the requirements listed in the Tender Specifications 070201/2020/SER/ENV.B1. Completeness: There are no intentional cut-offs in the inventory no matter how small their contribution to all the EF impact categories is. Eventual cut-offs are in compliance with the Guide for EF compliant data sets (JRC 2020), i.e. only if below the 3% cut-off rule. Water use: water use is modelled at country level using separate flows for water withdrawal, water release and water evaporation. Handling multi-functional processes: the following PEF multi- functionality decision hierarchy is applied for resolving all multi- functionality problems: (1) subdivision or system expansion; (2) allocation based on a relevant underlying physical relationship (substitution may apply here); (3) allocation based on some other relationship. Direct land use change: GHG emissions from direct LUC allocated to good/service for 20 years after the LUC occurs, with IPCC default values. Carbon storage and delayed emissions: credits associated with temporary (carbon) storage or delayed emissions up to 300 years are not be considered. Emissions off-setting: are not included. Capital goods (including infrastructures) and their End of life: they are included. System boundaries: system boundaries include all processes linked to the product supply chain (e.g. maintenance). Time period: emissions and removals are modelled as if released or removed at the beginning of the assessment method. Fossil and biogenic carbon emissions and removals: removals and emissions are modelled as follows: All GHG emissions from fossil fuels (including peat and limestone) are modelled consistently with the most updated ILCD list of elementary flows. The non-fossil (biogenic) carbon flows are modelled consistently with the most updated ILCD list of elementary flows.

## Cut-off and completeness
There are no intentional cut-offs in the inventory no matter how small their contribution to all the EF impact categories is. Eventual cut-offs are in compliance with the Guide for EF compliant data sets (JRC 2020), i.e. only if below the 3% cut-off rule. The dataset dry mass and water balance has been checked to ensure the inventory is complete. Capital goods (e.g. infrastructure) and their end-of-life are included.

## Data selection and combination
These datasets include, in both their foreground and background data, links to EF3.0 compliant data.
The relevant background data on energy, transport, and End of Life are from the LCDN data node (http://lcdn.thinkstep.com/Node/).
All other background data in the supply of this product for which no EF3.0 process was available are from ecoinvent v3.7 database (www.ecoinvent.org) or other data sources.

## Data treatment and extrapolations
Several data sources have been used to model the inventory.

## Review details
Internal reviews have been asked to review the plausibility of the unit process, LCIA scores, and DQRs. Internal reviewers have also been asked to review the data for EF compliancy. The consortium is therefore responsible for aspects such as compliancy with the ILCD format, including validation in Look@LCI, and nomenclature.
Internal reviwers have been asked to judge based on the process name, that the unit process models in a complete and representative way the process in the requested location. The review encompassed the plausability of:
- exchanges with nature (elementary flows) as well as exchanges such as product and waste flows.
- meta information (general comment, technology comment, system boundaries, allocation, cut-off rules, etc.). Reviewers were asked to judge if the provided information is enough to understand the content of the process.
- LCIA scores
- DQRs including precision, technology, time and geography. As well as the overall DQR.
External reviewers have been asked to provide their expertise in the field of interest. External reviewers have been asked to review the unit process, including eventual methodological choices, the LCIA scores (provided with contribution scores as well), and DQRs. External reviewers have been provided all the information in a tool developed by the consortium for the purpose of this project.
External reviewers have been asked to judge based on the process name, that the unit process models in a complete and representative way the process in the requested location. The review encompassed:
- Plausability and completeness of exchanges with nature (elementary flows) as well as exchanges such as product and waste flows.
- Review of meta information (general comment, technology comment, system boundaries, allocation, cut-off rules, etc.). Reviewers were asked to judge if the provided information is enough to understand the content of the process.
- Review of properties (biogenic carbon and water content).
- Review of allocation keys.
- Plausability of LCIA scores calculated by the consortium.
- Plausability of DQRs including precision, technology, time and geography. As well as the overall DQR.

## Data sources
- Background Data for Representative products and organisations. EF 3.0 compliant (data stock)
- Mohsin M, Sardar S (2019) Multi-criteria decision analysis for textile pad-dyeing and foam-dyeing based on cost, performance, productivity and sustainability. Cellulose volume 26, 4143–4157 https://doi.org/10.1007/s10570-019-02337-9
- Roy Choudhury AK (2017) Principles of Textile Finishing. Elsevier Science. Woodhead Publishing. ISBN 9780081006610
- Hoque E, Faysal GM (2019) Study on Waterless Chemical Effect on Indigo Rope Dyeing. International Journal of Scientific & Engineering Research Volume 10, Issue 10, October-2019 ISSN 2229-5518
- thinkstep AG. 2017. LCA Update of Cotton Fiber and Fabric Life Cycle Inventory.
- Hasanbeigi, A., Price, L., 2015. A technical review of emerging technologies for energy and water efficiency and pollution reduction in the textile industry. J. Clean. Prod. 95, 30e44.
- UNFCCC (2012) COMPONENT PROJECT ACTIVITIES DESIGN DOCUMENT (CPA-DD). Accessed online August 8th 2021: http://gec.jp/gec/jp/Activities/cdm-fs/2012/2012_cdmfs01_jPear_bangladesh_cpa-dd.pdf
- Inspire (2016) BEE’s National Program on Energy Efficiency and Technology Up-gradation in SMEs Pali Textile Cluster. Accesde online August 8th 2021: https://beeindia.gov.in/sites/default/files/Vijay%20Anand_Final_050516.pdf
- GEMATA (2021) DeepColor - Technical features. Accessed online August 8th 2021: https://www.gemata.it/a_ENG_285_3.html
- EUREKA (2021) Production activities in line with the “green factory” approach in the textile sector. Accessed online August 8th 2021: https://eureka-eurogia-green.eu/offering_expertise/production-activities-in-line-with-the-green-factory-approach-in-the-textile-sector-13-04-2021/

## Intended applications
Implementation of regular Product Environmental Footprint (PEF) studies and Organisation Environmental Footprint (OEF) studies exclusively under the specified Product groups and sectors as defined in the Product Environmental Footprint Category Rules (PEFCR) and Organisation Environmental Footprint Sectorial Rules (OEFSR) listed in http://ec.europa.eu/environment/eussd/smgp/PEFCR_OEFSR.htm
