# containerboard production, fluting medium, recycled; technology mix; production mix, at plant; 1000 kg

Dataset: ILCD process, Partly terminated system
Geography: EU+EFTA+UK
Reference year: 2018
Valid until: 2024
Classification: Materials production / Paper and cardboards
LCI method principle: Attributional
LCI method approaches: Allocation - market value
Completeness: All relevant flows quantified
Project: Provision of process-based 3.0 Environmental Footprint-compliant life cycle inventory datasets - Renewable materials - contract number 070201/2020/840085/SER/ENV.B.1
Generated by: FEFCO
Owner: FEFCO
Compliance: ILCD Data Network - Entry-level; Suggestions for updating the PEF method 2019; ISO 14040 Environmental Management – Life Cycle Assessment – Principles and Framework, 2006; ISO 14044:2006. Environmental Management – Life Cycle Assessment – Requirements and guidelines.; Environmental Footprint 3.1
Review: Dependent internal review by Emilia Moreno Ruiz, Katarzyna Cenian; Independent review panel by Laura Batlle Bayer
Data quality: Overall quality: Very good; Time representativeness: Good; Geographical representativeness: Good; Technological representativeness: Very good; Precision: Very good; Methodological appropriateness and consistency: Not applicable
Amounts: no units in this file; such an amount is in the reference unit of its flow, which a separate flow dataset defines
copyright: true
licenseType: Free of charge for some user types or use types
accessRestrictions: Free of charge for all final users implementing a regular Product Environmental Footprint (PEF) studies and Organisation Environmental Footprint (OEF) studies exclusively under the specified Product groups and sectors as defined in the Product Environmental Footprint Category Rules (PEFCR) and Organisation Environmental Footprint Sectorial Rules (OEFSR) listed in http://ec.europa.eu/environment/eussd/smgp/PEFCR_OEFSR.htm and in accordance with the terms and conditions of the EULA (available at https://ecoinvent.lca-data.com/) exclusively until 31st December 2024. Any use of this dataset or any derivative data not within the specific context of one of the PEF/OEF projects or after the end of 2024 is not permitted.

## General comment
Notice: this data set supersedes the EF3.0-compliant version (see link under "preceding data set version" below calculated with the EF3.0). The life cycle inventory is not changed from the original EF3.0 data set. The LCIA results are calculated based on the EF3.1 methods which provide updated characterisation factors in the following impact categories: Climate Change, Ecotoxicity freshwater, Photochemical Ozone Formation, Acidification, Human Toxicity non-cancer, and Human Toxicity cancer. The review report and the data quality ratings refer to the original results. The data set has been updated by the European Commission on the basis of the original EF3.0 data set delivered by the data provider.The activity describes the production of Wellenstoff
Wellenstoff is a grade of corrugated base paper, which forms the corrugated middle layer in the production of corrugated board, where it is covered between two outer layers of linerboard (e.g., kraftliner or testliner). “Wellenstoff” or “recycled medium” is made from recycled material, i.e., uses recovered paper as raw material as opposed to “semichemical fluting”, which is used interchangeably with wellenstoff but is made from virgin material.
The process starts with the reception of the recovered paper.
The process ends with the production of corrugated board base paper.

The data is based on the report “European Database for Corrugated Board Life Cycle Studies, 2018” issued by FEFCO (European Federation of Corrugated Board Manufacturers) and CCB (Cepi ContainerBoard). In the study, data for the production of Testliner and Recycled Fluting were collected from mills, together producing about 58% (14,395,000 tonnes) of the total annual production of corrugated base papers from recovered paper in Europe (EU-27 countries plus Norway and Switzerland). They were provided by paper mills in Austria, Czech Republic, France, Germany, Hungary, Italy, the Netherlands, Poland, Spain, Sweden and the United Kingdom.
Reference: CCB & FEFCO. 2018. European Database for Corrugated Board Life Cycle Studies. Accessible online at < https://www.fefco.org/download/file/fid/2626 >

## Technology and included processes
The stock preparation is done in accordance with a recipe for each paper grade and grammage. The grades of recovered paper are put on the conveyor to the pulper in the ratio mentioned in the recipe. In the pulper the blend of dry, baled paper is converted into a pumpable suspension of fibres. This is achieved by submerging the bales in water and agitating the mixture so that the paper is wetted and broken up to form a suspension. The pulp is then screened and cleaned and may undergo a disperging treatment.
The stock passes through one or two head boxes onto the paper machine, Wellenstoff can be a one ply or two ply product. Usually, a size press treatment with a starch solution is applied in-line on the paper machine in order to obtain sufficient strength and stiffness properties.

Sold electricity is not reported as a sold product and the associated input and output data are not included in the inventory. The fuel consumption and emissions to air associated with the total heat production and the net electricity used on site were allocated to the paper production.

Apart from external fuel inputs, internal fuels such as biogas and sludge are generated during the process and supply process energy. Internal fuels are represented by the calculated emissions but do not have the corresponding fuel input from Technosphere, because they are supplied from within the system boundaries. The amount of internal fuels used in the process are: Biogas (0.18 GJ/t), Refuse Derived Fuel, biomass (0.01 GJ/t), Refuse Derived Fuel, fossil (0.06 GJ/t), and sludge (0.02
The following air emissions were reported in the study (FEFCO, 2018): Dust, CO2 (fossil and biogenic), CO, NOx, and SOx. The listed emissions include emissions from external and internal fuels at the production site.
For a more complete air emission profile, additional air emissions (beyond the ones listed above) were added for the combustion of the external and internal fuels using ecoinvent LCI datasets for combustion of different fuels as proxy. Proxies for the air emissions were calculated based on: Heavy fuel oil: "heat production, heavy fuel oil, at industrial furnace 1MW” Light fuel oil and diesel: "heat production, light fuel oil, at industrial furnace 1MW” Natural gas: "heat production, natural gas, at industrial furnace >100kW”, lignite: "heat production, lignite briquette, at stove 5-15kW” Biofuels, wood and bark: "heat production, wood chips from industry, at furnace 1000kW”, coal: “heat production, at hard coal industrial furnace 1-10MW, Europe without Switzerland”, refused derived fuel, biomass: heat production, wood chips from post-consumer wood, at furnace 300kW
Emissions of stemming from biogas were approximated with the combustion of natural gas, whereby CO2, CO and CH4 emissions stemming from biogas were modelled as non-fossil.

No proxy was available for the combustion of Refuse Derived Fuel, fossil and sludge. Emissions from this internal energy generation process are therefore only reflected in the key emission factors provided by the industry.

Amount of infrastructure taken from dataset “de Beaufort, A., containerboard production, fluting medium, recycled, RER, Undefined, ecoinvent database version 3.7.1.”

the following chemicals were excluded from the inventory: Alum, biocides, colorants, carbon dioxide, defoamer, ammonia, pitch despergents, polymer and retention agents, Sizing agents, Ligno sulphonate, and Lubricants.The listed chemicals are not defined as mandatory in the PEFCR for intermediate paper products and have a total mass of below 1% of the paper weight. Further packaging materials (pallet and PE) were excluded.
The production of paper based fully or partly on paper for recycling takes place in integrated processes for almost all cases. The share of recycled pulp in non-integrated mills (so recycled pulp produced dried and transported to a paper mill for making recycled paper) is around 3%. In the INTERMEDIATE PAPER PRODUCT PEFCR (2018) it is set that: "The PEF profile shall be calculated and reported using A equal to 1.". This dataset is therefore modelled as such.

## Parameters
- kg_0: 0.106522
  Mass in kg, for bleached kraft pulp, hardwood // bleached kraft pulp, hardwood // eu+efta+uk; Freight train, average; EU+EFTA+UK
- km_0: 241.265
  Distance in km, for bleached kraft pulp, hardwood // bleached kraft pulp, hardwood // eu+efta+uk; Freight train, average; EU+EFTA+UK
- kg_km_0: 25.7; = kg_0*km_0
  Transport amount in km*km, for bleached kraft pulp, hardwood // bleached kraft pulp, hardwood // eu+efta+uk; Freight train, average; EU+EFTA+UK
- kg_1: 0.106522
  Mass in kg, for bleached kraft pulp, hardwood // bleached kraft pulp, hardwood // eu+efta+uk; Barge; EU+EFTA+UK
- km_1: 271.306
  Distance in km, for bleached kraft pulp, hardwood // bleached kraft pulp, hardwood // eu+efta+uk; Barge; EU+EFTA+UK
- kg_km_1: 28.9; = kg_1*km_1
  Transport amount in km*km, for bleached kraft pulp, hardwood // bleached kraft pulp, hardwood // eu+efta+uk; Barge; EU+EFTA+UK
- kg_2: 0.106522
  Mass in kg, for bleached kraft pulp, hardwood // bleached kraft pulp, hardwood // eu+efta+uk; Articulated lorry transport, Euro 4, Total weight >32 t; EU+EFTA+UK
- km_2: 130.49
  Distance in km, for bleached kraft pulp, hardwood // bleached kraft pulp, hardwood // eu+efta+uk; Articulated lorry transport, Euro 4, Total weight >32 t; EU+EFTA+UK
- kg_km_2: 13.9; = kg_2*km_2
  Transport amount in km*km, for bleached kraft pulp, hardwood // bleached kraft pulp, hardwood // eu+efta+uk; Articulated lorry transport, Euro 4, Total weight >32 t; EU+EFTA+UK
- kg_3: 0.593478
  Mass in kg, for bleached kraft pulp, softwood // bleached kraft pulp, softwood // eu+efta+uk; Freight train, average; EU+EFTA+UK
- km_3: 239.267
  Distance in km, for bleached kraft pulp, softwood // bleached kraft pulp, softwood // eu+efta+uk; Freight train, average; EU+EFTA+UK
- kg_km_3: 142; = kg_3*km_3
  Transport amount in km*km, for bleached kraft pulp, softwood // bleached kraft pulp, softwood // eu+efta+uk; Freight train, average; EU+EFTA+UK
- kg_4: 0.593478
  Mass in kg, for bleached kraft pulp, softwood // bleached kraft pulp, softwood // eu+efta+uk; Barge; EU+EFTA+UK
- km_4: 269.597
  Distance in km, for bleached kraft pulp, softwood // bleached kraft pulp, softwood // eu+efta+uk; Barge; EU+EFTA+UK
- kg_km_4: 160; = kg_4*km_4
  Transport amount in km*km, for bleached kraft pulp, softwood // bleached kraft pulp, softwood // eu+efta+uk; Barge; EU+EFTA+UK
- kg_5: 0.593478
  Mass in kg, for bleached kraft pulp, softwood // bleached kraft pulp, softwood // eu+efta+uk; Articulated lorry transport, Euro 4, Total weight >32 t; EU+EFTA+UK
- km_5: 129.912
  Distance in km, for bleached kraft pulp, softwood // bleached kraft pulp, softwood // eu+efta+uk; Articulated lorry transport, Euro 4, Total weight >32 t; EU+EFTA+UK
- kg_km_5: 77.1; = kg_5*km_5
  Transport amount in km*km, for bleached kraft pulp, softwood // bleached kraft pulp, softwood // eu+efta+uk; Articulated lorry transport, Euro 4, Total weight >32 t; EU+EFTA+UK
- kg_6: 1.25
  Mass in kg, for chemi-thermomechanical pulp // chemi-thermomechanical pulp // eu+efta+uk; Freight train, average; EU+EFTA+UK
- km_6: 240
  Distance in km, for chemi-thermomechanical pulp // chemi-thermomechanical pulp // eu+efta+uk; Freight train, average; EU+EFTA+UK
- kg_km_6: 300; = kg_6*km_6
  Transport amount in km*km, for chemi-thermomechanical pulp // chemi-thermomechanical pulp // eu+efta+uk; Freight train, average; EU+EFTA+UK
- kg_7: 1.25
  Mass in kg, for chemi-thermomechanical pulp // chemi-thermomechanical pulp // eu+efta+uk; Barge; EU+EFTA+UK
- km_7: 270.4
  Distance in km, for chemi-thermomechanical pulp // chemi-thermomechanical pulp // eu+efta+uk; Barge; EU+EFTA+UK
- kg_km_7: 338; = kg_7*km_7
  Transport amount in km*km, for chemi-thermomechanical pulp // chemi-thermomechanical pulp // eu+efta+uk; Barge; EU+EFTA+UK
- kg_8: 1.25
  Mass in kg, for chemi-thermomechanical pulp // chemi-thermomechanical pulp // eu+efta+uk; Articulated lorry transport, Euro 4, Total weight >32 t; EU+EFTA+UK
- km_8: 130.4
  Distance in km, for chemi-thermomechanical pulp // chemi-thermomechanical pulp // eu+efta+uk; Articulated lorry transport, Euro 4, Total weight >32 t; EU+EFTA+UK
- kg_km_8: 163; = kg_8*km_8
  Transport amount in km*km, for chemi-thermomechanical pulp // chemi-thermomechanical pulp // eu+efta+uk; Articulated lorry transport, Euro 4, Total weight >32 t; EU+EFTA+UK
- kg_9: 12.5
  Mass in kg, for wood chips, hardwood // wood chips, hardwood // eu+efta+uk; Freight train, average; EU+EFTA+UK
- km_9: 240
  Distance in km, for wood chips, hardwood // wood chips, hardwood // eu+efta+uk; Freight train, average; EU+EFTA+UK
- kg_km_9: 3000; = kg_9*km_9
  Transport amount in km*km, for wood chips, hardwood // wood chips, hardwood // eu+efta+uk; Freight train, average; EU+EFTA+UK
- kg_10: 12.5
  Mass in kg, for wood chips, hardwood // wood chips, hardwood // eu+efta+uk; Barge; EU+EFTA+UK
- km_10: 270.4
  Distance in km, for wood chips, hardwood // wood chips, hardwood // eu+efta+uk; Barge; EU+EFTA+UK
- kg_km_10: 3380; = kg_10*km_10
  Transport amount in km*km, for wood chips, hardwood // wood chips, hardwood // eu+efta+uk; Barge; EU+EFTA+UK
- kg_11: 12.5
  Mass in kg, for wood chips, hardwood // wood chips, hardwood // eu+efta+uk; Articulated lorry transport, Euro 4, Total weight >32 t; EU+EFTA+UK
- km_11: 130.4
  Distance in km, for wood chips, hardwood // wood chips, hardwood // eu+efta+uk; Articulated lorry transport, Euro 4, Total weight >32 t; EU+EFTA+UK
- kg_km_11: 1630; = kg_11*km_11
  Transport amount in km*km, for wood chips, hardwood // wood chips, hardwood // eu+efta+uk; Articulated lorry transport, Euro 4, Total weight >32 t; EU+EFTA+UK
- kg_12: 12.5
  Mass in kg, for wood chips, softwood // wood chips, softwood // eu+efta+uk; Freight train, average; EU+EFTA+UK
- km_12: 240
  Distance in km, for wood chips, softwood // wood chips, softwood // eu+efta+uk; Freight train, average; EU+EFTA+UK
- kg_km_12: 3000; = kg_12*km_12
  Transport amount in km*km, for wood chips, softwood // wood chips, softwood // eu+efta+uk; Freight train, average; EU+EFTA+UK
- kg_13: 12.5
  Mass in kg, for wood chips, softwood // wood chips, softwood // eu+efta+uk; Barge; EU+EFTA+UK
- km_13: 270.4
  Distance in km, for wood chips, softwood // wood chips, softwood // eu+efta+uk; Barge; EU+EFTA+UK
- kg_km_13: 3380; = kg_13*km_13
  Transport amount in km*km, for wood chips, softwood // wood chips, softwood // eu+efta+uk; Barge; EU+EFTA+UK
- kg_14: 12.5
  Mass in kg, for wood chips, softwood // wood chips, softwood // eu+efta+uk; Articulated lorry transport, Euro 4, Total weight >32 t; EU+EFTA+UK
- km_14: 130.4
  Distance in km, for wood chips, softwood // wood chips, softwood // eu+efta+uk; Articulated lorry transport, Euro 4, Total weight >32 t; EU+EFTA+UK
- kg_km_14: 1630; = kg_14*km_14
  Transport amount in km*km, for wood chips, softwood // wood chips, softwood // eu+efta+uk; Articulated lorry transport, Euro 4, Total weight >32 t; EU+EFTA+UK
- kg_15: 0.0140187
  Mass in kg, for diesel // diesel mix at refinery // eu+efta+uk; Freight train, average; EU+EFTA+UK
- km_15: 239.68
  Distance in km, for diesel // diesel mix at refinery // eu+efta+uk; Freight train, average; EU+EFTA+UK
- kg_km_15: 3.36; = kg_15*km_15
  Transport amount in km*km, for diesel // diesel mix at refinery // eu+efta+uk; Freight train, average; EU+EFTA+UK
- kg_16: 0.0140187
  Mass in kg, for diesel // diesel mix at refinery // eu+efta+uk; Barge; EU+EFTA+UK
- km_16: 269.64
  Distance in km, for diesel // diesel mix at refinery // eu+efta+uk; Barge; EU+EFTA+UK
- kg_km_16: 3.78; = kg_16*km_16
  Transport amount in km*km, for diesel // diesel mix at refinery // eu+efta+uk; Barge; EU+EFTA+UK
- kg_17: 0.0140187
  Mass in kg, for diesel // diesel mix at refinery // eu+efta+uk; Articulated lorry transport, Euro 4, Total weight >32 t; EU+EFTA+UK
- km_17: 129.827
  Distance in km, for diesel // diesel mix at refinery // eu+efta+uk; Articulated lorry transport, Euro 4, Total weight >32 t; EU+EFTA+UK
- kg_km_17: 1.82; = kg_17*km_17
  Transport amount in km*km, for diesel // diesel mix at refinery // eu+efta+uk; Articulated lorry transport, Euro 4, Total weight >32 t; EU+EFTA+UK
- kg_18: 16.3986
  Mass in kg, for hard coal, at consumer eu+efta // hard coal mix // eu+efta+uk; Freight train, average; EU+EFTA+UK
- km_18: 240.264
  Distance in km, for hard coal, at consumer eu+efta // hard coal mix // eu+efta+uk; Freight train, average; EU+EFTA+UK
- kg_km_18: 3940; = kg_18*km_18
  Transport amount in km*km, for hard coal, at consumer eu+efta // hard coal mix // eu+efta+uk; Freight train, average; EU+EFTA+UK
- kg_19: 16.3986
  Mass in kg, for hard coal, at consumer eu+efta // hard coal mix // eu+efta+uk; Barge; EU+EFTA+UK
- km_19: 270.145
  Distance in km, for hard coal, at consumer eu+efta // hard coal mix // eu+efta+uk; Barge; EU+EFTA+UK
- kg_km_19: 4430; = kg_19*km_19
  Transport amount in km*km, for hard coal, at consumer eu+efta // hard coal mix // eu+efta+uk; Barge; EU+EFTA+UK
- kg_20: 16.3986
  Mass in kg, for hard coal, at consumer eu+efta // hard coal mix // eu+efta+uk; Articulated lorry transport, Euro 4, Total weight >32 t; EU+EFTA+UK
- km_20: 129.889
  Distance in km, for hard coal, at consumer eu+efta // hard coal mix // eu+efta+uk; Articulated lorry transport, Euro 4, Total weight >32 t; EU+EFTA+UK
- kg_km_20: 2130; = kg_20*km_20
  Transport amount in km*km, for hard coal, at consumer eu+efta // hard coal mix // eu+efta+uk; Articulated lorry transport, Euro 4, Total weight >32 t; EU+EFTA+UK
- kg_21: 0.0291262
  Mass in kg, for heavy fuel oil (1.0 wt.% s) // heavy fuel oil at refinery // eu+efta+uk; Freight train, average; EU+EFTA+UK
- km_21: 239.647
  Distance in km, for heavy fuel oil (1.0 wt.% s) // heavy fuel oil at refinery // eu+efta+uk; Freight train, average; EU+EFTA+UK
- kg_km_21: 6.98; = kg_21*km_21
  Transport amount in km*km, for heavy fuel oil (1.0 wt.% s) // heavy fuel oil at refinery // eu+efta+uk; Freight train, average; EU+EFTA+UK
- kg_22: 0.0291262
  Mass in kg, for heavy fuel oil (1.0 wt.% s) // heavy fuel oil at refinery // eu+efta+uk; Barge; EU+EFTA+UK
- km_22: 269.86
  Distance in km, for heavy fuel oil (1.0 wt.% s) // heavy fuel oil at refinery // eu+efta+uk; Barge; EU+EFTA+UK
- kg_km_22: 7.86; = kg_22*km_22
  Transport amount in km*km, for heavy fuel oil (1.0 wt.% s) // heavy fuel oil at refinery // eu+efta+uk; Barge; EU+EFTA+UK
- kg_23: 0.0291262
  Mass in kg, for heavy fuel oil (1.0 wt.% s) // heavy fuel oil at refinery // eu+efta+uk; Articulated lorry transport, Euro 4, Total weight >32 t; EU+EFTA+UK
- km_23: 129.78
  Distance in km, for heavy fuel oil (1.0 wt.% s) // heavy fuel oil at refinery // eu+efta+uk; Articulated lorry transport, Euro 4, Total weight >32 t; EU+EFTA+UK
- kg_km_23: 3.78; = kg_23*km_23
  Transport amount in km*km, for heavy fuel oil (1.0 wt.% s) // heavy fuel oil at refinery // eu+efta+uk; Articulated lorry transport, Euro 4, Total weight >32 t; EU+EFTA+UK
- kg_24: 0.0127
  Mass in kg, for hydrogen peroxide, 100% // hydrogen peroxide, 100% production // eu+efta+uk; Freight train, average; EU+EFTA+UK
- km_24: 240.157
  Distance in km, for hydrogen peroxide, 100% // hydrogen peroxide, 100% production // eu+efta+uk; Freight train, average; EU+EFTA+UK
- kg_km_24: 3.05; = kg_24*km_24
  Transport amount in km*km, for hydrogen peroxide, 100% // hydrogen peroxide, 100% production // eu+efta+uk; Freight train, average; EU+EFTA+UK
- kg_25: 0.0127
  Mass in kg, for hydrogen peroxide, 100% // hydrogen peroxide, 100% production // eu+efta+uk; Barge; EU+EFTA+UK
- km_25: 270.079
  Distance in km, for hydrogen peroxide, 100% // hydrogen peroxide, 100% production // eu+efta+uk; Barge; EU+EFTA+UK
- kg_km_25: 3.43; = kg_25*km_25
  Transport amount in km*km, for hydrogen peroxide, 100% // hydrogen peroxide, 100% production // eu+efta+uk; Barge; EU+EFTA+UK
- kg_26: 0.0127
  Mass in kg, for hydrogen peroxide, 100% // hydrogen peroxide, 100% production // eu+efta+uk; Articulated lorry transport, Euro 4, Total weight >32 t; EU+EFTA+UK
- km_26: 129.921
  Distance in km, for hydrogen peroxide, 100% // hydrogen peroxide, 100% production // eu+efta+uk; Articulated lorry transport, Euro 4, Total weight >32 t; EU+EFTA+UK
- kg_km_26: 1.65; = kg_26*km_26
  Transport amount in km*km, for hydrogen peroxide, 100% // hydrogen peroxide, 100% production // eu+efta+uk; Articulated lorry transport, Euro 4, Total weight >32 t; EU+EFTA+UK
- kg_27: 1.72
  Mass in kg, for kaolin // kaolin production // eu+efta+uk; Freight train, average; EU+EFTA+UK
- km_27: 240.116
  Distance in km, for kaolin // kaolin production // eu+efta+uk; Freight train, average; EU+EFTA+UK
- kg_km_27: 413; = kg_27*km_27
  Transport amount in km*km, for kaolin // kaolin production // eu+efta+uk; Freight train, average; EU+EFTA+UK
- kg_28: 1.72
  Mass in kg, for kaolin // kaolin production // eu+efta+uk; Barge; EU+EFTA+UK
- km_28: 269.767
  Distance in km, for kaolin // kaolin production // eu+efta+uk; Barge; EU+EFTA+UK
- kg_km_28: 464; = kg_28*km_28
  Transport amount in km*km, for kaolin // kaolin production // eu+efta+uk; Barge; EU+EFTA+UK
- kg_29: 1.72
  Mass in kg, for kaolin // kaolin production // eu+efta+uk; Articulated lorry transport, Euro 4, Total weight >32 t; EU+EFTA+UK
- km_29: 130.233
  Distance in km, for kaolin // kaolin production // eu+efta+uk; Articulated lorry transport, Euro 4, Total weight >32 t; EU+EFTA+UK
- kg_km_29: 224; = kg_29*km_29
  Transport amount in km*km, for kaolin // kaolin production // eu+efta+uk; Articulated lorry transport, Euro 4, Total weight >32 t; EU+EFTA+UK
- kg_30: 0.178404
  Mass in kg, for light fuel oil // light fuel oil at refinery // eu+efta+uk; Freight train, average; EU+EFTA+UK
- km_30: 239.345
  Distance in km, for light fuel oil // light fuel oil at refinery // eu+efta+uk; Freight train, average; EU+EFTA+UK
- kg_km_30: 42.7; = kg_30*km_30
  Transport amount in km*km, for light fuel oil // light fuel oil at refinery // eu+efta+uk; Freight train, average; EU+EFTA+UK
- kg_31: 0.178404
  Mass in kg, for light fuel oil // light fuel oil at refinery // eu+efta+uk; Barge; EU+EFTA+UK
- km_31: 269.613
  Distance in km, for light fuel oil // light fuel oil at refinery // eu+efta+uk; Barge; EU+EFTA+UK
- kg_km_31: 48.1; = kg_31*km_31
  Transport amount in km*km, for light fuel oil // light fuel oil at refinery // eu+efta+uk; Barge; EU+EFTA+UK
- kg_32: 0.178404
  Mass in kg, for light fuel oil // light fuel oil at refinery // eu+efta+uk; Articulated lorry transport, Euro 4, Total weight >32 t; EU+EFTA+UK
- km_32: 129.482
  Distance in km, for light fuel oil // light fuel oil at refinery // eu+efta+uk; Articulated lorry transport, Euro 4, Total weight >32 t; EU+EFTA+UK
- kg_km_32: 23.1; = kg_32*km_32
  Transport amount in km*km, for light fuel oil // light fuel oil at refinery // eu+efta+uk; Articulated lorry transport, Euro 4, Total weight >32 t; EU+EFTA+UK
- kg_33: 6.98039
  Mass in kg, for lignite eu+efta // lignite mix // eu+efta+uk; Freight train, average; EU+EFTA+UK
- km_33: 240.674
  Distance in km, for lignite eu+efta // lignite mix // eu+efta+uk; Freight train, average; EU+EFTA+UK
- kg_km_33: 1680; = kg_33*km_33
  Transport amount in km*km, for lignite eu+efta // lignite mix // eu+efta+uk; Freight train, average; EU+EFTA+UK
- kg_34: 6.98039
  Mass in kg, for lignite eu+efta // lignite mix // eu+efta+uk; Barge; EU+EFTA+UK
- km_34: 269.326
  Distance in km, for lignite eu+efta // lignite mix // eu+efta+uk; Barge; EU+EFTA+UK
- kg_km_34: 1880; = kg_34*km_34
  Transport amount in km*km, for lignite eu+efta // lignite mix // eu+efta+uk; Barge; EU+EFTA+UK
- kg_35: 6.98039
  Mass in kg, for lignite eu+efta // lignite mix // eu+efta+uk; Articulated lorry transport, Euro 4, Total weight >32 t; EU+EFTA+UK
- km_35: 129.935
  Distance in km, for lignite eu+efta // lignite mix // eu+efta+uk; Articulated lorry transport, Euro 4, Total weight >32 t; EU+EFTA+UK
- kg_km_35: 907; = kg_35*km_35
  Transport amount in km*km, for lignite eu+efta // lignite mix // eu+efta+uk; Articulated lorry transport, Euro 4, Total weight >32 t; EU+EFTA+UK
- kg_36: 18.6923
  Mass in kg, for maize starch, from wet milling (starch drying), at plant // glo; Freight train, average; EU+EFTA+UK
- km_36: 240.205
  Distance in km, for maize starch, from wet milling (starch drying), at plant // glo; Freight train, average; EU+EFTA+UK
- kg_km_36: 4490; = kg_36*km_36
  Transport amount in km*km, for maize starch, from wet milling (starch drying), at plant // glo; Freight train, average; EU+EFTA+UK
- kg_37: 18.6923
  Mass in kg, for maize starch, from wet milling (starch drying), at plant // glo; Barge; EU+EFTA+UK
- km_37: 270.164
  Distance in km, for maize starch, from wet milling (starch drying), at plant // glo; Barge; EU+EFTA+UK
- kg_km_37: 5050; = kg_37*km_37
  Transport amount in km*km, for maize starch, from wet milling (starch drying), at plant // glo; Barge; EU+EFTA+UK
- kg_38: 18.6923
  Mass in kg, for maize starch, from wet milling (starch drying), at plant // glo; Articulated lorry transport, Euro 4, Total weight >32 t; EU+EFTA+UK
- km_38: 130
  Distance in km, for maize starch, from wet milling (starch drying), at plant // glo; Articulated lorry transport, Euro 4, Total weight >32 t; EU+EFTA+UK
- kg_km_38: 2430; = kg_38*km_38
  Transport amount in km*km, for maize starch, from wet milling (starch drying), at plant // glo; Articulated lorry transport, Euro 4, Total weight >32 t; EU+EFTA+UK
- kg_39: 0.151033
  Mass in kg, for potato starch dried, from wet milling, at plant // rer; Freight train, average; EU+EFTA+UK
- km_39: 239.682
  Distance in km, for potato starch dried, from wet milling, at plant // rer; Freight train, average; EU+EFTA+UK
- kg_km_39: 36.2; = kg_39*km_39
  Transport amount in km*km, for potato starch dried, from wet milling, at plant // rer; Freight train, average; EU+EFTA+UK
- kg_40: 0.151033
  Mass in kg, for potato starch dried, from wet milling, at plant // rer; Barge; EU+EFTA+UK
- km_40: 270.139
  Distance in km, for potato starch dried, from wet milling, at plant // rer; Barge; EU+EFTA+UK
- kg_km_40: 40.8; = kg_40*km_40
  Transport amount in km*km, for potato starch dried, from wet milling, at plant // rer; Barge; EU+EFTA+UK
- kg_41: 0.151033
  Mass in kg, for potato starch dried, from wet milling, at plant // rer; Articulated lorry transport, Euro 4, Total weight >32 t; EU+EFTA+UK
- km_41: 129.773
  Distance in km, for potato starch dried, from wet milling, at plant // rer; Articulated lorry transport, Euro 4, Total weight >32 t; EU+EFTA+UK
- kg_km_41: 19.6; = kg_41*km_41
  Transport amount in km*km, for potato starch dried, from wet milling, at plant // rer; Articulated lorry transport, Euro 4, Total weight >32 t; EU+EFTA+UK
- kg_42: 0.365
  Mass in kg, for precipitated calcium carbonate // precipitated calcium carbonate production // eu+efta+uk; Freight train, average; EU+EFTA+UK
- km_42: 240
  Distance in km, for precipitated calcium carbonate // precipitated calcium carbonate production // eu+efta+uk; Freight train, average; EU+EFTA+UK
- kg_km_42: 87.6; = kg_42*km_42
  Transport amount in km*km, for precipitated calcium carbonate // precipitated calcium carbonate production // eu+efta+uk; Freight train, average; EU+EFTA+UK
- kg_43: 0.365
  Mass in kg, for precipitated calcium carbonate // precipitated calcium carbonate production // eu+efta+uk; Barge; EU+EFTA+UK
- km_43: 270.137
  Distance in km, for precipitated calcium carbonate // precipitated calcium carbonate production // eu+efta+uk; Barge; EU+EFTA+UK
- kg_km_43: 98.6; = kg_43*km_43
  Transport amount in km*km, for precipitated calcium carbonate // precipitated calcium carbonate production // eu+efta+uk; Barge; EU+EFTA+UK
- kg_44: 0.365
  Mass in kg, for precipitated calcium carbonate // precipitated calcium carbonate production // eu+efta+uk; Articulated lorry transport, Euro 4, Total weight >32 t; EU+EFTA+UK
- km_44: 130.137
  Distance in km, for precipitated calcium carbonate // precipitated calcium carbonate production // eu+efta+uk; Articulated lorry transport, Euro 4, Total weight >32 t; EU+EFTA+UK
- kg_km_44: 47.5; = kg_44*km_44
  Transport amount in km*km, for precipitated calcium carbonate // precipitated calcium carbonate production // eu+efta+uk; Articulated lorry transport, Euro 4, Total weight >32 t; EU+EFTA+UK
- kg_45: 0.0224
  Mass in kg, for sodium chlorate // sodium chlorate production // glo; Freight train, average; EU+EFTA+UK
- km_45: 240.179
  Distance in km, for sodium chlorate // sodium chlorate production // glo; Freight train, average; EU+EFTA+UK
- kg_km_45: 5.38; = kg_45*km_45
  Transport amount in km*km, for sodium chlorate // sodium chlorate production // glo; Freight train, average; EU+EFTA+UK
- kg_46: 0.0224
  Mass in kg, for sodium chlorate // sodium chlorate production // glo; Barge; EU+EFTA+UK
- km_46: 270.089
  Distance in km, for sodium chlorate // sodium chlorate production // glo; Barge; EU+EFTA+UK
- kg_km_46: 6.05; = kg_46*km_46
  Transport amount in km*km, for sodium chlorate // sodium chlorate production // glo; Barge; EU+EFTA+UK
- kg_47: 0.0224
  Mass in kg, for sodium chlorate // sodium chlorate production // glo; Articulated lorry transport, Euro 4, Total weight >32 t; EU+EFTA+UK
- km_47: 129.911
  Distance in km, for sodium chlorate // sodium chlorate production // glo; Articulated lorry transport, Euro 4, Total weight >32 t; EU+EFTA+UK
- kg_km_47: 2.91; = kg_47*km_47
  Transport amount in km*km, for sodium chlorate // sodium chlorate production // glo; Articulated lorry transport, Euro 4, Total weight >32 t; EU+EFTA+UK
- kg_48: 0.49
  Mass in kg, for sodium hydroxide // sodium hydroxide production // eu+efta+uk; Freight train, average; EU+EFTA+UK
- km_48: 240.816
  Distance in km, for sodium hydroxide // sodium hydroxide production // eu+efta+uk; Freight train, average; EU+EFTA+UK
- kg_km_48: 118; = kg_48*km_48
  Transport amount in km*km, for sodium hydroxide // sodium hydroxide production // eu+efta+uk; Freight train, average; EU+EFTA+UK
- kg_49: 0.49
  Mass in kg, for sodium hydroxide // sodium hydroxide production // eu+efta+uk; Barge; EU+EFTA+UK
- km_49: 269.388
  Distance in km, for sodium hydroxide // sodium hydroxide production // eu+efta+uk; Barge; EU+EFTA+UK
- kg_km_49: 132; = kg_49*km_49
  Transport amount in km*km, for sodium hydroxide // sodium hydroxide production // eu+efta+uk; Barge; EU+EFTA+UK
- kg_50: 0.49
  Mass in kg, for sodium hydroxide // sodium hydroxide production // eu+efta+uk; Articulated lorry transport, Euro 4, Total weight >32 t; EU+EFTA+UK
- km_50: 130
  Distance in km, for sodium hydroxide // sodium hydroxide production // eu+efta+uk; Articulated lorry transport, Euro 4, Total weight >32 t; EU+EFTA+UK
- kg_km_50: 63.7; = kg_50*km_50
  Transport amount in km*km, for sodium hydroxide // sodium hydroxide production // eu+efta+uk; Articulated lorry transport, Euro 4, Total weight >32 t; EU+EFTA+UK
- kg_51: 0.0133
  Mass in kg, for sulphuric acid // sulphuric acid production // eu+efta+uk; Freight train, average; EU+EFTA+UK
- km_51: 239.85
  Distance in km, for sulphuric acid // sulphuric acid production // eu+efta+uk; Freight train, average; EU+EFTA+UK
- kg_km_51: 3.19; = kg_51*km_51
  Transport amount in km*km, for sulphuric acid // sulphuric acid production // eu+efta+uk; Freight train, average; EU+EFTA+UK
- kg_52: 0.0133
  Mass in kg, for sulphuric acid // sulphuric acid production // eu+efta+uk; Barge; EU+EFTA+UK
- km_52: 269.925
  Distance in km, for sulphuric acid // sulphuric acid production // eu+efta+uk; Barge; EU+EFTA+UK
- kg_km_52: 3.59; = kg_52*km_52
  Transport amount in km*km, for sulphuric acid // sulphuric acid production // eu+efta+uk; Barge; EU+EFTA+UK
- kg_53: 0.0133
  Mass in kg, for sulphuric acid // sulphuric acid production // eu+efta+uk; Articulated lorry transport, Euro 4, Total weight >32 t; EU+EFTA+UK
- km_53: 130.075
  Distance in km, for sulphuric acid // sulphuric acid production // eu+efta+uk; Articulated lorry transport, Euro 4, Total weight >32 t; EU+EFTA+UK
- kg_km_53: 1.73; = kg_53*km_53
  Transport amount in km*km, for sulphuric acid // sulphuric acid production // eu+efta+uk; Articulated lorry transport, Euro 4, Total weight >32 t; EU+EFTA+UK
- kg_54: 0.0304348
  Mass in kg, for unbleached kraft pulp, hardwood // unbleached kraft pulp, hardwood // eu+efta+uk; Freight train, average; EU+EFTA+UK
- km_54: 239.857
  Distance in km, for unbleached kraft pulp, hardwood // unbleached kraft pulp, hardwood // eu+efta+uk; Freight train, average; EU+EFTA+UK
- kg_km_54: 7.3; = kg_54*km_54
  Transport amount in km*km, for unbleached kraft pulp, hardwood // unbleached kraft pulp, hardwood // eu+efta+uk; Freight train, average; EU+EFTA+UK
- kg_55: 0.0304348
  Mass in kg, for unbleached kraft pulp, hardwood // unbleached kraft pulp, hardwood // eu+efta+uk; Barge; EU+EFTA+UK
- km_55: 269.757
  Distance in km, for unbleached kraft pulp, hardwood // unbleached kraft pulp, hardwood // eu+efta+uk; Barge; EU+EFTA+UK
- kg_km_55: 8.21; = kg_55*km_55
  Transport amount in km*km, for unbleached kraft pulp, hardwood // unbleached kraft pulp, hardwood // eu+efta+uk; Barge; EU+EFTA+UK
- kg_56: 0.0304348
  Mass in kg, for unbleached kraft pulp, hardwood // unbleached kraft pulp, hardwood // eu+efta+uk; Articulated lorry transport, Euro 4, Total weight >32 t; EU+EFTA+UK
- km_56: 129.786
  Distance in km, for unbleached kraft pulp, hardwood // unbleached kraft pulp, hardwood // eu+efta+uk; Articulated lorry transport, Euro 4, Total weight >32 t; EU+EFTA+UK
- kg_km_56: 3.95; = kg_56*km_56
  Transport amount in km*km, for unbleached kraft pulp, hardwood // unbleached kraft pulp, hardwood // eu+efta+uk; Articulated lorry transport, Euro 4, Total weight >32 t; EU+EFTA+UK
- kg_57: 0.169565
  Mass in kg, for unbleached kraft pulp, softwood // unbleached kraft pulp, softwood // eu+efta+uk; Freight train, average; EU+EFTA+UK
- km_57: 240.615
  Distance in km, for unbleached kraft pulp, softwood // unbleached kraft pulp, softwood // eu+efta+uk; Freight train, average; EU+EFTA+UK
- kg_km_57: 40.8; = kg_57*km_57
  Transport amount in km*km, for unbleached kraft pulp, softwood // unbleached kraft pulp, softwood // eu+efta+uk; Freight train, average; EU+EFTA+UK
- kg_58: 0.169565
  Mass in kg, for unbleached kraft pulp, softwood // unbleached kraft pulp, softwood // eu+efta+uk; Barge; EU+EFTA+UK
- km_58: 270.692
  Distance in km, for unbleached kraft pulp, softwood // unbleached kraft pulp, softwood // eu+efta+uk; Barge; EU+EFTA+UK
- kg_km_58: 45.9; = kg_58*km_58
  Transport amount in km*km, for unbleached kraft pulp, softwood // unbleached kraft pulp, softwood // eu+efta+uk; Barge; EU+EFTA+UK
- kg_59: 0.169565
  Mass in kg, for unbleached kraft pulp, softwood // unbleached kraft pulp, softwood // eu+efta+uk; Articulated lorry transport, Euro 4, Total weight >32 t; EU+EFTA+UK
- km_59: 130.333
  Distance in km, for unbleached kraft pulp, softwood // unbleached kraft pulp, softwood // eu+efta+uk; Articulated lorry transport, Euro 4, Total weight >32 t; EU+EFTA+UK
- kg_km_59: 22.1; = kg_59*km_59
  Transport amount in km*km, for unbleached kraft pulp, softwood // unbleached kraft pulp, softwood // eu+efta+uk; Articulated lorry transport, Euro 4, Total weight >32 t; EU+EFTA+UK
- kg_60: 1081.25
  Mass in kg, for waste paper, sorted // sorting waste paper, unsorted // eu+efta+uk; Freight train, average; EU+EFTA+UK
- km_60: 5.82659
  Distance in km, for waste paper, sorted // sorting waste paper, unsorted // eu+efta+uk; Freight train, average; EU+EFTA+UK
- kg_km_60: 6300; = kg_60*km_60
  Transport amount in km*km, for waste paper, sorted // sorting waste paper, unsorted // eu+efta+uk; Freight train, average; EU+EFTA+UK
- kg_61: 1081.25
  Mass in kg, for waste paper, sorted // sorting waste paper, unsorted // eu+efta+uk; Barge; EU+EFTA+UK
- km_61: 26.2086
  Distance in km, for waste paper, sorted // sorting waste paper, unsorted // eu+efta+uk; Barge; EU+EFTA+UK
- kg_km_61: 28338; = kg_61*km_61
  Transport amount in km*km, for waste paper, sorted // sorting waste paper, unsorted // eu+efta+uk; Barge; EU+EFTA+UK
- kg_62: 1081.25
  Mass in kg, for waste paper, sorted // sorting waste paper, unsorted // eu+efta+uk; Articulated lorry transport, Euro 4, Total weight >32 t; EU+EFTA+UK
- km_62: 322.925
  Distance in km, for waste paper, sorted // sorting waste paper, unsorted // eu+efta+uk; Articulated lorry transport, Euro 4, Total weight >32 t; EU+EFTA+UK
- kg_km_62: 349163; = kg_62*km_62
  Transport amount in km*km, for waste paper, sorted // sorting waste paper, unsorted // eu+efta+uk; Articulated lorry transport, Euro 4, Total weight >32 t; EU+EFTA+UK
- kg_63: 30.6923
  Mass in kg, for wheat starch, from wet milling, at plant // rer; Freight train, average; EU+EFTA+UK
- km_63: 240.125
  Distance in km, for wheat starch, from wet milling, at plant // rer; Freight train, average; EU+EFTA+UK
- kg_km_63: 7370; = kg_63*km_63
  Transport amount in km*km, for wheat starch, from wet milling, at plant // rer; Freight train, average; EU+EFTA+UK
- kg_64: 30.6923
  Mass in kg, for wheat starch, from wet milling, at plant // rer; Barge; EU+EFTA+UK
- km_64: 270.1
  Distance in km, for wheat starch, from wet milling, at plant // rer; Barge; EU+EFTA+UK
- kg_km_64: 8290; = kg_64*km_64
  Transport amount in km*km, for wheat starch, from wet milling, at plant // rer; Barge; EU+EFTA+UK
- kg_65: 30.6923
  Mass in kg, for wheat starch, from wet milling, at plant // rer; Articulated lorry transport, Euro 4, Total weight >32 t; EU+EFTA+UK
- km_65: 130
  Distance in km, for wheat starch, from wet milling, at plant // rer; Articulated lorry transport, Euro 4, Total weight >32 t; EU+EFTA+UK
- kg_km_65: 3990; = kg_65*km_65
  Transport amount in km*km, for wheat starch, from wet milling, at plant // rer; Articulated lorry transport, Euro 4, Total weight >32 t; EU+EFTA+UK
- kg_66: 21.51
  Mass in kg, for biodegradable waste to landfill // landfill of biodegradable waste // eu+efta+uk; Articulated lorry transport, Euro 4, Total weight >32 t; EU+EFTA+UK
- km_66: 77
  Distance in km, for biodegradable waste to landfill // landfill of biodegradable waste // eu+efta+uk; Articulated lorry transport, Euro 4, Total weight >32 t; EU+EFTA+UK
- kg_km_66: 1656.27; = kg_66*km_66
  Transport amount in km*km, for biodegradable waste to landfill // landfill of biodegradable waste // eu+efta+uk; Articulated lorry transport, Euro 4, Total weight >32 t; EU+EFTA+UK
- kg_67: 21.51
  Mass in kg, for biowaste // enclosed composting // eu+efta+uk; Articulated lorry transport, Euro 4, Total weight >32 t; EU+EFTA+UK
- km_67: 77
  Distance in km, for biowaste // enclosed composting // eu+efta+uk; Articulated lorry transport, Euro 4, Total weight >32 t; EU+EFTA+UK
- kg_km_67: 1656.27; = kg_67*km_67
  Transport amount in km*km, for biowaste // enclosed composting // eu+efta+uk; Articulated lorry transport, Euro 4, Total weight >32 t; EU+EFTA+UK
- kg_68: 17.37
  Mass in kg, for waste (unspecified) // landfill of plastic waste // eu+efta+uk; Articulated lorry transport, Euro 4, Total weight >32 t; EU+EFTA+UK
- km_68: 77
  Distance in km, for waste (unspecified) // landfill of plastic waste // eu+efta+uk; Articulated lorry transport, Euro 4, Total weight >32 t; EU+EFTA+UK
- kg_km_68: 1337.49; = kg_68*km_68
  Transport amount in km*km, for waste (unspecified) // landfill of plastic waste // eu+efta+uk; Articulated lorry transport, Euro 4, Total weight >32 t; EU+EFTA+UK

## Reference product
- fluting medium, recycled // containerboard production, fluting medium, recycled // eu+efta+uk: 1

## Inputs
- Transport of bleached kraft pulp, hardwood // bleached kraft pulp, hardwood // eu+efta+uk by Freight train, average - EU+EFTA+UK: 25.7; = kg_km_0
- Transport of bleached kraft pulp, hardwood // bleached kraft pulp, hardwood // eu+efta+uk by Barge - EU+EFTA+UK: 28.9; = kg_km_1
- Transport of bleached kraft pulp, hardwood // bleached kraft pulp, hardwood // eu+efta+uk by Articulated lorry transport, Euro 4, Total weight >32 t - EU+EFTA+UK: 13.9; = kg_km_2
- Transport of bleached kraft pulp, softwood // bleached kraft pulp, softwood // eu+efta+uk by Freight train, average - EU+EFTA+UK: 142; = kg_km_3
- Transport of bleached kraft pulp, softwood // bleached kraft pulp, softwood // eu+efta+uk by Barge - EU+EFTA+UK: 160; = kg_km_4
- Transport of bleached kraft pulp, softwood // bleached kraft pulp, softwood // eu+efta+uk by Articulated lorry transport, Euro 4, Total weight >32 t - EU+EFTA+UK: 77.1; = kg_km_5
- Transport of chemi-thermomechanical pulp // chemi-thermomechanical pulp // eu+efta+uk by Freight train, average - EU+EFTA+UK: 300; = kg_km_6
- Transport of chemi-thermomechanical pulp // chemi-thermomechanical pulp // eu+efta+uk by Barge - EU+EFTA+UK: 338; = kg_km_7
- Transport of chemi-thermomechanical pulp // chemi-thermomechanical pulp // eu+efta+uk by Articulated lorry transport, Euro 4, Total weight >32 t - EU+EFTA+UK: 163; = kg_km_8
- Transport of wood chips, hardwood // wood chips, hardwood // eu+efta+uk by Freight train, average - EU+EFTA+UK: 3000; = kg_km_9
- Transport of wood chips, hardwood // wood chips, hardwood // eu+efta+uk by Barge - EU+EFTA+UK: 3380; = kg_km_10
- Transport of wood chips, hardwood // wood chips, hardwood // eu+efta+uk by Articulated lorry transport, Euro 4, Total weight >32 t - EU+EFTA+UK: 1630; = kg_km_11
- Transport of wood chips, softwood // wood chips, softwood // eu+efta+uk by Freight train, average - EU+EFTA+UK: 3000; = kg_km_12
- Transport of wood chips, softwood // wood chips, softwood // eu+efta+uk by Barge - EU+EFTA+UK: 3380; = kg_km_13
- Transport of wood chips, softwood // wood chips, softwood // eu+efta+uk by Articulated lorry transport, Euro 4, Total weight >32 t - EU+EFTA+UK: 1630; = kg_km_14
- Transport of diesel // diesel mix at refinery // eu+efta+uk by Freight train, average - EU+EFTA+UK: 3.36; = kg_km_15
- Transport of diesel // diesel mix at refinery // eu+efta+uk by Barge - EU+EFTA+UK: 3.78; = kg_km_16
- Transport of diesel // diesel mix at refinery // eu+efta+uk by Articulated lorry transport, Euro 4, Total weight >32 t - EU+EFTA+UK: 1.82; = kg_km_17
- Transport of hard coal, at consumer eu+efta // hard coal mix // eu+efta+uk by Freight train, average - EU+EFTA+UK: 3940; = kg_km_18
- Transport of hard coal, at consumer eu+efta // hard coal mix // eu+efta+uk by Barge - EU+EFTA+UK: 4430; = kg_km_19
- Transport of hard coal, at consumer eu+efta // hard coal mix // eu+efta+uk by Articulated lorry transport, Euro 4, Total weight >32 t - EU+EFTA+UK: 2130; = kg_km_20
- Transport of heavy fuel oil (1.0 wt.% s) // heavy fuel oil at refinery // eu+efta+uk by Freight train, average - EU+EFTA+UK: 6.98; = kg_km_21
- Transport of heavy fuel oil (1.0 wt.% s) // heavy fuel oil at refinery // eu+efta+uk by Barge - EU+EFTA+UK: 7.86; = kg_km_22
- Transport of heavy fuel oil (1.0 wt.% s) // heavy fuel oil at refinery // eu+efta+uk by Articulated lorry transport, Euro 4, Total weight >32 t - EU+EFTA+UK: 3.78; = kg_km_23
- Transport of hydrogen peroxide, 100% // hydrogen peroxide, 100% production // eu+efta+uk by Freight train, average - EU+EFTA+UK: 3.05; = kg_km_24
- Transport of hydrogen peroxide, 100% // hydrogen peroxide, 100% production // eu+efta+uk by Barge - EU+EFTA+UK: 3.43; = kg_km_25
- Transport of hydrogen peroxide, 100% // hydrogen peroxide, 100% production // eu+efta+uk by Articulated lorry transport, Euro 4, Total weight >32 t - EU+EFTA+UK: 1.65; = kg_km_26
- Transport of kaolin // kaolin production // eu+efta+uk by Freight train, average - EU+EFTA+UK: 413; = kg_km_27
- Transport of kaolin // kaolin production // eu+efta+uk by Barge - EU+EFTA+UK: 464; = kg_km_28
- Transport of kaolin // kaolin production // eu+efta+uk by Articulated lorry transport, Euro 4, Total weight >32 t - EU+EFTA+UK: 224; = kg_km_29
- Transport of light fuel oil // light fuel oil at refinery // eu+efta+uk by Freight train, average - EU+EFTA+UK: 42.7; = kg_km_30
- Transport of light fuel oil // light fuel oil at refinery // eu+efta+uk by Barge - EU+EFTA+UK: 48.1; = kg_km_31
- Transport of light fuel oil // light fuel oil at refinery // eu+efta+uk by Articulated lorry transport, Euro 4, Total weight >32 t - EU+EFTA+UK: 23.1; = kg_km_32
- Transport of lignite eu+efta // lignite mix // eu+efta+uk by Freight train, average - EU+EFTA+UK: 1680; = kg_km_33
- Transport of lignite eu+efta // lignite mix // eu+efta+uk by Barge - EU+EFTA+UK: 1880; = kg_km_34
- Transport of lignite eu+efta // lignite mix // eu+efta+uk by Articulated lorry transport, Euro 4, Total weight >32 t - EU+EFTA+UK: 907; = kg_km_35
- Transport of maize starch, from wet milling (starch drying), at plant // glo by Freight train, average - EU+EFTA+UK: 4490; = kg_km_36
- Transport of maize starch, from wet milling (starch drying), at plant // glo by Barge - EU+EFTA+UK: 5050; = kg_km_37
- Transport of maize starch, from wet milling (starch drying), at plant // glo by Articulated lorry transport, Euro 4, Total weight >32 t - EU+EFTA+UK: 2430; = kg_km_38
- Transport of potato starch dried, from wet milling, at plant // rer by Freight train, average - EU+EFTA+UK: 36.2; = kg_km_39
- Transport of potato starch dried, from wet milling, at plant // rer by Barge - EU+EFTA+UK: 40.8; = kg_km_40
- Transport of potato starch dried, from wet milling, at plant // rer by Articulated lorry transport, Euro 4, Total weight >32 t - EU+EFTA+UK: 19.6; = kg_km_41
- Transport of precipitated calcium carbonate // precipitated calcium carbonate production // eu+efta+uk by Freight train, average - EU+EFTA+UK: 87.6; = kg_km_42
- Transport of precipitated calcium carbonate // precipitated calcium carbonate production // eu+efta+uk by Barge - EU+EFTA+UK: 98.6; = kg_km_43
- Transport of precipitated calcium carbonate // precipitated calcium carbonate production // eu+efta+uk by Articulated lorry transport, Euro 4, Total weight >32 t - EU+EFTA+UK: 47.5; = kg_km_44
- Transport of sodium chlorate // sodium chlorate production // glo by Freight train, average - EU+EFTA+UK: 5.38; = kg_km_45
- Transport of sodium chlorate // sodium chlorate production // glo by Barge - EU+EFTA+UK: 6.05; = kg_km_46
- Transport of sodium chlorate // sodium chlorate production // glo by Articulated lorry transport, Euro 4, Total weight >32 t - EU+EFTA+UK: 2.91; = kg_km_47
- Transport of sodium hydroxide // sodium hydroxide production // eu+efta+uk by Freight train, average - EU+EFTA+UK: 118; = kg_km_48
- Transport of sodium hydroxide // sodium hydroxide production // eu+efta+uk by Barge - EU+EFTA+UK: 132; = kg_km_49
- Transport of sodium hydroxide // sodium hydroxide production // eu+efta+uk by Articulated lorry transport, Euro 4, Total weight >32 t - EU+EFTA+UK: 63.7; = kg_km_50
- Transport of sulphuric acid // sulphuric acid production // eu+efta+uk by Freight train, average - EU+EFTA+UK: 3.19; = kg_km_51
- Transport of sulphuric acid // sulphuric acid production // eu+efta+uk by Barge - EU+EFTA+UK: 3.59; = kg_km_52
- Transport of sulphuric acid // sulphuric acid production // eu+efta+uk by Articulated lorry transport, Euro 4, Total weight >32 t - EU+EFTA+UK: 1.73; = kg_km_53
- Transport of unbleached kraft pulp, hardwood // unbleached kraft pulp, hardwood // eu+efta+uk by Freight train, average - EU+EFTA+UK: 7.3; = kg_km_54
- Transport of unbleached kraft pulp, hardwood // unbleached kraft pulp, hardwood // eu+efta+uk by Barge - EU+EFTA+UK: 8.21; = kg_km_55
- Transport of unbleached kraft pulp, hardwood // unbleached kraft pulp, hardwood // eu+efta+uk by Articulated lorry transport, Euro 4, Total weight >32 t - EU+EFTA+UK: 3.95; = kg_km_56
- Transport of unbleached kraft pulp, softwood // unbleached kraft pulp, softwood // eu+efta+uk by Freight train, average - EU+EFTA+UK: 40.8; = kg_km_57
- Transport of unbleached kraft pulp, softwood // unbleached kraft pulp, softwood // eu+efta+uk by Barge - EU+EFTA+UK: 45.9; = kg_km_58
- Transport of unbleached kraft pulp, softwood // unbleached kraft pulp, softwood // eu+efta+uk by Articulated lorry transport, Euro 4, Total weight >32 t - EU+EFTA+UK: 22.1; = kg_km_59
- Transport of waste paper, sorted // sorting waste paper, unsorted // eu+efta+uk by Freight train, average - EU+EFTA+UK: 6300; = kg_km_60
- Transport of waste paper, sorted // sorting waste paper, unsorted // eu+efta+uk by Barge - EU+EFTA+UK: 28338; = kg_km_61
- Transport of waste paper, sorted // sorting waste paper, unsorted // eu+efta+uk by Articulated lorry transport, Euro 4, Total weight >32 t - EU+EFTA+UK: 349163; = kg_km_62
- Transport of wheat starch, from wet milling, at plant // rer by Freight train, average - EU+EFTA+UK: 7370; = kg_km_63
- Transport of wheat starch, from wet milling, at plant // rer by Barge - EU+EFTA+UK: 8290; = kg_km_64
- Transport of wheat starch, from wet milling, at plant // rer by Articulated lorry transport, Euro 4, Total weight >32 t - EU+EFTA+UK: 3990; = kg_km_65
- Thermal energy (MJ) from Thermal energy from natural gas - EU+EFTA+UK: 482
- Electricity from Electricity grid mix 1kV-60kV - EU+EFTA+UK: 625
- Transport of biodegradable waste to landfill // landfill of biodegradable waste // eu+efta+uk by Articulated lorry transport, Euro 4, Total weight >32 t - EU+EFTA+UK: 1656.27; = kg_km_66
- Transport of biowaste // enclosed composting // eu+efta+uk by Articulated lorry transport, Euro 4, Total weight >32 t - EU+EFTA+UK: 1656.27; = kg_km_67
- Transport of waste (unspecified) // landfill of plastic waste // eu+efta+uk by Articulated lorry transport, Euro 4, Total weight >32 t - EU+EFTA+UK: 1337.49; = kg_km_68
- fluting medium, recycled // containerboard production, fluting medium, recycled // eu+efta+uk, blackbox: 1
- fluting medium, recycled // containerboard production, fluting medium, recycled // eu+efta+uk, elementary: 1

## Impact indicators
- Eutrophication marine: 0.765861
- Ecotoxicity, freshwater: 10004.1
- Land use: 10809.8
- Water use: 126.569
- Resource use, minerals and metals: 0.00206206
- Resource use, fossils: 7035.85
- Climate change: 578.265
- Ozone depletion: 6.67911e-7
- Human toxicity, cancer: 1.85735e-7
- Human toxicity, non-cancer: 3.01156e-6
- EF-particulate Matter: 2.15413e-5
- Ionising radiation, human health: 32.7353
- Photochemical ozone formation - human health: 1.04066
- Acidification: 1.28261
- Eutrophication, terrestrial: 4.4775
- Eutrophication, freshwater: 0.0213208

## Deviations from the LCI method principle
The background data uses:
- the \xe2\x80\x9cRecycled content cut-off\xe2\x80\x9d approach to allocate end-of-life by-products and secondary materials. This allocation is explained in the description of the recycled content system model (http://www.ecoinvent.org/database/system-models-in-ecoinvent-3/cut-off-system-model/allocation-cut-off-by-classification.html).
OR
- EF compliant data

## Deviations from the LCI method approaches
Background data:
- the \xe2\x80\x9cRecycled content cut-off\xe2\x80\x9d approach to allocate end-of-life by-products and secondary materials. This allocation is explained in the description of the recycled content system model (http://www.ecoinvent.org/database/system-models-in-ecoinvent-3/cut-off-system-model/allocation-cut-off-by-classification.html). The ecoinvent database mostly relies on “Allocation – market values” apart for few exceptions particularly in the energy sector. ecoinvent energy data is replaced with EF3.0 core data as per the EF guidelines version 2.0.
OR
- EF compliant data

## Modelling constants
All modelling constants follow the requirements listed in the Tender Specifications 070201/2020/SER/ENV.B1. Completeness: There are no intentional cut-offs in the inventory no matter how small their contribution to all the EF impact categories is. Eventual cut-offs are in compliance with the Guide for EF compliant data sets (JRC 2020), i.e. only if below the 3% cut-off rule. Water use: water use is modelled at country level using separate flows for water withdrawal, water release and water evaporation. Handling multi-functional processes: the following PEF multi- functionality decision hierarchy is applied for resolving all multi- functionality problems: (1) subdivision or system expansion; (2) allocation based on a relevant underlying physical relationship (substitution may apply here); (3) allocation based on some other relationship. Direct land use change: GHG emissions from direct LUC allocated to good/service for 20 years after the LUC occurs, with IPCC default values. Carbon storage and delayed emissions: credits associated with temporary (carbon) storage or delayed emissions up to 300 years are not be considered. Emissions off-setting: are not included. Capital goods (including infrastructures) and their End of life: they are included. System boundaries: system boundaries include all processes linked to the product supply chain (e.g. maintenance). Time period: emissions and removals are modelled as if released or removed at the beginning of the assessment method. Fossil and biogenic carbon emissions and removals: removals and emissions are modelled as follows: All GHG emissions from fossil fuels (including peat and limestone) are modelled consistently with the most updated ILCD list of elementary flows. The non-fossil (biogenic) carbon flows are modelled consistently with the most updated ILCD list of elementary flows.

## Cut-off and completeness
There are no intentional cut-offs in the inventory no matter how small their contribution to all the EF impact categories is. Eventual cut-offs are in compliance with the Guide for EF compliant data sets (JRC 2020), i.e. only if below the 3% cut-off rule. The dataset dry mass and water balance has been checked to ensure the inventory is complete. Capital goods (e.g. infrastructure) and their end-of-life are included.

## Data selection and combination
These datasets include, in both their foreground and background data, links to EF3.0 compliant data.
The relevant background data on energy, transport, and End of Life are from the LCDN data node (http://lcdn.thinkstep.com/Node/).
All other background data in the supply of this product for which no EF3.0 process was available are from ecoinvent v3.7 database (www.ecoinvent.org) or other data sources.

## Data treatment and extrapolations
Several data sources have been used to model the inventory.

## Review details
Internal reviews have been asked to review the plausibility of the unit process, LCIA scores, and DQRs. Internal reviewers have also been asked to review the data for EF compliancy. The consortium is therefore responsible for aspects such as compliancy with the ILCD format, including validation in Look@LCI, and nomenclature.
Internal reviwers have been asked to judge based on the process name, that the unit process models in a complete and representative way the process in the requested location. The review encompassed the plausability of:
- exchanges with nature (elementary flows) as well as exchanges such as product and waste flows.
- meta information (general comment, technology comment, system boundaries, allocation, cut-off rules, etc.). Reviewers were asked to judge if the provided information is enough to understand the content of the process.
- LCIA scores
- DQRs including precision, technology, time and geography. As well as the overall DQR.
External reviewers have been asked to provide their expertise in the field of interest. External reviewers have been asked to review the unit process, including eventual methodological choices, the LCIA scores (provided with contribution scores as well), and DQRs. External reviewers have been provided all the information in a tool developed by the consortium for the purpose of this project.
External reviewers have been asked to judge based on the process name, that the unit process models in a complete and representative way the process in the requested location. The review encompassed:
- Plausability and completeness of exchanges with nature (elementary flows) as well as exchanges such as product and waste flows.
- Review of meta information (general comment, technology comment, system boundaries, allocation, cut-off rules, etc.). Reviewers were asked to judge if the provided information is enough to understand the content of the process.
- Review of properties (biogenic carbon and water content).
- Review of allocation keys.
- Plausability of LCIA scores calculated by the consortium.
- Plausability of DQRs including precision, technology, time and geography. As well as the overall DQR.

## Data sources
- Background Data for Representative products and organisations. EF 3.0 compliant (data stock)
- The European Federation of Corrugated Board Manufacturers (FEFCO), (2018). European Database for Corrugated Board Life Cycle Studies 2018", available at https://www.fefco.org/lca

## Intended applications
Implementation of regular Product Environmental Footprint (PEF) studies and Organisation Environmental Footprint (OEF) studies exclusively under the specified Product groups and sectors as defined in the Product Environmental Footprint Category Rules (PEFCR) and Organisation Environmental Footprint Sectorial Rules (OEFSR) listed in http://ec.europa.eu/environment/eussd/smgp/PEFCR_OEFSR.htm
