# bleaching, enzymatic, elementary; Pre-treatment; production mix, at plant; textile service

Dataset: ILCD process, Unit process, single operation
Geography: GLO
Reference year: 2011
Valid until: 2024
Classification: Other Services / Other services
LCI method principle: Attributional
LCI method approaches: Allocation - market value
Completeness: All relevant flows quantified
Project: Provision of process-based 3.0 Environmental Footprint-compliant life cycle inventory datasets - Apparel 1 - contract number 070201/2020/840291/SER/ENV.B.1
Generated by: CADIS
Owner: PRé Sustainability B.V.
Compliance: Environmental Footprint non-primary supporting data set; Environmental Footprint 3.1
Amounts: no units in this file; such an amount is in the reference unit of its flow, which a separate flow dataset defines
copyright: true
licenseType: Free of charge for some user types or use types
accessRestrictions: Free of charge for all final users implementing a regular Product Environmental Footprint (PEF) studies and Organisation Environmental Footprint (OEF) studies exclusively under the specified Product groups and sectors as defined in the Product Environmental Footprint Category Rules (PEFCR) and Organisation Environmental Footprint Sectorial Rules (OEFSR) listed in http://ec.europa.eu/environment/eussd/smgp/PEFCR_OEFSR.htm and in accordance with the terms and conditions of the EULA (available at https://ecoinvent.lca-data.com/) exclusively until 31st December 2024. Any use of this dataset or any derivative data not within the specific context of one of the PEF/OEF projects or after the end of 2024 is not permitted.

## General comment
Notice: this data set supersedes the EF3.0-compliant version (see link under "preceding data set version" below calculated with the EF3.0). The life cycle inventory is not changed from the original EF3.0 data set. The LCIA results are calculated based on the EF3.1 methods which provide updated characterisation factors in the following impact categories: Climate Change, Ecotoxicity freshwater, Photochemical Ozone Formation, Acidification, Human Toxicity non-cancer, and Human Toxicity cancer. The review report and the data quality ratings refer to the original results. The data set has been updated by the European Commission on the basis of the original EF3.0 data set delivered by the data provider.This sub-process has limited documentation only. For all detailed documentation of the full model to which this data set belongs (such as DQRs, review reports and other technical documentation), please see this process: bleaching, enzymatic - GLO []

## Technology and included processes
The process uses a propietary enzyme (esterase) system which catalyzes the perhydrolysis of propylene glycol diacetate in situ at neutral pH forming propylene glycol and peracetic acid (the bleaching agent). Compared to conventional bleaching, enzymatic bleaching: Occurs at lower temperatures, occurs at neutral pH values, uses less water, uses bacterial arylesterase enzyme, uses propylene glycol diacetate, which is hydrolized, generating propylene glycol and peracetic acid (bleaching agent), avoids substrate loss.

## Reference product
- bleaching, enzymatic // bleaching, enzymatic // glo, elementary: 1

## Inputs
- ground water, Renewable material resources from water [AL]: 1.28426e-6
- ground water, Renewable material resources from water [AT]: 1.65469e-5
- ground water, Renewable material resources from water [BA]: 1.60101e-6
- ground water, Renewable material resources from water [BE]: 1.99167e-5
- ground water, Renewable material resources from water [BG]: 5.10004e-6
- ground water, Renewable material resources from water [BY]: 6.62232e-6
- ground water, Renewable material resources from water [CH]: 1.97349e-5
- ground water, Renewable material resources from water [CZ]: 1.37353e-5
- ground water, Renewable material resources from water [DE]: 0.000149484
- ground water, Renewable material resources from water [DK]: 1.08393e-5
- ground water, Renewable material resources from water [EE]: 1.48012e-6
- ground water, Renewable material resources from water [ES]: 6.41479e-5
- ground water, Renewable material resources from water [FI]: 9.24572e-6
- ground water, Renewable material resources from water [FR]: 0.000105446
- ground water, Renewable material resources from water [GB]: 0.000104788
- ground water, Renewable material resources from water: 2.09349e-5
- ground water, Renewable material resources from water [GR]: 1.19203e-5
- ground water, Renewable material resources from water [HR]: 3.83276e-6
- ground water, Renewable material resources from water [HU]: 1.00476e-5
- ground water, Renewable material resources from water [IE]: 1.08232e-5
- ground water, Renewable material resources from water [IS]: 6.17604e-7
- ground water, Renewable material resources from water [IT]: 9.02175e-5
- ground water, Renewable material resources from water [LT]: 3.16032e-6
- ground water, Renewable material resources from water [LU]: 2.1939e-6
- ground water, Renewable material resources from water [LV]: 1.86352e-6
- ground water, Renewable material resources from water [MD]: 9.86025e-7
- ground water, Renewable material resources from water [ME]: 3.97226e-7
- ground water, Renewable material resources from water [MK]: 1.09709e-6
- ground water, Renewable material resources from water [MT]: 6.06897e-7
- ground water, Renewable material resources from water [NL]: 3.34423e-5
- ground water, Renewable material resources from water [NO]: 1.26589e-5
- ground water, Renewable material resources from water [PL]: 3.84883e-5
- ground water, Renewable material resources from water [PT]: 1.21444e-5
- ground water, Renewable material resources from water [RO]: 1.68604e-5
- ground water, Renewable material resources from water [RS]: 4.18397e-6
- ground water, Renewable material resources from water [SE]: 1.82667e-5
- ground water, Renewable material resources from water [SI]: 2.58682e-6
- ground water, Renewable material resources from water [SK]: 6.07166e-6
- ground water, Renewable material resources from water [SM]: 7.55677e-8
- ground water, Renewable material resources from water [UA]: 1.78022e-5
- ground water, Renewable material resources from water [AU]: 4.19693e-5
- ground water, Renewable material resources from water [BR]: 0.000118551
- ground water, Renewable material resources from water [CA]: 6.2304e-5
- ground water, Renewable material resources from water [CI]: 3.22776e-6
- ground water, Renewable material resources from water [CL]: 1.52492e-5
- ground water, Renewable material resources from water [CN]: 0.000652624
- ground water, Renewable material resources from water [CO]: 2.38595e-5
- ground water, Renewable material resources from water [ID]: 0.000100274
- ground water, Renewable material resources from water [IN]: 0.000267656
- ground water, Renewable material resources from water [JP]: 0.00019368
- ground water, Renewable material resources from water [KR]: 7.21307e-5
- ground water, Renewable material resources from water [KZ]: 1.5612e-5
- ground water, Renewable material resources from water [MX]: 8.44541e-5
- ground water, Renewable material resources from water [MY]: 2.82055e-5
- ground water, Renewable material resources from water [NZ]: 6.58171e-6
- ground water, Renewable material resources from water [RU]: 0.000139591
- ground water, Renewable material resources from water [TH]: 4.16543e-5
- ground water, Renewable material resources from water [TR]: 7.05414e-5
- ground water, Renewable material resources from water [US]: 0.000687177
- ground water, Renewable material resources from water [VE]: 1.99326e-5
- ground water, Renewable material resources from water [VN]: 2.0645e-5
- ground water, Renewable material resources from water [ZA]: 2.65754e-5
- ground water, Renewable material resources from water [AE]: 2.45164e-5
- ground water, Renewable material resources from water [AF]: 2.51763e-6
- ground water, Renewable material resources from water [AG]: 7.35212e-8
- ground water, Renewable material resources from water [AM]: 1.13526e-6
- ground water, Renewable material resources from water [AO]: 7.62621e-6
- ground water, Renewable material resources from water [AR]: 3.39883e-5
- ground water, Renewable material resources from water [AW]: 1.47633e-7
- ground water, Renewable material resources from water [AZ]: 5.74807e-6
- ground water, Renewable material resources from water [BB]: 1.78828e-7
- ground water, Renewable material resources from water [BD]: 2.02911e-5
- ground water, Renewable material resources from water [BF]: 1.21146e-6
- ground water, Renewable material resources from water [BH]: 2.57951e-6
- ground water, Renewable material resources from water [BI]: 2.88275e-7
- ground water, Renewable material resources from water [BJ]: 1.11615e-6
- ground water, Renewable material resources from water [BN]: 1.18989e-6
- ground water, Renewable material resources from water [BO]: 2.86391e-6
- ground water, Renewable material resources from water [BS]: 4.88754e-7
- ground water, Renewable material resources from water [BT]: 2.50333e-7
- ground water, Renewable material resources from water [BW]: 1.27665e-6
- ground water, Renewable material resources from water [BZ]: 1.01692e-7
- ground water, Renewable material resources from water [CD]: 2.43261e-6
- ground water, Renewable material resources from water [CF]: 1.59707e-7
- ground water, Renewable material resources from water [CG]: 9.42475e-7
- ground water, Renewable material resources from water [CM]: 2.79764e-6
- ground water, Renewable material resources from water [CR]: 2.97996e-6
- ground water, Renewable material resources from water [CV]: 1.24643e-7
- ground water, Renewable material resources from water [CY]: 1.14577e-6
- ground water, Renewable material resources from water [DJ]: 1.60329e-7
- ground water, Renewable material resources from water [DM]: 3.03961e-8
- ground water, Renewable material resources from water [DO]: 5.56186e-6
- ground water, Renewable material resources from water [DZ]: 1.93378e-5
- ground water, Renewable material resources from water [EC]: 6.75995e-6
- ground water, Renewable material resources from water [EG]: 3.82886e-5
- ground water, Renewable material resources from water [ER]: 2.03359e-7
- ground water, Renewable material resources from water [ET]: 5.84384e-6
- ground water, Renewable material resources from water [FJ]: 3.6771e-7
- ground water, Renewable material resources from water [GA]: 1.10041e-6
- ground water, Renewable material resources from water [GD]: 5.70254e-8
- ground water, Renewable material resources from water [GE]: 1.60867e-6
- ground water, Renewable material resources from water [GH]: 4.77723e-6
- ground water, Renewable material resources from water [GM]: 1.72787e-7
- ground water, Renewable material resources from water [GN]: 8.60375e-7
- ground water, Renewable material resources from water [GQ]: 1.28009e-6
- ground water, Renewable material resources from water [GT]: 4.6286e-6
- ground water, Renewable material resources from water [GW]: 1.0404e-7
- ground water, Renewable material resources from water [GY]: 3.28036e-7
- ground water, Renewable material resources from water [HN]: 1.61579e-6
- ground water, Renewable material resources from water [HT]: 1.19805e-6
- ground water, Renewable material resources from water [IL]: 1.11011e-5
- ground water, Renewable material resources from water [IQ]: 1.67127e-5
- ground water, Renewable material resources from water [IR]: 4.72425e-5
- ground water, Renewable material resources from water [JM]: 9.91543e-7
- ground water, Renewable material resources from water [JO]: 3.26925e-6
- ground water, Renewable material resources from water [KE]: 5.71196e-6
- ground water, Renewable material resources from water [KG]: 9.48651e-7
- ground water, Renewable material resources from water [KH]: 1.93013e-6
- ground water, Renewable material resources from water [KM]: 7.96125e-8
- ground water, Renewable material resources from water [KN]: 4.74424e-8
- ground water, Renewable material resources from water [KW]: 9.0891e-6
- ground water, Renewable material resources from water [LA]: 1.47613e-6
- ground water, Renewable material resources from water [LB]: 3.60018e-6
- ground water, Renewable material resources from water [LC]: 9.6774e-8
- ground water, Renewable material resources from water [LK]: 8.86856e-6
- ground water, Renewable material resources from water [LR]: 2.2012e-7
- ground water, Renewable material resources from water [LS]: 2.13752e-7
- ground water, Renewable material resources from water [LY]: 4.54466e-6
- ground water, Renewable material resources from water [MA]: 9.42168e-6
- ground water, Renewable material resources from water [MG]: 1.45611e-6
- ground water, Renewable material resources from water [ML]: 1.322e-6
- ground water, Renewable material resources from water [MM]: 8.40977e-6
- ground water, Renewable material resources from water [MN]: 1.1762e-6
- ground water, Renewable material resources from water [MR]: 6.93495e-7
- ground water, Renewable material resources from water [MU]: 9.25949e-7
- ground water, Renewable material resources from water [MW]: 6.68986e-7
- ground water, Renewable material resources from water [MZ]: 1.19602e-6
- ground water, Renewable material resources from water [NA]: 8.64957e-7
- ground water, Renewable material resources from water [NE]: 8.55148e-7
- ground water, Renewable material resources from water [NG]: 3.54991e-5
- ground water, Renewable material resources from water [NI]: 1.19483e-6
- ground water, Renewable material resources from water [NP]: 2.65369e-6
- ground water, Renewable material resources from water [OM]: 5.63962e-6
- ground water, Renewable material resources from water [PA]: 3.50419e-6
- ground water, Renewable material resources from water [PE]: 1.34759e-5
- ground water, Renewable material resources from water [PG]: 1.13501e-6
- ground water, Renewable material resources from water [PH]: 2.73182e-5
- ground water, Renewable material resources from water [PK]: 3.27611e-5
- ground water, Renewable material resources from water [PR]: 4.63649e-6
- ground water, Renewable material resources from water [PS]: 8.77468e-7
- ground water, Renewable material resources from water [PY]: 2.91817e-6
- ground water, Renewable material resources from water [QA]: 1.05594e-5
- ground water, Renewable material resources from water [RW]: 7.36099e-7
- ground water, Renewable material resources from water [SA]: 6.22587e-5
- ground water, Renewable material resources from water [SB]: 5.63964e-8
- ground water, Renewable material resources from water [SD]: 6.53213e-6
- ground water, Renewable material resources from water [SG]: 1.81343e-5
- ground water, Renewable material resources from water [SL]: 4.15749e-7
- ground water, Renewable material resources from water [SN]: 1.62776e-6
- ground water, Renewable material resources from water [SR]: 3.39014e-7
- ground water, Renewable material resources from water [ST]: 2.68118e-8
- ground water, Renewable material resources from water [SV]: 1.80815e-6
- ground water, Renewable material resources from water [SZ]: 3.64897e-7
- ground water, Renewable material resources from water [TC]: 3.26019e-8
- ground water, Renewable material resources from water [TD]: 9.05856e-7
- ground water, Renewable material resources from water [TG]: 3.75251e-7
- ground water, Renewable material resources from water [TJ]: 9.40154e-7
- ground water, Renewable material resources from water [TL]: 1.20573e-7
- ground water, Renewable material resources from water [TM]: 2.72679e-6
- ground water, Renewable material resources from water [TN]: 4.53159e-6
- ground water, Renewable material resources from water [TO]: 2.26054e-8
- ground water, Renewable material resources from water [TT]: 1.55368e-6
- ground water, Renewable material resources from water [TZ]: 4.40029e-6
- ground water, Renewable material resources from water [UG]: 3.04859e-6
- ground water, Renewable material resources from water [UY]: 2.6005e-6
- ground water, Renewable material resources from water [UZ]: 7.26614e-6
- ground water, Renewable material resources from water [VC]: 4.88817e-8
- ground water, Renewable material resources from water [VU]: 3.10511e-8
- ground water, Renewable material resources from water [WS]: 4.41711e-8
- ground water, Renewable material resources from water [YE]: 3.63509e-6
- ground water, Renewable material resources from water [ZM]: 2.06145e-6
- ground water, Renewable material resources from water [ZW]: 1.33903e-6

## Outputs
- Water, Emissions to air, unspecified: 0.000109041

## Impact indicators
- Water use: 0.115175
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
## Deviations from the LCI method principle
The background data uses:
- the \xe2\x80\x9cRecycled content cut-off\xe2\x80\x9d approach to allocate end-of-life by-products and secondary materials. This allocation is explained in the description of the recycled content system model (http://www.ecoinvent.org/database/system-models-in-ecoinvent-3/cut-off-system-model/allocation-cut-off-by-classification.html).
OR
- EF compliant data

## Deviations from the LCI method approaches
Background data:
- the \xe2\x80\x9cRecycled content cut-off\xe2\x80\x9d approach to allocate end-of-life by-products and secondary materials. This allocation is explained in the description of the recycled content system model (http://www.ecoinvent.org/database/system-models-in-ecoinvent-3/cut-off-system-model/allocation-cut-off-by-classification.html). The ecoinvent database mostly relies on “Allocation – market values” apart for few exceptions particularly in the energy sector. ecoinvent energy data is replaced with EF3.0 core data as per the EF guidelines version 2.0.
OR
- EF compliant data

## Modelling constants
All modelling constants follow the requirements listed in the Tender Specifications 070201/2020/SER/ENV.B1. Completeness: There are no intentional cut-offs in the inventory no matter how small their contribution to all the EF impact categories is. Eventual cut-offs are in compliance with the Guide for EF compliant data sets (JRC 2020), i.e. only if below the 3% cut-off rule. Water use: water use is modelled at country level using separate flows for water withdrawal, water release and water evaporation. Handling multi-functional processes: the following PEF multi- functionality decision hierarchy is applied for resolving all multi- functionality problems: (1) subdivision or system expansion; (2) allocation based on a relevant underlying physical relationship (substitution may apply here); (3) allocation based on some other relationship. Direct land use change: GHG emissions from direct LUC allocated to good/service for 20 years after the LUC occurs, with IPCC default values. Carbon storage and delayed emissions: credits associated with temporary (carbon) storage or delayed emissions up to 300 years are not be considered. Emissions off-setting: are not included. Capital goods (including infrastructures) and their End of life: they are included. System boundaries: system boundaries include all processes linked to the product supply chain (e.g. maintenance). Time period: emissions and removals are modelled as if released or removed at the beginning of the assessment method. Fossil and biogenic carbon emissions and removals: removals and emissions are modelled as follows: All GHG emissions from fossil fuels (including peat and limestone) are modelled consistently with the most updated ILCD list of elementary flows. The non-fossil (biogenic) carbon flows are modelled consistently with the most updated ILCD list of elementary flows.

## Cut-off and completeness
There are no intentional cut-offs in the inventory no matter how small their contribution to all the EF impact categories is. Eventual cut-offs are in compliance with the Guide for EF compliant data sets (JRC 2020), i.e. only if below the 3% cut-off rule. The dataset dry mass and water balance has been checked to ensure the inventory is complete. Capital goods (e.g. infrastructure) and their end-of-life are included.

## Data selection and combination
These datasets include, in both their foreground and background data, links to EF3.0 compliant data.
The relevant background data on energy, transport, and End of Life are from the LCDN data node (http://lcdn.thinkstep.com/Node/).
All other background data in the supply of this product for which no EF3.0 process was available are from ecoinvent v3.7 database (www.ecoinvent.org) or other data sources.

## Data treatment and extrapolations
Several data sources have been used to model the inventory.

## Use advice
This data set is a supporting sub-data set and must be used exclusively as sub-data set of its corresponding level-1 partly disaggregated data set (see “General comment” field for exact name and UUID).

## Data sources
- Background Data for Representative products and organisations. EF 3.0 compliant (data stock)
- ecoinvent (2017) Data on the Production of Chemicals created for the EU Product Environmental Footprint (PEF) pilot phase implementation, www.ecoinvent.org, ecoinvent Association, Zurich, Switzerland
- Moreno Ruiz E., Valsasina L., FitzGerald D., Symeonidis A., Turner D., Müller J., Minas N., Bourgault G., Vadenbo C., Ioannidou D., Wernet, G., (2020). Documentation of changes implemented in ecoinvent database v3.7 & v3.7.1. ecoinvent Association, Zürich, Switzerland.
- Dettore C (2011) Comparative Life-Cycle Assessment (LCA) of Textile Bleaching Systems: Gentle Power Bleach™ vs. Conventional Bleaching System. Poster session at: AATCC 2011 International Conference
- Spicka N, Tavcer PF (2013) NEW COMBINED BIO-SCOURING AND BIO-BLEACHING PROCESS OF COTTON FABRICS. Materials and technology 47 (2013) 4, 409–412. ISSN 1580-2949
- UNFCCC (2012) COMPONENT PROJECT ACTIVITIES DESIGN DOCUMENT (CPA-DD). Accessed online August 8th 2021: http://gec.jp/gec/jp/Activities/cdm-fs/2012/2012_cdmfs01_jPear_bangladesh_cpa-dd.pdf
- QDTONGDA (2021) Td638 Bunch Shaped Indigo Rope Dyeing Machine of Fast Dyeing Speed. Accessed online August 8th 2021: https://qdtongda.en.made-in-china.com/product/jyeQIDuEZXcl/China-Td638-Bunch-Shaped-Indigo-Rope-Dyeing-Machine-of-Fast-Dyeing-Speed.html

## Intended applications
Implementation of regular Product Environmental Footprint (PEF) studies and Organisation Environmental Footprint (OEF) studies exclusively under the specified Product groups and sectors as defined in the Product Environmental Footprint Category Rules (PEFCR) and Organisation Environmental Footprint Sectorial Rules (OEFSR) listed in http://ec.europa.eu/environment/eussd/smgp/PEFCR_OEFSR.htm
