# scouring, cotton, elementary; technology mix; production mix, at plant; service (raw materials excluded)

Dataset: ILCD process, Unit process, single operation
Geography: GLO
Reference year: 2021
Valid until: 2024
Classification: Other Services / Other services
LCI method principle: Attributional
LCI method approaches: Allocation - market value
Completeness: All relevant flows quantified
Project: Provision of process-based 3.0 Environmental Footprint-compliant life cycle inventory datasets - Apparel 2 - contract number 070201/2020/840292/SER/ENV.B.1
Generated by: Life Cycle Indonesia
Owner: PRé Sustainability B.V.
Compliance: Environmental Footprint non-primary supporting data set; Environmental Footprint 3.1
Amounts: no units in this file; such an amount is in the reference unit of its flow, which a separate flow dataset defines
copyright: true
licenseType: Free of charge for some user types or use types
accessRestrictions: Free of charge for all final users implementing a regular Product Environmental Footprint (PEF) studies and Organisation Environmental Footprint (OEF) studies exclusively under the specified Product groups and sectors as defined in the Product Environmental Footprint Category Rules (PEFCR) and Organisation Environmental Footprint Sectorial Rules (OEFSR) listed in http://ec.europa.eu/environment/eussd/smgp/PEFCR_OEFSR.htm and in accordance with the terms and conditions of the EULA (available at https://ecoinvent.lca-data.com/) exclusively until 31st December 2024. Any use of this dataset or any derivative data not within the specific context of one of the PEF/OEF projects or after the end of 2024 is not permitted.

## General comment
Notice: this data set supersedes the EF3.0-compliant version (see link under "preceding data set version" below calculated with the EF3.0). The life cycle inventory is not changed from the original EF3.0 data set. The LCIA results are calculated based on the EF3.1 methods which provide updated characterisation factors in the following impact categories: Climate Change, Ecotoxicity freshwater, Photochemical Ozone Formation, Acidification, Human Toxicity non-cancer, and Human Toxicity cancer. The review report and the data quality ratings refer to the original results. The data set has been updated by the European Commission on the basis of the original EF3.0 data set delivered by the data provider.This sub-process has limited documentation only. For all detailed documentation of the full model to which this data set belongs (such as DQRs, review reports and other technical documentation), please see this process: scouring, cotton - GLO []

## Technology and included processes
There are various scouring agents used in processing of fabrics, out of which the alkaline scouring agents are the most widely used worldwide. (Kolanjikombil, 2019)

The scouring process essentially consists of treatment with soap or detergent with or without addition of alkali. Depending on the fibre type, alkali may be weak (e.g. soda ash) or strong (caustic soda). When soap is used, a good supply of soft water is necessary. The metal ion (Fe3+ and Ca2+) present in hard water and pectin of cotton can form insoluble soap. The chelating or sequestering agent, e.g., Ethylenediaminetetraacetic acid (EDTA), Nitrilotriacetic acid (NTA), etc., may be used to prevent scum and film formation. Anionic, non-ionic detergents or their blends, solvent-assisted detergent blends and soaps are mostly used for scouring. For accelerating the scouring process, wetting agents in conjunction with high boiling solvents are sometimes used, but the process may not be eco-friendly. (Clark, 2011)

Builders are added to the kier boiling bath to increase the activity of soap or detergents. These are generally salts such as borates, silicates, phosphates, sodium chloride or sodium sulphate. Sodium metasilicate (Na2SiO3, 5H2O) can additionally act as a detergent and buffer. The function of the buffer is to drive soap from the water phase to the fabric/water interface and consequently increase the concentration of soap on the fabric. During boiling of cotton with caustic soda, entrapped air may cause oxidation of cellulose. This may be prevented by the addition of a mild reducing agent such as sodium bisulphite or even hydrosulphite in the scouring liquor. (Clark, 2011)

The activity starts when the raw materials enter the process. Materials entering the process are included as well as energy uses, water and chemicals. There is no direct emission to soil, but there is direct emission to water from this process such as BOD, COD, TDS. Chemical agents that are used in the process are emitted through the wastewater. Meanwhile some of the water is emitted to air and the rest will become the wastewater. In the model, the 5 different varieties of cotton fabrics are pre-treated by an alkaline scour boiling using the average value of 2 types of machines (kier boiler and jigger). The consumption of lubricating oil using an oven bonding machines as a proxy. The BOD and TDS using the average value of bioscouring and conventional scouring + bleaching as a proxy.

Kolanjikombil, Mathews. 2019. Handbook of Textile Processors Series Pretreatment of Textile Substrates. New Delhi: Woodhead Publishing India, pp 123
Clark, M. 2011. Handbook of Textile and Industrial Dyeing Vol. 1. Cambidge: Woodhead Publishing Limited, pp 86

## Reference product
- scouring, cotton // scouring, cotton // glo, elementary: 1

## Outputs
- Water, Emissions to air, unspecified: 0.004
- biological oxygen demand, Emissions to water, unspecified: 0.0160678
- chemical oxygen demand, Emissions to water, unspecified: 0.064271
- Dissolved solids, Emissions to water, unspecified: 0.0883726

## Impact indicators
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
## Deviations from the LCI method principle
The background data uses:
- the \xe2\x80\x9cRecycled content cut-off\xe2\x80\x9d approach to allocate end-of-life by-products and secondary materials. This allocation is explained in the description of the recycled content system model (http://www.ecoinvent.org/database/system-models-in-ecoinvent-3/cut-off-system-model/allocation-cut-off-by-classification.html).
OR
- EF compliant data

## Deviations from the LCI method approaches
Background data:
- the \xe2\x80\x9cRecycled content cut-off\xe2\x80\x9d approach to allocate end-of-life by-products and secondary materials. This allocation is explained in the description of the recycled content system model (http://www.ecoinvent.org/database/system-models-in-ecoinvent-3/cut-off-system-model/allocation-cut-off-by-classification.html). The ecoinvent database mostly relies on “Allocation – market values” apart for few exceptions particularly in the energy sector. ecoinvent energy data is replaced with EF3.0 core data as per the EF guidelines version 2.0.
OR
- EF compliant data

## Modelling constants
All modelling constants follow the requirements listed in the Tender Specifications 070201/2020/SER/ENV.B1. Completeness: There are no intentional cut-offs in the inventory no matter how small their contribution to all the EF impact categories is. Eventual cut-offs are in compliance with the Guide for EF compliant data sets (JRC 2020), i.e. only if below the 3% cut-off rule. Water use: water use is modelled at country level using separate flows for water withdrawal, water release and water evaporation. Handling multi-functional processes: the following PEF multi- functionality decision hierarchy is applied for resolving all multi- functionality problems: (1) subdivision or system expansion; (2) allocation based on a relevant underlying physical relationship (substitution may apply here); (3) allocation based on some other relationship. Direct land use change: GHG emissions from direct LUC allocated to good/service for 20 years after the LUC occurs, with IPCC default values. Carbon storage and delayed emissions: credits associated with temporary (carbon) storage or delayed emissions up to 300 years are not be considered. Emissions off-setting: are not included. Capital goods (including infrastructures) and their End of life: they are included. System boundaries: system boundaries include all processes linked to the product supply chain (e.g. maintenance). Time period: emissions and removals are modelled as if released or removed at the beginning of the assessment method. Fossil and biogenic carbon emissions and removals: removals and emissions are modelled as follows: All GHG emissions from fossil fuels (including peat and limestone) are modelled consistently with the most updated ILCD list of elementary flows. The non-fossil (biogenic) carbon flows are modelled consistently with the most updated ILCD list of elementary flows.

## Cut-off and completeness
There are no intentional cut-offs in the inventory no matter how small their contribution to all the EF impact categories is. Eventual cut-offs are in compliance with the Guide for EF compliant data sets (JRC 2020), i.e. only if below the 3% cut-off rule. The dataset dry mass and water balance has been checked to ensure the inventory is complete. Capital goods (e.g. infrastructure) and their end-of-life are included.

## Data selection and combination
These datasets include, in both their foreground and background data, links to EF3.0 compliant data.
The relevant background data on energy, transport, and End of Life are from the LCDN data node (http://lcdn.thinkstep.com/Node/).
All other background data in the supply of this product for which no EF3.0 process was available are from ecoinvent v3.7 database (www.ecoinvent.org) or other data sources.

## Data treatment and extrapolations
Several data sources have been used to model the inventory.

## Use advice
This data set is a supporting sub-data set and must be used exclusively as sub-data set of its corresponding level-1 partly disaggregated data set (see “General comment” field for exact name and UUID).

## Data sources
- Background Data for Representative products and organisations. EF 3.0 compliant (data stock)
- Mathews Kolanjikombil, (2019). Handbook of Textile Processors Series Pretreatment of Textile Substrates. WOODHEAD PUBLISHING INDIA PVT LTD, New Delhi, India
- M. Clark (2011). Handbook of textile and industrial dyeing Volume 1: Principles, processes and types of dyes. Woodhead Publishing Limited, Cambridge, UK
- Lebon (2021) Nonwoven Oven Machine, Catalog and Company Messages, Qingdao Lebon Industry Co., Ltd., China
- UN Data (2018) Statistics Data for Lubricants Productions, http://data.un.org/Data.aspx?q=Lubricants&d=EDATA&f=cmID%3aLU, United Nations Statistics Division, Global.
- Heshan (2021) High Temperature High Pressure Dyeing Machines, http://www.hsperfect.com/cgi/search-en.cgi?f=company_en_1_+product_en_1_&t=product_en_1_&id=92839, Heshan Perfect Dyeing Equipment Factory Co.,Ltd., China
- Zen (2021) Jigger Machine, https://www.zenindustrialengineers.com/automatic-dyeing-jigger.html, Zen Industrial Engineers, Gujarat, India
- Ruchika Aggarwal, Tanmay Dutta, Javed Sheikh, (2020). Extraction of pectinase from Candida isolated from textile mill effluent and its application in bio-scouring of cotton. Sustainable Chemistry and Pharmacy. Elsevier, New Delhi, India
- Umweltbundesamt (2003). Best Available Techniques in Textile Industry. Federal Environmental Agency (Umweltbundesamt), Berlin, Germany
- Ruchika Aggarwal, Tanmay Dutta, Javed Sheikh, (2020). Extraction of pectinase from Candida isolated from textile mill effluent and its application in bio-scouring of cotton. Sustainable Chemistry and Pharmacy. Elsevier, Delhi, India

## Intended applications
Implementation of regular Product Environmental Footprint (PEF) studies and Organisation Environmental Footprint (OEF) studies exclusively under the specified Product groups and sectors as defined in the Product Environmental Footprint Category Rules (PEFCR) and Organisation Environmental Footprint Sectorial Rules (OEFSR) listed in http://ec.europa.eu/environment/eussd/smgp/PEFCR_OEFSR.htm
