# cutting, hot knife; Cutting, hot knife process; production mix, at plant; service for 1 pair

Dataset: ILCD process, Partly terminated system
Geography: GLO
Reference year: 2021
Valid until: 2024
Classification: Systems / Textiles, furnitures and other interiors
LCI method principle: Attributional
LCI method approaches: Allocation - market value
Completeness: All relevant flows quantified
Project: Provision of process-based 3.0 Environmental Footprint-compliant life cycle inventory datasets - Apparel 2 - contract number 070201/2020/840292/SER/ENV.B.1
Generated by: Life Cycle Indonesia
Owner: PRé Sustainability B.V.
Compliance: ILCD Data Network - Entry-level; Suggestions for updating the PEF method 2019; ISO 14040 Environmental Management – Life Cycle Assessment – Principles and Framework, 2006; ISO 14044:2006. Environmental Management – Life Cycle Assessment – Requirements and guidelines.; Environmental Footprint 3.1
Review: Dependent internal review by Avraam Symeonidis, Emilia Moreno Ruiz; Independent review panel by Fábio Valebona
Data quality: Overall quality: Very good; Time representativeness: Very good; Geographical representativeness: Good; Technological representativeness: Very good; Precision: Good; Methodological appropriateness and consistency: Not applicable
Amounts: no units in this file; such an amount is in the reference unit of its flow, which a separate flow dataset defines
copyright: true
licenseType: Free of charge for some user types or use types
accessRestrictions: Free of charge for all final users implementing a regular Product Environmental Footprint (PEF) studies and Organisation Environmental Footprint (OEF) studies exclusively under the specified Product groups and sectors as defined in the Product Environmental Footprint Category Rules (PEFCR) and Organisation Environmental Footprint Sectorial Rules (OEFSR) listed in http://ec.europa.eu/environment/eussd/smgp/PEFCR_OEFSR.htm and in accordance with the terms and conditions of the EULA (available at https://ecoinvent.lca-data.com/) exclusively until 31st December 2024. Any use of this dataset or any derivative data not within the specific context of one of the PEF/OEF projects or after the end of 2024 is not permitted.

## General comment
Notice: this data set supersedes the EF3.0-compliant version (see link under "preceding data set version" below calculated with the EF3.0). The life cycle inventory is not changed from the original EF3.0 data set. The LCIA results are calculated based on the EF3.1 methods which provide updated characterisation factors in the following impact categories: Climate Change, Ecotoxicity freshwater, Photochemical Ozone Formation, Acidification, Human Toxicity non-cancer, and Human Toxicity cancer. The review report and the data quality ratings refer to the original results. The data set has been updated by the European Commission on the basis of the original EF3.0 data set delivered by the data provider.A hot knife is an electric tool with a heated blade that can be used to cut, shape, and seal synthetic materials. A hot knife will not work on natural materials because natural fabrics do not melt, they char and burn, and fray and unravel. Synthetic fabrics such as polyester, acrylic, Dacron, and nylon used in upholsteries, ropes, carpets, gaskets, sailcloth, webbings, and clothing cut well with a hot knife. Whereas, natural fabrics or material like cotton, cotton blends, wool, or leather do not cut well with a hot knife.

M.M. Newman. 2021. How to Use a Hot Knife, https://www.mmnewman.com/blog/how-to-use-a-hot-knife/, MM Newman Corporation, United States

## Technology and included processes
The hot cutting knife would melts the polymer filaments of the synthetic fabric precisely. Hot knife cuts the material to the desired length and fuses the loose ends of the filaments together to prevent fraying of the cut end once it has been installed or applied. It can create a seamless edge. The super-heated blade can be used to cut through and seal material easily (Newman, 2021).

In this model, average weight of a pair of shoes is 1 kg, therefore, the input needed to produce 1 pair of footwear is similliar to the input needed to produce 1 kg of apparel (Gottfridsson and Zhang, 2015).

The activity starts when the material enter the process. The materials entering the process are energy uses and infrastructure. There is no direct emission to soil and air since the emission comes from electricity usage, while the hazardous waste comes from waste lube oil. In the model, enegy sources of machines used solely from electricity.

A user employing this service within their models should use it along with an 1.25 kg of material to produce an 1 pair of shoes. 0.25 kg of waste shall also be added. A user is responsible for defining the nature of the recycling and/or disposal of this waste. Additionally, a user is responsible for accounting transportation expenditures for all extra input and output materials that need to be modelled alongside this service.

M.M. Newman. 2021. How to Use a Hot Knife, https://www.mmnewman.com/blog/how-to-use-a-hot-knife/, MM Newman Corporation, United States
Marie Gottfridsson, Yuqing Zhang. 2015. Environmental impacts of shoe consumption: Combining product flow analysis with an LCA model for Sweden. Sweden: Chalmers University of Technology

## Parameters
- kg_0: 1.10385e-7
  Mass in kg, for lubricating oil // lubricants at refinery // rsa; Articulated lorry transport, Euro 4, Total weight >32 t; EU+EFTA+UK
- km_0: 1000
  Distance in km, for lubricating oil // lubricants at refinery // rsa; Articulated lorry transport, Euro 4, Total weight >32 t; EU+EFTA+UK
- kg_km_0: 0.000110385; = kg_0*km_0
  Transport amount in km*km, for lubricating oil // lubricants at refinery // rsa; Articulated lorry transport, Euro 4, Total weight >32 t; EU+EFTA+UK
- kg_1: 4.52861e-8
  Mass in kg, for lubricating oil // lubricants at refinery // raf; Articulated lorry transport, Euro 4, Total weight >32 t; EU+EFTA+UK
- km_1: 1000
  Distance in km, for lubricating oil // lubricants at refinery // raf; Articulated lorry transport, Euro 4, Total weight >32 t; EU+EFTA+UK
- kg_km_1: 4.52861e-5; = kg_1*km_1
  Transport amount in km*km, for lubricating oil // lubricants at refinery // raf; Articulated lorry transport, Euro 4, Total weight >32 t; EU+EFTA+UK
- kg_2: 1.18674e-6
  Mass in kg, for lubricating oil // lubricants at refinery // ras w/o cn; Articulated lorry transport, Euro 4, Total weight >32 t; EU+EFTA+UK
- km_2: 1000
  Distance in km, for lubricating oil // lubricants at refinery // ras w/o cn; Articulated lorry transport, Euro 4, Total weight >32 t; EU+EFTA+UK
- kg_km_2: 0.00118674; = kg_2*km_2
  Transport amount in km*km, for lubricating oil // lubricants at refinery // ras w/o cn; Articulated lorry transport, Euro 4, Total weight >32 t; EU+EFTA+UK
- kg_3: 9.81334e-7
  Mass in kg, for lubricating oil // lubricants at refinery // ru; Articulated lorry transport, Euro 4, Total weight >32 t; EU+EFTA+UK
- km_3: 1000
  Distance in km, for lubricating oil // lubricants at refinery // ru; Articulated lorry transport, Euro 4, Total weight >32 t; EU+EFTA+UK
- kg_km_3: 0.000981334; = kg_3*km_3
  Transport amount in km*km, for lubricating oil // lubricants at refinery // ru; Articulated lorry transport, Euro 4, Total weight >32 t; EU+EFTA+UK
- kg_4: 9.26344e-7
  Mass in kg, for lubricating oil // lubricants at refinery // rna; Articulated lorry transport, Euro 4, Total weight >32 t; EU+EFTA+UK
- km_4: 1000
  Distance in km, for lubricating oil // lubricants at refinery // rna; Articulated lorry transport, Euro 4, Total weight >32 t; EU+EFTA+UK
- kg_km_4: 0.000926344; = kg_4*km_4
  Transport amount in km*km, for lubricating oil // lubricants at refinery // rna; Articulated lorry transport, Euro 4, Total weight >32 t; EU+EFTA+UK
- kg_5: 1.88423e-7
  Mass in kg, for lubricating oil // lubricants at refinery // cn; Articulated lorry transport, Euro 4, Total weight >32 t; EU+EFTA+UK
- km_5: 1000
  Distance in km, for lubricating oil // lubricants at refinery // cn; Articulated lorry transport, Euro 4, Total weight >32 t; EU+EFTA+UK
- kg_km_5: 0.000188423; = kg_5*km_5
  Transport amount in km*km, for lubricating oil // lubricants at refinery // cn; Articulated lorry transport, Euro 4, Total weight >32 t; EU+EFTA+UK
- kg_6: 6.04489e-7
  Mass in kg, for lubricating oil // lubricants at refinery // eu+efta+uk; Articulated lorry transport, Euro 4, Total weight >32 t; EU+EFTA+UK
- km_6: 999.191
  Distance in km, for lubricating oil // lubricants at refinery // eu+efta+uk; Articulated lorry transport, Euro 4, Total weight >32 t; EU+EFTA+UK
- kg_km_6: 0.000604; = kg_6*km_6
  Transport amount in km*km, for lubricating oil // lubricants at refinery // eu+efta+uk; Articulated lorry transport, Euro 4, Total weight >32 t; EU+EFTA+UK
- kg_7: 1.10385e-7
  Mass in kg, for lubricating oil // lubricants at refinery // rsa; Transoceanic ship, containers; GLO
- km_7: 18000
  Distance in km, for lubricating oil // lubricants at refinery // rsa; Transoceanic ship, containers; GLO
- kg_km_7: 0.00198693; = kg_7*km_7
  Transport amount in km*km, for lubricating oil // lubricants at refinery // rsa; Transoceanic ship, containers; GLO
- kg_8: 6.04489e-7
  Mass in kg, for lubricating oil // lubricants at refinery // eu+efta+uk; Transoceanic ship, containers; GLO
- km_8: 18031.8
  Distance in km, for lubricating oil // lubricants at refinery // eu+efta+uk; Transoceanic ship, containers; GLO
- kg_km_8: 0.0109; = kg_8*km_8
  Transport amount in km*km, for lubricating oil // lubricants at refinery // eu+efta+uk; Transoceanic ship, containers; GLO
- kg_9: 4.52861e-8
  Mass in kg, for lubricating oil // lubricants at refinery // raf; Transoceanic ship, containers; GLO
- km_9: 18000
  Distance in km, for lubricating oil // lubricants at refinery // raf; Transoceanic ship, containers; GLO
- kg_km_9: 0.00081515; = kg_9*km_9
  Transport amount in km*km, for lubricating oil // lubricants at refinery // raf; Transoceanic ship, containers; GLO
- kg_10: 1.18674e-6
  Mass in kg, for lubricating oil // lubricants at refinery // ras w/o cn; Transoceanic ship, containers; GLO
- km_10: 18000
  Distance in km, for lubricating oil // lubricants at refinery // ras w/o cn; Transoceanic ship, containers; GLO
- kg_km_10: 0.0213613; = kg_10*km_10
  Transport amount in km*km, for lubricating oil // lubricants at refinery // ras w/o cn; Transoceanic ship, containers; GLO
- kg_11: 9.81334e-7
  Mass in kg, for lubricating oil // lubricants at refinery // ru; Transoceanic ship, containers; GLO
- km_11: 18000
  Distance in km, for lubricating oil // lubricants at refinery // ru; Transoceanic ship, containers; GLO
- kg_km_11: 0.017664; = kg_11*km_11
  Transport amount in km*km, for lubricating oil // lubricants at refinery // ru; Transoceanic ship, containers; GLO
- kg_12: 9.26344e-7
  Mass in kg, for lubricating oil // lubricants at refinery // rna; Transoceanic ship, containers; GLO
- km_12: 18000
  Distance in km, for lubricating oil // lubricants at refinery // rna; Transoceanic ship, containers; GLO
- kg_km_12: 0.0166742; = kg_12*km_12
  Transport amount in km*km, for lubricating oil // lubricants at refinery // rna; Transoceanic ship, containers; GLO
- kg_13: 1.88423e-7
  Mass in kg, for lubricating oil // lubricants at refinery // cn; Transoceanic ship, containers; GLO
- km_13: 18000
  Distance in km, for lubricating oil // lubricants at refinery // cn; Transoceanic ship, containers; GLO
- kg_km_13: 0.00339161; = kg_13*km_13
  Transport amount in km*km, for lubricating oil // lubricants at refinery // cn; Transoceanic ship, containers; GLO

## Reference product
- cutting, hot knife, footwear // cutting, hot knife // glo: 1

## Inputs
- Electricity from Electricity grid mix 1kV-60kV - AU: 0.0002
- Electricity from Electricity grid mix 1kV-60kV - EU+EFTA+UK: 0.003
- Electricity from Electricity grid mix 1kV-60kV - NZ: 0
- Electricity from Electricity grid mix 1kV-60kV - RAF: 0.0007
- Electricity from Electricity grid mix 1kV-60kV - RNA: 0.0044
- Electricity from Electricity grid mix 1kV-60kV - RSA: 0.0015
- Electricity from Electricity grid mix 1kV-60kV - RU: 0.0009
- Transport of lubricating oil // lubricants at refinery // rsa by Articulated lorry transport, Euro 4, Total weight >32 t - EU+EFTA+UK: 0.000110385; = kg_km_0
- Transport of lubricating oil // lubricants at refinery // raf by Articulated lorry transport, Euro 4, Total weight >32 t - EU+EFTA+UK: 4.52861e-5; = kg_km_1
- Transport of lubricating oil // lubricants at refinery // ras w/o cn by Articulated lorry transport, Euro 4, Total weight >32 t - EU+EFTA+UK: 0.00118674; = kg_km_2
- Transport of lubricating oil // lubricants at refinery // ru by Articulated lorry transport, Euro 4, Total weight >32 t - EU+EFTA+UK: 0.000981334; = kg_km_3
- Transport of lubricating oil // lubricants at refinery // rna by Articulated lorry transport, Euro 4, Total weight >32 t - EU+EFTA+UK: 0.000926344; = kg_km_4
- Transport of lubricating oil // lubricants at refinery // cn by Articulated lorry transport, Euro 4, Total weight >32 t - EU+EFTA+UK: 0.000188423; = kg_km_5
- Transport of lubricating oil // lubricants at refinery // eu+efta+uk by Articulated lorry transport, Euro 4, Total weight >32 t - EU+EFTA+UK: 0.000604; = kg_km_6
- Transport of lubricating oil // lubricants at refinery // rsa by Transoceanic ship, containers - GLO: 0.00198693; = kg_km_7
- Transport of lubricating oil // lubricants at refinery // eu+efta+uk by Transoceanic ship, containers - GLO: 0.0109; = kg_km_8
- Transport of lubricating oil // lubricants at refinery // raf by Transoceanic ship, containers - GLO: 0.00081515; = kg_km_9
- Transport of lubricating oil // lubricants at refinery // ras w/o cn by Transoceanic ship, containers - GLO: 0.0213613; = kg_km_10
- Transport of lubricating oil // lubricants at refinery // ru by Transoceanic ship, containers - GLO: 0.017664; = kg_km_11
- Transport of lubricating oil // lubricants at refinery // rna by Transoceanic ship, containers - GLO: 0.0166742; = kg_km_12
- Transport of lubricating oil // lubricants at refinery // cn by Transoceanic ship, containers - GLO: 0.00339161; = kg_km_13
- Electricity from Electricity grid mix 1kV-60kV - CN: 0.00448551
- Electricity from Electricity grid mix 1kV-60kV - RAS w/o CN: 0.00491449
- cutting, hot knife, footwear // cutting, hot knife // glo, blackbox: 1
- cutting, hot knife, footwear // cutting, hot knife // glo, elementary: 1

## Impact indicators
- Eutrophication marine: 3.36817e-6
- Ecotoxicity, freshwater: 0.0171392
- Land use: 0.0051035
- Water use: 0.00125259
- Resource use, minerals and metals: 2.37171e-9
- Resource use, fossils: 0.0513358
- Climate change: 0.00387921
- Ozone depletion: 5.6389e-13
- Human toxicity, cancer: 2.35198e-12
- Human toxicity, non-cancer: 2.25943e-11
- EF-particulate Matter: 9.20437e-10
- Ionising radiation, human health: 0.000278406
- Photochemical ozone formation - human health: 1.03296e-5
- Acidification: 2.47417e-5
- Eutrophication, terrestrial: 3.66921e-5
- Eutrophication, freshwater: 9.60127e-9

## Deviations from the LCI method principle
The background data uses:
- the \xe2\x80\x9cRecycled content cut-off\xe2\x80\x9d approach to allocate end-of-life by-products and secondary materials. This allocation is explained in the description of the recycled content system model (http://www.ecoinvent.org/database/system-models-in-ecoinvent-3/cut-off-system-model/allocation-cut-off-by-classification.html).
OR
- EF compliant data

## Deviations from the LCI method approaches
Background data:
- the \xe2\x80\x9cRecycled content cut-off\xe2\x80\x9d approach to allocate end-of-life by-products and secondary materials. This allocation is explained in the description of the recycled content system model (http://www.ecoinvent.org/database/system-models-in-ecoinvent-3/cut-off-system-model/allocation-cut-off-by-classification.html). The ecoinvent database mostly relies on “Allocation – market values” apart for few exceptions particularly in the energy sector. ecoinvent energy data is replaced with EF3.0 core data as per the EF guidelines version 2.0.
OR
- EF compliant data

## Modelling constants
All modelling constants follow the requirements listed in the Tender Specifications 070201/2020/SER/ENV.B1. Completeness: There are no intentional cut-offs in the inventory no matter how small their contribution to all the EF impact categories is. Eventual cut-offs are in compliance with the Guide for EF compliant data sets (JRC 2020), i.e. only if below the 3% cut-off rule. Water use: water use is modelled at country level using separate flows for water withdrawal, water release and water evaporation. Handling multi-functional processes: the following PEF multi- functionality decision hierarchy is applied for resolving all multi- functionality problems: (1) subdivision or system expansion; (2) allocation based on a relevant underlying physical relationship (substitution may apply here); (3) allocation based on some other relationship. Direct land use change: GHG emissions from direct LUC allocated to good/service for 20 years after the LUC occurs, with IPCC default values. Carbon storage and delayed emissions: credits associated with temporary (carbon) storage or delayed emissions up to 300 years are not be considered. Emissions off-setting: are not included. Capital goods (including infrastructures) and their End of life: they are included. System boundaries: system boundaries include all processes linked to the product supply chain (e.g. maintenance). Time period: emissions and removals are modelled as if released or removed at the beginning of the assessment method. Fossil and biogenic carbon emissions and removals: removals and emissions are modelled as follows: All GHG emissions from fossil fuels (including peat and limestone) are modelled consistently with the most updated ILCD list of elementary flows. The non-fossil (biogenic) carbon flows are modelled consistently with the most updated ILCD list of elementary flows.

## Cut-off and completeness
There are no intentional cut-offs in the inventory no matter how small their contribution to all the EF impact categories is. Eventual cut-offs are in compliance with the Guide for EF compliant data sets (JRC 2020), i.e. only if below the 3% cut-off rule. The dataset dry mass and water balance has been checked to ensure the inventory is complete. Capital goods (e.g. infrastructure) and their end-of-life are included.

## Data selection and combination
These datasets include, in both their foreground and background data, links to EF3.0 compliant data.
The relevant background data on energy, transport, and End of Life are from the LCDN data node (http://lcdn.thinkstep.com/Node/).
All other background data in the supply of this product for which no EF3.0 process was available are from ecoinvent v3.7 database (www.ecoinvent.org) or other data sources.

## Data treatment and extrapolations
Several data sources have been used to model the inventory.

## Review details
Internal reviews have been asked to review the plausibility of the unit process, LCIA scores, and DQRs. Internal reviewers have also been asked to review the data for EF compliancy. The consortium is therefore responsible for aspects such as compliancy with the ILCD format, including validation in Look@LCI, and nomenclature.
Internal reviwers have been asked to judge based on the process name, that the unit process models in a complete and representative way the process in the requested location. The review encompassed the plausability of:
- exchanges with nature (elementary flows) as well as exchanges such as product and waste flows.
- meta information (general comment, technology comment, system boundaries, allocation, cut-off rules, etc.). Reviewers were asked to judge if the provided information is enough to understand the content of the process.
- LCIA scores
- DQRs including precision, technology, time and geography. As well as the overall DQR.
External reviewers have been asked to provide their expertise in the field of interest. External reviewers have been asked to review the unit process, including eventual methodological choices, the LCIA scores (provided with contribution scores as well), and DQRs. External reviewers have been provided all the information in a tool developed by the consortium for the purpose of this project.
External reviewers have been asked to judge based on the process name, that the unit process models in a complete and representative way the process in the requested location. The review encompassed:
- Plausability and completeness of exchanges with nature (elementary flows) as well as exchanges such as product and waste flows.
- Review of meta information (general comment, technology comment, system boundaries, allocation, cut-off rules, etc.). Reviewers were asked to judge if the provided information is enough to understand the content of the process.
- Review of properties (biogenic carbon and water content).
- Review of allocation keys.
- Plausability of LCIA scores calculated by the consortium.
- Plausability of DQRs including precision, technology, time and geography. As well as the overall DQR.

## Data sources
- Background Data for Representative products and organisations. EF 3.0 compliant (data stock)
- Marie Gottfridsson, Yuqing Zhang (2015). Environmental impacts of shoe consumption: Combining product flow analysis with an LCA model for Sweden. Chalmers University of Technology, Gothenburg, Sweden.
- Silvana Zhezhova, Goran Demboski, Vlatko Panov, (2013). Optimization of technological process of cutting by use of software applications for cut order planning, https://eprints.ugd.edu.mk/8393/, UGD Academic Repository, Štip, Republic of Macedonia
- Havesino (2021) SLITTING MACHINE FY1600JC, https://www.havesinoslitter.com/uploads/201715328/r201712041647253638371.pdf?rnd=693, HAVESINO SLITTER, Hangzhou, China.
- Lebon (2021) Nonwoven Oven Machine, Catalog and Company Messages, Qingdao Lebon Industry Co., Ltd., China

## Intended applications
Implementation of regular Product Environmental Footprint (PEF) studies and Organisation Environmental Footprint (OEF) studies exclusively under the specified Product groups and sectors as defined in the Product Environmental Footprint Category Rules (PEFCR) and Organisation Environmental Footprint Sectorial Rules (OEFSR) listed in http://ec.europa.eu/environment/eussd/smgp/PEFCR_OEFSR.htm
