# extrusion and staple fiber spinning, synthetics, for knit, open end (rotor); technology mix; production mix, at plant; service, Synthetic texturized staple yarn

Dataset: ILCD process, Partly terminated system
Geography: GLO
Reference year: 2021
Valid until: 2024
Classification: Systems / Textiles, furnitures and other interiors
LCI method principle: Attributional
LCI method approaches: Allocation - market value
Completeness: All relevant flows quantified
Project: Provision of process-based 3.0 Environmental Footprint-compliant life cycle inventory datasets - Apparel 1 - contract number 070201/2020/840291/SER/ENV.B.1
Generated by: Metsims Sustainability Consulting
Owner: PRé Sustainability B.V.
Compliance: ILCD Data Network - Entry-level; Suggestions for updating the PEF method 2019; ISO 14040 Environmental Management – Life Cycle Assessment – Principles and Framework, 2006; ISO 14044:2006. Environmental Management – Life Cycle Assessment – Requirements and guidelines.; Environmental Footprint 3.1
Review: Dependent internal review by Lucia Valsasina, Emilia Moreno Ruiz; Independent review panel by Subramanian Senthilkannan Muthu
Data quality: Overall quality: Good; Time representativeness: Very good; Geographical representativeness: Good; Technological representativeness: Good; Precision: Good; Methodological appropriateness and consistency: Not applicable
Amounts: no units in this file; such an amount is in the reference unit of its flow, which a separate flow dataset defines
copyright: true
licenseType: Free of charge for some user types or use types
accessRestrictions: Free of charge for all final users implementing a regular Product Environmental Footprint (PEF) studies and Organisation Environmental Footprint (OEF) studies exclusively under the specified Product groups and sectors as defined in the Product Environmental Footprint Category Rules (PEFCR) and Organisation Environmental Footprint Sectorial Rules (OEFSR) listed in http://ec.europa.eu/environment/eussd/smgp/PEFCR_OEFSR.htm and in accordance with the terms and conditions of the EULA (available at https://ecoinvent.lca-data.com/) exclusively until 31st December 2024. Any use of this dataset or any derivative data not within the specific context of one of the PEF/OEF projects or after the end of 2024 is not permitted.

## General comment
Notice: this data set supersedes the EF3.0-compliant version (see link under "preceding data set version" below calculated with the EF3.0). The life cycle inventory is not changed from the original EF3.0 data set. The LCIA results are calculated based on the EF3.1 methods which provide updated characterisation factors in the following impact categories: Climate Change, Ecotoxicity freshwater, Photochemical Ozone Formation, Acidification, Human Toxicity non-cancer, and Human Toxicity cancer. The review report and the data quality ratings refer to the original results. The data set has been updated by the European Commission on the basis of the original EF3.0 data set delivered by the data provider.This data represents staple synthetic yarn spinning by open end (rotor) spinning, intended for knitted fabrics which need lower twisted yarns.

Dataset covers extrusion of filaments, their cut and spinning. During production, waste rate is 0.3%. Waste of yarn and fiber didn't included to dataset because of the type of waste can change according to raw material of the yarn. Dataset user must consider the waste according to raw material of the fabric.

## Technology and included processes
This process covers synthetic filament production, cutting of filaments and spinning by open end (rotor) technology of staple fibers.

In melt spinning, thermoplastic polymer granules are fed into an extruder and then the polymer melt is pumped through a spinneret under pressure. The extruded polymer is cooled down with cold air to solidify into filaments.

Open-end or Rotor spinning is one of the most modern techniques for spinning and winding. This technology uses spindle for spinning. In this process, spinning and winding are combined in one process. Although the production line of rotor spinning shorter than ring spinning, production rate is higher. But some quality parameters of yarn is lower than ring spinning.

1.03 kg of material is used to produce 1 kg of yarn. 0.03 kg of waste amount shall also be added into the model. The nature of the recycling and/or disposal of this waste should be considered . The user is also responsible for accounting transportation expenditures for all extra input and output materials that need to be modelled alongside this service.*

*Ref: Altun, S. (2012). Prediction of textile waste profile and recycling opportunities in Turk. Fibres & Textiles in Eastern Europe.

## Reference product
- synthetic staple yarn, textured // extrusion and staple fiber spinning, synthetics, for knit, open end (rotor) // glo: 1

## Inputs
- Electricity from Electricity grid mix 1kV-60kV - AU: 0.0001504
- Electricity from Electricity grid mix 1kV-60kV - EU+EFTA+UK: 0.00221559
- Electricity from Electricity grid mix 1kV-60kV - NZ: 2.866e-5
- Electricity from Electricity grid mix 1kV-60kV - RAF: 0.00048416
- Electricity from Electricity grid mix 1kV-60kV - RNA: 0.0032424
- Electricity from Electricity grid mix 1kV-60kV - RSA: 0.0011002
- Electricity from Electricity grid mix 1kV-60kV - RU: 0.00064835
- Electricity from Electricity grid mix 1kV-60kV - CN: 0.00332226
- Electricity from Electricity grid mix 1kV-60kV - RAS w/o CN: 0.00363999
- synthetic staple yarn, textured // extrusion and staple fiber spinning, synthetics, for knit, open end (rotor) // glo, blackbox: 1
- synthetic staple yarn, textured // extrusion and staple fiber spinning, synthetics, for knit, open end (rotor) // glo, elementary: 1

## Impact indicators
- Eutrophication marine: 0.00400773
- Ecotoxicity, freshwater: 24.3258
- Land use: 1.01859
- Water use: 2.2966
- Resource use, minerals and metals: 0.000244904
- Resource use, fossils: 52.1916
- Climate change: 4.05853
- Ozone depletion: 3.46521e-9
- Human toxicity, cancer: 2.70452e-9
- Human toxicity, non-cancer: 3.27097e-8
- EF-particulate Matter: 9.2054e-7
- Ionising radiation, human health: 0.254764
- Photochemical ozone formation - human health: 0.0107361
- Acidification: 0.0239961
- Eutrophication, terrestrial: 0.0368831
- Eutrophication, freshwater: 0.000165493

## Deviations from the LCI method principle
The background data uses:
- the \xe2\x80\x9cRecycled content cut-off\xe2\x80\x9d approach to allocate end-of-life by-products and secondary materials. This allocation is explained in the description of the recycled content system model (http://www.ecoinvent.org/database/system-models-in-ecoinvent-3/cut-off-system-model/allocation-cut-off-by-classification.html).
OR
- EF compliant data

## Deviations from the LCI method approaches
Background data:
- the \xe2\x80\x9cRecycled content cut-off\xe2\x80\x9d approach to allocate end-of-life by-products and secondary materials. This allocation is explained in the description of the recycled content system model (http://www.ecoinvent.org/database/system-models-in-ecoinvent-3/cut-off-system-model/allocation-cut-off-by-classification.html). The ecoinvent database mostly relies on “Allocation – market values” apart for few exceptions particularly in the energy sector. ecoinvent energy data is replaced with EF3.0 core data as per the EF guidelines version 2.0.
OR
- EF compliant data

## Modelling constants
All modelling constants follow the requirements listed in the Tender Specifications 070201/2020/SER/ENV.B1. Completeness: There are no intentional cut-offs in the inventory no matter how small their contribution to all the EF impact categories is. Eventual cut-offs are in compliance with the Guide for EF compliant data sets (JRC 2020), i.e. only if below the 3% cut-off rule. Water use: water use is modelled at country level using separate flows for water withdrawal, water release and water evaporation. Handling multi-functional processes: the following PEF multi- functionality decision hierarchy is applied for resolving all multi- functionality problems: (1) subdivision or system expansion; (2) allocation based on a relevant underlying physical relationship (substitution may apply here); (3) allocation based on some other relationship. Direct land use change: GHG emissions from direct LUC allocated to good/service for 20 years after the LUC occurs, with IPCC default values. Carbon storage and delayed emissions: credits associated with temporary (carbon) storage or delayed emissions up to 300 years are not be considered. Emissions off-setting: are not included. Capital goods (including infrastructures) and their End of life: they are included. System boundaries: system boundaries include all processes linked to the product supply chain (e.g. maintenance). Time period: emissions and removals are modelled as if released or removed at the beginning of the assessment method. Fossil and biogenic carbon emissions and removals: removals and emissions are modelled as follows: All GHG emissions from fossil fuels (including peat and limestone) are modelled consistently with the most updated ILCD list of elementary flows. The non-fossil (biogenic) carbon flows are modelled consistently with the most updated ILCD list of elementary flows.

## Cut-off and completeness
There are no intentional cut-offs in the inventory no matter how small their contribution to all the EF impact categories is. Eventual cut-offs are in compliance with the Guide for EF compliant data sets (JRC 2020), i.e. only if below the 3% cut-off rule. The dataset dry mass and water balance has been checked to ensure the inventory is complete. Capital goods (e.g. infrastructure) and their end-of-life are included.

## Data selection and combination
These datasets include, in both their foreground and background data, links to EF3.0 compliant data.
The relevant background data on energy, transport, and End of Life are from the LCDN data node (http://lcdn.thinkstep.com/Node/).
All other background data in the supply of this product for which no EF3.0 process was available are from ecoinvent v3.7 database (www.ecoinvent.org) or other data sources.

## Data treatment and extrapolations
Several data sources have been used to model the inventory.

## Review details
Internal reviews have been asked to review the plausibility of the unit process, LCIA scores, and DQRs. Internal reviewers have also been asked to review the data for EF compliancy. The consortium is therefore responsible for aspects such as compliancy with the ILCD format, including validation in Look@LCI, and nomenclature.
Internal reviwers have been asked to judge based on the process name, that the unit process models in a complete and representative way the process in the requested location. The review encompassed the plausability of:
- exchanges with nature (elementary flows) as well as exchanges such as product and waste flows.
- meta information (general comment, technology comment, system boundaries, allocation, cut-off rules, etc.). Reviewers were asked to judge if the provided information is enough to understand the content of the process.
- LCIA scores
- DQRs including precision, technology, time and geography. As well as the overall DQR.
External reviewers have been asked to provide their expertise in the field of interest. External reviewers have been asked to review the unit process, including eventual methodological choices, the LCIA scores (provided with contribution scores as well), and DQRs. External reviewers have been provided all the information in a tool developed by the consortium for the purpose of this project.
External reviewers have been asked to judge based on the process name, that the unit process models in a complete and representative way the process in the requested location. The review encompassed:
- Plausability and completeness of exchanges with nature (elementary flows) as well as exchanges such as product and waste flows.
- Review of meta information (general comment, technology comment, system boundaries, allocation, cut-off rules, etc.). Reviewers were asked to judge if the provided information is enough to understand the content of the process.
- Review of properties (biogenic carbon and water content).
- Review of allocation keys.
- Plausability of LCIA scores calculated by the consortium.
- Plausability of DQRs including precision, technology, time and geography. As well as the overall DQR.

## Data sources
- Background Data for Representative products and organisations. EF 3.0 compliant (data stock)
- http://cisscomachinery.com/ATY_YARN_AIR_TEXTURED_YARN_MACHINE, Acces Date: 26.02.2021
- http://www.diyingmachine.cn/product/60304418592-212637274/Synthetic_Fibers_Cutting_Machine_Glass_Fiber_Chopping_Machine_Waste_Clothes_Fabric_Cutting_Machine.html?spm=a2700.shop_pl.41413.20.69c6226653Wnmr, Access Date: 26.02.2021
- www.korteks.com.tr, Access Date: 26.02.2021
- Rawal, A., & Mukhopadhyay, S. (2014). Melt spinning of synthetic polymeric filaments. In Advances in filament yarn spinning of Textiles and Polymers (pp. 75-99). Woodhead Publishing.
- Bernholz, W. F., Redston, J. P., & Schlatter, C. (1974). Spin-Finish Usage and Compounding for Man-Made Fibers.
- Freitas A., Zhang G., Mathews R., (2017), Waterfootprint Assessment of Polyester and Viscose and Comparison to Cotton, Water Footprint Network
- About Us, http://www.korteks.com.tr/en/corporate/about-us, Access Date: 23.06.2021

## Intended applications
Implementation of regular Product Environmental Footprint (PEF) studies and Organisation Environmental Footprint (OEF) studies exclusively under the specified Product groups and sectors as defined in the Product Environmental Footprint Category Rules (PEFCR) and Organisation Environmental Footprint Sectorial Rules (OEFSR) listed in http://ec.europa.eu/environment/eussd/smgp/PEFCR_OEFSR.htm
