# spreading stabilising infill with machine; service process; production mix, at plant; service

Dataset: ILCD process, Partly terminated system
Geography: EU+EFTA+UK
Reference year: 2021
Valid until: 2024
Classification: Systems / Textiles, furnitures and other interiors
LCI method principle: Attributional
LCI method approaches: Allocation - market value
Completeness: All relevant flows quantified
Project: Provision of process-based 3.0 Environmental Footprint-compliant life cycle inventory datasets - Apparel 2 - contract number 070201/2020/840292/SER/ENV.B.1
Generated by: Life Cycle Indonesia
Owner: PRé Sustainability B.V.
Compliance: ILCD Data Network - Entry-level; Suggestions for updating the PEF method 2019; ISO 14040 Environmental Management – Life Cycle Assessment – Principles and Framework, 2006; ISO 14044:2006. Environmental Management – Life Cycle Assessment – Requirements and guidelines.; Environmental Footprint 3.1
Review: Dependent internal review by Avraam Symeonidis, Emilia Moreno Ruiz; Independent review panel by Subramanian Senthilkannan Muthu
Data quality: Overall quality: Very good; Time representativeness: Very good; Geographical representativeness: Very good; Technological representativeness: Very good; Precision: Good; Methodological appropriateness and consistency: Not applicable
Amounts: no units in this file; such an amount is in the reference unit of its flow, which a separate flow dataset defines
copyright: true
licenseType: Free of charge for some user types or use types
accessRestrictions: Free of charge for all final users implementing a regular Product Environmental Footprint (PEF) studies and Organisation Environmental Footprint (OEF) studies exclusively under the specified Product groups and sectors as defined in the Product Environmental Footprint Category Rules (PEFCR) and Organisation Environmental Footprint Sectorial Rules (OEFSR) listed in http://ec.europa.eu/environment/eussd/smgp/PEFCR_OEFSR.htm and in accordance with the terms and conditions of the EULA (available at https://ecoinvent.lca-data.com/) exclusively until 31st December 2024. Any use of this dataset or any derivative data not within the specific context of one of the PEF/OEF projects or after the end of 2024 is not permitted.

## General comment
Notice: this data set supersedes the EF3.0-compliant version (see link under "preceding data set version" below calculated with the EF3.0). The life cycle inventory is not changed from the original EF3.0 data set. The LCIA results are calculated based on the EF3.1 methods which provide updated characterisation factors in the following impact categories: Climate Change, Ecotoxicity freshwater, Photochemical Ozone Formation, Acidification, Human Toxicity non-cancer, and Human Toxicity cancer. The review report and the data quality ratings refer to the original results. The data set has been updated by the European Commission on the basis of the original EF3.0 data set delivered by the data provider.Natural grass blades stand upright because their roots dig deep into the soil. This is what makes them stand up straight and remain stable even when pressure is applied. For this same effect, artificial turf requires infill, which is often either a type of sand or rubber, which gives it shape, stability and uniformity. Infill gives artificial turf the support and stability it requires to make it maintain the appearance of real grass (V'Londa, 2017).

A user employing this service within their models should use it along with 2.7 kg of materials (infill sand/materials) to produce 1 kg of artificial turf carpet, 0.00000025 kg of waste (resulted from lubricating oil, approximated amount) shall also be added. A user is responsible for defining the nature of recycling and/or disposal of this waste. Additionally, a user is responsible for accounting transportation expenditures of all extra input and output materials that need to be modelled alongside this service.

V'Londa (2017) Sand Infill for Artificial Grass, https://www.artificialgrassliquidators.com/sand-infill-for-artificial-grass/, Artificial Grass liquidators, Temecula, CA

## Technology and included processes
The infills materials used in this process is silica sand. Which is typically inexpensive and works well in low-traffic areas. It is easy to find and install this type of infill, making it popular for areas that don’t take a beating, like a patio or a balcony, or unused areas of grass (V'Londa, 2017).

The activity starts when the material enters the process. The data covered in this model are the input of energy, infrastructure, and auxiliary materials (e.g. silica sand). There is no direct emission to soil and water. The energy sources of the machine is used solely from diesel, hence the emission to air resulted from diesel-burning. The hazardous waste comes from the waste lube oil. The consumption of lubricating oil using a stitch bonding machine as a proxy.

V'Londa (2017) Sand Infill for Artificial Grass, https://www.artificialgrassliquidators.com/sand-infill-for-artificial-grass/, Artificial Grass liquidators, Temecula, CA

## Parameters
- kg_0: 2.70745
  Mass in kg, for silica sand // silica sand production // eu+efta+uk; Articulated lorry transport, Euro 4, Total weight >32 t; EU+EFTA+UK
- km_0: 130
  Distance in km, for silica sand // silica sand production // eu+efta+uk; Articulated lorry transport, Euro 4, Total weight >32 t; EU+EFTA+UK
- kg_km_0: 351.968; = kg_0*km_0
  Transport amount in km*km, for silica sand // silica sand production // eu+efta+uk; Articulated lorry transport, Euro 4, Total weight >32 t; EU+EFTA+UK
- kg_1: 2.46965e-7
  Mass in kg, for lubricating oil // lubricants at refinery // eu+efta+uk; Articulated lorry transport, Euro 4, Total weight >32 t; EU+EFTA+UK
- km_1: 1000.14
  Distance in km, for lubricating oil // lubricants at refinery // eu+efta+uk; Articulated lorry transport, Euro 4, Total weight >32 t; EU+EFTA+UK
- kg_km_1: 0.000247; = kg_1*km_1
  Transport amount in km*km, for lubricating oil // lubricants at refinery // eu+efta+uk; Articulated lorry transport, Euro 4, Total weight >32 t; EU+EFTA+UK
- kg_2: 2.70745
  Mass in kg, for silica sand // silica sand production // eu+efta+uk; Barge; EU+EFTA+UK
- km_2: 270
  Distance in km, for silica sand // silica sand production // eu+efta+uk; Barge; EU+EFTA+UK
- kg_km_2: 731.01; = kg_2*km_2
  Transport amount in km*km, for silica sand // silica sand production // eu+efta+uk; Barge; EU+EFTA+UK
- kg_3: 2.46965e-7
  Mass in kg, for lubricating oil // lubricants at refinery // eu+efta+uk; Barge; EU+EFTA+UK
- km_3: 129.573
  Distance in km, for lubricating oil // lubricants at refinery // eu+efta+uk; Barge; EU+EFTA+UK
- kg_km_3: 3.2e-5; = kg_3*km_3
  Transport amount in km*km, for lubricating oil // lubricants at refinery // eu+efta+uk; Barge; EU+EFTA+UK
- kg_4: 2.70745
  Mass in kg, for silica sand // silica sand production // eu+efta+uk; Freight train, average; EU+EFTA+UK
- km_4: 240
  Distance in km, for silica sand // silica sand production // eu+efta+uk; Freight train, average; EU+EFTA+UK
- kg_km_4: 649.787; = kg_4*km_4
  Transport amount in km*km, for silica sand // silica sand production // eu+efta+uk; Freight train, average; EU+EFTA+UK
- kg_5: 2.46965e-7
  Mass in kg, for lubricating oil // lubricants at refinery // eu+efta+uk; Freight train, average; EU+EFTA+UK
- km_5: 271.294
  Distance in km, for lubricating oil // lubricants at refinery // eu+efta+uk; Freight train, average; EU+EFTA+UK
- kg_km_5: 6.7e-5; = kg_5*km_5
  Transport amount in km*km, for lubricating oil // lubricants at refinery // eu+efta+uk; Freight train, average; EU+EFTA+UK

## Reference product
- spreading stabilising infill with machine // spreading stabilising infill with machine // eu+efta+uk: 1

## Inputs
- Transport of silica sand // silica sand production // eu+efta+uk by Articulated lorry transport, Euro 4, Total weight >32 t - EU+EFTA+UK: 351.968; = kg_km_0
- Transport of lubricating oil // lubricants at refinery // eu+efta+uk by Articulated lorry transport, Euro 4, Total weight >32 t - EU+EFTA+UK: 0.000247; = kg_km_1
- Transport of silica sand // silica sand production // eu+efta+uk by Barge - EU+EFTA+UK: 731.01; = kg_km_2
- Transport of lubricating oil // lubricants at refinery // eu+efta+uk by Barge - EU+EFTA+UK: 3.2e-5; = kg_km_3
- Transport of silica sand // silica sand production // eu+efta+uk by Freight train, average - EU+EFTA+UK: 649.787; = kg_km_4
- Transport of lubricating oil // lubricants at refinery // eu+efta+uk by Freight train, average - EU+EFTA+UK: 6.7e-5; = kg_km_5
- spreading stabilising infill with machine // spreading stabilising infill with machine // eu+efta+uk, blackbox: 1
- spreading stabilising infill with machine // spreading stabilising infill with machine // eu+efta+uk, elementary: 1

## Impact indicators
- Eutrophication marine: 0.000281109
- Ecotoxicity, freshwater: 1.12936
- Land use: 0.681575
- Water use: 0.111565
- Resource use, minerals and metals: 1.87277e-7
- Resource use, fossils: 2.08158
- Climate change: 0.152947
- Ozone depletion: 2.0902e-11
- Human toxicity, cancer: 5.08469e-11
- Human toxicity, non-cancer: 7.65394e-10
- EF-particulate Matter: 1.11056e-8
- Ionising radiation, human health: 0.00461415
- Photochemical ozone formation - human health: 0.000729153
- Acidification: 0.000775569
- Eutrophication, terrestrial: 0.00311795
- Eutrophication, freshwater: 1.55176e-6

## Deviations from the LCI method principle
The background data uses:
- the \xe2\x80\x9cRecycled content cut-off\xe2\x80\x9d approach to allocate end-of-life by-products and secondary materials. This allocation is explained in the description of the recycled content system model (http://www.ecoinvent.org/database/system-models-in-ecoinvent-3/cut-off-system-model/allocation-cut-off-by-classification.html).
OR
- EF compliant data

## Deviations from the LCI method approaches
Background data:
- the \xe2\x80\x9cRecycled content cut-off\xe2\x80\x9d approach to allocate end-of-life by-products and secondary materials. This allocation is explained in the description of the recycled content system model (http://www.ecoinvent.org/database/system-models-in-ecoinvent-3/cut-off-system-model/allocation-cut-off-by-classification.html). The ecoinvent database mostly relies on “Allocation – market values” apart for few exceptions particularly in the energy sector. ecoinvent energy data is replaced with EF3.0 core data as per the EF guidelines version 2.0.
OR
- EF compliant data

## Modelling constants
All modelling constants follow the requirements listed in the Tender Specifications 070201/2020/SER/ENV.B1. Completeness: There are no intentional cut-offs in the inventory no matter how small their contribution to all the EF impact categories is. Eventual cut-offs are in compliance with the Guide for EF compliant data sets (JRC 2020), i.e. only if below the 3% cut-off rule. Water use: water use is modelled at country level using separate flows for water withdrawal, water release and water evaporation. Handling multi-functional processes: the following PEF multi- functionality decision hierarchy is applied for resolving all multi- functionality problems: (1) subdivision or system expansion; (2) allocation based on a relevant underlying physical relationship (substitution may apply here); (3) allocation based on some other relationship. Direct land use change: GHG emissions from direct LUC allocated to good/service for 20 years after the LUC occurs, with IPCC default values. Carbon storage and delayed emissions: credits associated with temporary (carbon) storage or delayed emissions up to 300 years are not be considered. Emissions off-setting: are not included. Capital goods (including infrastructures) and their End of life: they are included. System boundaries: system boundaries include all processes linked to the product supply chain (e.g. maintenance). Time period: emissions and removals are modelled as if released or removed at the beginning of the assessment method. Fossil and biogenic carbon emissions and removals: removals and emissions are modelled as follows: All GHG emissions from fossil fuels (including peat and limestone) are modelled consistently with the most updated ILCD list of elementary flows. The non-fossil (biogenic) carbon flows are modelled consistently with the most updated ILCD list of elementary flows.

## Cut-off and completeness
There are no intentional cut-offs in the inventory no matter how small their contribution to all the EF impact categories is. Eventual cut-offs are in compliance with the Guide for EF compliant data sets (JRC 2020), i.e. only if below the 3% cut-off rule. The dataset dry mass and water balance has been checked to ensure the inventory is complete. Capital goods (e.g. infrastructure) and their end-of-life are included.

## Data selection and combination
These datasets include, in both their foreground and background data, links to EF3.0 compliant data.
The relevant background data on energy, transport, and End of Life are from the LCDN data node (http://lcdn.thinkstep.com/Node/).
All other background data in the supply of this product for which no EF3.0 process was available are from ecoinvent v3.7 database (www.ecoinvent.org) or other data sources.

## Data treatment and extrapolations
Several data sources have been used to model the inventory.

## Review details
Internal reviews have been asked to review the plausibility of the unit process, LCIA scores, and DQRs. Internal reviewers have also been asked to review the data for EF compliancy. The consortium is therefore responsible for aspects such as compliancy with the ILCD format, including validation in Look@LCI, and nomenclature.
Internal reviwers have been asked to judge based on the process name, that the unit process models in a complete and representative way the process in the requested location. The review encompassed the plausability of:
- exchanges with nature (elementary flows) as well as exchanges such as product and waste flows.
- meta information (general comment, technology comment, system boundaries, allocation, cut-off rules, etc.). Reviewers were asked to judge if the provided information is enough to understand the content of the process.
- LCIA scores
- DQRs including precision, technology, time and geography. As well as the overall DQR.
External reviewers have been asked to provide their expertise in the field of interest. External reviewers have been asked to review the unit process, including eventual methodological choices, the LCIA scores (provided with contribution scores as well), and DQRs. External reviewers have been provided all the information in a tool developed by the consortium for the purpose of this project.
External reviewers have been asked to judge based on the process name, that the unit process models in a complete and representative way the process in the requested location. The review encompassed:
- Plausability and completeness of exchanges with nature (elementary flows) as well as exchanges such as product and waste flows.
- Review of meta information (general comment, technology comment, system boundaries, allocation, cut-off rules, etc.). Reviewers were asked to judge if the provided information is enough to understand the content of the process.
- Review of properties (biogenic carbon and water content).
- Review of allocation keys.
- Plausability of LCIA scores calculated by the consortium.
- Plausability of DQRs including precision, technology, time and geography. As well as the overall DQR.

## Data sources
- Background Data for Representative products and organisations. EF 3.0 compliant (data stock)
- UN Data (2018) Statistics Data for Lubricants Productions, http://data.un.org/Data.aspx?q=Lubricants&d=EDATA&f=cmID%3aLU, United Nations Statistics Division, Global.
- SMG (20210 SandMatic B2005, https://www.smg-gmbh.de/en/products/turf/filling/sandmatic/b2005, SMG SPORTPLATZMASCHINENBAU GMBH, VÖHRINGEN, GERMANY
- V'Londa (2017) Sand Infill for Artificial Grass https://www.artificialgrassliquidators.com/sand-infill-for-artificial-grass/, Artificial Grass liquidators, Temecula, CA
- Artificial Grass GB (2021) Artificial Grass, https://www.artificialgrassgb.co.uk/artificial-grass.html, Artificial Grass GB, Bradford, UK

## Intended applications
Implementation of regular Product Environmental Footprint (PEF) studies and Organisation Environmental Footprint (OEF) studies exclusively under the specified Product groups and sectors as defined in the Product Environmental Footprint Category Rules (PEFCR) and Organisation Environmental Footprint Sectorial Rules (OEFSR) listed in http://ec.europa.eu/environment/eussd/smgp/PEFCR_OEFSR.htm
