# finishing, stain resistant/stain release; pad dry-cure method; production mix, at plant; service

Dataset: ILCD process, Partly terminated system
Geography: GLO
Reference year: 2021
Valid until: 2024
Classification: Systems / Textiles, furnitures and other interiors
LCI method principle: Attributional
LCI method approaches: Allocation - market value
Completeness: All relevant flows quantified
Project: Provision of process-based 3.0 Environmental Footprint-compliant life cycle inventory datasets - Apparel 2 - contract number 070201/2020/840292/SER/ENV.B.1
Generated by: Life Cycle Indonesia
Owner: PRé Sustainability B.V.
Compliance: ILCD Data Network - Entry-level; Suggestions for updating the PEF method 2019; ISO 14040 Environmental Management – Life Cycle Assessment – Principles and Framework, 2006; ISO 14044:2006. Environmental Management – Life Cycle Assessment – Requirements and guidelines.; Environmental Footprint 3.1
Review: Dependent internal review by Avraam Symeonidis, Emilia Moreno Ruiz; Independent review panel by Fábio Valebona
Data quality: Overall quality: Good; Time representativeness: Very good; Geographical representativeness: Good; Technological representativeness: Good; Precision: Good; Methodological appropriateness and consistency: Not applicable
Amounts: no units in this file; such an amount is in the reference unit of its flow, which a separate flow dataset defines
copyright: true
licenseType: Free of charge for some user types or use types
accessRestrictions: Free of charge for all final users implementing a regular Product Environmental Footprint (PEF) studies and Organisation Environmental Footprint (OEF) studies exclusively under the specified Product groups and sectors as defined in the Product Environmental Footprint Category Rules (PEFCR) and Organisation Environmental Footprint Sectorial Rules (OEFSR) listed in http://ec.europa.eu/environment/eussd/smgp/PEFCR_OEFSR.htm and in accordance with the terms and conditions of the EULA (available at https://ecoinvent.lca-data.com/) exclusively until 31st December 2024. Any use of this dataset or any derivative data not within the specific context of one of the PEF/OEF projects or after the end of 2024 is not permitted.

## General comment
Notice: this data set supersedes the EF3.0-compliant version (see link under "preceding data set version" below calculated with the EF3.0). The life cycle inventory is not changed from the original EF3.0 data set. The LCIA results are calculated based on the EF3.1 methods which provide updated characterisation factors in the following impact categories: Climate Change, Ecotoxicity freshwater, Photochemical Ozone Formation, Acidification, Human Toxicity non-cancer, and Human Toxicity cancer. The review report and the data quality ratings refer to the original results. The data set has been updated by the European Commission on the basis of the original EF3.0 data set delivered by the data provider.Stain resistant fabric technology provides permanent stain repellency and stain release properties. Not only does this fabric repel stains, but it also releases the dirt and oils that cause stains. It helps garments stay cleaner, longer, because of the dual action of two robust and balanced technologies, working in the fabric for the life of your garment.

PROPERTIES ACHIEVED BY STAIN RESISTANT:
- Reduces rate of soil absorption, deposit and detention in fabric
- Provides for good soil release properties
- Prevents stains from spreading
- Allows water and spills to form globules on fabric surface preventing penetration into the fiber
- Resists water and water born stains
- Adds soft silicone hand
- Improves tear strength

Shalini, Noopur (2007). Soil Release Finish. https://www.fibre2fashion.com/industry-article/1921/soil-release-finish

## Technology and included processes
Fluorochemical coatings dominate the stain repellency textile apparel market. Out of all existing textile chemicals, only fluorochemicals have shown the unique property to provide fabrics a sufficiently low surface energy coating able to resist penetration of both oil and water-based stains (polar and non-polar liquids). Unfortunately, fabrics modified with fluorochemicals by conventional textile finishing methods often show poor performance with laundering or wear. Application of perfluorochemicals can be accomplished in a variety of ways, many of which impart hydrophobicity and/or oleophobicity to fabrics in addition to other desirable properties. The application can be done using a photonic surface treatment, pulsed plasma polymerization of monomers, chemical vapor deposition, direct fluorination, and sol-gel method.

Conventionally, Fixer ALN was incorporated in the recipe to improve the durability of the finish to laundry. Similar research for fluorocarbon finish with DMDHEU (dimethyloldihydroxy ethylene urea) based resin was used to impart durability of fluorocarbon finish, and also to impart anti-crease property. The fabric was then subjected to stain repellent finish 2 dip - 2 nip pad and then dried at 110 degree for 5 minutes and then cured at 160 degree for 10 minutes.

In this process the finishing chemical is applied using a pad dry-cure method. The process includes the use of balloon padder, dryer, and stenter for curing. The process includes chemicals, energy, lube oil consumption and infrastructure. There is no direct emission to air since the emission comes from electricity usage, while hazardous waste comes from waste lube oil. In the model, the energy sources of machines used from electricity and steam. The consumption of lubricating oil using a thermobonding oven as a proxy. The GSM of the fabric is assumed to be 135 GSM cotton fabric. There are two chemicals used in this process which are dimethylodihydroxy ethylene urea (DMDHEU) and Hexa methyl melamine formaldehyde (Fixer ALN)

Abhijit Majumdar (2020), Functional Textile and Clothing 2020
Rinivas Hanumansetty etc. (2012) Stain Resistance of Cotton Fabric before and after Finishing with Admicellar Polymerization.

## Parameters
- kg_0: 4.13282e-7
  Mass in kg, for lubricating oil // lubricants at refinery // cn; Articulated lorry transport, Euro 4, Total weight >32 t; EU+EFTA+UK
- km_0: 1000
  Distance in km, for lubricating oil // lubricants at refinery // cn; Articulated lorry transport, Euro 4, Total weight >32 t; EU+EFTA+UK
- kg_km_0: 0.000413282; = kg_0*km_0
  Transport amount in km*km, for lubricating oil // lubricants at refinery // cn; Articulated lorry transport, Euro 4, Total weight >32 t; EU+EFTA+UK
- kg_1: 1.32587e-6
  Mass in kg, for lubricating oil // lubricants at refinery // eu+efta+uk; Articulated lorry transport, Euro 4, Total weight >32 t; EU+EFTA+UK
- km_1: 1000
  Distance in km, for lubricating oil // lubricants at refinery // eu+efta+uk; Articulated lorry transport, Euro 4, Total weight >32 t; EU+EFTA+UK
- kg_km_1: 0.00132587; = kg_1*km_1
  Transport amount in km*km, for lubricating oil // lubricants at refinery // eu+efta+uk; Articulated lorry transport, Euro 4, Total weight >32 t; EU+EFTA+UK
- kg_2: 9.93295e-8
  Mass in kg, for lubricating oil // lubricants at refinery // raf; Articulated lorry transport, Euro 4, Total weight >32 t; EU+EFTA+UK
- km_2: 1000
  Distance in km, for lubricating oil // lubricants at refinery // raf; Articulated lorry transport, Euro 4, Total weight >32 t; EU+EFTA+UK
- kg_km_2: 9.93295e-5; = kg_2*km_2
  Transport amount in km*km, for lubricating oil // lubricants at refinery // raf; Articulated lorry transport, Euro 4, Total weight >32 t; EU+EFTA+UK
- kg_3: 2.60297e-6
  Mass in kg, for lubricating oil // lubricants at refinery // ras w/o cn; Articulated lorry transport, Euro 4, Total weight >32 t; EU+EFTA+UK
- km_3: 1000
  Distance in km, for lubricating oil // lubricants at refinery // ras w/o cn; Articulated lorry transport, Euro 4, Total weight >32 t; EU+EFTA+UK
- kg_km_3: 0.00260297; = kg_3*km_3
  Transport amount in km*km, for lubricating oil // lubricants at refinery // ras w/o cn; Articulated lorry transport, Euro 4, Total weight >32 t; EU+EFTA+UK
- kg_4: 2.03182e-6
  Mass in kg, for lubricating oil // lubricants at refinery // rna; Articulated lorry transport, Euro 4, Total weight >32 t; EU+EFTA+UK
- km_4: 1000
  Distance in km, for lubricating oil // lubricants at refinery // rna; Articulated lorry transport, Euro 4, Total weight >32 t; EU+EFTA+UK
- kg_km_4: 0.00203182; = kg_4*km_4
  Transport amount in km*km, for lubricating oil // lubricants at refinery // rna; Articulated lorry transport, Euro 4, Total weight >32 t; EU+EFTA+UK
- kg_5: 2.42116e-7
  Mass in kg, for lubricating oil // lubricants at refinery // rsa; Articulated lorry transport, Euro 4, Total weight >32 t; EU+EFTA+UK
- km_5: 1000
  Distance in km, for lubricating oil // lubricants at refinery // rsa; Articulated lorry transport, Euro 4, Total weight >32 t; EU+EFTA+UK
- kg_km_5: 0.000242116; = kg_5*km_5
  Transport amount in km*km, for lubricating oil // lubricants at refinery // rsa; Articulated lorry transport, Euro 4, Total weight >32 t; EU+EFTA+UK
- kg_6: 2.15244e-6
  Mass in kg, for lubricating oil // lubricants at refinery // ru; Articulated lorry transport, Euro 4, Total weight >32 t; EU+EFTA+UK
- km_6: 1000
  Distance in km, for lubricating oil // lubricants at refinery // ru; Articulated lorry transport, Euro 4, Total weight >32 t; EU+EFTA+UK
- kg_km_6: 0.00215244; = kg_6*km_6
  Transport amount in km*km, for lubricating oil // lubricants at refinery // ru; Articulated lorry transport, Euro 4, Total weight >32 t; EU+EFTA+UK
- kg_7: 0.2535
  Mass in kg, for melamine formaldehyde resin // melamine formaldehyde resin production // eu+efta+uk; Articulated lorry transport, Euro 4, Total weight >32 t; EU+EFTA+UK
- km_7: 1000
  Distance in km, for melamine formaldehyde resin // melamine formaldehyde resin production // eu+efta+uk; Articulated lorry transport, Euro 4, Total weight >32 t; EU+EFTA+UK
- kg_km_7: 253.5; = kg_7*km_7
  Transport amount in km*km, for melamine formaldehyde resin // melamine formaldehyde resin production // eu+efta+uk; Articulated lorry transport, Euro 4, Total weight >32 t; EU+EFTA+UK
- kg_8: 0.42
  Mass in kg, for urea-formaldehyde resin // urea-formaldehyde resin production // eu+efta+uk; Articulated lorry transport, Euro 4, Total weight >32 t; EU+EFTA+UK
- km_8: 1000
  Distance in km, for urea-formaldehyde resin // urea-formaldehyde resin production // eu+efta+uk; Articulated lorry transport, Euro 4, Total weight >32 t; EU+EFTA+UK
- kg_km_8: 420; = kg_8*km_8
  Transport amount in km*km, for urea-formaldehyde resin // urea-formaldehyde resin production // eu+efta+uk; Articulated lorry transport, Euro 4, Total weight >32 t; EU+EFTA+UK
- kg_9: 4.13282e-7
  Mass in kg, for lubricating oil // lubricants at refinery // cn; Transoceanic ship, containers; GLO
- km_9: 18000
  Distance in km, for lubricating oil // lubricants at refinery // cn; Transoceanic ship, containers; GLO
- kg_km_9: 0.00743907; = kg_9*km_9
  Transport amount in km*km, for lubricating oil // lubricants at refinery // cn; Transoceanic ship, containers; GLO
- kg_10: 1.32587e-6
  Mass in kg, for lubricating oil // lubricants at refinery // eu+efta+uk; Transoceanic ship, containers; GLO
- km_10: 18000
  Distance in km, for lubricating oil // lubricants at refinery // eu+efta+uk; Transoceanic ship, containers; GLO
- kg_km_10: 0.0238657; = kg_10*km_10
  Transport amount in km*km, for lubricating oil // lubricants at refinery // eu+efta+uk; Transoceanic ship, containers; GLO
- kg_11: 9.93295e-8
  Mass in kg, for lubricating oil // lubricants at refinery // raf; Transoceanic ship, containers; GLO
- km_11: 18000
  Distance in km, for lubricating oil // lubricants at refinery // raf; Transoceanic ship, containers; GLO
- kg_km_11: 0.00178793; = kg_11*km_11
  Transport amount in km*km, for lubricating oil // lubricants at refinery // raf; Transoceanic ship, containers; GLO
- kg_12: 2.60297e-6
  Mass in kg, for lubricating oil // lubricants at refinery // ras w/o cn; Transoceanic ship, containers; GLO
- km_12: 18000
  Distance in km, for lubricating oil // lubricants at refinery // ras w/o cn; Transoceanic ship, containers; GLO
- kg_km_12: 0.0468534; = kg_12*km_12
  Transport amount in km*km, for lubricating oil // lubricants at refinery // ras w/o cn; Transoceanic ship, containers; GLO
- kg_13: 2.03182e-6
  Mass in kg, for lubricating oil // lubricants at refinery // rna; Transoceanic ship, containers; GLO
- km_13: 18000
  Distance in km, for lubricating oil // lubricants at refinery // rna; Transoceanic ship, containers; GLO
- kg_km_13: 0.0365728; = kg_13*km_13
  Transport amount in km*km, for lubricating oil // lubricants at refinery // rna; Transoceanic ship, containers; GLO
- kg_14: 2.42116e-7
  Mass in kg, for lubricating oil // lubricants at refinery // rsa; Transoceanic ship, containers; GLO
- km_14: 18000
  Distance in km, for lubricating oil // lubricants at refinery // rsa; Transoceanic ship, containers; GLO
- kg_km_14: 0.00435808; = kg_14*km_14
  Transport amount in km*km, for lubricating oil // lubricants at refinery // rsa; Transoceanic ship, containers; GLO
- kg_15: 2.15244e-6
  Mass in kg, for lubricating oil // lubricants at refinery // ru; Transoceanic ship, containers; GLO
- km_15: 18000
  Distance in km, for lubricating oil // lubricants at refinery // ru; Transoceanic ship, containers; GLO
- kg_km_15: 0.0387438; = kg_15*km_15
  Transport amount in km*km, for lubricating oil // lubricants at refinery // ru; Transoceanic ship, containers; GLO
- kg_16: 0.2535
  Mass in kg, for melamine formaldehyde resin // melamine formaldehyde resin production // eu+efta+uk; Transoceanic ship, containers; GLO
- km_16: 18000
  Distance in km, for melamine formaldehyde resin // melamine formaldehyde resin production // eu+efta+uk; Transoceanic ship, containers; GLO
- kg_km_16: 4563; = kg_16*km_16
  Transport amount in km*km, for melamine formaldehyde resin // melamine formaldehyde resin production // eu+efta+uk; Transoceanic ship, containers; GLO
- kg_17: 0.42
  Mass in kg, for urea-formaldehyde resin // urea-formaldehyde resin production // eu+efta+uk; Transoceanic ship, containers; GLO
- km_17: 18000
  Distance in km, for urea-formaldehyde resin // urea-formaldehyde resin production // eu+efta+uk; Transoceanic ship, containers; GLO
- kg_km_17: 7560; = kg_17*km_17
  Transport amount in km*km, for urea-formaldehyde resin // urea-formaldehyde resin production // eu+efta+uk; Transoceanic ship, containers; GLO

## Reference product
- finishing, stain resistant/stain release // finishing, stain resistant/stain release // glo: 1

## Inputs
- Electricity from Electricity grid mix 1kV-60kV - AU: 0.0067
- Electricity from Electricity grid mix 1kV-60kV - EU+EFTA+UK: 0.0987
- Electricity from Electricity grid mix 1kV-60kV - NZ: 0.0013
- Electricity from Electricity grid mix 1kV-60kV - RAF: 0.0216
- Electricity from Electricity grid mix 1kV-60kV - RNA: 0.1444
- Electricity from Electricity grid mix 1kV-60kV - RSA: 0.049
- Electricity from Electricity grid mix 1kV-60kV - RU: 0.0288
- Transport of lubricating oil // lubricants at refinery // cn by Articulated lorry transport, Euro 4, Total weight >32 t - EU+EFTA+UK: 0.000413282; = kg_km_0
- Transport of lubricating oil // lubricants at refinery // eu+efta+uk by Articulated lorry transport, Euro 4, Total weight >32 t - EU+EFTA+UK: 0.00132587; = kg_km_1
- Transport of lubricating oil // lubricants at refinery // raf by Articulated lorry transport, Euro 4, Total weight >32 t - EU+EFTA+UK: 9.93295e-5; = kg_km_2
- Transport of lubricating oil // lubricants at refinery // ras w/o cn by Articulated lorry transport, Euro 4, Total weight >32 t - EU+EFTA+UK: 0.00260297; = kg_km_3
- Transport of lubricating oil // lubricants at refinery // rna by Articulated lorry transport, Euro 4, Total weight >32 t - EU+EFTA+UK: 0.00203182; = kg_km_4
- Transport of lubricating oil // lubricants at refinery // rsa by Articulated lorry transport, Euro 4, Total weight >32 t - EU+EFTA+UK: 0.000242116; = kg_km_5
- Transport of lubricating oil // lubricants at refinery // ru by Articulated lorry transport, Euro 4, Total weight >32 t - EU+EFTA+UK: 0.00215244; = kg_km_6
- Transport of melamine formaldehyde resin // melamine formaldehyde resin production // eu+efta+uk by Articulated lorry transport, Euro 4, Total weight >32 t - EU+EFTA+UK: 253.5; = kg_km_7
- Transport of urea-formaldehyde resin // urea-formaldehyde resin production // eu+efta+uk by Articulated lorry transport, Euro 4, Total weight >32 t - EU+EFTA+UK: 420; = kg_km_8
- Transport of lubricating oil // lubricants at refinery // cn by Transoceanic ship, containers - GLO: 0.00743907; = kg_km_9
- Transport of lubricating oil // lubricants at refinery // eu+efta+uk by Transoceanic ship, containers - GLO: 0.0238657; = kg_km_10
- Transport of lubricating oil // lubricants at refinery // raf by Transoceanic ship, containers - GLO: 0.00178793; = kg_km_11
- Transport of lubricating oil // lubricants at refinery // ras w/o cn by Transoceanic ship, containers - GLO: 0.0468534; = kg_km_12
- Transport of lubricating oil // lubricants at refinery // rna by Transoceanic ship, containers - GLO: 0.0365728; = kg_km_13
- Transport of lubricating oil // lubricants at refinery // rsa by Transoceanic ship, containers - GLO: 0.00435808; = kg_km_14
- Transport of lubricating oil // lubricants at refinery // ru by Transoceanic ship, containers - GLO: 0.0387438; = kg_km_15
- Transport of melamine formaldehyde resin // melamine formaldehyde resin production // eu+efta+uk by Transoceanic ship, containers - GLO: 4563; = kg_km_16
- Transport of urea-formaldehyde resin // urea-formaldehyde resin production // eu+efta+uk by Transoceanic ship, containers - GLO: 7560; = kg_km_17
- Electricity from Electricity grid mix 1kV-60kV - CN: 0.147879
- Electricity from Electricity grid mix 1kV-60kV - RAS w/o CN: 0.162021
- finishing, stain resistant/stain release // finishing, stain resistant/stain release // glo, blackbox: 1
- finishing, stain resistant/stain release // finishing, stain resistant/stain release // glo, elementary: 1

## Impact indicators
- Eutrophication marine: 0.00314957
- Ecotoxicity, freshwater: 17.4219
- Land use: 4.07377
- Water use: 3.34831
- Resource use, minerals and metals: 1.37156e-5
- Resource use, fossils: 52.6771
- Climate change: 2.7994
- Ozone depletion: 2.46543e-9
- Human toxicity, cancer: 2.02006e-8
- Human toxicity, non-cancer: 2.08866e-8
- EF-particulate Matter: 3.92812e-7
- Ionising radiation, human health: 0.0686559
- Photochemical ozone formation - human health: 0.00896324
- Acidification: 0.0205272
- Eutrophication, terrestrial: 0.0595486
- Eutrophication, freshwater: 0.000258227

## Deviations from the LCI method principle
The background data uses:
- the \xe2\x80\x9cRecycled content cut-off\xe2\x80\x9d approach to allocate end-of-life by-products and secondary materials. This allocation is explained in the description of the recycled content system model (http://www.ecoinvent.org/database/system-models-in-ecoinvent-3/cut-off-system-model/allocation-cut-off-by-classification.html).
OR
- EF compliant data

## Deviations from the LCI method approaches
Background data:
- the \xe2\x80\x9cRecycled content cut-off\xe2\x80\x9d approach to allocate end-of-life by-products and secondary materials. This allocation is explained in the description of the recycled content system model (http://www.ecoinvent.org/database/system-models-in-ecoinvent-3/cut-off-system-model/allocation-cut-off-by-classification.html). The ecoinvent database mostly relies on “Allocation – market values” apart for few exceptions particularly in the energy sector. ecoinvent energy data is replaced with EF3.0 core data as per the EF guidelines version 2.0.
OR
- EF compliant data

## Modelling constants
All modelling constants follow the requirements listed in the Tender Specifications 070201/2020/SER/ENV.B1. Completeness: There are no intentional cut-offs in the inventory no matter how small their contribution to all the EF impact categories is. Eventual cut-offs are in compliance with the Guide for EF compliant data sets (JRC 2020), i.e. only if below the 3% cut-off rule. Water use: water use is modelled at country level using separate flows for water withdrawal, water release and water evaporation. Handling multi-functional processes: the following PEF multi- functionality decision hierarchy is applied for resolving all multi- functionality problems: (1) subdivision or system expansion; (2) allocation based on a relevant underlying physical relationship (substitution may apply here); (3) allocation based on some other relationship. Direct land use change: GHG emissions from direct LUC allocated to good/service for 20 years after the LUC occurs, with IPCC default values. Carbon storage and delayed emissions: credits associated with temporary (carbon) storage or delayed emissions up to 300 years are not be considered. Emissions off-setting: are not included. Capital goods (including infrastructures) and their End of life: they are included. System boundaries: system boundaries include all processes linked to the product supply chain (e.g. maintenance). Time period: emissions and removals are modelled as if released or removed at the beginning of the assessment method. Fossil and biogenic carbon emissions and removals: removals and emissions are modelled as follows: All GHG emissions from fossil fuels (including peat and limestone) are modelled consistently with the most updated ILCD list of elementary flows. The non-fossil (biogenic) carbon flows are modelled consistently with the most updated ILCD list of elementary flows.

## Cut-off and completeness
There are no intentional cut-offs in the inventory no matter how small their contribution to all the EF impact categories is. Eventual cut-offs are in compliance with the Guide for EF compliant data sets (JRC 2020), i.e. only if below the 3% cut-off rule. The dataset dry mass and water balance has been checked to ensure the inventory is complete. Capital goods (e.g. infrastructure) and their end-of-life are included.

## Data selection and combination
These datasets include, in both their foreground and background data, links to EF3.0 compliant data.
The relevant background data on energy, transport, and End of Life are from the LCDN data node (http://lcdn.thinkstep.com/Node/).
All other background data in the supply of this product for which no EF3.0 process was available are from ecoinvent v3.7 database (www.ecoinvent.org) or other data sources.

## Data treatment and extrapolations
Several data sources have been used to model the inventory.

## Review details
Internal reviews have been asked to review the plausibility of the unit process, LCIA scores, and DQRs. Internal reviewers have also been asked to review the data for EF compliancy. The consortium is therefore responsible for aspects such as compliancy with the ILCD format, including validation in Look@LCI, and nomenclature.
Internal reviwers have been asked to judge based on the process name, that the unit process models in a complete and representative way the process in the requested location. The review encompassed the plausability of:
- exchanges with nature (elementary flows) as well as exchanges such as product and waste flows.
- meta information (general comment, technology comment, system boundaries, allocation, cut-off rules, etc.). Reviewers were asked to judge if the provided information is enough to understand the content of the process.
- LCIA scores
- DQRs including precision, technology, time and geography. As well as the overall DQR.
External reviewers have been asked to provide their expertise in the field of interest. External reviewers have been asked to review the unit process, including eventual methodological choices, the LCIA scores (provided with contribution scores as well), and DQRs. External reviewers have been provided all the information in a tool developed by the consortium for the purpose of this project.
External reviewers have been asked to judge based on the process name, that the unit process models in a complete and representative way the process in the requested location. The review encompassed:
- Plausability and completeness of exchanges with nature (elementary flows) as well as exchanges such as product and waste flows.
- Review of meta information (general comment, technology comment, system boundaries, allocation, cut-off rules, etc.). Reviewers were asked to judge if the provided information is enough to understand the content of the process.
- Review of properties (biogenic carbon and water content).
- Review of allocation keys.
- Plausability of LCIA scores calculated by the consortium.
- Plausability of DQRs including precision, technology, time and geography. As well as the overall DQR.

## Data sources
- Background Data for Representative products and organisations. EF 3.0 compliant (data stock)
- UN Data (2018) Statistics Data for Lubricants Productions, http://data.un.org/Data.aspx?q=Lubricants&d=EDATA&f=cmID%3aLU, United Nations Statistics Division, Global
- Lebon (2021) Nonwoven Oven Machine, Catalog and Company Messages, Qingdao Lebon Industry Co., Ltd., China
- Chowdhury, Kawser Parveen (2018) Effect of Special Finishes on the Functional Properties of Cotton Fabrics, Journal of Textile Science and Technology, 4, 49-66, https://file.scirp.org/pdf/JTST_2018050815303131.pdf, Bangladesh
- Deguan (2018) Balloon Padder with Detwister and Squeezer for tubular fabric only, http://www.textilemachinery.com.cn/index.php?m=content&c=index&a=show&catid=59&id=82, Dezhou Deguan TextileMachinery Co.,Ltd., Shandong, China
- Finestart (2017) Open Width Compactor(Dryer, Stenter and Compactor 3in1), http://www.finestart.com.cn/index.php?m=content&c=index&a=show&catid=55&id=62, Shandong Finestart Imp.& Exp. Co.,Ltd., Shandong, China
- Abhijit Majumdar(2020) Functional Textiles and Clothing, pp 138
- Madhu, Amit (2012), Low wet pick-up techniques in textile finishing https://www.researchgate.net/publication/291935918_Low_wet_pick-up_techniques_in_textile_finishing
- Expert interview (2021)
- lnchem (2021). Fixer-ALN Technical Information http://www.lnchem.in/TDS/additions/Fixer-ALN%20%5Blit%5D.pdf

## Intended applications
Implementation of regular Product Environmental Footprint (PEF) studies and Organisation Environmental Footprint (OEF) studies exclusively under the specified Product groups and sectors as defined in the Product Environmental Footprint Category Rules (PEFCR) and Organisation Environmental Footprint Sectorial Rules (OEFSR) listed in http://ec.europa.eu/environment/eussd/smgp/PEFCR_OEFSR.htm
