# assembly, insole; insole assembly process; production mix, at plant; service

Dataset: ILCD process, Partly terminated system
Geography: GLO
Reference year: 2021
Valid until: 2024
Classification: Systems / Textiles, furnitures and other interiors
LCI method principle: Attributional
LCI method approaches: Allocation - market value
Completeness: All relevant flows quantified
Project: Provision of process-based 3.0 Environmental Footprint-compliant life cycle inventory datasets - Apparel 2 - contract number 070201/2020/840292/SER/ENV.B.1
Generated by: Life Cycle Indonesia
Owner: PRé Sustainability B.V.
Compliance: ILCD Data Network - Entry-level; Suggestions for updating the PEF method 2019; ISO 14040 Environmental Management – Life Cycle Assessment – Principles and Framework, 2006; ISO 14044:2006. Environmental Management – Life Cycle Assessment – Requirements and guidelines.; Environmental Footprint 3.1
Review: Dependent internal review by Avraam Symeonidis, Emilia Moreno Ruiz; Independent review panel by Subramanian Senthilkannan Muthu
Data quality: Overall quality: Good; Time representativeness: Very good; Geographical representativeness: Good; Technological representativeness: Good; Precision: Good; Methodological appropriateness and consistency: Not applicable
Amounts: no units in this file; such an amount is in the reference unit of its flow, which a separate flow dataset defines
copyright: true
licenseType: Free of charge for some user types or use types
accessRestrictions: Free of charge for all final users implementing a regular Product Environmental Footprint (PEF) studies and Organisation Environmental Footprint (OEF) studies exclusively under the specified Product groups and sectors as defined in the Product Environmental Footprint Category Rules (PEFCR) and Organisation Environmental Footprint Sectorial Rules (OEFSR) listed in http://ec.europa.eu/environment/eussd/smgp/PEFCR_OEFSR.htm and in accordance with the terms and conditions of the EULA (available at https://ecoinvent.lca-data.com/) exclusively until 31st December 2024. Any use of this dataset or any derivative data not within the specific context of one of the PEF/OEF projects or after the end of 2024 is not permitted.

## General comment
Notice: this data set supersedes the EF3.0-compliant version (see link under "preceding data set version" below calculated with the EF3.0). The life cycle inventory is not changed from the original EF3.0 data set. The LCIA results are calculated based on the EF3.1 methods which provide updated characterisation factors in the following impact categories: Climate Change, Ecotoxicity freshwater, Photochemical Ozone Formation, Acidification, Human Toxicity non-cancer, and Human Toxicity cancer. The review report and the data quality ratings refer to the original results. The data set has been updated by the European Commission on the basis of the original EF3.0 data set delivered by the data provider.In the insole assembly process, the upper is fixed to the insole by a hot-melting adhesive which is injected at the time of assembly in the region between the lower part of the assembly insole and the folded upper so that it is possible to assemble the upper part of the shoe with a single operation. Then, according to known methods, the folded upper is glued onto the lower part of the insole and is milled to obtain a flat surface on which the sole is finally glued to obtain the finished shoe. In the rear part, the insole generally includes, below a supporting base, a metal shank and a reinforcement member which is arranged below the metal shank. The shank is generally fixed to the reinforcement member. However, sometimes insole assembly only puts together two parts of the shoes which are the insole and the shanks. Assembled insoles are also mechanically pressed to ensure components tightness even after intensive shoe usage. This kind of insole assembly is usually used in customizing insole manufacturing.

European Patent Office (1999) Assembly insole for assembling shoes, shoe assembled on the insole and preparation method https://patents.google.com/patent/EP0916278A1/en

Solettificio Monica Italian Leather Insoles (2021) Manufacturing Process
http://www.solettificiomonica.it/solettificio-monica-italian-leather-insoles-manifacturing-process/

## Technology and included processes
In this model, the hot-melt adhesive film is used instead of glue and applied with an Insole transferring machine. Hot-melt adhesives are solid thermoplastic resins that liquefy when heated. When applied to a surface they cool, harden and reach their bond strength within seconds. The insoles are then pressed with a sole pneumatic press machine. The type of adhesive used in this model is thermoplastic polyurethane since it is one of the most common adhesive films used for the shoe insole.

The activity starts when the raw materials enter the process which is the insole. The energy consumption, thermoplastic polyurethane adhesive, and infrastructure of the machine are included. There is no direct emission to the air since the emission comes from electricity usage, while hazardous waste comes from the waste lube oil. In the model, the energy sources of machines are used solely from electricity. The consumption of lubricating oil using a stitch bonding machine as a proxy. The excess adhesive waste is not included in this process as it is not significant.

## Parameters
- kg_0: 7.85615e-8
  Mass in kg, for lubricating oil // lubricants at refinery // rsa; Articulated lorry transport, Euro 4, Total weight >32 t; EU+EFTA+UK
- km_0: 1000
  Distance in km, for lubricating oil // lubricants at refinery // rsa; Articulated lorry transport, Euro 4, Total weight >32 t; EU+EFTA+UK
- kg_km_0: 7.85615e-5; = kg_0*km_0
  Transport amount in km*km, for lubricating oil // lubricants at refinery // rsa; Articulated lorry transport, Euro 4, Total weight >32 t; EU+EFTA+UK
- kg_1: 3.22304e-8
  Mass in kg, for lubricating oil // lubricants at refinery // raf; Articulated lorry transport, Euro 4, Total weight >32 t; EU+EFTA+UK
- km_1: 1000
  Distance in km, for lubricating oil // lubricants at refinery // raf; Articulated lorry transport, Euro 4, Total weight >32 t; EU+EFTA+UK
- kg_km_1: 3.22304e-5; = kg_1*km_1
  Transport amount in km*km, for lubricating oil // lubricants at refinery // raf; Articulated lorry transport, Euro 4, Total weight >32 t; EU+EFTA+UK
- kg_2: 8.44608e-7
  Mass in kg, for lubricating oil // lubricants at refinery // ras w/o cn; Articulated lorry transport, Euro 4, Total weight >32 t; EU+EFTA+UK
- km_2: 1000
  Distance in km, for lubricating oil // lubricants at refinery // ras w/o cn; Articulated lorry transport, Euro 4, Total weight >32 t; EU+EFTA+UK
- kg_km_2: 0.000844608; = kg_2*km_2
  Transport amount in km*km, for lubricating oil // lubricants at refinery // ras w/o cn; Articulated lorry transport, Euro 4, Total weight >32 t; EU+EFTA+UK
- kg_3: 6.98421e-7
  Mass in kg, for lubricating oil // lubricants at refinery // ru; Articulated lorry transport, Euro 4, Total weight >32 t; EU+EFTA+UK
- km_3: 1000
  Distance in km, for lubricating oil // lubricants at refinery // ru; Articulated lorry transport, Euro 4, Total weight >32 t; EU+EFTA+UK
- kg_km_3: 0.000698421; = kg_3*km_3
  Transport amount in km*km, for lubricating oil // lubricants at refinery // ru; Articulated lorry transport, Euro 4, Total weight >32 t; EU+EFTA+UK
- kg_4: 6.59284e-7
  Mass in kg, for lubricating oil // lubricants at refinery // rna; Articulated lorry transport, Euro 4, Total weight >32 t; EU+EFTA+UK
- km_4: 1000
  Distance in km, for lubricating oil // lubricants at refinery // rna; Articulated lorry transport, Euro 4, Total weight >32 t; EU+EFTA+UK
- kg_km_4: 0.000659284; = kg_4*km_4
  Transport amount in km*km, for lubricating oil // lubricants at refinery // rna; Articulated lorry transport, Euro 4, Total weight >32 t; EU+EFTA+UK
- kg_5: 1.34101e-7
  Mass in kg, for lubricating oil // lubricants at refinery // cn; Articulated lorry transport, Euro 4, Total weight >32 t; EU+EFTA+UK
- km_5: 1000
  Distance in km, for lubricating oil // lubricants at refinery // cn; Articulated lorry transport, Euro 4, Total weight >32 t; EU+EFTA+UK
- kg_km_5: 0.000134101; = kg_5*km_5
  Transport amount in km*km, for lubricating oil // lubricants at refinery // cn; Articulated lorry transport, Euro 4, Total weight >32 t; EU+EFTA+UK
- kg_6: 4.30218e-7
  Mass in kg, for lubricating oil // lubricants at refinery // eu+efta+uk; Articulated lorry transport, Euro 4, Total weight >32 t; EU+EFTA+UK
- km_6: 999.493
  Distance in km, for lubricating oil // lubricants at refinery // eu+efta+uk; Articulated lorry transport, Euro 4, Total weight >32 t; EU+EFTA+UK
- kg_km_6: 0.00043; = kg_6*km_6
  Transport amount in km*km, for lubricating oil // lubricants at refinery // eu+efta+uk; Articulated lorry transport, Euro 4, Total weight >32 t; EU+EFTA+UK
- kg_7: 0.0252725
  Mass in kg, for thermoplastic polyurethane (tpu), fossil fuel-based // thermoplastic polyurethane (tpu) production // glo; Articulated lorry transport, Euro 4, Total weight >32 t; EU+EFTA+UK
- km_7: 1000
  Distance in km, for thermoplastic polyurethane (tpu), fossil fuel-based // thermoplastic polyurethane (tpu) production // glo; Articulated lorry transport, Euro 4, Total weight >32 t; EU+EFTA+UK
- kg_km_7: 25.2725; = kg_7*km_7
  Transport amount in km*km, for thermoplastic polyurethane (tpu), fossil fuel-based // thermoplastic polyurethane (tpu) production // glo; Articulated lorry transport, Euro 4, Total weight >32 t; EU+EFTA+UK
- kg_8: 4.30218e-7
  Mass in kg, for lubricating oil // lubricants at refinery // eu+efta+uk; Transoceanic ship, containers; GLO
- km_8: 17990.9
  Distance in km, for lubricating oil // lubricants at refinery // eu+efta+uk; Transoceanic ship, containers; GLO
- kg_km_8: 0.00774; = kg_8*km_8
  Transport amount in km*km, for lubricating oil // lubricants at refinery // eu+efta+uk; Transoceanic ship, containers; GLO
- kg_9: 7.85615e-8
  Mass in kg, for lubricating oil // lubricants at refinery // rsa; Transoceanic ship, containers; GLO
- km_9: 18000
  Distance in km, for lubricating oil // lubricants at refinery // rsa; Transoceanic ship, containers; GLO
- kg_km_9: 0.00141411; = kg_9*km_9
  Transport amount in km*km, for lubricating oil // lubricants at refinery // rsa; Transoceanic ship, containers; GLO
- kg_10: 3.22304e-8
  Mass in kg, for lubricating oil // lubricants at refinery // raf; Transoceanic ship, containers; GLO
- km_10: 18000
  Distance in km, for lubricating oil // lubricants at refinery // raf; Transoceanic ship, containers; GLO
- kg_km_10: 0.000580147; = kg_10*km_10
  Transport amount in km*km, for lubricating oil // lubricants at refinery // raf; Transoceanic ship, containers; GLO
- kg_11: 8.44608e-7
  Mass in kg, for lubricating oil // lubricants at refinery // ras w/o cn; Transoceanic ship, containers; GLO
- km_11: 18000
  Distance in km, for lubricating oil // lubricants at refinery // ras w/o cn; Transoceanic ship, containers; GLO
- kg_km_11: 0.015203; = kg_11*km_11
  Transport amount in km*km, for lubricating oil // lubricants at refinery // ras w/o cn; Transoceanic ship, containers; GLO
- kg_12: 6.98421e-7
  Mass in kg, for lubricating oil // lubricants at refinery // ru; Transoceanic ship, containers; GLO
- km_12: 18000
  Distance in km, for lubricating oil // lubricants at refinery // ru; Transoceanic ship, containers; GLO
- kg_km_12: 0.0125716; = kg_12*km_12
  Transport amount in km*km, for lubricating oil // lubricants at refinery // ru; Transoceanic ship, containers; GLO
- kg_13: 6.59284e-7
  Mass in kg, for lubricating oil // lubricants at refinery // rna; Transoceanic ship, containers; GLO
- km_13: 18000
  Distance in km, for lubricating oil // lubricants at refinery // rna; Transoceanic ship, containers; GLO
- kg_km_13: 0.0118671; = kg_13*km_13
  Transport amount in km*km, for lubricating oil // lubricants at refinery // rna; Transoceanic ship, containers; GLO
- kg_14: 1.34101e-7
  Mass in kg, for lubricating oil // lubricants at refinery // cn; Transoceanic ship, containers; GLO
- km_14: 18000
  Distance in km, for lubricating oil // lubricants at refinery // cn; Transoceanic ship, containers; GLO
- kg_km_14: 0.00241382; = kg_14*km_14
  Transport amount in km*km, for lubricating oil // lubricants at refinery // cn; Transoceanic ship, containers; GLO
- kg_15: 0.0252725
  Mass in kg, for thermoplastic polyurethane (tpu), fossil fuel-based // thermoplastic polyurethane (tpu) production // glo; Transoceanic ship, containers; GLO
- km_15: 18000
  Distance in km, for thermoplastic polyurethane (tpu), fossil fuel-based // thermoplastic polyurethane (tpu) production // glo; Transoceanic ship, containers; GLO
- kg_km_15: 454.905; = kg_15*km_15
  Transport amount in km*km, for thermoplastic polyurethane (tpu), fossil fuel-based // thermoplastic polyurethane (tpu) production // glo; Transoceanic ship, containers; GLO

## Reference product
- assembly, insole // assembly, insole // glo: 1

## Inputs
- Electricity from Electricity grid mix 1kV-60kV - AU: 0.0002
- Electricity from Electricity grid mix 1kV-60kV - EU+EFTA+UK: 0.0029
- Electricity from Electricity grid mix 1kV-60kV - NZ: 0
- Electricity from Electricity grid mix 1kV-60kV - RAF: 0.0006
- Electricity from Electricity grid mix 1kV-60kV - RNA: 0.0042
- Electricity from Electricity grid mix 1kV-60kV - RSA: 0.0014
- Electricity from Electricity grid mix 1kV-60kV - RU: 0.0008
- Transport of lubricating oil // lubricants at refinery // rsa by Articulated lorry transport, Euro 4, Total weight >32 t - EU+EFTA+UK: 7.85615e-5; = kg_km_0
- Transport of lubricating oil // lubricants at refinery // raf by Articulated lorry transport, Euro 4, Total weight >32 t - EU+EFTA+UK: 3.22304e-5; = kg_km_1
- Transport of lubricating oil // lubricants at refinery // ras w/o cn by Articulated lorry transport, Euro 4, Total weight >32 t - EU+EFTA+UK: 0.000844608; = kg_km_2
- Transport of lubricating oil // lubricants at refinery // ru by Articulated lorry transport, Euro 4, Total weight >32 t - EU+EFTA+UK: 0.000698421; = kg_km_3
- Transport of lubricating oil // lubricants at refinery // rna by Articulated lorry transport, Euro 4, Total weight >32 t - EU+EFTA+UK: 0.000659284; = kg_km_4
- Transport of lubricating oil // lubricants at refinery // cn by Articulated lorry transport, Euro 4, Total weight >32 t - EU+EFTA+UK: 0.000134101; = kg_km_5
- Transport of lubricating oil // lubricants at refinery // eu+efta+uk by Articulated lorry transport, Euro 4, Total weight >32 t - EU+EFTA+UK: 0.00043; = kg_km_6
- Transport of thermoplastic polyurethane (tpu), fossil fuel-based // thermoplastic polyurethane (tpu) production // glo by Articulated lorry transport, Euro 4, Total weight >32 t - EU+EFTA+UK: 25.2725; = kg_km_7
- Transport of lubricating oil // lubricants at refinery // eu+efta+uk by Transoceanic ship, containers - GLO: 0.00774; = kg_km_8
- Transport of lubricating oil // lubricants at refinery // rsa by Transoceanic ship, containers - GLO: 0.00141411; = kg_km_9
- Transport of lubricating oil // lubricants at refinery // raf by Transoceanic ship, containers - GLO: 0.000580147; = kg_km_10
- Transport of lubricating oil // lubricants at refinery // ras w/o cn by Transoceanic ship, containers - GLO: 0.015203; = kg_km_11
- Transport of lubricating oil // lubricants at refinery // ru by Transoceanic ship, containers - GLO: 0.0125716; = kg_km_12
- Transport of lubricating oil // lubricants at refinery // rna by Transoceanic ship, containers - GLO: 0.0118671; = kg_km_13
- Transport of lubricating oil // lubricants at refinery // cn by Transoceanic ship, containers - GLO: 0.00241382; = kg_km_14
- Transport of thermoplastic polyurethane (tpu), fossil fuel-based // thermoplastic polyurethane (tpu) production // glo by Transoceanic ship, containers - GLO: 454.905; = kg_km_15
- Electricity from Electricity grid mix 1kV-60kV - CN: 0.00429463
- Electricity from Electricity grid mix 1kV-60kV - RAS w/o CN: 0.00470537
- assembly, insole // assembly, insole // glo, blackbox: 1
- assembly, insole // assembly, insole // glo, elementary: 1

## Impact indicators
- Eutrophication marine: 0.000321026
- Ecotoxicity, freshwater: 7.38409
- Land use: 0.673518
- Water use: 0.173693
- Resource use, minerals and metals: 1.37146e-6
- Resource use, fossils: 2.89277
- Climate change: 0.181346
- Ozone depletion: 1.18714e-8
- Human toxicity, cancer: 1.55036e-9
- Human toxicity, non-cancer: 2.26971e-9
- EF-particulate Matter: 2.16336e-8
- Ionising radiation, human health: 0.00781231
- Photochemical ozone formation - human health: 0.000913154
- Acidification: 0.00116413
- Eutrophication, terrestrial: 0.00266268
- Eutrophication, freshwater: 1.23448e-5

## Deviations from the LCI method principle
The background data uses:
- the \xe2\x80\x9cRecycled content cut-off\xe2\x80\x9d approach to allocate end-of-life by-products and secondary materials. This allocation is explained in the description of the recycled content system model (http://www.ecoinvent.org/database/system-models-in-ecoinvent-3/cut-off-system-model/allocation-cut-off-by-classification.html).
OR
- EF compliant data

## Deviations from the LCI method approaches
Background data:
- the \xe2\x80\x9cRecycled content cut-off\xe2\x80\x9d approach to allocate end-of-life by-products and secondary materials. This allocation is explained in the description of the recycled content system model (http://www.ecoinvent.org/database/system-models-in-ecoinvent-3/cut-off-system-model/allocation-cut-off-by-classification.html). The ecoinvent database mostly relies on “Allocation – market values” apart for few exceptions particularly in the energy sector. ecoinvent energy data is replaced with EF3.0 core data as per the EF guidelines version 2.0.
OR
- EF compliant data

## Modelling constants
All modelling constants follow the requirements listed in the Tender Specifications 070201/2020/SER/ENV.B1. Completeness: There are no intentional cut-offs in the inventory no matter how small their contribution to all the EF impact categories is. Eventual cut-offs are in compliance with the Guide for EF compliant data sets (JRC 2020), i.e. only if below the 3% cut-off rule. Water use: water use is modelled at country level using separate flows for water withdrawal, water release and water evaporation. Handling multi-functional processes: the following PEF multi- functionality decision hierarchy is applied for resolving all multi- functionality problems: (1) subdivision or system expansion; (2) allocation based on a relevant underlying physical relationship (substitution may apply here); (3) allocation based on some other relationship. Direct land use change: GHG emissions from direct LUC allocated to good/service for 20 years after the LUC occurs, with IPCC default values. Carbon storage and delayed emissions: credits associated with temporary (carbon) storage or delayed emissions up to 300 years are not be considered. Emissions off-setting: are not included. Capital goods (including infrastructures) and their End of life: they are included. System boundaries: system boundaries include all processes linked to the product supply chain (e.g. maintenance). Time period: emissions and removals are modelled as if released or removed at the beginning of the assessment method. Fossil and biogenic carbon emissions and removals: removals and emissions are modelled as follows: All GHG emissions from fossil fuels (including peat and limestone) are modelled consistently with the most updated ILCD list of elementary flows. The non-fossil (biogenic) carbon flows are modelled consistently with the most updated ILCD list of elementary flows.

## Cut-off and completeness
There are no intentional cut-offs in the inventory no matter how small their contribution to all the EF impact categories is. Eventual cut-offs are in compliance with the Guide for EF compliant data sets (JRC 2020), i.e. only if below the 3% cut-off rule. The dataset dry mass and water balance has been checked to ensure the inventory is complete. Capital goods (e.g. infrastructure) and their end-of-life are included.

## Data selection and combination
These datasets include, in both their foreground and background data, links to EF3.0 compliant data.
The relevant background data on energy, transport, and End of Life are from the LCDN data node (http://lcdn.thinkstep.com/Node/).
All other background data in the supply of this product for which no EF3.0 process was available are from ecoinvent v3.7 database (www.ecoinvent.org) or other data sources.

## Data treatment and extrapolations
Several data sources have been used to model the inventory.

## Review details
Internal reviews have been asked to review the plausibility of the unit process, LCIA scores, and DQRs. Internal reviewers have also been asked to review the data for EF compliancy. The consortium is therefore responsible for aspects such as compliancy with the ILCD format, including validation in Look@LCI, and nomenclature.
Internal reviwers have been asked to judge based on the process name, that the unit process models in a complete and representative way the process in the requested location. The review encompassed the plausability of:
- exchanges with nature (elementary flows) as well as exchanges such as product and waste flows.
- meta information (general comment, technology comment, system boundaries, allocation, cut-off rules, etc.). Reviewers were asked to judge if the provided information is enough to understand the content of the process.
- LCIA scores
- DQRs including precision, technology, time and geography. As well as the overall DQR.
External reviewers have been asked to provide their expertise in the field of interest. External reviewers have been asked to review the unit process, including eventual methodological choices, the LCIA scores (provided with contribution scores as well), and DQRs. External reviewers have been provided all the information in a tool developed by the consortium for the purpose of this project.
External reviewers have been asked to judge based on the process name, that the unit process models in a complete and representative way the process in the requested location. The review encompassed:
- Plausability and completeness of exchanges with nature (elementary flows) as well as exchanges such as product and waste flows.
- Review of meta information (general comment, technology comment, system boundaries, allocation, cut-off rules, etc.). Reviewers were asked to judge if the provided information is enough to understand the content of the process.
- Review of properties (biogenic carbon and water content).
- Review of allocation keys.
- Plausability of LCIA scores calculated by the consortium.
- Plausability of DQRs including precision, technology, time and geography. As well as the overall DQR.

## Data sources
- Background Data for Representative products and organisations. EF 3.0 compliant (data stock)
- UN Data (2018) Statistics Data for Lubricants Productions, http://data.un.org/Data.aspx?q=Lubricants&d=EDATA&f=cmID%3aLU, United Nations Statistics Division, Global
- Cotex (2021) Stitch Bonding Machine, Catalog and Company Email, Suzhou Cotex International Co., Ltd., China.
- Marie Gottfridsson, Yuqing Zhang (2015). Environmental impacts of shoe consumption: Combining product flow analysis with an LCA model for Sweden. Chalmers University of Technology, Gothenburg, Sweden. https://publications.lib.chalmers.se/records/fulltext/218968/218968.pdf
- Nango German System (2021) Insole Transfer Machine LS-801JM https://nanogermansystem.com/en/shoemaking-gluing-equipment/insole-transfer-machine-ls-801jm Nano German System Company, Ukraine
- Nango German System (2021) Pneumatic sole attaching press DC3 https://nanogermansystem.com/en/sole-attaching-press/sole-gluing-press-dc3 Nango German System Company, Ukraine
- Tunsing (2021) Thermoplastic TPU Hot-Melt Adhesive Film, Hot-Melt Sheet for Leather Lamination https://www.hotmelt-adhesivefilm.com/quality-11198150-thermoplastic-tpu-hot-melt-adhesive-film-hot-melt-sheet-for-leather-lamination Shenzhen Tunsing Plastic Products Co., Ltd, China
- Texyear Industrial Adhesives Private Limited (2021) Hot Melt Adhesives for shoe making https://www.hotmelt-adhesive.net/leather-hot-melt-adhesives.html Texyear Industrial Adhesives Pvt Ltd., India
- Jessica Deberardinis, Conner Neilsen, Daniel Lidstone, Mohamed B Trabia (2020) A comparison of two techniques for center of pressure measurements, Journal of Rehabilitation and Assistive Technologies Engineering https://www.researchgate.net/publication/342725829_A_comparison_of_two_techniques_for_center_of_pressure_measurementss

## Intended applications
Implementation of regular Product Environmental Footprint (PEF) studies and Organisation Environmental Footprint (OEF) studies exclusively under the specified Product groups and sectors as defined in the Product Environmental Footprint Category Rules (PEFCR) and Organisation Environmental Footprint Sectorial Rules (OEFSR) listed in http://ec.europa.eu/environment/eussd/smgp/PEFCR_OEFSR.htm
