# Compressed air; technology mix of different power consumptions; production mix, at plant; 7 bar

Dataset: ILCD process, Partly terminated system
Geography: EU+EFTA+UK
Reference year: 2020
Valid until: 2024
Classification: Energy carriers and technologies / Mechanical energy
LCI method principle: Attributional
LCI method approaches: Allocation - market value; Allocation - net calorific value; Allocation - exergetic content; Allocation - mass; Not applicable
Completeness: All relevant flows quantified
Share of supply or production covered: 95 %
Method details: GaBi Modelling Principles; GaBi Water Modelling Principles; GaBi Agriculture Model Documentation; GaBi Energy Modelling Principles; GaBi Refinery Modelling Principles; GaBi Land Use Change Model Documentation; Suggestions for updating the PEF method 2019; Guide for EF compliant data sets; GaBi Agrarian Modelling Principles
Project: Provision of product environmental footprint-compliant life cycle inventory datasets. Contract number N° 09.029901/2021/846457/SER/ENV.B.1
Generated by: Sphera Solutions GmbH
Owner: Sphera Solutions GmbH
Compliance: ILCD Data Network - Entry-level; Suggestions for updating the PEF method 2019; ISO 14040 Environmental Management – Life Cycle Assessment – Principles and Framework, 2006; ISO 14044:2006. Environmental Management – Life Cycle Assessment – Requirements and guidelines.; Environmental Footprint 3.1
Review: Independent internal review by Sphera Solutions GmbH, Julia Goerke, Sphera Solutions GmbH, Dr. Paola Gamarra
Data quality: Technological representativeness: Good; Time representativeness: Good; Geographical representativeness: Very good; Completeness: Not evaluated / unknown; Precision: Good; Methodological appropriateness and consistency: Not evaluated / unknown; Overall quality: Good
Amounts: no units in this file; such an amount is in the reference unit of its flow, which a separate flow dataset defines
copyright: true
licenseType: Free of charge for some user types or use types
accessRestrictions: Datasets can only be used in accordance with the terms and conditions of this EULA exclusively until 31st December 2024 (PERMITTED USE).

## General comment
The data set covers all relevant process steps / technologies over the supply chain of the represented cradle to gate inventory with a good overall data quality. The inventory is mainly based on industry data and is completed, where necessary, by secondary data. This data set is based on primary data from internationally adopted production processes, connected with regional precursor chains.

## Geography
The data set represents the country/ region specific specific situation in Europe, focusing on the main technologies, the region specific characteristics and / or import statistics.

## Time period
annual average

## Technology and included processes
Foreground system:
The data set describes the production of compressed air. Commonly either screw-type-compressors or piston compressors are used. For that data set a mix (50:50) of both technologies is used. The electricity consumption of the compression depends mainly on the respective pressure stage. The typical pressure stages 1.5 bar, 3.5 bar, 7 bar, 10 bar and 14 bar are modelled. The electricity consumption values are based on average industrial data verified with literature data.

## Technical purpose
Compressed air for manufacturing operations e.g. industrial maintenance work, at production line as pneumatic tools, etc., and other final consumers.

## Model description
This aggregated dataset does not contain parameters. The user wishing to adjust the model to their individual circumstances may please refer to the 1st level disaggregated version of the data.

For mathematical model details concerning the implementation of the CCF formula see:
http://www.gabi-software.com/fileadmin/GaBi_Databases/PEF_CFF_model_description.pdf

## Reference product
- Compressed air, 7 bar, average efficiency: 1; calculated

## Inputs
- Electricity: 0.44281

## Deviations from the LCI method approaches
Foreground system: For the foreground system, no allocation was applied.

## Modelling constants
Direct land use change: GHG emissions from direct LUC allocated to good/service for 20 years after the LUC occurs.
Carbon storage and delayed emissions: credits associated with temporary (carbon) storage or delayed emissions are not considered in the calculation of the EF for the default impact categories.
Emissions off-setting: not included
Fossil and biogenic carbon emissions and removals: removals and emissions are modelled as follows: All GHG emissions from fossil fuels (including peat and limestone) are modelled consistently with the ILCD list of elementary flows. In the case that the emissions refer to the molecules CO2 and CH4, they are modelled as ‘carbon dioxide (fossil)’ and ‘methane (fossil)’. Biogenic uptake and emissions are modelled separately. For land use change, all carbon emissions and uptakes are inventoried separately for each of the elementary flows. Soil carbon accumulation (uptake) via improved agricultural management is excluded from the model.

## Cut-off and completeness
A cut-off rule based on mass or energy flow or the level of environmental significance of max. 3% is applied and confirmed by the reviewer. An active cut-off within the system has not been applied, no data gaps are known and all elementary flows of environmental effect are included in the inventory.

Capital goods (including infrastructures) and their end of life are included unless the exclusion is clearly documented and conform with the cut-off principles.

System boundaries include all known processes linked to the product supply chain.

## Data selection and combination
LCI modeling is fully consistent.
Energy and transport datasets from the PEF energy and transports tender are consistently used.

## Data treatment and extrapolations
For details please see the document "GaBi Databases Modelling Principles"

## Use advice
Notice: this data set supersedes the EF3.0-compliant version (see link under "preceding data set version" below calculated with the EF3.0). The life cycle inventory is not changed from the original EF3.0 data set. The LCIA results are calculated based on the EF3.1 methods which provide updated characterisation factors in the following impact categories: Climate Change, Ecotoxicity freshwater, Photochemical Ozone Formation, Acidification, Human Toxicity non-cancer, and Human Toxicity cancer. The review report and the data quality ratings refer to the original results. The data set has been updated by the European Commission on the basis of the original EF3.0 data set delivered by the data provider.

Life Cycle Inventory (LCI) datasets to be used for implementing regular Product Environmental Footprint (PEF) studies and Organisation Environmental Footprint (OEF) studies exclusively under the specified Product groups and sectors as defined in the Product Environmental Footprint Category Rules (PEFCR) and Organisation Environmental Footprint Sectorial Rules (OEFSR) listed in https://ec.europa.eu/environment/eussd/smgp/ef_transition.htm
The datasets are specifically designed for these methodological requirements (see above) and the related LCIA methods (listed below) recommended in EF.

## Review details
The dataset is compliant to "Zampori L., Pant R.: Suggestions for updating the Product Environmental Footprint (PEF) method, 2019 and Fazio S., Zampori L., De Schryver A. et al.: Guide for EF compliant data sets, Version 2.0, 2020.
In the PEF context the fields "Methodological appropriateness and consistency" and "completeness" are not evaluated by the review since their good quality is defined as mandatory.

## Other review details
Good overall quality (1,75) interpreted into "very good quality" in the PEF quality validation scheme. The quality indicator for completeness was not requested to be quantified as a single DQI for all tenders. If a value “Not evaluated / unknown” completeness is given, this indicates that a single DQI was not explicitly requested but the completeness is still to be understood as very good.
The Data Quality Indicator Results are conservative expert judgements, confirmed or - if necessary - corrected by the reviewers, based on their methodological as well as process understanding and considering semi-quantitatively the contribution of the DQIs of the used EF energy and transport datasets and of EF-related DQIs provided and reviewed within the GaBi databases. The overall DQIs of the datasets take into account primarily the quality and representativeness of the foreground technology information and that of the key upstream processes. If datasets are e.g. energy and transport intensive - or gain credits from energy recovery - the DQIs of the used EF energy and transport datasets influence the overall DQI significantly and have stronger been taken into account, via expert judgement. Analogous applies for other key background datasets. For the DQIs of the mentioned GaBi secondary datasets, similar DQIs had already been assigned to those datasets and were considered by the reviewers via expert judgement when assigning of the overall DQIs. In case of doubt, lower (i.e. lower quality) DQIs were assigned.

## Data sources
- GaBi databases
- Umwelterklärung Daimler Chrysler - Standort Bremen
- Industrial Assessment Center Report - Repair compressed Air Leaks
- Improving Compressed Air System Performance - a sourcebook for industry
- Effiziente Druckluftsysteme für Gewerbe und Industrie
- Druckluft Effizient - Druckluft Fakten
- Druckluft Effizient - Druckluft Abschlussbericht
- Compressed Air Systems in the European Union
- CompAir Presseinfo - Wirtschaftliche Druckluft-Erzeugung auch ohne Drehzahlregelung
- CompAir Presseinfo - Eine drehzahlgeregelte Spitzenlastanlage macht Druckluft noch preiswerter

## Intended applications
Life Cycle Inventory (LCI) datasets to be used in Product Environmental Footprint Category Rules (PEFCRs) and Organisation Environmental Footprint Sectoral Rules (OEFSRs) developed in the context of the Environmental Footprint transition phase launched by the Commission in 2018.
