# chemi-thermomechanical pulp; technology mix;; production mix; at plant; dry mass 0.9 kg; carbon content, non fossil 0.494

Dataset: ILCD process, Partly terminated system
Geography: EU+EFTA+UK
Reference year: 2019
Valid until: 2024
Classification: Materials production / Paper and cardboards
LCI method principle: Attributional
LCI method approaches: Allocation - market value
Completeness: All relevant flows quantified
Project: Provision of process-based 3.0 Environmental Footprint-compliant life cycle inventory datasets - Renewable materials - contract number 070201/2020/840085/SER/ENV.B.1
Generated by: ecoinvent
Owner: ecoinvent
Compliance: ILCD Data Network - Entry-level; Suggestions for updating the PEF method 2019; ISO 14040 Environmental Management – Life Cycle Assessment – Principles and Framework, 2006; ISO 14044:2006. Environmental Management – Life Cycle Assessment – Requirements and guidelines.; Environmental Footprint 3.1
Review: Dependent internal review by Lucia Valsasina, Emilia Moreno Ruiz; Independent review panel by Michael Sturges
Data quality: Overall quality: Very good; Time representativeness: Fair; Geographical representativeness: Very good; Technological representativeness: Very good; Precision: Very good; Methodological appropriateness and consistency: Not applicable
Amounts: no units in this file; such an amount is in the reference unit of its flow, which a separate flow dataset defines
copyright: true
licenseType: Free of charge for some user types or use types
accessRestrictions: Free of charge for all final users implementing a regular Product Environmental Footprint (PEF) studies and Organisation Environmental Footprint (OEF) studies exclusively under the specified Product groups and sectors as defined in the Product Environmental Footprint Category Rules (PEFCR) and Organisation Environmental Footprint Sectorial Rules (OEFSR) listed in http://ec.europa.eu/environment/eussd/smgp/PEFCR_OEFSR.htm and in accordance with the terms and conditions of the EULA (available at https://ecoinvent.lca-data.com/) exclusively until 31st December 2024. Any use of this dataset or any derivative data not within the specific context of one of the PEF/OEF projects or after the end of 2024 is not permitted.

## General comment
Notice: this data set supersedes the EF3.0-compliant version (see link under "preceding data set version" below calculated with the EF3.0). The life cycle inventory is not changed from the original EF3.0 data set. The LCIA results are calculated based on the EF3.1 methods which provide updated characterisation factors in the following impact categories: Climate Change, Ecotoxicity freshwater, Photochemical Ozone Formation, Acidification, Human Toxicity non-cancer, and Human Toxicity cancer. The review report and the data quality ratings refer to the original results. The data set has been updated by the European Commission on the basis of the original EF3.0 data set delivered by the data provider.This dataset characterises the average production of pulp following a chemi-thermomechanical process (CTMP) in Europe. In the CTMP wood chips are impregnated with chemicals before they are mechanically defibrated in the refiner under high pressure (~about 3 bar) or at atmospheric pressure, mainly in two stages. Bleaching has not been included because chemi-mechanical pulps cannot be brightened effectively by oxidative and reductive bleaching. During mechanical defibration, lignin is plasticised and remains in the pulp.

## Parameters
- kg_0: 0.025
  Mass in kg, for sulfite; Barge; EU+EFTA+UK
- km_0: 21.9
  Distance in km, for sulfite; Barge; EU+EFTA+UK
- kg_km_0: 0.5475; = kg_0*km_0
  Transport amount in km*km, for sulfite; Barge; EU+EFTA+UK
- kg_1: 0.025
  Mass in kg, for sulfite; Articulated lorry transport, Euro 4, Total weight >32 t; EU+EFTA+UK
- km_1: 171.3
  Distance in km, for sulfite; Articulated lorry transport, Euro 4, Total weight >32 t; EU+EFTA+UK
- kg_km_1: 4.2825; = kg_1*km_1
  Transport amount in km*km, for sulfite; Articulated lorry transport, Euro 4, Total weight >32 t; EU+EFTA+UK
- kg_2: 0.025
  Mass in kg, for sulfite; Freight train, diesel traction; EU+EFTA+UK
- km_2: 16.9948
  Distance in km, for sulfite; Freight train, diesel traction; EU+EFTA+UK
- kg_km_2: 0.42487; = kg_2*km_2
  Transport amount in km*km, for sulfite; Freight train, diesel traction; EU+EFTA+UK
- kg_3: 0.025
  Mass in kg, for sulfite; Freight train, electricity traction; EU+EFTA+UK
- km_3: 26.8052
  Distance in km, for sulfite; Freight train, electricity traction; EU+EFTA+UK
- kg_km_3: 0.67013; = kg_3*km_3
  Transport amount in km*km, for sulfite; Freight train, electricity traction; EU+EFTA+UK
- kg_4: 0.002
  Mass in kg, for edta // edta production // eu+efta+uk; Articulated lorry transport, Euro 4, Total weight >32 t; EU+EFTA+UK
- km_4: 130
  Distance in km, for edta // edta production // eu+efta+uk; Articulated lorry transport, Euro 4, Total weight >32 t; EU+EFTA+UK
- kg_km_4: 0.26; = kg_4*km_4
  Transport amount in km*km, for edta // edta production // eu+efta+uk; Articulated lorry transport, Euro 4, Total weight >32 t; EU+EFTA+UK
- kg_5: 0.025
  Mass in kg, for hydrogen peroxide, 50% // hydrogen peroxide, 50% production // eu+efta+uk; Articulated lorry transport, Euro 4, Total weight >32 t; EU+EFTA+UK
- km_5: 130
  Distance in km, for hydrogen peroxide, 50% // hydrogen peroxide, 50% production // eu+efta+uk; Articulated lorry transport, Euro 4, Total weight >32 t; EU+EFTA+UK
- kg_km_5: 3.25; = kg_5*km_5
  Transport amount in km*km, for hydrogen peroxide, 50% // hydrogen peroxide, 50% production // eu+efta+uk; Articulated lorry transport, Euro 4, Total weight >32 t; EU+EFTA+UK
- kg_6: 0.019
  Mass in kg, for sodium silicate powder // sodium silicate powder production // eu+efta+uk; Articulated lorry transport, Euro 4, Total weight >32 t; EU+EFTA+UK
- km_6: 130
  Distance in km, for sodium silicate powder // sodium silicate powder production // eu+efta+uk; Articulated lorry transport, Euro 4, Total weight >32 t; EU+EFTA+UK
- kg_km_6: 2.47; = kg_6*km_6
  Transport amount in km*km, for sodium silicate powder // sodium silicate powder production // eu+efta+uk; Articulated lorry transport, Euro 4, Total weight >32 t; EU+EFTA+UK
- kg_7: 1.65807
  Mass in kg, for softwood under bark // softwood forestry // eu+efta+uk; Articulated lorry transport, Euro 4, Total weight >32 t; EU+EFTA+UK
- km_7: 120.019
  Distance in km, for softwood under bark // softwood forestry // eu+efta+uk; Articulated lorry transport, Euro 4, Total weight >32 t; EU+EFTA+UK
- kg_km_7: 199; = kg_7*km_7
  Transport amount in km*km, for softwood under bark // softwood forestry // eu+efta+uk; Articulated lorry transport, Euro 4, Total weight >32 t; EU+EFTA+UK
- kg_8: 0.002
  Mass in kg, for edta // edta production // eu+efta+uk; Barge; EU+EFTA+UK
- km_8: 270
  Distance in km, for edta // edta production // eu+efta+uk; Barge; EU+EFTA+UK
- kg_km_8: 0.54; = kg_8*km_8
  Transport amount in km*km, for edta // edta production // eu+efta+uk; Barge; EU+EFTA+UK
- kg_9: 0.025
  Mass in kg, for hydrogen peroxide, 50% // hydrogen peroxide, 50% production // eu+efta+uk; Barge; EU+EFTA+UK
- km_9: 270
  Distance in km, for hydrogen peroxide, 50% // hydrogen peroxide, 50% production // eu+efta+uk; Barge; EU+EFTA+UK
- kg_km_9: 6.75; = kg_9*km_9
  Transport amount in km*km, for hydrogen peroxide, 50% // hydrogen peroxide, 50% production // eu+efta+uk; Barge; EU+EFTA+UK
- kg_10: 0.019
  Mass in kg, for sodium silicate powder // sodium silicate powder production // eu+efta+uk; Barge; EU+EFTA+UK
- km_10: 270
  Distance in km, for sodium silicate powder // sodium silicate powder production // eu+efta+uk; Barge; EU+EFTA+UK
- kg_km_10: 5.13; = kg_10*km_10
  Transport amount in km*km, for sodium silicate powder // sodium silicate powder production // eu+efta+uk; Barge; EU+EFTA+UK
- kg_11: 1.65807
  Mass in kg, for softwood under bark // softwood forestry // eu+efta+uk; Barge; EU+EFTA+UK
- km_11: 249.085
  Distance in km, for softwood under bark // softwood forestry // eu+efta+uk; Barge; EU+EFTA+UK
- kg_km_11: 413; = kg_11*km_11
  Transport amount in km*km, for softwood under bark // softwood forestry // eu+efta+uk; Barge; EU+EFTA+UK
- kg_12: 0.002
  Mass in kg, for edta // edta production // eu+efta+uk; Freight train, average; EU+EFTA+UK
- km_12: 240
  Distance in km, for edta // edta production // eu+efta+uk; Freight train, average; EU+EFTA+UK
- kg_km_12: 0.48; = kg_12*km_12
  Transport amount in km*km, for edta // edta production // eu+efta+uk; Freight train, average; EU+EFTA+UK
- kg_13: 0.025
  Mass in kg, for hydrogen peroxide, 50% // hydrogen peroxide, 50% production // eu+efta+uk; Freight train, average; EU+EFTA+UK
- km_13: 240
  Distance in km, for hydrogen peroxide, 50% // hydrogen peroxide, 50% production // eu+efta+uk; Freight train, average; EU+EFTA+UK
- kg_km_13: 6; = kg_13*km_13
  Transport amount in km*km, for hydrogen peroxide, 50% // hydrogen peroxide, 50% production // eu+efta+uk; Freight train, average; EU+EFTA+UK
- kg_14: 0.019
  Mass in kg, for sodium silicate powder // sodium silicate powder production // eu+efta+uk; Freight train, average; EU+EFTA+UK
- km_14: 240
  Distance in km, for sodium silicate powder // sodium silicate powder production // eu+efta+uk; Freight train, average; EU+EFTA+UK
- kg_km_14: 4.56; = kg_14*km_14
  Transport amount in km*km, for sodium silicate powder // sodium silicate powder production // eu+efta+uk; Freight train, average; EU+EFTA+UK
- kg_15: 1.65807
  Mass in kg, for softwood under bark // softwood forestry // eu+efta+uk; Freight train, average; EU+EFTA+UK
- km_15: 221.342
  Distance in km, for softwood under bark // softwood forestry // eu+efta+uk; Freight train, average; EU+EFTA+UK
- kg_km_15: 367; = kg_15*km_15
  Transport amount in km*km, for softwood under bark // softwood forestry // eu+efta+uk; Freight train, average; EU+EFTA+UK

## Reference product
- chemi-thermomechanical pulp // chemi-thermomechanical pulp // eu+efta+uk: 1

## Inputs
- Electricity from Electricity grid mix 1kV-60kV - EU+EFTA+UK: 6.9624
- Thermal energy (MJ) from Thermal energy from biogas - EU+EFTA+UK: 0.272723
- Thermal energy (MJ) from Thermal energy from hard coal - EU+EFTA+UK: 2.5161
- Thermal energy (MJ) from Thermal energy from heavy fuel oil (HFO) - EU+EFTA+UK: 0.0147308
- Thermal energy (MJ) from Thermal energy from light fuel oil (LFO) - EU+EFTA+UK: 0.209511
- Thermal energy (MJ) from Thermal energy from lignite - EU+EFTA+UK: 0.218791
- Thermal energy (MJ) from Thermal energy from LPG - EU+EFTA+UK: 0.0117419
- Thermal energy (MJ) from Thermal energy from natural gas - EU+EFTA+UK: 0.5724
- Transport of sulfite by Barge - EU+EFTA+UK: 0.5475; = kg_km_0
- Transport of sulfite by Articulated lorry transport, Euro 4, Total weight >32 t - EU+EFTA+UK: 4.2825; = kg_km_1
- Transport of sulfite by Freight train, diesel traction - EU+EFTA+UK: 0.42487; = kg_km_2
- Transport of sulfite by Freight train, electricity traction - EU+EFTA+UK: 0.67013; = kg_km_3
- Transport of edta // edta production // eu+efta+uk by Articulated lorry transport, Euro 4, Total weight >32 t - EU+EFTA+UK: 0.26; = kg_km_4
- Transport of hydrogen peroxide, 50% // hydrogen peroxide, 50% production // eu+efta+uk by Articulated lorry transport, Euro 4, Total weight >32 t - EU+EFTA+UK: 3.25; = kg_km_5
- Transport of sodium silicate powder // sodium silicate powder production // eu+efta+uk by Articulated lorry transport, Euro 4, Total weight >32 t - EU+EFTA+UK: 2.47; = kg_km_6
- Transport of softwood under bark // softwood forestry // eu+efta+uk by Articulated lorry transport, Euro 4, Total weight >32 t - EU+EFTA+UK: 199; = kg_km_7
- Transport of edta // edta production // eu+efta+uk by Barge - EU+EFTA+UK: 0.54; = kg_km_8
- Transport of hydrogen peroxide, 50% // hydrogen peroxide, 50% production // eu+efta+uk by Barge - EU+EFTA+UK: 6.75; = kg_km_9
- Transport of sodium silicate powder // sodium silicate powder production // eu+efta+uk by Barge - EU+EFTA+UK: 5.13; = kg_km_10
- Transport of softwood under bark // softwood forestry // eu+efta+uk by Barge - EU+EFTA+UK: 413; = kg_km_11
- Transport of edta // edta production // eu+efta+uk by Freight train, average - EU+EFTA+UK: 0.48; = kg_km_12
- Transport of hydrogen peroxide, 50% // hydrogen peroxide, 50% production // eu+efta+uk by Freight train, average - EU+EFTA+UK: 6; = kg_km_13
- Transport of sodium silicate powder // sodium silicate powder production // eu+efta+uk by Freight train, average - EU+EFTA+UK: 4.56; = kg_km_14
- Transport of softwood under bark // softwood forestry // eu+efta+uk by Freight train, average - EU+EFTA+UK: 367; = kg_km_15
- chemi-thermomechanical pulp // chemi-thermomechanical pulp // eu+efta+uk, blackbox: 1
- chemi-thermomechanical pulp // chemi-thermomechanical pulp // eu+efta+uk, elementary: 1

## Impact indicators
- Eutrophication marine: 0.00136712
- Ecotoxicity, freshwater: 6.37846
- Land use: 342.022
- Water use: 0.501746
- Resource use, minerals and metals: 3.34218e-6
- Resource use, fossils: 15.6449
- Climate change: 1.11513
- Ozone depletion: 1.92753e-8
- Human toxicity, cancer: 3.47697e-10
- Human toxicity, non-cancer: 5.0483e-9
- EF-particulate Matter: 5.35152e-8
- Ionising radiation, human health: 0.307396
- Photochemical ozone formation - human health: 0.00289437
- Acidification: 0.00467981
- Eutrophication, terrestrial: 0.00985114
- Eutrophication, freshwater: 3.54934e-5

## Deviations from the LCI method principle
The background data uses:
- the \xe2\x80\x9cRecycled content cut-off\xe2\x80\x9d approach to allocate end-of-life by-products and secondary materials. This allocation is explained in the description of the recycled content system model (http://www.ecoinvent.org/database/system-models-in-ecoinvent-3/cut-off-system-model/allocation-cut-off-by-classification.html).
OR
- EF compliant data

## Deviations from the LCI method approaches
Background data:
- the \xe2\x80\x9cRecycled content cut-off\xe2\x80\x9d approach to allocate end-of-life by-products and secondary materials. This allocation is explained in the description of the recycled content system model (http://www.ecoinvent.org/database/system-models-in-ecoinvent-3/cut-off-system-model/allocation-cut-off-by-classification.html). The ecoinvent database mostly relies on “Allocation – market values” apart for few exceptions particularly in the energy sector. ecoinvent energy data is replaced with EF3.0 core data as per the EF guidelines version 2.0.
OR
- EF compliant data

## Modelling constants
All modelling constants follow the requirements listed in the Tender Specifications 070201/2020/SER/ENV.B1. Completeness: There are no intentional cut-offs in the inventory no matter how small their contribution to all the EF impact categories is. Eventual cut-offs are in compliance with the Guide for EF compliant data sets (JRC 2020), i.e. only if below the 3% cut-off rule. Water use: water use is modelled at country level using separate flows for water withdrawal, water release and water evaporation. Handling multi-functional processes: the following PEF multi- functionality decision hierarchy is applied for resolving all multi- functionality problems: (1) subdivision or system expansion; (2) allocation based on a relevant underlying physical relationship (substitution may apply here); (3) allocation based on some other relationship. Direct land use change: GHG emissions from direct LUC allocated to good/service for 20 years after the LUC occurs, with IPCC default values. Carbon storage and delayed emissions: credits associated with temporary (carbon) storage or delayed emissions up to 300 years are not be considered. Emissions off-setting: are not included. Capital goods (including infrastructures) and their End of life: they are included. System boundaries: system boundaries include all processes linked to the product supply chain (e.g. maintenance). Time period: emissions and removals are modelled as if released or removed at the beginning of the assessment method. Fossil and biogenic carbon emissions and removals: removals and emissions are modelled as follows: All GHG emissions from fossil fuels (including peat and limestone) are modelled consistently with the most updated ILCD list of elementary flows. The non-fossil (biogenic) carbon flows are modelled consistently with the most updated ILCD list of elementary flows.

## Cut-off and completeness
There are no intentional cut-offs in the inventory no matter how small their contribution to all the EF impact categories is. Eventual cut-offs are in compliance with the Guide for EF compliant data sets (JRC 2020), i.e. only if below the 3% cut-off rule. The dataset dry mass and water balance has been checked to ensure the inventory is complete. Capital goods (e.g. infrastructure) and their end-of-life are included.

## Data selection and combination
These datasets include, in both their foreground and background data, links to EF3.0 compliant data.
The relevant background data on energy, transport, and End of Life are from the LCDN data node (http://lcdn.thinkstep.com/Node/).
All other background data in the supply of this product for which no EF3.0 process was available are from ecoinvent v3.7 database (www.ecoinvent.org) or other data sources.

## Data treatment and extrapolations
Several data sources have been used to model the inventory.

## Review details
Internal reviews have been asked to review the plausibility of the unit process, LCIA scores, and DQRs. Internal reviewers have also been asked to review the data for EF compliancy. The consortium is therefore responsible for aspects such as compliancy with the ILCD format, including validation in Look@LCI, and nomenclature.
Internal reviwers have been asked to judge based on the process name, that the unit process models in a complete and representative way the process in the requested location. The review encompassed the plausability of:
- exchanges with nature (elementary flows) as well as exchanges such as product and waste flows.
- meta information (general comment, technology comment, system boundaries, allocation, cut-off rules, etc.). Reviewers were asked to judge if the provided information is enough to understand the content of the process.
- LCIA scores
- DQRs including precision, technology, time and geography. As well as the overall DQR.
External reviewers have been asked to provide their expertise in the field of interest. External reviewers have been asked to review the unit process, including eventual methodological choices, the LCIA scores (provided with contribution scores as well), and DQRs. External reviewers have been provided all the information in a tool developed by the consortium for the purpose of this project.
External reviewers have been asked to judge based on the process name, that the unit process models in a complete and representative way the process in the requested location. The review encompassed:
- Plausability and completeness of exchanges with nature (elementary flows) as well as exchanges such as product and waste flows.
- Review of meta information (general comment, technology comment, system boundaries, allocation, cut-off rules, etc.). Reviewers were asked to judge if the provided information is enough to understand the content of the process.
- Review of properties (biogenic carbon and water content).
- Review of allocation keys.
- Plausability of LCIA scores calculated by the consortium.
- Plausability of DQRs including precision, technology, time and geography. As well as the overall DQR.

## Data sources
- Background Data for Representative products and organisations. EF 3.0 compliant (data stock)
- Naturvardsverket, 2001. Naturvardsverket (2001) Skogsindustrins utsläpp - avfallsmängder och energiförbrukning 2000. Report 5154. Naturvardsverket (Swedish EPA), Stockholm.
- Södra (2002) Meeting Södra. Environmental Report 2001. Södra, Växjö (Sweden) as pdf-File under: www.sodra.com.
- European Commission, 2000. European Commission (2000) Integrated Pollution Prevention and Control (IPPC) - Reference Document on Best Available Techniques in the Pulp and Pa-per Industry. Institute for Prospective Technological Studies, Sevilla.
- Patt R., Kordsachia O., Süttinger R., Ohtani Y., Hoesch J. F., Ehrler P., Eich-inger R., Holik H., Hamm U., Rohmann M. E., Mummenhoff P., Petermann E., Miller R. F., Frank D., Wilken R., Baumgarten H. L. and Rentrop G.-H. (1993) Paper and Pulp. In: Ullmann's Encyclopedia of Industrial Chemistry, Vol. A.18. VCH Publisher Inc.
- ecoinvent database v3.7.1, chemi-thermomechanical pulp production, RER
- Rullifank, K. F., Roefinal, M. E., Kostanti, M., Sartika, L., & Evelyn. (2020). Pulp and paper industry: An overview on pulping technologies, factors, and challenges. IOP Conference Series: Materials Science and Engineering, 845(1), 012005. https://doi.org/10.1088/1757-899x/845/1/012005
- Sandberg, Christer, Ferritsius, Olof and Ferritsius, Rita. "Energy efficiency in mechanical pulping – definitions and considerations" Nordic Pulp & Paper Research Journal, vol. 36, no. 3, 2021, pp. 425-434. https://doi.org/10.1515/npprj-2021-0013
- Netramai, S., Kijchavengkul, T., & Kittipinyovath, P. (2016). Pulp and Paper Production. Reference Module in Food Science. https://doi.org/10.1016/b978-0-08-100596-5.03201-7
- Bajpai, P. (2016). Energy conservation measures for mechanical pulping. Pulp and Paper Industry, 125–144. https://doi.org/10.1016/b978-0-12-803411-8.00008-1
- Suhr M, Klein G, Kourti I, Rodrigo Gonzalo M, Giner Santonja G, Roudier S, Delgado Sancho L. Best Available Techniques (BAT) Reference Document for the Production of Pulp, Paper and Board. Industrial Emissions Directive 2010/75/EU (Integrated Pollution Prevention and Control). EUR 27235. Luxembourg (Luxembourg): Publications Office of the European Union; 2015. JRC95678
- Eurostat (2021). Roundwood removals by type of wood and assortment. Tree species: Coniferous. Wood products: Roundwood under bark. Available at: ec.europa.eu/eurostat/databrowser/bookmark/2fe47d27-a1ea-4028-a4cc-06c1f8725af0?lang=en [Accessed on 25/06/2021]

## Intended applications
Implementation of regular Product Environmental Footprint (PEF) studies and Organisation Environmental Footprint (OEF) studies exclusively under the specified Product groups and sectors as defined in the Product Environmental Footprint Category Rules (PEFCR) and Organisation Environmental Footprint Sectorial Rules (OEFSR) listed in http://ec.europa.eu/environment/eussd/smgp/PEFCR_OEFSR.htm
