# repair for reuse; technology mix; production mix, at plant; for 1 pair footwear

Dataset: ILCD process, Partly terminated system
Geography: GLO
Reference year: 2021
Valid until: 2024
Classification: End-of-life treatment / Reuse or further use
LCI method principle: Attributional
LCI method approaches: Allocation - market value
Completeness: All relevant flows quantified
Project: Provision of process-based 3.0 Environmental Footprint-compliant life cycle inventory datasets - Others - contract number 070201/2020/840235/SER/ENV.B.1
Generated by: Life Cycle Indonesia
Owner: PRé Sustainability B.V.
Compliance: ILCD Data Network - Entry-level; Suggestions for updating the PEF method 2019; ISO 14040 Environmental Management – Life Cycle Assessment – Principles and Framework, 2006; ISO 14044:2006. Environmental Management – Life Cycle Assessment – Requirements and guidelines.; Environmental Footprint 3.1
Review: Dependent internal review by Avraam Symeonidis, Emilia Moreno Ruiz; Independent review panel by Madhuri Nigam
Data quality: Overall quality: Good; Time representativeness: Very good; Geographical representativeness: Good; Technological representativeness: Very good; Precision: Good; Methodological appropriateness and consistency: Not applicable
Amounts: no units in this file; such an amount is in the reference unit of its flow, which a separate flow dataset defines
copyright: true
licenseType: Free of charge for some user types or use types
accessRestrictions: Free of charge for all final users implementing a regular Product Environmental Footprint (PEF) studies and Organisation Environmental Footprint (OEF) studies exclusively under the specified Product groups and sectors as defined in the Product Environmental Footprint Category Rules (PEFCR) and Organisation Environmental Footprint Sectorial Rules (OEFSR) listed in http://ec.europa.eu/environment/eussd/smgp/PEFCR_OEFSR.htm and in accordance with the terms and conditions of the EULA (available at https://ecoinvent.lca-data.com/) exclusively until 31st December 2024. Any use of this dataset or any derivative data not within the specific context of one of the PEF/OEF projects or after the end of 2024 is not permitted.

## General comment
Notice: this data set supersedes the EF3.0-compliant version (see link under "preceding data set version" below calculated with the EF3.0). The life cycle inventory is not changed from the original EF3.0 data set. The LCIA results are calculated based on the EF3.1 methods which provide updated characterisation factors in the following impact categories: Climate Change, Ecotoxicity freshwater, Photochemical Ozone Formation, Acidification, Human Toxicity non-cancer, and Human Toxicity cancer. The review report and the data quality ratings refer to the original results. The data set has been updated by the European Commission on the basis of the original EF3.0 data set delivered by the data provider.Repair and resale is one of the sustainable practices for footwear to reduce the environmental impact of footwear manufacturing. Shoes repairment can be include various process such as gluing, high heel replacement, sole replacement, insole and footbed Replacement, etc.

Allasio, John (2014). The Cost of Repairing Shoes Vs. Buying New Ones, https://www.quickenloans.com/blog/cost-repairing-shoes-buying, Zing! by Quickenloans, Michigan, United States

## Technology and included processes
This dataset is modelled for repairing soles (gluing). The amount of adhesives / glue needed is proxy to cementing process (process of attaching upper to its sole). Aside from gluing, when the repair process done by cobbler, shoes would be handstitched after gluing. The adhesives is assumed to be applied by hand and air dried hence no machine is needed. Amount of thread needed is approximated by average perimeter (length and width) of human feet. Aside from gluing, this dataset also include shoes washing process done by hand washing. Toothbrush is not included in the model as the amount is not significant (since the amount would be divided by its lifetime)

The model represents the process itself, hence the input raw materials are not included in the model. The user will use this dataset along with the input raw materials.The use of adhesives is included in the process. Supporting materials for washing, rinsing, and gluing are included. Emission to soil comes from tissue paper, emission to air comes from water evaporation (rinsing process), while emission to water comes from washing solution. It is assumed that no adhesives evaporate.

Dutton, Cheries. 2017. How are Shoes Made? Construction methods used in shoe manufacturing, https://www.beggshoes.com/blog/how-shoes-are-made/. Scotland: Begg Shoes blog

## Parameters
- kg_0: 0.06
  Mass in kg, for lamination, solvent glue // lamination, solvent glue // glo; Articulated lorry transport, Euro 4, Total weight >32 t; EU+EFTA+UK
- km_0: 1000
  Distance in km, for lamination, solvent glue // lamination, solvent glue // glo; Articulated lorry transport, Euro 4, Total weight >32 t; EU+EFTA+UK
- kg_km_0: 60; = kg_0*km_0
  Transport amount in km*km, for lamination, solvent glue // lamination, solvent glue // glo; Articulated lorry transport, Euro 4, Total weight >32 t; EU+EFTA+UK
- kg_1: 0.00021762
  Mass in kg, for polyester thread // polyester thread production // glo; Articulated lorry transport, Euro 4, Total weight >32 t; EU+EFTA+UK
- km_1: 1000
  Distance in km, for polyester thread // polyester thread production // glo; Articulated lorry transport, Euro 4, Total weight >32 t; EU+EFTA+UK
- kg_km_1: 0.21762; = kg_1*km_1
  Transport amount in km*km, for polyester thread // polyester thread production // glo; Articulated lorry transport, Euro 4, Total weight >32 t; EU+EFTA+UK
- kg_2: 0.00653062
  Mass in kg, for sanitary and household papers (tissue paper) // sanitary and household papers (tissue paper) // eu+efta+uk; Articulated lorry transport, Euro 4, Total weight >32 t; EU+EFTA+UK
- km_2: 1000
  Distance in km, for sanitary and household papers (tissue paper) // sanitary and household papers (tissue paper) // eu+efta+uk; Articulated lorry transport, Euro 4, Total weight >32 t; EU+EFTA+UK
- kg_km_2: 6.53062; = kg_2*km_2
  Transport amount in km*km, for sanitary and household papers (tissue paper) // sanitary and household papers (tissue paper) // eu+efta+uk; Articulated lorry transport, Euro 4, Total weight >32 t; EU+EFTA+UK
- kg_3: 0.00522466
  Mass in kg, for surfactant // surfactant production // glo; Articulated lorry transport, Euro 4, Total weight >32 t; EU+EFTA+UK
- km_3: 1000
  Distance in km, for surfactant // surfactant production // glo; Articulated lorry transport, Euro 4, Total weight >32 t; EU+EFTA+UK
- kg_km_3: 5.22466; = kg_3*km_3
  Transport amount in km*km, for surfactant // surfactant production // glo; Articulated lorry transport, Euro 4, Total weight >32 t; EU+EFTA+UK
- kg_4: 0.00653062
  Mass in kg, for municipal solid waste to landfill // landfill of municipal solid waste // eu+efta+uk; Articulated lorry transport, Euro 4, Total weight >32 t; EU+EFTA+UK
- km_4: 77
  Distance in km, for municipal solid waste to landfill // landfill of municipal solid waste // eu+efta+uk; Articulated lorry transport, Euro 4, Total weight >32 t; EU+EFTA+UK
- kg_km_4: 0.502858; = kg_4*km_4
  Transport amount in km*km, for municipal solid waste to landfill // landfill of municipal solid waste // eu+efta+uk; Articulated lorry transport, Euro 4, Total weight >32 t; EU+EFTA+UK
- kg_5: 0.06
  Mass in kg, for lamination, solvent glue // lamination, solvent glue // glo; Transoceanic ship, containers; GLO
- km_5: 18000
  Distance in km, for lamination, solvent glue // lamination, solvent glue // glo; Transoceanic ship, containers; GLO
- kg_km_5: 1080; = kg_5*km_5
  Transport amount in km*km, for lamination, solvent glue // lamination, solvent glue // glo; Transoceanic ship, containers; GLO
- kg_6: 0.00021762
  Mass in kg, for polyester thread // polyester thread production // glo; Transoceanic ship, containers; GLO
- km_6: 18000
  Distance in km, for polyester thread // polyester thread production // glo; Transoceanic ship, containers; GLO
- kg_km_6: 3.91716; = kg_6*km_6
  Transport amount in km*km, for polyester thread // polyester thread production // glo; Transoceanic ship, containers; GLO
- kg_7: 0.00653062
  Mass in kg, for sanitary and household papers (tissue paper) // sanitary and household papers (tissue paper) // eu+efta+uk; Transoceanic ship, containers; GLO
- km_7: 18000
  Distance in km, for sanitary and household papers (tissue paper) // sanitary and household papers (tissue paper) // eu+efta+uk; Transoceanic ship, containers; GLO
- kg_km_7: 117.551; = kg_7*km_7
  Transport amount in km*km, for sanitary and household papers (tissue paper) // sanitary and household papers (tissue paper) // eu+efta+uk; Transoceanic ship, containers; GLO
- kg_8: 0.00522466
  Mass in kg, for surfactant // surfactant production // glo; Transoceanic ship, containers; GLO
- km_8: 18000
  Distance in km, for surfactant // surfactant production // glo; Transoceanic ship, containers; GLO
- kg_km_8: 94.0438; = kg_8*km_8
  Transport amount in km*km, for surfactant // surfactant production // glo; Transoceanic ship, containers; GLO

## Reference product
- footwear, repair for reuse // repair for reuse // glo: 1

## Inputs
- Transport of lamination, solvent glue // lamination, solvent glue // glo by Articulated lorry transport, Euro 4, Total weight >32 t - EU+EFTA+UK: 60; = kg_km_0
- Transport of polyester thread // polyester thread production // glo by Articulated lorry transport, Euro 4, Total weight >32 t - EU+EFTA+UK: 0.21762; = kg_km_1
- Transport of sanitary and household papers (tissue paper) // sanitary and household papers (tissue paper) // eu+efta+uk by Articulated lorry transport, Euro 4, Total weight >32 t - EU+EFTA+UK: 6.53062; = kg_km_2
- Transport of surfactant // surfactant production // glo by Articulated lorry transport, Euro 4, Total weight >32 t - EU+EFTA+UK: 5.22466; = kg_km_3
- Transport of municipal solid waste to landfill // landfill of municipal solid waste // eu+efta+uk by Articulated lorry transport, Euro 4, Total weight >32 t - EU+EFTA+UK: 0.502858; = kg_km_4
- Transport of lamination, solvent glue // lamination, solvent glue // glo by Transoceanic ship, containers - GLO: 1080; = kg_km_5
- Transport of polyester thread // polyester thread production // glo by Transoceanic ship, containers - GLO: 3.91716; = kg_km_6
- Transport of sanitary and household papers (tissue paper) // sanitary and household papers (tissue paper) // eu+efta+uk by Transoceanic ship, containers - GLO: 117.551; = kg_km_7
- Transport of surfactant // surfactant production // glo by Transoceanic ship, containers - GLO: 94.0438; = kg_km_8
- footwear, repair for reuse // repair for reuse // glo, blackbox: 1
- footwear, repair for reuse // repair for reuse // glo, elementary: 1

## Impact indicators
- Eutrophication marine: 0.00069108
- Ecotoxicity, freshwater: 2.94986
- Land use: 3.38346
- Water use: 0.19287
- Resource use, minerals and metals: 9.73647e-7
- Resource use, fossils: 6.13745
- Climate change: 0.446639
- Ozone depletion: 2.92901e-9
- Human toxicity, cancer: 3.36908e-10
- Human toxicity, non-cancer: 2.99126e-9
- EF-particulate Matter: 9.87165e-8
- Ionising radiation, human health: 0.0266968
- Photochemical ozone formation - human health: 0.00399402
- Acidification: 0.00330216
- Eutrophication, terrestrial: 0.00652059
- Eutrophication, freshwater: 6.41253e-6

## Deviations from the LCI method principle
The background data uses:
- the \xe2\x80\x9cRecycled content cut-off\xe2\x80\x9d approach to allocate end-of-life by-products and secondary materials. This allocation is explained in the description of the recycled content system model (http://www.ecoinvent.org/database/system-models-in-ecoinvent-3/cut-off-system-model/allocation-cut-off-by-classification.html).
OR
- EF compliant data

## Deviations from the LCI method approaches
Background data:
- the \xe2\x80\x9cRecycled content cut-off\xe2\x80\x9d approach to allocate end-of-life by-products and secondary materials. This allocation is explained in the description of the recycled content system model (http://www.ecoinvent.org/database/system-models-in-ecoinvent-3/cut-off-system-model/allocation-cut-off-by-classification.html). The ecoinvent database mostly relies on “Allocation – market values” apart for few exceptions particularly in the energy sector. ecoinvent energy data is replaced with EF3.0 core data as per the EF guidelines version 2.0.
OR
- EF compliant data

## Modelling constants
All modelling constants follow the requirements listed in the Tender Specifications 070201/2020/SER/ENV.B1. Completeness: There are no intentional cut-offs in the inventory no matter how small their contribution to all the EF impact categories is. Eventual cut-offs are in compliance with the Guide for EF compliant data sets (JRC 2020), i.e. only if below the 3% cut-off rule. Water use: water use is modelled at country level using separate flows for water withdrawal, water release and water evaporation. Handling multi-functional processes: the following PEF multi- functionality decision hierarchy is applied for resolving all multi- functionality problems: (1) subdivision or system expansion; (2) allocation based on a relevant underlying physical relationship (substitution may apply here); (3) allocation based on some other relationship. Direct land use change: GHG emissions from direct LUC allocated to good/service for 20 years after the LUC occurs, with IPCC default values. Carbon storage and delayed emissions: credits associated with temporary (carbon) storage or delayed emissions up to 300 years are not be considered. Emissions off-setting: are not included. Capital goods (including infrastructures) and their End of life: they are included. System boundaries: system boundaries include all processes linked to the product supply chain (e.g. maintenance). Time period: emissions and removals are modelled as if released or removed at the beginning of the assessment method. Fossil and biogenic carbon emissions and removals: removals and emissions are modelled as follows: All GHG emissions from fossil fuels (including peat and limestone) are modelled consistently with the most updated ILCD list of elementary flows. The non-fossil (biogenic) carbon flows are modelled consistently with the most updated ILCD list of elementary flows.

## Cut-off and completeness
There are no intentional cut-offs in the inventory no matter how small their contribution to all the EF impact categories is. Eventual cut-offs are in compliance with the Guide for EF compliant data sets (JRC 2020), i.e. only if below the 3% cut-off rule. The dataset dry mass and water balance has been checked to ensure the inventory is complete. Capital goods (e.g. infrastructure) and their end-of-life are included.

## Data selection and combination
These datasets include, in both their foreground and background data, links to EF3.0 compliant data.
The relevant background data on energy, transport, and End of Life are from the LCDN data node (http://lcdn.thinkstep.com/Node/).
All other background data in the supply of this product for which no EF3.0 process was available are from ecoinvent v3.7 database (www.ecoinvent.org) or other data sources.

## Data treatment and extrapolations
Several data sources have been used to model the inventory.

## Review details
Internal reviews have been asked to review the plausibility of the unit process, LCIA scores, and DQRs. Internal reviewers have also been asked to review the data for EF compliancy. The consortium is therefore responsible for aspects such as compliancy with the ILCD format, including validation in Look@LCI, and nomenclature.
Internal reviwers have been asked to judge based on the process name, that the unit process models in a complete and representative way the process in the requested location. The review encompassed the plausability of:
- exchanges with nature (elementary flows) as well as exchanges such as product and waste flows.
- meta information (general comment, technology comment, system boundaries, allocation, cut-off rules, etc.). Reviewers were asked to judge if the provided information is enough to understand the content of the process.
- LCIA scores
- DQRs including precision, technology, time and geography. As well as the overall DQR.
External reviewers have been asked to provide their expertise in the field of interest. External reviewers have been asked to review the unit process, including eventual methodological choices, the LCIA scores (provided with contribution scores as well), and DQRs. External reviewers have been provided all the information in a tool developed by the consortium for the purpose of this project.
External reviewers have been asked to judge based on the process name, that the unit process models in a complete and representative way the process in the requested location. The review encompassed:
- Plausability and completeness of exchanges with nature (elementary flows) as well as exchanges such as product and waste flows.
- Review of meta information (general comment, technology comment, system boundaries, allocation, cut-off rules, etc.). Reviewers were asked to judge if the provided information is enough to understand the content of the process.
- Review of properties (biogenic carbon and water content).
- Review of allocation keys.
- Plausability of LCIA scores calculated by the consortium.
- Plausability of DQRs including precision, technology, time and geography. As well as the overall DQR.

## Data sources
- Background Data for Representative products and organisations. EF 3.0 compliant (data stock)
- UN Data (2018) Statistics Data for Lubricants Productions, http://data.un.org/Data.aspx?q=Lubricants&d=EDATA&f=cmID%3aLU, United Nations Statistics Division, Global.
- Quantis data (2021)
- Mary Marlowe Leverette (2020) How to Clean 5 Types of Shoes Fast, https://www.thespruce.com/how-to-clean-your-shoes-4164257, The Spruce, New York, Unites States
- Colorado State University (2017) Brilliant Layers: Building Your Very Own Density Column!, https://tra.extension.colostate.edu/wp-content/uploads/sites/9/2017/05/36.Density.pdf, Colorado State University, Colorado, United States
- Costa Vieira, J., de Oliveira Mendes, A., Carta, A. M., Galli, E., Torrão Fiadeiro, P., and Costa, A. P. (2020) Impact of embossing on liquid absorption of toilet tissue papers, https://bioresources.cnr.ncsu.edu/resources/impact-of-embossing-on-liquid-absorption-of-toilet-tissue-papers/, North Carolina State University, North Carlifornia, United States
- Measured Data (2021)
- Raja(2018) WHAT IS TISSUE PAPER? EVERYTHING THERE IS TO KNOW, https://www.rajapack.co.uk/blog-uk/tissue-paper-questions-answered/, Raja Pack, United Kingdom

## Intended applications
Implementation of regular Product Environmental Footprint (PEF) studies and Organisation Environmental Footprint (OEF) studies exclusively under the specified Product groups and sectors as defined in the Product Environmental Footprint Category Rules (PEFCR) and Organisation Environmental Footprint Sectorial Rules (OEFSR) listed in http://ec.europa.eu/environment/eussd/smgp/PEFCR_OEFSR.htm
