# bonding, chemical, impregnation, stenter, hot calendering, non-woven fabric; technology mix; production mix, at plant; service (raw materials excluded)

Dataset: ILCD process, Partly terminated system
Geography: GLO
Reference year: 2021
Valid until: 2024
Classification: Systems / Textiles, furnitures and other interiors
LCI method principle: Attributional
LCI method approaches: Allocation - market value
Completeness: All relevant flows quantified
Project: Provision of process-based 3.0 Environmental Footprint-compliant life cycle inventory datasets - Apparel 1 - contract number 070201/2020/840291/SER/ENV.B.1
Generated by: Life Cycle Indonesia
Owner: PRé Sustainability B.V.
Compliance: ILCD Data Network - Entry-level; Suggestions for updating the PEF method 2019; ISO 14040 Environmental Management – Life Cycle Assessment – Principles and Framework, 2006; ISO 14044:2006. Environmental Management – Life Cycle Assessment – Requirements and guidelines.; Environmental Footprint 3.1
Review: Dependent internal review by Avraam Symeonidis, Emilia Moreno Ruiz; Independent review panel by Fábio Valebona
Data quality: Overall quality: Good; Time representativeness: Very good; Geographical representativeness: Good; Technological representativeness: Good; Precision: Good; Methodological appropriateness and consistency: Not applicable
Amounts: no units in this file; such an amount is in the reference unit of its flow, which a separate flow dataset defines
copyright: true
licenseType: Free of charge for some user types or use types
accessRestrictions: Free of charge for all final users implementing a regular Product Environmental Footprint (PEF) studies and Organisation Environmental Footprint (OEF) studies exclusively under the specified Product groups and sectors as defined in the Product Environmental Footprint Category Rules (PEFCR) and Organisation Environmental Footprint Sectorial Rules (OEFSR) listed in http://ec.europa.eu/environment/eussd/smgp/PEFCR_OEFSR.htm and in accordance with the terms and conditions of the EULA (available at https://ecoinvent.lca-data.com/) exclusively until 31st December 2024. Any use of this dataset or any derivative data not within the specific context of one of the PEF/OEF projects or after the end of 2024 is not permitted.

## General comment
Notice: this data set supersedes the EF3.0-compliant version (see link under "preceding data set version" below calculated with the EF3.0). The life cycle inventory is not changed from the original EF3.0 data set. The LCIA results are calculated based on the EF3.1 methods which provide updated characterisation factors in the following impact categories: Climate Change, Ecotoxicity freshwater, Photochemical Ozone Formation, Acidification, Human Toxicity non-cancer, and Human Toxicity cancer. The review report and the data quality ratings refer to the original results. The data set has been updated by the European Commission on the basis of the original EF3.0 data set delivered by the data provider.Non-woven fabric can be produced from chemical bonding process. The chemical binder most frequently used to consolidate fiber webs today is water-borne latex. Most latex binders are made from vinyl materials, such as polyvinylacetate, polyvinylchloride, styrene/butadiene resin, butadiene, and polyacrylic, or their combinations . There are several ways to apply binders, for instance saturation, foam, spray, and print (Karthik, et al., 2016). After the web or prebounded web impregnated with resin, it is dried then thermally pressed as a means for controlling the thickness (Kawakami, et al., 1999). The drying procedure varies depending upon the type of material and the end use of the nonwoven fabric. One of the common methods is using stenter frames. The thermal press treatment of the nonwoven fabric can be achieved by using a general calender. Calendaring decreases the nonwoven thickness and provides a smooth surface (Russell, 2007).

In general, man made fibres such as polypropylene, polyester, viscose rayon, acrylic, polyamide, and other speciality fibres are usually used in production of non woven fabrics (Russell, 2007). The strength of chemical bonded non-woven fabric is depended to the binder used, the fabric also elastic and have a good recovery under strain. The applications of chemical bonded fabric are Wipes and towels, Automotive trim, Medical nonwovens, Carrier fabrics, Roofing products, Bedding products (high loft), Apparel interlinings, Furniture fabrics (High loft), Filter media, Apparel, Coating substrates, Pillows (high loft) (Karthik, et al., 2016).

Kawakami, et al. 1999. Fabric. European Patent Office no EP1022375A1
Khartik, T., et al. 2016. Non-woven - Process, Structure, Properties and Applications. New Delhi: Woodhead Publishing India. pp 132 - 151
Russel, S.J. 2007. Handbook of Nonwovens. England: Woodhead Publishing Limited. pp 9 - 161

## Technology and included processes
One of the most common ways to apply binders is saturation, which involves the complete immersion of the web or prebonded (needlepunched or thermal bonded) nonwoven either in a binder bath or by flooding the non-woven (Russel, 2007). The amount of binders needed range from 5-60% weight of the nonwoven fabric for impregnation (Khartik, et al., 2016).

Polyphenylene sulfide fibers can be used for producing heat resistance fabric. In the bonding process. The prebounded web is impregnated with synthetic resins. Preferable thermosetting resins which can be used include epoxy resins (bisphenol A type, bisphenol F type and bisphenol AD type are preferable), phenol resins, vinyl ester resins and unsaturated polyester resins. Among them, bisphenol A type is more preferable for obtaining the shape maintenance of pleats at high temperatures (Kawakami, et al., 1999). To capture the global context, the data provided modelled usage of 5 different resins with equal usage probability.

The impregnated fabric then dried in stenter frames followed by thermal pressing treatment in hot calendering machine. When the nonwoven is passed through the calendar rollers, it is subjected to an extremely uniform pressure along the entire width of the rollers.

The model represents the process of bonding, hence the input raw materials (Fiber Webs or Prebounded FIber) are not included in the model. The user will use this dataset along with the input raw materials. Energy uses and infrastructure are included in the model. There is no direct emission to soil and air since the emission comes from electricity usage, while the hazardous waste comes from waste lube oil and heat transfer fluid oil. The hazardous waste is incinerated in this model. The resin is part of the final product. Hence, there is no waste or emission resulted from the usage of resins. In the model, the finishng process is not included in the scope of this dataset and enegy sources of machines used solely from electricity.

Khartik, T., et al. 2016. Non-woven - Process, Structure, Properties and Applications. New Delhi: Woodhead Publishing India. pp 132
Kawakami, et al. 1999. Fabric. European Patent Office no EP1022375A1
Russel, S.J. 2007. Handbook of Nonwovens. England: Woodhead Publishing Limited. pp 158 - 349

## Parameters
- kg_0: 0.0154131
  Mass in kg, for bisphenol A epoxy based vinyl ester resin; Transoceanic ship, containers; GLO
- km_0: 1611.65
  Distance in km, for bisphenol A epoxy based vinyl ester resin; Transoceanic ship, containers; GLO
- kg_km_0: 24.8405; = kg_0*km_0
  Transport amount in km*km, for bisphenol A epoxy based vinyl ester resin; Transoceanic ship, containers; GLO
- kg_1: 0.0154131
  Mass in kg, for bisphenol A epoxy based vinyl ester resin; Freight train, diesel traction; EU+EFTA+UK
- km_1: 657.62
  Distance in km, for bisphenol A epoxy based vinyl ester resin; Freight train, diesel traction; EU+EFTA+UK
- kg_km_1: 10.136; = kg_1*km_1
  Transport amount in km*km, for bisphenol A epoxy based vinyl ester resin; Freight train, diesel traction; EU+EFTA+UK
- kg_2: 0.0154131
  Mass in kg, for bisphenol A epoxy based vinyl ester resin; Freight train, electricity traction; EU+EFTA+UK
- km_2: 223.695
  Distance in km, for bisphenol A epoxy based vinyl ester resin; Freight train, electricity traction; EU+EFTA+UK
- kg_km_2: 3.44784; = kg_2*km_2
  Transport amount in km*km, for bisphenol A epoxy based vinyl ester resin; Freight train, electricity traction; EU+EFTA+UK
- kg_3: 0.0154131
  Mass in kg, for bisphenol A epoxy based vinyl ester resin; Freight train, average; EU+EFTA+UK
- km_3: 5.27596
  Distance in km, for bisphenol A epoxy based vinyl ester resin; Freight train, average; EU+EFTA+UK
- kg_km_3: 0.081319; = kg_3*km_3
  Transport amount in km*km, for bisphenol A epoxy based vinyl ester resin; Freight train, average; EU+EFTA+UK
- kg_4: 0.0154131
  Mass in kg, for bisphenol A epoxy based vinyl ester resin; Articulated lorry transport, Euro 4, Total weight >32 t; EU+EFTA+UK
- km_4: 380.076
  Distance in km, for bisphenol A epoxy based vinyl ester resin; Articulated lorry transport, Euro 4, Total weight >32 t; EU+EFTA+UK
- kg_km_4: 5.85815; = kg_4*km_4
  Transport amount in km*km, for bisphenol A epoxy based vinyl ester resin; Articulated lorry transport, Euro 4, Total weight >32 t; EU+EFTA+UK
- kg_5: 0.0154131
  Mass in kg, for bisphenol A epoxy based vinyl ester resin; Articulated lorry transport, Total weight >32 t, mix Euro 0-5; ROW w/o EU+EFTA
- km_5: 1003.09
  Distance in km, for bisphenol A epoxy based vinyl ester resin; Articulated lorry transport, Total weight >32 t, mix Euro 0-5; ROW w/o EU+EFTA
- kg_km_5: 15.4608; = kg_5*km_5
  Transport amount in km*km, for bisphenol A epoxy based vinyl ester resin; Articulated lorry transport, Total weight >32 t, mix Euro 0-5; ROW w/o EU+EFTA
- kg_6: 0.00631111
  Mass in kg, for dicyclopentadiene based unsaturated polyester resin; Transoceanic ship, containers; GLO
- km_6: 3936
  Distance in km, for dicyclopentadiene based unsaturated polyester resin; Transoceanic ship, containers; GLO
- kg_km_6: 24.8405; = kg_6*km_6
  Transport amount in km*km, for dicyclopentadiene based unsaturated polyester resin; Transoceanic ship, containers; GLO
- kg_7: 0.00631111
  Mass in kg, for dicyclopentadiene based unsaturated polyester resin; Freight train, diesel traction; EU+EFTA+UK
- km_7: 1606.05
  Distance in km, for dicyclopentadiene based unsaturated polyester resin; Freight train, diesel traction; EU+EFTA+UK
- kg_km_7: 10.136; = kg_7*km_7
  Transport amount in km*km, for dicyclopentadiene based unsaturated polyester resin; Freight train, diesel traction; EU+EFTA+UK
- kg_8: 0.00631111
  Mass in kg, for dicyclopentadiene based unsaturated polyester resin; Freight train, electricity traction; EU+EFTA+UK
- km_8: 546.313
  Distance in km, for dicyclopentadiene based unsaturated polyester resin; Freight train, electricity traction; EU+EFTA+UK
- kg_km_8: 3.44784; = kg_8*km_8
  Transport amount in km*km, for dicyclopentadiene based unsaturated polyester resin; Freight train, electricity traction; EU+EFTA+UK
- kg_9: 0.00631111
  Mass in kg, for dicyclopentadiene based unsaturated polyester resin; Freight train, average; EU+EFTA+UK
- km_9: 12.8851
  Distance in km, for dicyclopentadiene based unsaturated polyester resin; Freight train, average; EU+EFTA+UK
- kg_km_9: 0.081319; = kg_9*km_9
  Transport amount in km*km, for dicyclopentadiene based unsaturated polyester resin; Freight train, average; EU+EFTA+UK
- kg_10: 0.00631111
  Mass in kg, for dicyclopentadiene based unsaturated polyester resin; Articulated lorry transport, Euro 4, Total weight >32 t; EU+EFTA+UK
- km_10: 928.228
  Distance in km, for dicyclopentadiene based unsaturated polyester resin; Articulated lorry transport, Euro 4, Total weight >32 t; EU+EFTA+UK
- kg_km_10: 5.85815; = kg_10*km_10
  Transport amount in km*km, for dicyclopentadiene based unsaturated polyester resin; Articulated lorry transport, Euro 4, Total weight >32 t; EU+EFTA+UK
- kg_11: 0.00631111
  Mass in kg, for dicyclopentadiene based unsaturated polyester resin; Articulated lorry transport, Total weight >32 t, mix Euro 0-5; ROW w/o EU+EFTA
- km_11: 2449.77
  Distance in km, for dicyclopentadiene based unsaturated polyester resin; Articulated lorry transport, Total weight >32 t, mix Euro 0-5; ROW w/o EU+EFTA
- kg_km_11: 15.4608; = kg_11*km_11
  Transport amount in km*km, for dicyclopentadiene based unsaturated polyester resin; Articulated lorry transport, Total weight >32 t, mix Euro 0-5; ROW w/o EU+EFTA
- kg_12: 0.00631111
  Mass in kg, for isophthalic acid based unsaturated polyester resin; Transoceanic ship, containers; GLO
- km_12: 3936
  Distance in km, for isophthalic acid based unsaturated polyester resin; Transoceanic ship, containers; GLO
- kg_km_12: 24.8405; = kg_12*km_12
  Transport amount in km*km, for isophthalic acid based unsaturated polyester resin; Transoceanic ship, containers; GLO
- kg_13: 0.00631111
  Mass in kg, for isophthalic acid based unsaturated polyester resin; Freight train, diesel traction; EU+EFTA+UK
- km_13: 1606.05
  Distance in km, for isophthalic acid based unsaturated polyester resin; Freight train, diesel traction; EU+EFTA+UK
- kg_km_13: 10.136; = kg_13*km_13
  Transport amount in km*km, for isophthalic acid based unsaturated polyester resin; Freight train, diesel traction; EU+EFTA+UK
- kg_14: 0.00631111
  Mass in kg, for isophthalic acid based unsaturated polyester resin; Freight train, electricity traction; EU+EFTA+UK
- km_14: 546.313
  Distance in km, for isophthalic acid based unsaturated polyester resin; Freight train, electricity traction; EU+EFTA+UK
- kg_km_14: 3.44784; = kg_14*km_14
  Transport amount in km*km, for isophthalic acid based unsaturated polyester resin; Freight train, electricity traction; EU+EFTA+UK
- kg_15: 0.00631111
  Mass in kg, for isophthalic acid based unsaturated polyester resin; Freight train, average; EU+EFTA+UK
- km_15: 12.8851
  Distance in km, for isophthalic acid based unsaturated polyester resin; Freight train, average; EU+EFTA+UK
- kg_km_15: 0.081319; = kg_15*km_15
  Transport amount in km*km, for isophthalic acid based unsaturated polyester resin; Freight train, average; EU+EFTA+UK
- kg_16: 0.00631111
  Mass in kg, for isophthalic acid based unsaturated polyester resin; Articulated lorry transport, Euro 4, Total weight >32 t; EU+EFTA+UK
- km_16: 928.228
  Distance in km, for isophthalic acid based unsaturated polyester resin; Articulated lorry transport, Euro 4, Total weight >32 t; EU+EFTA+UK
- kg_km_16: 5.85815; = kg_16*km_16
  Transport amount in km*km, for isophthalic acid based unsaturated polyester resin; Articulated lorry transport, Euro 4, Total weight >32 t; EU+EFTA+UK
- kg_17: 0.00631111
  Mass in kg, for isophthalic acid based unsaturated polyester resin; Articulated lorry transport, Total weight >32 t, mix Euro 0-5; ROW w/o EU+EFTA
- km_17: 2449.77
  Distance in km, for isophthalic acid based unsaturated polyester resin; Articulated lorry transport, Total weight >32 t, mix Euro 0-5; ROW w/o EU+EFTA
- kg_km_17: 15.4608; = kg_17*km_17
  Transport amount in km*km, for isophthalic acid based unsaturated polyester resin; Articulated lorry transport, Total weight >32 t, mix Euro 0-5; ROW w/o EU+EFTA
- kg_18: 0.00631111
  Mass in kg, for maleic unsaturated polyester resin; Transoceanic ship, containers; GLO
- km_18: 3936
  Distance in km, for maleic unsaturated polyester resin; Transoceanic ship, containers; GLO
- kg_km_18: 24.8405; = kg_18*km_18
  Transport amount in km*km, for maleic unsaturated polyester resin; Transoceanic ship, containers; GLO
- kg_19: 0.00631111
  Mass in kg, for maleic unsaturated polyester resin; Freight train, diesel traction; EU+EFTA+UK
- km_19: 1606.05
  Distance in km, for maleic unsaturated polyester resin; Freight train, diesel traction; EU+EFTA+UK
- kg_km_19: 10.136; = kg_19*km_19
  Transport amount in km*km, for maleic unsaturated polyester resin; Freight train, diesel traction; EU+EFTA+UK
- kg_20: 0.00631111
  Mass in kg, for maleic unsaturated polyester resin; Freight train, electricity traction; EU+EFTA+UK
- km_20: 546.313
  Distance in km, for maleic unsaturated polyester resin; Freight train, electricity traction; EU+EFTA+UK
- kg_km_20: 3.44784; = kg_20*km_20
  Transport amount in km*km, for maleic unsaturated polyester resin; Freight train, electricity traction; EU+EFTA+UK
- kg_21: 0.00631111
  Mass in kg, for maleic unsaturated polyester resin; Freight train, average; EU+EFTA+UK
- km_21: 12.8851
  Distance in km, for maleic unsaturated polyester resin; Freight train, average; EU+EFTA+UK
- kg_km_21: 0.081319; = kg_21*km_21
  Transport amount in km*km, for maleic unsaturated polyester resin; Freight train, average; EU+EFTA+UK
- kg_22: 0.00631111
  Mass in kg, for maleic unsaturated polyester resin; Articulated lorry transport, Euro 4, Total weight >32 t; EU+EFTA+UK
- km_22: 928.228
  Distance in km, for maleic unsaturated polyester resin; Articulated lorry transport, Euro 4, Total weight >32 t; EU+EFTA+UK
- kg_km_22: 5.85815; = kg_22*km_22
  Transport amount in km*km, for maleic unsaturated polyester resin; Articulated lorry transport, Euro 4, Total weight >32 t; EU+EFTA+UK
- kg_23: 0.00631111
  Mass in kg, for maleic unsaturated polyester resin; Articulated lorry transport, Total weight >32 t, mix Euro 0-5; ROW w/o EU+EFTA
- km_23: 2449.77
  Distance in km, for maleic unsaturated polyester resin; Articulated lorry transport, Total weight >32 t, mix Euro 0-5; ROW w/o EU+EFTA
- kg_km_23: 15.4608; = kg_23*km_23
  Transport amount in km*km, for maleic unsaturated polyester resin; Articulated lorry transport, Total weight >32 t, mix Euro 0-5; ROW w/o EU+EFTA
- kg_24: 0.00631111
  Mass in kg, for orthophthalic acid based unsaturated polyester resin; Transoceanic ship, containers; GLO
- km_24: 3936
  Distance in km, for orthophthalic acid based unsaturated polyester resin; Transoceanic ship, containers; GLO
- kg_km_24: 24.8405; = kg_24*km_24
  Transport amount in km*km, for orthophthalic acid based unsaturated polyester resin; Transoceanic ship, containers; GLO
- kg_25: 0.00631111
  Mass in kg, for orthophthalic acid based unsaturated polyester resin; Freight train, diesel traction; EU+EFTA+UK
- km_25: 1606.05
  Distance in km, for orthophthalic acid based unsaturated polyester resin; Freight train, diesel traction; EU+EFTA+UK
- kg_km_25: 10.136; = kg_25*km_25
  Transport amount in km*km, for orthophthalic acid based unsaturated polyester resin; Freight train, diesel traction; EU+EFTA+UK
- kg_26: 0.00631111
  Mass in kg, for orthophthalic acid based unsaturated polyester resin; Freight train, electricity traction; EU+EFTA+UK
- km_26: 546.313
  Distance in km, for orthophthalic acid based unsaturated polyester resin; Freight train, electricity traction; EU+EFTA+UK
- kg_km_26: 3.44784; = kg_26*km_26
  Transport amount in km*km, for orthophthalic acid based unsaturated polyester resin; Freight train, electricity traction; EU+EFTA+UK
- kg_27: 0.00631111
  Mass in kg, for orthophthalic acid based unsaturated polyester resin; Freight train, average; EU+EFTA+UK
- km_27: 12.8851
  Distance in km, for orthophthalic acid based unsaturated polyester resin; Freight train, average; EU+EFTA+UK
- kg_km_27: 0.081319; = kg_27*km_27
  Transport amount in km*km, for orthophthalic acid based unsaturated polyester resin; Freight train, average; EU+EFTA+UK
- kg_28: 0.00631111
  Mass in kg, for orthophthalic acid based unsaturated polyester resin; Articulated lorry transport, Euro 4, Total weight >32 t; EU+EFTA+UK
- km_28: 928.228
  Distance in km, for orthophthalic acid based unsaturated polyester resin; Articulated lorry transport, Euro 4, Total weight >32 t; EU+EFTA+UK
- kg_km_28: 5.85815; = kg_28*km_28
  Transport amount in km*km, for orthophthalic acid based unsaturated polyester resin; Articulated lorry transport, Euro 4, Total weight >32 t; EU+EFTA+UK
- kg_29: 0.00631111
  Mass in kg, for orthophthalic acid based unsaturated polyester resin; Articulated lorry transport, Total weight >32 t, mix Euro 0-5; ROW w/o EU+EFTA
- km_29: 2449.77
  Distance in km, for orthophthalic acid based unsaturated polyester resin; Articulated lorry transport, Total weight >32 t, mix Euro 0-5; ROW w/o EU+EFTA
- kg_km_29: 15.4608; = kg_29*km_29
  Transport amount in km*km, for orthophthalic acid based unsaturated polyester resin; Articulated lorry transport, Total weight >32 t, mix Euro 0-5; ROW w/o EU+EFTA
- kg_30: 0.0473333
  Mass in kg, for epoxy resin // epoxy resin production // glo; Articulated lorry transport, Euro 4, Total weight >32 t; EU+EFTA+UK
- km_30: 1000
  Distance in km, for epoxy resin // epoxy resin production // glo; Articulated lorry transport, Euro 4, Total weight >32 t; EU+EFTA+UK
- kg_km_30: 47.3333; = kg_30*km_30
  Transport amount in km*km, for epoxy resin // epoxy resin production // glo; Articulated lorry transport, Euro 4, Total weight >32 t; EU+EFTA+UK
- kg_31: 9.61538e-5
  Mass in kg, for heat transfer fluid oil // heat transfer fluid oil production // eu+efta+uk; Articulated lorry transport, Euro 4, Total weight >32 t; EU+EFTA+UK
- km_31: 1000.48
  Distance in km, for heat transfer fluid oil // heat transfer fluid oil production // eu+efta+uk; Articulated lorry transport, Euro 4, Total weight >32 t; EU+EFTA+UK
- kg_km_31: 0.0962; = kg_31*km_31
  Transport amount in km*km, for heat transfer fluid oil // heat transfer fluid oil production // eu+efta+uk; Articulated lorry transport, Euro 4, Total weight >32 t; EU+EFTA+UK
- kg_32: 7.56419e-6
  Mass in kg, for lubricating oil // lubricants at refinery // cn; Articulated lorry transport, Euro 4, Total weight >32 t; EU+EFTA+UK
- km_32: 1000
  Distance in km, for lubricating oil // lubricants at refinery // cn; Articulated lorry transport, Euro 4, Total weight >32 t; EU+EFTA+UK
- kg_km_32: 0.00756419; = kg_32*km_32
  Transport amount in km*km, for lubricating oil // lubricants at refinery // cn; Articulated lorry transport, Euro 4, Total weight >32 t; EU+EFTA+UK
- kg_33: 2.42671e-5
  Mass in kg, for lubricating oil // lubricants at refinery // eu+efta+uk; Articulated lorry transport, Euro 4, Total weight >32 t; EU+EFTA+UK
- km_33: 1001.36
  Distance in km, for lubricating oil // lubricants at refinery // eu+efta+uk; Articulated lorry transport, Euro 4, Total weight >32 t; EU+EFTA+UK
- kg_km_33: 0.0243; = kg_33*km_33
  Transport amount in km*km, for lubricating oil // lubricants at refinery // eu+efta+uk; Articulated lorry transport, Euro 4, Total weight >32 t; EU+EFTA+UK
- kg_34: 1.818e-6
  Mass in kg, for lubricating oil // lubricants at refinery // raf; Articulated lorry transport, Euro 4, Total weight >32 t; EU+EFTA+UK
- km_34: 1000
  Distance in km, for lubricating oil // lubricants at refinery // raf; Articulated lorry transport, Euro 4, Total weight >32 t; EU+EFTA+UK
- kg_km_34: 0.001818; = kg_34*km_34
  Transport amount in km*km, for lubricating oil // lubricants at refinery // raf; Articulated lorry transport, Euro 4, Total weight >32 t; EU+EFTA+UK
- kg_35: 4.76414e-5
  Mass in kg, for lubricating oil // lubricants at refinery // ras w/o cn; Articulated lorry transport, Euro 4, Total weight >32 t; EU+EFTA+UK
- km_35: 1000
  Distance in km, for lubricating oil // lubricants at refinery // ras w/o cn; Articulated lorry transport, Euro 4, Total weight >32 t; EU+EFTA+UK
- kg_km_35: 0.0476414; = kg_35*km_35
  Transport amount in km*km, for lubricating oil // lubricants at refinery // ras w/o cn; Articulated lorry transport, Euro 4, Total weight >32 t; EU+EFTA+UK
- kg_36: 3.71879e-5
  Mass in kg, for lubricating oil // lubricants at refinery // rna; Articulated lorry transport, Euro 4, Total weight >32 t; EU+EFTA+UK
- km_36: 1000
  Distance in km, for lubricating oil // lubricants at refinery // rna; Articulated lorry transport, Euro 4, Total weight >32 t; EU+EFTA+UK
- kg_km_36: 0.0371879; = kg_36*km_36
  Transport amount in km*km, for lubricating oil // lubricants at refinery // rna; Articulated lorry transport, Euro 4, Total weight >32 t; EU+EFTA+UK
- kg_37: 4.43138e-6
  Mass in kg, for lubricating oil // lubricants at refinery // rsa; Articulated lorry transport, Euro 4, Total weight >32 t; EU+EFTA+UK
- km_37: 1000
  Distance in km, for lubricating oil // lubricants at refinery // rsa; Articulated lorry transport, Euro 4, Total weight >32 t; EU+EFTA+UK
- kg_km_37: 0.00443138; = kg_37*km_37
  Transport amount in km*km, for lubricating oil // lubricants at refinery // rsa; Articulated lorry transport, Euro 4, Total weight >32 t; EU+EFTA+UK
- kg_38: 3.93955e-5
  Mass in kg, for lubricating oil // lubricants at refinery // ru; Articulated lorry transport, Euro 4, Total weight >32 t; EU+EFTA+UK
- km_38: 1000
  Distance in km, for lubricating oil // lubricants at refinery // ru; Articulated lorry transport, Euro 4, Total weight >32 t; EU+EFTA+UK
- kg_km_38: 0.0393955; = kg_38*km_38
  Transport amount in km*km, for lubricating oil // lubricants at refinery // ru; Articulated lorry transport, Euro 4, Total weight >32 t; EU+EFTA+UK
- kg_39: 0.0473333
  Mass in kg, for epoxy resin // epoxy resin production // glo; Transoceanic ship, containers; GLO
- km_39: 18000
  Distance in km, for epoxy resin // epoxy resin production // glo; Transoceanic ship, containers; GLO
- kg_km_39: 852; = kg_39*km_39
  Transport amount in km*km, for epoxy resin // epoxy resin production // glo; Transoceanic ship, containers; GLO
- kg_40: 9.61538e-5
  Mass in kg, for heat transfer fluid oil // heat transfer fluid oil production // eu+efta+uk; Transoceanic ship, containers; GLO
- km_40: 17992
  Distance in km, for heat transfer fluid oil // heat transfer fluid oil production // eu+efta+uk; Transoceanic ship, containers; GLO
- kg_km_40: 1.73; = kg_40*km_40
  Transport amount in km*km, for heat transfer fluid oil // heat transfer fluid oil production // eu+efta+uk; Transoceanic ship, containers; GLO
- kg_41: 7.56419e-6
  Mass in kg, for lubricating oil // lubricants at refinery // cn; Transoceanic ship, containers; GLO
- km_41: 18000
  Distance in km, for lubricating oil // lubricants at refinery // cn; Transoceanic ship, containers; GLO
- kg_km_41: 0.136155; = kg_41*km_41
  Transport amount in km*km, for lubricating oil // lubricants at refinery // cn; Transoceanic ship, containers; GLO
- kg_42: 1.818e-6
  Mass in kg, for lubricating oil // lubricants at refinery // raf; Transoceanic ship, containers; GLO
- km_42: 18000
  Distance in km, for lubricating oil // lubricants at refinery // raf; Transoceanic ship, containers; GLO
- kg_km_42: 0.032724; = kg_42*km_42
  Transport amount in km*km, for lubricating oil // lubricants at refinery // raf; Transoceanic ship, containers; GLO
- kg_43: 2.42671e-5
  Mass in kg, for lubricating oil // lubricants at refinery // eu+efta+uk; Transoceanic ship, containers; GLO
- km_43: 18007.9
  Distance in km, for lubricating oil // lubricants at refinery // eu+efta+uk; Transoceanic ship, containers; GLO
- kg_km_43: 0.437; = kg_43*km_43
  Transport amount in km*km, for lubricating oil // lubricants at refinery // eu+efta+uk; Transoceanic ship, containers; GLO
- kg_44: 4.76414e-5
  Mass in kg, for lubricating oil // lubricants at refinery // ras w/o cn; Transoceanic ship, containers; GLO
- km_44: 18000
  Distance in km, for lubricating oil // lubricants at refinery // ras w/o cn; Transoceanic ship, containers; GLO
- kg_km_44: 0.857545; = kg_44*km_44
  Transport amount in km*km, for lubricating oil // lubricants at refinery // ras w/o cn; Transoceanic ship, containers; GLO
- kg_45: 3.71879e-5
  Mass in kg, for lubricating oil // lubricants at refinery // rna; Transoceanic ship, containers; GLO
- km_45: 18000
  Distance in km, for lubricating oil // lubricants at refinery // rna; Transoceanic ship, containers; GLO
- kg_km_45: 0.669382; = kg_45*km_45
  Transport amount in km*km, for lubricating oil // lubricants at refinery // rna; Transoceanic ship, containers; GLO
- kg_46: 4.43138e-6
  Mass in kg, for lubricating oil // lubricants at refinery // rsa; Transoceanic ship, containers; GLO
- km_46: 18000
  Distance in km, for lubricating oil // lubricants at refinery // rsa; Transoceanic ship, containers; GLO
- kg_km_46: 0.0797649; = kg_46*km_46
  Transport amount in km*km, for lubricating oil // lubricants at refinery // rsa; Transoceanic ship, containers; GLO
- kg_47: 3.93955e-5
  Mass in kg, for lubricating oil // lubricants at refinery // ru; Transoceanic ship, containers; GLO
- km_47: 18000
  Distance in km, for lubricating oil // lubricants at refinery // ru; Transoceanic ship, containers; GLO
- kg_km_47: 0.709118; = kg_47*km_47
  Transport amount in km*km, for lubricating oil // lubricants at refinery // ru; Transoceanic ship, containers; GLO

## Reference product
- non-woven fabric // bonding, chemical, impregnation, stenter, hot calendering, non-woven fabric // glo: 1

## Inputs
- Transport of bisphenol A epoxy based vinyl ester resin by Transoceanic ship, containers - GLO: 24.8405; = kg_km_0
- Transport of bisphenol A epoxy based vinyl ester resin by Freight train, diesel traction - EU+EFTA+UK: 10.136; = kg_km_1
- Transport of bisphenol A epoxy based vinyl ester resin by Freight train, electricity traction - EU+EFTA+UK: 3.44784; = kg_km_2
- Transport of bisphenol A epoxy based vinyl ester resin by Freight train, average - EU+EFTA+UK: 0.081319; = kg_km_3
- Transport of bisphenol A epoxy based vinyl ester resin by Articulated lorry transport, Euro 4, Total weight >32 t - EU+EFTA+UK: 5.85815; = kg_km_4
- Transport of bisphenol A epoxy based vinyl ester resin by Articulated lorry transport, Total weight >32 t, mix Euro 0-5 - ROW w/o EU+EFTA: 15.4608; = kg_km_5
- Transport of dicyclopentadiene based unsaturated polyester resin by Transoceanic ship, containers - GLO: 24.8405; = kg_km_6
- Transport of dicyclopentadiene based unsaturated polyester resin by Freight train, diesel traction - EU+EFTA+UK: 10.136; = kg_km_7
- Transport of dicyclopentadiene based unsaturated polyester resin by Freight train, electricity traction - EU+EFTA+UK: 3.44784; = kg_km_8
- Transport of dicyclopentadiene based unsaturated polyester resin by Freight train, average - EU+EFTA+UK: 0.081319; = kg_km_9
- Transport of dicyclopentadiene based unsaturated polyester resin by Articulated lorry transport, Euro 4, Total weight >32 t - EU+EFTA+UK: 5.85815; = kg_km_10
- Transport of dicyclopentadiene based unsaturated polyester resin by Articulated lorry transport, Total weight >32 t, mix Euro 0-5 - ROW w/o EU+EFTA: 15.4608; = kg_km_11
- Electricity from Electricity grid mix 1kV-60kV - EU+EFTA+UK: 0.4195
- Electricity from Electricity grid mix 1kV-60kV - NZ: 0.0054
- Electricity from Electricity grid mix 1kV-60kV - RAF: 0.0917
- Electricity from Electricity grid mix 1kV-60kV - RNA: 0.614
- Electricity from Electricity grid mix 1kV-60kV - RSA: 0.2083
- Electricity from Electricity grid mix 1kV-60kV - RU: 0.1228
- Transport of isophthalic acid based unsaturated polyester resin by Transoceanic ship, containers - GLO: 24.8405; = kg_km_12
- Transport of isophthalic acid based unsaturated polyester resin by Freight train, diesel traction - EU+EFTA+UK: 10.136; = kg_km_13
- Transport of isophthalic acid based unsaturated polyester resin by Freight train, electricity traction - EU+EFTA+UK: 3.44784; = kg_km_14
- Transport of isophthalic acid based unsaturated polyester resin by Freight train, average - EU+EFTA+UK: 0.081319; = kg_km_15
- Transport of isophthalic acid based unsaturated polyester resin by Articulated lorry transport, Euro 4, Total weight >32 t - EU+EFTA+UK: 5.85815; = kg_km_16
- Transport of isophthalic acid based unsaturated polyester resin by Articulated lorry transport, Total weight >32 t, mix Euro 0-5 - ROW w/o EU+EFTA: 15.4608; = kg_km_17
- Transport of maleic unsaturated polyester resin by Transoceanic ship, containers - GLO: 24.8405; = kg_km_18
- Transport of maleic unsaturated polyester resin by Freight train, diesel traction - EU+EFTA+UK: 10.136; = kg_km_19
- Transport of maleic unsaturated polyester resin by Freight train, electricity traction - EU+EFTA+UK: 3.44784; = kg_km_20
- Transport of maleic unsaturated polyester resin by Freight train, average - EU+EFTA+UK: 0.081319; = kg_km_21
- Transport of maleic unsaturated polyester resin by Articulated lorry transport, Euro 4, Total weight >32 t - EU+EFTA+UK: 5.85815; = kg_km_22
- Transport of maleic unsaturated polyester resin by Articulated lorry transport, Total weight >32 t, mix Euro 0-5 - ROW w/o EU+EFTA: 15.4608; = kg_km_23
- Transport of orthophthalic acid based unsaturated polyester resin by Transoceanic ship, containers - GLO: 24.8405; = kg_km_24
- Transport of orthophthalic acid based unsaturated polyester resin by Freight train, diesel traction - EU+EFTA+UK: 10.136; = kg_km_25
- Transport of orthophthalic acid based unsaturated polyester resin by Freight train, electricity traction - EU+EFTA+UK: 3.44784; = kg_km_26
- Transport of orthophthalic acid based unsaturated polyester resin by Freight train, average - EU+EFTA+UK: 0.081319; = kg_km_27
- Transport of orthophthalic acid based unsaturated polyester resin by Articulated lorry transport, Euro 4, Total weight >32 t - EU+EFTA+UK: 5.85815; = kg_km_28
- Transport of orthophthalic acid based unsaturated polyester resin by Articulated lorry transport, Total weight >32 t, mix Euro 0-5 - ROW w/o EU+EFTA: 15.4608; = kg_km_29
- Transport of epoxy resin // epoxy resin production // glo by Articulated lorry transport, Euro 4, Total weight >32 t - EU+EFTA+UK: 47.3333; = kg_km_30
- Transport of heat transfer fluid oil // heat transfer fluid oil production // eu+efta+uk by Articulated lorry transport, Euro 4, Total weight >32 t - EU+EFTA+UK: 0.0962; = kg_km_31
- Transport of lubricating oil // lubricants at refinery // cn by Articulated lorry transport, Euro 4, Total weight >32 t - EU+EFTA+UK: 0.00756419; = kg_km_32
- Transport of lubricating oil // lubricants at refinery // eu+efta+uk by Articulated lorry transport, Euro 4, Total weight >32 t - EU+EFTA+UK: 0.0243; = kg_km_33
- Transport of lubricating oil // lubricants at refinery // raf by Articulated lorry transport, Euro 4, Total weight >32 t - EU+EFTA+UK: 0.001818; = kg_km_34
- Transport of lubricating oil // lubricants at refinery // ras w/o cn by Articulated lorry transport, Euro 4, Total weight >32 t - EU+EFTA+UK: 0.0476414; = kg_km_35
- Transport of lubricating oil // lubricants at refinery // rna by Articulated lorry transport, Euro 4, Total weight >32 t - EU+EFTA+UK: 0.0371879; = kg_km_36
- Transport of lubricating oil // lubricants at refinery // rsa by Articulated lorry transport, Euro 4, Total weight >32 t - EU+EFTA+UK: 0.00443138; = kg_km_37
- Transport of lubricating oil // lubricants at refinery // ru by Articulated lorry transport, Euro 4, Total weight >32 t - EU+EFTA+UK: 0.0393955; = kg_km_38
- Transport of epoxy resin // epoxy resin production // glo by Transoceanic ship, containers - GLO: 852; = kg_km_39
- Transport of heat transfer fluid oil // heat transfer fluid oil production // eu+efta+uk by Transoceanic ship, containers - GLO: 1.73; = kg_km_40
- Transport of lubricating oil // lubricants at refinery // cn by Transoceanic ship, containers - GLO: 0.136155; = kg_km_41
- Transport of lubricating oil // lubricants at refinery // raf by Transoceanic ship, containers - GLO: 0.032724; = kg_km_42
- Transport of lubricating oil // lubricants at refinery // eu+efta+uk by Transoceanic ship, containers - GLO: 0.437; = kg_km_43
- Transport of lubricating oil // lubricants at refinery // ras w/o cn by Transoceanic ship, containers - GLO: 0.857545; = kg_km_44
- Transport of lubricating oil // lubricants at refinery // rna by Transoceanic ship, containers - GLO: 0.669382; = kg_km_45
- Transport of lubricating oil // lubricants at refinery // rsa by Transoceanic ship, containers - GLO: 0.0797649; = kg_km_46
- Transport of lubricating oil // lubricants at refinery // ru by Transoceanic ship, containers - GLO: 0.709118; = kg_km_47
- Electricity from Electricity grid mix 1kV-60kV - CN: 0.629068
- Electricity from Electricity grid mix 1kV-60kV - RAS w/o CN: 0.689232
- non-woven fabric // bonding, chemical, impregnation, stenter, hot calendering, non-woven fabric // glo, blackbox: 1
- non-woven fabric // bonding, chemical, impregnation, stenter, hot calendering, non-woven fabric // glo, elementary: 1

## Impact indicators
- Eutrophication marine: 0.001476
- Ecotoxicity, freshwater: 29.3839
- Land use: 2.59276
- Water use: 0.594408
- Resource use, minerals and metals: 1.23664e-5
- Resource use, fossils: 19.7581
- Climate change: 1.6697
- Ozone depletion: 2.71459e-7
- Human toxicity, cancer: 3.34067e-9
- Human toxicity, non-cancer: 9.99291e-9
- EF-particulate Matter: 2.50823e-7
- Ionising radiation, human health: 0.0716514
- Photochemical ozone formation - human health: 0.00812552
- Acidification: 0.00872329
- Eutrophication, terrestrial: 0.015661
- Eutrophication, freshwater: 3.88548e-5

## Deviations from the LCI method principle
The background data uses:
- the \xe2\x80\x9cRecycled content cut-off\xe2\x80\x9d approach to allocate end-of-life by-products and secondary materials. This allocation is explained in the description of the recycled content system model (http://www.ecoinvent.org/database/system-models-in-ecoinvent-3/cut-off-system-model/allocation-cut-off-by-classification.html).
OR
- EF compliant data

## Deviations from the LCI method approaches
Background data:
- the \xe2\x80\x9cRecycled content cut-off\xe2\x80\x9d approach to allocate end-of-life by-products and secondary materials. This allocation is explained in the description of the recycled content system model (http://www.ecoinvent.org/database/system-models-in-ecoinvent-3/cut-off-system-model/allocation-cut-off-by-classification.html). The ecoinvent database mostly relies on “Allocation – market values” apart for few exceptions particularly in the energy sector. ecoinvent energy data is replaced with EF3.0 core data as per the EF guidelines version 2.0.
OR
- EF compliant data

## Modelling constants
All modelling constants follow the requirements listed in the Tender Specifications 070201/2020/SER/ENV.B1. Completeness: There are no intentional cut-offs in the inventory no matter how small their contribution to all the EF impact categories is. Eventual cut-offs are in compliance with the Guide for EF compliant data sets (JRC 2020), i.e. only if below the 3% cut-off rule. Water use: water use is modelled at country level using separate flows for water withdrawal, water release and water evaporation. Handling multi-functional processes: the following PEF multi- functionality decision hierarchy is applied for resolving all multi- functionality problems: (1) subdivision or system expansion; (2) allocation based on a relevant underlying physical relationship (substitution may apply here); (3) allocation based on some other relationship. Direct land use change: GHG emissions from direct LUC allocated to good/service for 20 years after the LUC occurs, with IPCC default values. Carbon storage and delayed emissions: credits associated with temporary (carbon) storage or delayed emissions up to 300 years are not be considered. Emissions off-setting: are not included. Capital goods (including infrastructures) and their End of life: they are included. System boundaries: system boundaries include all processes linked to the product supply chain (e.g. maintenance). Time period: emissions and removals are modelled as if released or removed at the beginning of the assessment method. Fossil and biogenic carbon emissions and removals: removals and emissions are modelled as follows: All GHG emissions from fossil fuels (including peat and limestone) are modelled consistently with the most updated ILCD list of elementary flows. The non-fossil (biogenic) carbon flows are modelled consistently with the most updated ILCD list of elementary flows.

## Cut-off and completeness
There are no intentional cut-offs in the inventory no matter how small their contribution to all the EF impact categories is. Eventual cut-offs are in compliance with the Guide for EF compliant data sets (JRC 2020), i.e. only if below the 3% cut-off rule. The dataset dry mass and water balance has been checked to ensure the inventory is complete. Capital goods (e.g. infrastructure) and their end-of-life are included.

## Data selection and combination
These datasets include, in both their foreground and background data, links to EF3.0 compliant data.
The relevant background data on energy, transport, and End of Life are from the LCDN data node (http://lcdn.thinkstep.com/Node/).
All other background data in the supply of this product for which no EF3.0 process was available are from ecoinvent v3.7 database (www.ecoinvent.org) or other data sources.

## Data treatment and extrapolations
Several data sources have been used to model the inventory.

## Review details
Internal reviews have been asked to review the plausibility of the unit process, LCIA scores, and DQRs. Internal reviewers have also been asked to review the data for EF compliancy. The consortium is therefore responsible for aspects such as compliancy with the ILCD format, including validation in Look@LCI, and nomenclature.
Internal reviwers have been asked to judge based on the process name, that the unit process models in a complete and representative way the process in the requested location. The review encompassed the plausability of:
- exchanges with nature (elementary flows) as well as exchanges such as product and waste flows.
- meta information (general comment, technology comment, system boundaries, allocation, cut-off rules, etc.). Reviewers were asked to judge if the provided information is enough to understand the content of the process.
- LCIA scores
- DQRs including precision, technology, time and geography. As well as the overall DQR.
External reviewers have been asked to provide their expertise in the field of interest. External reviewers have been asked to review the unit process, including eventual methodological choices, the LCIA scores (provided with contribution scores as well), and DQRs. External reviewers have been provided all the information in a tool developed by the consortium for the purpose of this project.
External reviewers have been asked to judge based on the process name, that the unit process models in a complete and representative way the process in the requested location. The review encompassed:
- Plausability and completeness of exchanges with nature (elementary flows) as well as exchanges such as product and waste flows.
- Review of meta information (general comment, technology comment, system boundaries, allocation, cut-off rules, etc.). Reviewers were asked to judge if the provided information is enough to understand the content of the process.
- Review of properties (biogenic carbon and water content).
- Review of allocation keys.
- Plausability of LCIA scores calculated by the consortium.
- Plausability of DQRs including precision, technology, time and geography. As well as the overall DQR.

## Data sources
- Background Data for Representative products and organisations. EF 3.0 compliant (data stock)
- Prof. Akber Ali Affandi, Ghulam Mohiuddin, Muhammad Daniyal Usman, Muhammad Rashid, Muhammad Saeed, Muhammad Tariq (2010). Oil Consumption In Knitting Machine. Hamdard University, Pakistan.
- UN Data (2018) Statistics Data for Lubricants Productions, http://data.un.org/Data.aspx?q=Lubricants&d=EDATA&f=cmID%3aLU, United Nations Statistics Division, Global.
- T. Karthik, R. Rathinamoorthy, C. Praba Karan. (2016). Non-woven - Process, Structure, Properties and Applications. New Delhi: Woodhead Publishing India. pp 132
- Koji Kawakami, Kiyoshi Aihara, Takehiko Miyoshi (1999). Fabric EP1022375A1. European Patent Office, Europe.
- Buentex (2021) Stenter Frame, https://www.buentex.com/en/product/stenter.html, Buentex Machinery Trading Co., Ltd., China. Alibaba (2021) Heat Setting Stenter Machine, https://www.alibaba.com/product-detail/Heat-Setting-Stenter-Machine_1600151186503.html?spm=a2700.7724857.topad_classic.d_image.40af1b30gHAlMd, Alibaba Group China .
- Lebon (2021) Nonwoven Ironing Machine, Catalog and Company Messages, Qingdao Lebon Industry Co., Ltd., China
- Buentex (2021) Stenter Frame, https://www.buentex.com/en/product/stenter.html, Buentex Machinery Trading Co., Ltd., China. Alibaba (2021) Heat Setting Stenter Machine, https://www.alibaba.com/product-detail/Heat-Setting-Stenter-Machine_1600151186503.html?spm=a2700.7724857.topad_classic.d_image.40af1b30gHAlMd, Alibaba Group China.
- Buentex (2021) Stenter Frame, https://www.buentex.com/en/product/stenter.html, Buentex Machinery Trading Co., Ltd., China.
- Zhuoqi Machinery (2021), Dipping Machine, Catalog & E-mail Company, Changzhou Zhuoqi Machinery Manufacturing Co., Ltd., China
- Lebon (2021) Nonwoven Ironing Machine, https://www.china-lebon.com/128.html, Qingdao Lebon Industry Co., Ltd., China Alibaba (2021) Nonwoven machinery calender ironing machine, https://www.alibaba.com/product-detail/Nonwoven-machinery-calender-ironing-machine-felt_62016069669.html?spm=a2700.galleryofferlist.normal_offer.d_title.54c95cb4TlzyTj, Alibaba Group, China

## Intended applications
Implementation of regular Product Environmental Footprint (PEF) studies and Organisation Environmental Footprint (OEF) studies exclusively under the specified Product groups and sectors as defined in the Product Environmental Footprint Category Rules (PEFCR) and Organisation Environmental Footprint Sectorial Rules (OEFSR) listed in http://ec.europa.eu/environment/eussd/smgp/PEFCR_OEFSR.htm
