# wool, elementary; sheep; production mix, at farm; 1 kg wool

Dataset: ILCD process, Unit process, single operation
Geography: AU
Reference year: 2013
Valid until: 2024
Classification: Other Services / Other services
LCI method principle: Attributional
LCI method approaches: Allocation - market value
Completeness: All relevant flows quantified
Project: Provision of process-based 3.0 Environmental Footprint-compliant life cycle inventory datasets - Renewable materials - contract number 070201/2020/840085/SER/ENV.B.1
Generated by: Blonk Sustainability Tools
Owner: Blonk Sustainability Tools
Compliance: Environmental Footprint non-primary supporting data set; Environmental Footprint 3.1
Amounts: no units in this file; such an amount is in the reference unit of its flow, which a separate flow dataset defines
copyright: true
licenseType: Free of charge for some user types or use types
accessRestrictions: Free of charge for all final users implementing a regular Product Environmental Footprint (PEF) studies and Organisation Environmental Footprint (OEF) studies exclusively under the specified Product groups and sectors as defined in the Product Environmental Footprint Category Rules (PEFCR) and Organisation Environmental Footprint Sectorial Rules (OEFSR) listed in http://ec.europa.eu/environment/eussd/smgp/PEFCR_OEFSR.htm and in accordance with the terms and conditions of the EULA (available at https://ecoinvent.lca-data.com/) exclusively until 31st December 2024. Any use of this dataset or any derivative data not within the specific context of one of the PEF/OEF projects or after the end of 2024 is not permitted.

## General comment
Notice: this data set supersedes the EF3.0-compliant version (see link under "preceding data set version" below calculated with the EF3.0). The life cycle inventory is not changed from the original EF3.0 data set. The LCIA results are calculated based on the EF3.1 methods which provide updated characterisation factors in the following impact categories: Climate Change, Ecotoxicity freshwater, Photochemical Ozone Formation, Acidification, Human Toxicity non-cancer, and Human Toxicity cancer. The review report and the data quality ratings refer to the original results. The data set has been updated by the European Commission on the basis of the original EF3.0 data set delivered by the data provider.This sub-process has limited documentation only. For all detailed documentation of the full model to which this data set belongs (such as DQRs, review reports and other technical documentation), please see this process: wool - AU []

## Technology and included processes
This dataset aims at representing the production of one kg of wool from sheep produced in Australia. The activity starts with sheep on grassland. Inputs also include energy, water, land use and enteric methane emissions. The activity ends with the finished sheep ready for slaughter, this is a mixture of lambs, ewes and hoggets. Biophysical allocation is applied to assign the environmental impact to wool (54%) and animals (46%) produced. System boundaries applied are from cradle to farm gate.

## Reference product
- wool, sheep // wool // au, elementary: 1

## Inputs
- water, Renewable material resources from water [AU]: 0.0860026

## Outputs
- nitrous oxide, Emissions to air, unspecified: 0.0452387
- ammonia, Emissions to air, unspecified: 0.490915
- Phosphorus, Emissions to water, unspecified: 0.000906332
- nitrate, Emissions to water, unspecified: 2.6813
- methane (biogenic), Emissions to air, unspecified: 0.990868
- arsenic, Emissions to soil, unspecified: 1.00923e-7
- mercury, Emissions to soil, unspecified: 9.4591e-9
- cadmium, Emissions to soil, unspecified: 1.91557e-8
- nickel, Emissions to soil, unspecified: 6.49077e-7
- chromium, Emissions to soil, unspecified: 1.83245e-6
- zinc, Emissions to soil, unspecified: 8.62797e-6
- copper, Emissions to soil, unspecified: 1.86016e-6
- lead, Emissions to soil, unspecified: 8.70712e-7

## Impact indicators
- Eutrophication marine: 0.651138
- Ecotoxicity, freshwater: 66.3427
- Land use: 0
- Water use: 6.20079
- Resource use, minerals and metals: 0
- Resource use, fossils: 0
- Climate change: 39.1036
- Ozone depletion: 0
- Human toxicity, cancer: 1.32115e-10
- Human toxicity, non-cancer: 6.11009e-8
- EF-particulate Matter: 1.03092e-5
- Ionising radiation, human health: 0
- Photochemical ozone formation - human health: 0.0100078
- Acidification: 1.48256
- Eutrophication, terrestrial: 6.61262
- Eutrophication, freshwater: 0.000906332

## Deviations from the LCI method principle
The background data uses:
- the \xe2\x80\x9cRecycled content cut-off\xe2\x80\x9d approach to allocate end-of-life by-products and secondary materials. This allocation is explained in the description of the recycled content system model (http://www.ecoinvent.org/database/system-models-in-ecoinvent-3/cut-off-system-model/allocation-cut-off-by-classification.html).
OR
- EF compliant data

## Deviations from the LCI method approaches
Background data:
- the \xe2\x80\x9cRecycled content cut-off\xe2\x80\x9d approach to allocate end-of-life by-products and secondary materials. This allocation is explained in the description of the recycled content system model (http://www.ecoinvent.org/database/system-models-in-ecoinvent-3/cut-off-system-model/allocation-cut-off-by-classification.html). The ecoinvent database mostly relies on “Allocation – market values” apart for few exceptions particularly in the energy sector. ecoinvent energy data is replaced with EF3.0 core data as per the EF guidelines version 2.0.
OR
- EF compliant data

## Modelling constants
All modelling constants follow the requirements listed in the Tender Specifications 070201/2020/SER/ENV.B1. Completeness: There are no intentional cut-offs in the inventory no matter how small their contribution to all the EF impact categories is. Eventual cut-offs are in compliance with the Guide for EF compliant data sets (JRC 2020), i.e. only if below the 3% cut-off rule. Water use: water use is modelled at country level using separate flows for water withdrawal, water release and water evaporation. Handling multi-functional processes: the following PEF multi- functionality decision hierarchy is applied for resolving all multi- functionality problems: (1) subdivision or system expansion; (2) allocation based on a relevant underlying physical relationship (substitution may apply here); (3) allocation based on some other relationship. Direct land use change: GHG emissions from direct LUC allocated to good/service for 20 years after the LUC occurs, with IPCC default values. Carbon storage and delayed emissions: credits associated with temporary (carbon) storage or delayed emissions up to 300 years are not be considered. Emissions off-setting: are not included. Capital goods (including infrastructures) and their End of life: they are included. System boundaries: system boundaries include all processes linked to the product supply chain (e.g. maintenance). Time period: emissions and removals are modelled as if released or removed at the beginning of the assessment method. Fossil and biogenic carbon emissions and removals: removals and emissions are modelled as follows: All GHG emissions from fossil fuels (including peat and limestone) are modelled consistently with the most updated ILCD list of elementary flows. The non-fossil (biogenic) carbon flows are modelled consistently with the most updated ILCD list of elementary flows.

## Cut-off and completeness
There are no intentional cut-offs in the inventory no matter how small their contribution to all the EF impact categories is. Eventual cut-offs are in compliance with the Guide for EF compliant data sets (JRC 2020), i.e. only if below the 3% cut-off rule. The dataset dry mass and water balance has been checked to ensure the inventory is complete. Capital goods (e.g. infrastructure) and their end-of-life are included.

## Data selection and combination
These datasets include, in both their foreground and background data, links to EF3.0 compliant data.
The relevant background data on energy, transport, and End of Life are from the LCDN data node (http://lcdn.thinkstep.com/Node/).
All other background data in the supply of this product for which no EF3.0 process was available are from ecoinvent v3.7 database (www.ecoinvent.org) or other data sources.

## Data treatment and extrapolations
Several data sources have been used to model the inventory.

## Use advice
This data set is a supporting sub-data set and must be used exclusively as sub-data set of its corresponding level-1 partly disaggregated data set (see “General comment” field for exact name and UUID).

## Data sources
- Background Data for Representative products and organisations. EF 3.0 compliant (data stock)
- Ledgard, S. F., Lieffering, M., McDevitt, J., Boyes, M., & Kemp, R. (2010). A Greenhouse Gas Footprint Study for Exported New Zealand Lamb, 26.
- TS Red meat pilot. (2016). PEF pilot Red Meat; screening study.
- Broekema, R., Kuling, L., & Scholten, J. (2015). Life Cycle Inventories of dairy- and animal products consumed in the Netherlands. Blonk Consultants.
- European Commission, PEFCR Guidance document, - Guidance for the development of Product Environmental Footprint Category Rules (PEFCRs), version 6.3, December 2017.
- FAO LEAP. (2015). Greenhouse gas emissions and fossil energy use from small ruminant supply chains - Guidelines for assessment. http://www.fao.org/partnerships/leap/resources/resources/en/
- Barcelos, S. S., Vargas, J. A. C., Mezzomo, R., Gionbelli, M. P., Gomes, D. I., Oliveira, L. R. S., Luz, J. B., Maciel, D. L., & Alves, K. S. (2021). Predicting the chemical composition of the body and the carcass of hair sheep using body parts and carcass measurements. Animal, 15(3), 100139. https://doi.org/10.1016/j.animal.2020.100139
- GDV (1998-2021) Cargo information, TIS Transport Information Service, Germany, https://www.tis-gdv.de/tis_e/ware/fasern/wolle
- Marchelli, F., Rovero, G., Curti, M., Arato, E., Bosio, B., & Moliner, C. (2021). An integrated approach to convert lignocellulosic and wool residues into balanced fertilisers. Energies, 14(2), 1–15. https://doi.org/10.3390/en14020497

## Intended applications
Implementation of regular Product Environmental Footprint (PEF) studies and Organisation Environmental Footprint (OEF) studies exclusively under the specified Product groups and sectors as defined in the Product Environmental Footprint Category Rules (PEFCR) and Organisation Environmental Footprint Sectorial Rules (OEFSR) listed in http://ec.europa.eu/environment/eussd/smgp/PEFCR_OEFSR.htm
