# washing, 30°, average; washing, cold to warm water; production mix, at plant; service

Dataset: ILCD process, Partly terminated system
Geography: EU+EFTA+UK
Reference year: 2021
Valid until: 2024
Classification: Systems / Textiles, furnitures and other interiors
LCI method principle: Attributional
LCI method approaches: Allocation - market value
Completeness: All relevant flows quantified
Project: Provision of process-based 3.0 Environmental Footprint-compliant life cycle inventory datasets - Others - contract number 070201/2020/840235/SER/ENV.B.1
Generated by: Life Cycle Indonesia
Owner: PRé Sustainability B.V.
Compliance: ILCD Data Network - Entry-level; Suggestions for updating the PEF method 2019; ISO 14040 Environmental Management – Life Cycle Assessment – Principles and Framework, 2006; ISO 14044:2006. Environmental Management – Life Cycle Assessment – Requirements and guidelines.; Environmental Footprint 3.1
Review: Dependent internal review by Avraam Symeonidis, Emilia Moreno Ruiz; Independent review panel by Fábio Valebona
Data quality: Overall quality: Good; Time representativeness: Very good; Geographical representativeness: Good; Technological representativeness: Good; Precision: Good; Methodological appropriateness and consistency: Not applicable
Amounts: no units in this file; such an amount is in the reference unit of its flow, which a separate flow dataset defines
copyright: true
licenseType: Free of charge for some user types or use types
accessRestrictions: Free of charge for all final users implementing a regular Product Environmental Footprint (PEF) studies and Organisation Environmental Footprint (OEF) studies exclusively under the specified Product groups and sectors as defined in the Product Environmental Footprint Category Rules (PEFCR) and Organisation Environmental Footprint Sectorial Rules (OEFSR) listed in http://ec.europa.eu/environment/eussd/smgp/PEFCR_OEFSR.htm and in accordance with the terms and conditions of the EULA (available at https://ecoinvent.lca-data.com/) exclusively until 31st December 2024. Any use of this dataset or any derivative data not within the specific context of one of the PEF/OEF projects or after the end of 2024 is not permitted.

## General comment
Notice: this data set supersedes the EF3.0-compliant version (see link under "preceding data set version" below calculated with the EF3.0). The life cycle inventory is not changed from the original EF3.0 data set. The LCIA results are calculated based on the EF3.1 methods which provide updated characterisation factors in the following impact categories: Climate Change, Ecotoxicity freshwater, Photochemical Ozone Formation, Acidification, Human Toxicity non-cancer, and Human Toxicity cancer. The review report and the data quality ratings refer to the original results. The data set has been updated by the European Commission on the basis of the original EF3.0 data set delivered by the data provider.Washing is part of the laundering activity. The main purpose is to remove visible stains and sols, which can be determined visually by the professional consumer. Washing procedure should also lead to a hygienicaly clean textile surface, which includes the reduction of microorganisms on the fabric to a level safe for use as well as addressing other adverse microbial effects (Bockmühl, et al., 2019). Washing process is affected by chemistry, mechanical agitation, temperature and time. There are various reasons to use the temperature settings, from clothing materials, stain treatment, and more. For most clothing, the hotter the water, the cleaner the clothing will be, however it may be necessary to use other water temperatures (Aguirre, 2020). But nowadays, there are many type of fabric that might not compatible to wash using hot water. The washing machine now have much better mechanical action to remove soil and also the laundry detergents that contains surfactants and other chemicals to lift and remove soild from the fabrics. For different temperature, the cycle time or the detergent used might need to be adjusted to give a better cleaning result (Leverette, 2020). To obtain the same washing performance as at higher laundry temperatures, lower laundry temperatures must be compensated by enhancing other factors. Increasing the wash cycle time is known to be an effective means of compensating lower washing temperatures in terms of stain removal (Honisch, et al., 2014)

Aguirre, Sarah (2020). Determining the Right Water Temperature for Laundry, https://www.thespruce.com/laundry-and-water-temperature-1900646
Bockmühl, Dirk P., Schages, Jan and Rehberg, Laura. (2019). Laundry and textile hygiene in healthcare and beyond. Microbial Cell, 6(7), pp 299–306.
Honisch, M., Stamminger, R., & Bockmühl, D. P. (2014). Impact of wash cycle time, temperature and detergent formulation on the hygiene effectiveness of domestic laundering. Journal of Applied Microbiology, 117(6), pp 1787–1797
Leverette, Mary Marlowe (2020). Use the Best Washing Machine Water Temperature for Laundry,
https://www.thespruce.com/wash-with-the-right-water-temperature-2146348,

## Technology and included processes
One of the most used washing temperature is 30 celcius degree. As lower temperature would save energy comsumption to heat up the water. It is energy efficient and cost-saving temperature. This temperature can be classified as cold to warm water setting. When using lower water temperature, heavy-duty detergent might be choosen to remove heavy soil. The cycle time for washing in lower temperature is slightly longer than in higher temperature (Leverette, 2020). Washing at 30 celcius degree is reccomended fot delicate clothes, such as wool and silk and It can preserve colourfully dyed fabrics (Which, 2021).

In this model, the cycle time for 30 celcius degree washing is proxy to the cycle time of 40 celcius degree washing as both temperatures can be classified as warm water washing. The washing time used is about 131-193 minutes. The different kind of detergent is not considered in this model.

The activity starts when the material enter the process. Materials entering the process are included as well as energy, water and chemicals uses. There is no direct emission to soil. The emission to water resulted from wastewater, while the emission to air resulted from the evaporation of water. Chemical agents (detergent and softener) are carried in the wastewater. Lost fibers left in the dryer filter are not included in this dataset.

Leverette, Mary Marlowe (2020). Use the Best Washing Machine Water Temperature for Laundry,
https://www.thespruce.com/wash-with-the-right-water-temperature-2146348,
Which (2021). Washing machine temperature guide, https://www.which.co.uk/reviews/washing-machines/article/washing-machine-temperature-guide-aLiyf2p96y4d - Which?

## Parameters
- kg_0: 0.00722884
  Mass in kg, for esterquat; Barge; EU+EFTA+UK
- km_0: 24.7816
  Distance in km, for esterquat; Barge; EU+EFTA+UK
- kg_km_0: 0.179142; = kg_0*km_0
  Transport amount in km*km, for esterquat; Barge; EU+EFTA+UK
- kg_1: 0.00722884
  Mass in kg, for esterquat; Articulated lorry transport, Euro 4, Total weight >32 t; EU+EFTA+UK
- km_1: 193.839
  Distance in km, for esterquat; Articulated lorry transport, Euro 4, Total weight >32 t; EU+EFTA+UK
- kg_km_1: 1.40123; = kg_1*km_1
  Transport amount in km*km, for esterquat; Articulated lorry transport, Euro 4, Total weight >32 t; EU+EFTA+UK
- kg_2: 0.00722884
  Mass in kg, for esterquat; Freight train, diesel traction; EU+EFTA+UK
- km_2: 19.231
  Distance in km, for esterquat; Freight train, diesel traction; EU+EFTA+UK
- kg_km_2: 0.139018; = kg_2*km_2
  Transport amount in km*km, for esterquat; Freight train, diesel traction; EU+EFTA+UK
- kg_3: 0.00722884
  Mass in kg, for esterquat; Freight train, electricity traction; EU+EFTA+UK
- km_3: 30.3322
  Distance in km, for esterquat; Freight train, electricity traction; EU+EFTA+UK
- kg_km_3: 0.219266; = kg_3*km_3
  Transport amount in km*km, for esterquat; Freight train, electricity traction; EU+EFTA+UK
- kg_4: 0.0083
  Mass in kg, for fatty alcohol sulfate // fatty alcohol sulfate production, from palm kernel oil // rer; Freight train, average; EU+EFTA+UK
- km_4: 240
  Distance in km, for fatty alcohol sulfate // fatty alcohol sulfate production, from palm kernel oil // rer; Freight train, average; EU+EFTA+UK
- kg_km_4: 1.992; = kg_4*km_4
  Transport amount in km*km, for fatty alcohol sulfate // fatty alcohol sulfate production, from palm kernel oil // rer; Freight train, average; EU+EFTA+UK
- kg_5: 0.0083
  Mass in kg, for fatty alcohol sulfate // fatty alcohol sulfate production, from palm kernel oil // rer; Barge; EU+EFTA+UK
- km_5: 270
  Distance in km, for fatty alcohol sulfate // fatty alcohol sulfate production, from palm kernel oil // rer; Barge; EU+EFTA+UK
- kg_km_5: 2.241; = kg_5*km_5
  Transport amount in km*km, for fatty alcohol sulfate // fatty alcohol sulfate production, from palm kernel oil // rer; Barge; EU+EFTA+UK
- kg_6: 0.0083
  Mass in kg, for fatty alcohol sulfate // fatty alcohol sulfate production, from palm kernel oil // rer; Articulated lorry transport, Euro 4, Total weight >32 t; EU+EFTA+UK
- km_6: 130
  Distance in km, for fatty alcohol sulfate // fatty alcohol sulfate production, from palm kernel oil // rer; Articulated lorry transport, Euro 4, Total weight >32 t; EU+EFTA+UK
- kg_km_6: 1.079; = kg_6*km_6
  Transport amount in km*km, for fatty alcohol sulfate // fatty alcohol sulfate production, from palm kernel oil // rer; Articulated lorry transport, Euro 4, Total weight >32 t; EU+EFTA+UK
- kg_7: 0.00462278
  Mass in kg, for washing machine; Transoceanic ship, containers; GLO
- km_7: 737
  Distance in km, for washing machine; Transoceanic ship, containers; GLO
- kg_km_7: 3.40699; = kg_7*km_7
  Transport amount in km*km, for washing machine; Transoceanic ship, containers; GLO
- kg_8: 0.00462278
  Mass in kg, for washing machine; Freight train, diesel traction; EU+EFTA+UK
- km_8: 13.3513
  Distance in km, for washing machine; Freight train, diesel traction; EU+EFTA+UK
- kg_km_8: 0.0617202; = kg_8*km_8
  Transport amount in km*km, for washing machine; Freight train, diesel traction; EU+EFTA+UK
- kg_9: 0.00462278
  Mass in kg, for washing machine; Freight train, electricity traction; EU+EFTA+UK
- km_9: 4.54157
  Distance in km, for washing machine; Freight train, electricity traction; EU+EFTA+UK
- kg_km_9: 0.0209947; = kg_9*km_9
  Transport amount in km*km, for washing machine; Freight train, electricity traction; EU+EFTA+UK
- kg_10: 0.00462278
  Mass in kg, for washing machine; Freight train, average; EU+EFTA+UK
- km_10: 0.107115
  Distance in km, for washing machine; Freight train, average; EU+EFTA+UK
- kg_km_10: 0.00049517; = kg_10*km_10
  Transport amount in km*km, for washing machine; Freight train, average; EU+EFTA+UK
- kg_11: 0.00462278
  Mass in kg, for washing machine; Barge; EU+EFTA+UK
- km_11: 0.328736
  Distance in km, for washing machine; Barge; EU+EFTA+UK
- kg_km_11: 0.00151968; = kg_11*km_11
  Transport amount in km*km, for washing machine; Barge; EU+EFTA+UK
- kg_12: 0.00462278
  Mass in kg, for washing machine; Barge; ROW w/o EU+EFTA
- km_12: 0.671264
  Distance in km, for washing machine; Barge; ROW w/o EU+EFTA
- kg_km_12: 0.00310311; = kg_12*km_12
  Transport amount in km*km, for washing machine; Barge; ROW w/o EU+EFTA
- kg_13: 0.00462278
  Mass in kg, for washing machine; Articulated lorry transport, Total weight <7.5 t, mix Euro 0-5; EU+EFTA+UK
- km_13: 9.50673
  Distance in km, for washing machine; Articulated lorry transport, Total weight <7.5 t, mix Euro 0-5; EU+EFTA+UK
- kg_km_13: 0.0439475; = kg_13*km_13
  Transport amount in km*km, for washing machine; Articulated lorry transport, Total weight <7.5 t, mix Euro 0-5; EU+EFTA+UK
- kg_14: 0.00462278
  Mass in kg, for washing machine; Articulated lorry transport, Euro 4, Total weight >32 t; EU+EFTA+UK
- km_14: 86.5577
  Distance in km, for washing machine; Articulated lorry transport, Euro 4, Total weight >32 t; EU+EFTA+UK
- kg_km_14: 0.400137; = kg_14*km_14
  Transport amount in km*km, for washing machine; Articulated lorry transport, Euro 4, Total weight >32 t; EU+EFTA+UK
- kg_15: 0.00462278
  Mass in kg, for washing machine; Articulated lorry transport, Total weight >32 t, mix Euro 0-5; ROW w/o EU+EFTA
- km_15: 228.442
  Distance in km, for washing machine; Articulated lorry transport, Total weight >32 t, mix Euro 0-5; ROW w/o EU+EFTA
- kg_km_15: 1.05604; = kg_15*km_15
  Transport amount in km*km, for washing machine; Articulated lorry transport, Total weight >32 t, mix Euro 0-5; ROW w/o EU+EFTA

## Reference product
- washing, 30°, average // washing, 30°, average // eu+efta+uk: 1

## Inputs
- Electricity from Electricity grid mix 1kV-60kV - EU+EFTA+UK: 0.234
- Transport of esterquat by Barge - EU+EFTA+UK: 0.179142; = kg_km_0
- Transport of esterquat by Articulated lorry transport, Euro 4, Total weight >32 t - EU+EFTA+UK: 1.40123; = kg_km_1
- Transport of esterquat by Freight train, diesel traction - EU+EFTA+UK: 0.139018; = kg_km_2
- Transport of esterquat by Freight train, electricity traction - EU+EFTA+UK: 0.219266; = kg_km_3
- Transport of fatty alcohol sulfate // fatty alcohol sulfate production, from palm kernel oil // rer by Freight train, average - EU+EFTA+UK: 1.992; = kg_km_4
- Transport of fatty alcohol sulfate // fatty alcohol sulfate production, from palm kernel oil // rer by Barge - EU+EFTA+UK: 2.241; = kg_km_5
- Transport of fatty alcohol sulfate // fatty alcohol sulfate production, from palm kernel oil // rer by Articulated lorry transport, Euro 4, Total weight >32 t - EU+EFTA+UK: 1.079; = kg_km_6
- Transport of washing machine by Transoceanic ship, containers - GLO: 3.40699; = kg_km_7
- Transport of washing machine by Freight train, diesel traction - EU+EFTA+UK: 0.0617202; = kg_km_8
- Transport of washing machine by Freight train, electricity traction - EU+EFTA+UK: 0.0209947; = kg_km_9
- Transport of washing machine by Freight train, average - EU+EFTA+UK: 0.00049517; = kg_km_10
- Transport of washing machine by Barge - EU+EFTA+UK: 0.00151968; = kg_km_11
- Transport of washing machine by Barge - ROW w/o EU+EFTA: 0.00310311; = kg_km_12
- Transport of washing machine by Articulated lorry transport, Total weight <7.5 t, mix Euro 0-5 - EU+EFTA+UK: 0.0439475; = kg_km_13
- Transport of washing machine by Articulated lorry transport, Euro 4, Total weight >32 t - EU+EFTA+UK: 0.400137; = kg_km_14
- Transport of washing machine by Articulated lorry transport, Total weight >32 t, mix Euro 0-5 - ROW w/o EU+EFTA: 1.05604; = kg_km_15
- washing, 30°, average // washing, 30°, average // eu+efta+uk, blackbox: 1
- washing, 30°, average // washing, 30°, average // eu+efta+uk, elementary: 1

## Impact indicators
- Eutrophication marine: 0.000323306
- Ecotoxicity, freshwater: 1.79173
- Land use: 4.80314
- Water use: 0.162721
- Resource use, minerals and metals: 2.56306e-6
- Resource use, fossils: 1.11525
- Climate change: 0.117486
- Ozone depletion: 1.25714e-9
- Human toxicity, cancer: 2.14046e-10
- Human toxicity, non-cancer: 2.29149e-9
- EF-particulate Matter: 8.65353e-9
- Ionising radiation, human health: 0.0145388
- Photochemical ozone formation - human health: 0.000280918
- Acidification: 0.000442819
- Eutrophication, terrestrial: 0.00118119
- Eutrophication, freshwater: 2.32644e-5

## Deviations from the LCI method principle
The background data uses:
- the \xe2\x80\x9cRecycled content cut-off\xe2\x80\x9d approach to allocate end-of-life by-products and secondary materials. This allocation is explained in the description of the recycled content system model (http://www.ecoinvent.org/database/system-models-in-ecoinvent-3/cut-off-system-model/allocation-cut-off-by-classification.html).
OR
- EF compliant data

## Deviations from the LCI method approaches
Background data:
- the \xe2\x80\x9cRecycled content cut-off\xe2\x80\x9d approach to allocate end-of-life by-products and secondary materials. This allocation is explained in the description of the recycled content system model (http://www.ecoinvent.org/database/system-models-in-ecoinvent-3/cut-off-system-model/allocation-cut-off-by-classification.html). The ecoinvent database mostly relies on “Allocation – market values” apart for few exceptions particularly in the energy sector. ecoinvent energy data is replaced with EF3.0 core data as per the EF guidelines version 2.0.
OR
- EF compliant data

## Modelling constants
All modelling constants follow the requirements listed in the Tender Specifications 070201/2020/SER/ENV.B1. Completeness: There are no intentional cut-offs in the inventory no matter how small their contribution to all the EF impact categories is. Eventual cut-offs are in compliance with the Guide for EF compliant data sets (JRC 2020), i.e. only if below the 3% cut-off rule. Water use: water use is modelled at country level using separate flows for water withdrawal, water release and water evaporation. Handling multi-functional processes: the following PEF multi- functionality decision hierarchy is applied for resolving all multi- functionality problems: (1) subdivision or system expansion; (2) allocation based on a relevant underlying physical relationship (substitution may apply here); (3) allocation based on some other relationship. Direct land use change: GHG emissions from direct LUC allocated to good/service for 20 years after the LUC occurs, with IPCC default values. Carbon storage and delayed emissions: credits associated with temporary (carbon) storage or delayed emissions up to 300 years are not be considered. Emissions off-setting: are not included. Capital goods (including infrastructures) and their End of life: they are included. System boundaries: system boundaries include all processes linked to the product supply chain (e.g. maintenance). Time period: emissions and removals are modelled as if released or removed at the beginning of the assessment method. Fossil and biogenic carbon emissions and removals: removals and emissions are modelled as follows: All GHG emissions from fossil fuels (including peat and limestone) are modelled consistently with the most updated ILCD list of elementary flows. The non-fossil (biogenic) carbon flows are modelled consistently with the most updated ILCD list of elementary flows.

## Cut-off and completeness
There are no intentional cut-offs in the inventory no matter how small their contribution to all the EF impact categories is. Eventual cut-offs are in compliance with the Guide for EF compliant data sets (JRC 2020), i.e. only if below the 3% cut-off rule. The dataset dry mass and water balance has been checked to ensure the inventory is complete. Capital goods (e.g. infrastructure) and their end-of-life are included.

## Data selection and combination
These datasets include, in both their foreground and background data, links to EF3.0 compliant data.
The relevant background data on energy, transport, and End of Life are from the LCDN data node (http://lcdn.thinkstep.com/Node/).
All other background data in the supply of this product for which no EF3.0 process was available are from ecoinvent v3.7 database (www.ecoinvent.org) or other data sources.

## Data treatment and extrapolations
Several data sources have been used to model the inventory.

## Review details
Internal reviews have been asked to review the plausibility of the unit process, LCIA scores, and DQRs. Internal reviewers have also been asked to review the data for EF compliancy. The consortium is therefore responsible for aspects such as compliancy with the ILCD format, including validation in Look@LCI, and nomenclature.
Internal reviwers have been asked to judge based on the process name, that the unit process models in a complete and representative way the process in the requested location. The review encompassed the plausability of:
- exchanges with nature (elementary flows) as well as exchanges such as product and waste flows.
- meta information (general comment, technology comment, system boundaries, allocation, cut-off rules, etc.). Reviewers were asked to judge if the provided information is enough to understand the content of the process.
- LCIA scores
- DQRs including precision, technology, time and geography. As well as the overall DQR.
External reviewers have been asked to provide their expertise in the field of interest. External reviewers have been asked to review the unit process, including eventual methodological choices, the LCIA scores (provided with contribution scores as well), and DQRs. External reviewers have been provided all the information in a tool developed by the consortium for the purpose of this project.
External reviewers have been asked to judge based on the process name, that the unit process models in a complete and representative way the process in the requested location. The review encompassed:
- Plausability and completeness of exchanges with nature (elementary flows) as well as exchanges such as product and waste flows.
- Review of meta information (general comment, technology comment, system boundaries, allocation, cut-off rules, etc.). Reviewers were asked to judge if the provided information is enough to understand the content of the process.
- Review of properties (biogenic carbon and water content).
- Review of allocation keys.
- Plausability of LCIA scores calculated by the consortium.
- Plausability of DQRs including precision, technology, time and geography. As well as the overall DQR.

## Data sources
- Background Data for Representative products and organisations. EF 3.0 compliant (data stock)
- Quantis Data (2021)
- Anke Kruschwitz, Anja Karle, Angelika Schmitz, Rainer Stamminger, (2014). Consumer Laundry Practices in Germany. International Journal of Consumer Studies ISSN 1470-6423, Bonn, Germany.
- Rainer Stamminger, Alexander Bues, Felice Alfieri, Mauro Cordella, (2020). Durability of washing machines under real life conditions: Definition and application of a testing procedure. Journal of Cleaner Production, Bonn, Germany.

## Intended applications
Implementation of regular Product Environmental Footprint (PEF) studies and Organisation Environmental Footprint (OEF) studies exclusively under the specified Product groups and sectors as defined in the Product Environmental Footprint Category Rules (PEFCR) and Organisation Environmental Footprint Sectorial Rules (OEFSR) listed in http://ec.europa.eu/environment/eussd/smgp/PEFCR_OEFSR.htm
