# graphic paper, elementary; technology mix; production mix, at plant; 1000 kg

Dataset: ILCD process, Unit process, single operation
Geography: EU+EFTA+UK
Reference year: 2021
Valid until: 2024
Classification: Other Services / Other services
LCI method principle: Attributional
LCI method approaches: Allocation - market value
Completeness: All relevant flows quantified
Project: Provision of process-based 3.0 Environmental Footprint-compliant life cycle inventory datasets - Renewable materials - contract number 070201/2020/840085/SER/ENV.B.1
Generated by: VTT
Owner: EuroGraph
Compliance: Environmental Footprint non-primary supporting data set; Environmental Footprint 3.1
Amounts: no units in this file; such an amount is in the reference unit of its flow, which a separate flow dataset defines
copyright: true
licenseType: Free of charge for some user types or use types
accessRestrictions: Free of charge for all final users implementing a regular Product Environmental Footprint (PEF) studies and Organisation Environmental Footprint (OEF) studies exclusively under the specified Product groups and sectors as defined in the Product Environmental Footprint Category Rules (PEFCR) and Organisation Environmental Footprint Sectorial Rules (OEFSR) listed in http://ec.europa.eu/environment/eussd/smgp/PEFCR_OEFSR.htm and in accordance with the terms and conditions of the EULA (available at https://ecoinvent.lca-data.com/) exclusively until 31st December 2024. Any use of this dataset or any derivative data not within the specific context of one of the PEF/OEF projects or after the end of 2024 is not permitted.

## General comment
Notice: this data set supersedes the EF3.0-compliant version (see link under "preceding data set version" below calculated with the EF3.0). The life cycle inventory is not changed from the original EF3.0 data set. The LCIA results are calculated based on the EF3.1 methods which provide updated characterisation factors in the following impact categories: Climate Change, Ecotoxicity freshwater, Photochemical Ozone Formation, Acidification, Human Toxicity non-cancer, and Human Toxicity cancer. The review report and the data quality ratings refer to the original results. The data set has been updated by the European Commission on the basis of the original EF3.0 data set delivered by the data provider.This sub-process has limited documentation only. For all detailed documentation of the full model to which this data set belongs (such as DQRs, review reports and other technical documentation), please see this process: graphic paper - EU+EFTA+UK []

## Technology and included processes
Graphic paper (average of uncoated mechanical, uncoated wood free and coated papers); production mix; technology mix of integrated and non-integrated mills; at plant.
The production of paper based fully or partly on paper for recycling takes place in integrated processes for almost all cases. The share of recycled pulp in non-integrated mills (so recycled pulp produced dried and transported to a paper mill for making recycled paper) is around 3%. In the INTERMEDIATE PAPER PRODUCT PEFCR (2018) it is set that: "The PEF profile shall be calculated and reported using A equal to 1.". This dataset is therefore modelled as such.

## Reference product
- graphic paper // graphic paper // eu+efta+uk, elementary: 1

## Outputs
- Water, Emissions to air, unspecified: 1.429
- Water, Emissions to water, unspecified [AL]: 0.019796
- Water, Emissions to water, unspecified [AT]: 0.255058
- Water, Emissions to water, unspecified [BA]: 0.0246785
- Water, Emissions to water, unspecified [BE]: 0.307002
- Water, Emissions to water, unspecified [BG]: 0.0786136
- Water, Emissions to water, unspecified [BY]: 0.102078
- Water, Emissions to water, unspecified [CH]: 0.3042
- Water, Emissions to water, unspecified [CZ]: 0.211721
- Water, Emissions to water, unspecified [DE]: 2.3042
- Water, Emissions to water, unspecified [DK]: 0.167081
- Water, Emissions to water, unspecified [EE]: 0.0228151
- Water, Emissions to water, unspecified [ES]: 0.988796
- Water, Emissions to water, unspecified [FI]: 0.142516
- Water, Emissions to water, unspecified [FR]: 1.62538
- Water, Emissions to water, unspecified [GB]: 1.61523
- Water, Emissions to water, unspecified: 0.0100328
- Water, Emissions to water, unspecified [GR]: 0.183743
- Water, Emissions to water, unspecified [HR]: 0.0590794
- Water, Emissions to water, unspecified [HU]: 0.154877
- Water, Emissions to water, unspecified [IE]: 0.166832
- Water, Emissions to water, unspecified [IS]: 0.00951994
- Water, Emissions to water, unspecified [IT]: 1.39064
- Water, Emissions to water, unspecified [LT]: 0.0487141
- Water, Emissions to water, unspecified [LU]: 0.0338175
- Water, Emissions to water, unspecified [LV]: 0.0287249
- Water, Emissions to water, unspecified [MD]: 0.0151989
- Water, Emissions to water, unspecified [ME]: 0.00612297
- Water, Emissions to water, unspecified [MK]: 0.0169109
- Water, Emissions to water, unspecified [MT]: 0.0093549
- Water, Emissions to water, unspecified [NL]: 0.51549
- Water, Emissions to water, unspecified [NO]: 0.195128
- Water, Emissions to water, unspecified [PL]: 0.593271
- Water, Emissions to water, unspecified [PT]: 0.187198
- Water, Emissions to water, unspecified [RO]: 0.259891
- Water, Emissions to water, unspecified [RS]: 0.0644929
- Water, Emissions to water, unspecified [SE]: 0.281568
- Water, Emissions to water, unspecified [SI]: 0.0398741
- Water, Emissions to water, unspecified [SK]: 0.0935904
- Water, Emissions to water, unspecified [SM]: 0.00116482
- Water, Emissions to water, unspecified [UA]: 0.274408
- nitrate, Emissions to water, unspecified: 0.83
- biological oxygen demand, Emissions to water, unspecified: 0.23
- chemical oxygen demand, Emissions to water, unspecified: 2.35
- adsorbable organic halogen compounds, Emissions to water, unspecified: 0.00471
- phosphate, Emissions to water, unspecified: 0.02

## Impact indicators
- Eutrophication marine: 0.18758
- Ecotoxicity, freshwater: 17.3761
- Water use: -202.909
- Human toxicity, non-cancer: 1.09616e-9
- Eutrophication, freshwater: 0.0066
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
## Deviations from the LCI method principle
The background data uses:
- the \xe2\x80\x9cRecycled content cut-off\xe2\x80\x9d approach to allocate end-of-life by-products and secondary materials. This allocation is explained in the description of the recycled content system model (http://www.ecoinvent.org/database/system-models-in-ecoinvent-3/cut-off-system-model/allocation-cut-off-by-classification.html).
OR
- EF compliant data

## Deviations from the LCI method approaches
Background data:
- the \xe2\x80\x9cRecycled content cut-off\xe2\x80\x9d approach to allocate end-of-life by-products and secondary materials. This allocation is explained in the description of the recycled content system model (http://www.ecoinvent.org/database/system-models-in-ecoinvent-3/cut-off-system-model/allocation-cut-off-by-classification.html). The ecoinvent database mostly relies on “Allocation – market values” apart for few exceptions particularly in the energy sector. ecoinvent energy data is replaced with EF3.0 core data as per the EF guidelines version 2.0.
OR
- EF compliant data

## Modelling constants
All modelling constants follow the requirements listed in the Tender Specifications 070201/2020/SER/ENV.B1. Completeness: There are no intentional cut-offs in the inventory no matter how small their contribution to all the EF impact categories is. Eventual cut-offs are in compliance with the Guide for EF compliant data sets (JRC 2020), i.e. only if below the 3% cut-off rule. Water use: water use is modelled at country level using separate flows for water withdrawal, water release and water evaporation. Handling multi-functional processes: the following PEF multi- functionality decision hierarchy is applied for resolving all multi- functionality problems: (1) subdivision or system expansion; (2) allocation based on a relevant underlying physical relationship (substitution may apply here); (3) allocation based on some other relationship. Direct land use change: GHG emissions from direct LUC allocated to good/service for 20 years after the LUC occurs, with IPCC default values. Carbon storage and delayed emissions: credits associated with temporary (carbon) storage or delayed emissions up to 300 years are not be considered. Emissions off-setting: are not included. Capital goods (including infrastructures) and their End of life: they are included. System boundaries: system boundaries include all processes linked to the product supply chain (e.g. maintenance). Time period: emissions and removals are modelled as if released or removed at the beginning of the assessment method. Fossil and biogenic carbon emissions and removals: removals and emissions are modelled as follows: All GHG emissions from fossil fuels (including peat and limestone) are modelled consistently with the most updated ILCD list of elementary flows. The non-fossil (biogenic) carbon flows are modelled consistently with the most updated ILCD list of elementary flows.

## Cut-off and completeness
There are no intentional cut-offs in the inventory no matter how small their contribution to all the EF impact categories is. Eventual cut-offs are in compliance with the Guide for EF compliant data sets (JRC 2020), i.e. only if below the 3% cut-off rule. The dataset dry mass and water balance has been checked to ensure the inventory is complete. Capital goods (e.g. infrastructure) and their end-of-life are included.

## Data selection and combination
These datasets include, in both their foreground and background data, links to EF3.0 compliant data.
The relevant background data on energy, transport, and End of Life are from the LCDN data node (http://lcdn.thinkstep.com/Node/).
All other background data in the supply of this product for which no EF3.0 process was available are from ecoinvent v3.7 database (www.ecoinvent.org) or other data sources.

## Data treatment and extrapolations
Several data sources have been used to model the inventory.

## Use advice
This data set is a supporting sub-data set and must be used exclusively as sub-data set of its corresponding level-1 partly disaggregated data set (see “General comment” field for exact name and UUID).

## Data sources
- Background Data for Representative products and organisations. EF 3.0 compliant (data stock)
- Graphic paper - PEFCR Intermediate Paper Product (pulp, paper and paperboard) (2019). Data collected by VTT Technical Research Centre of Finland Ltd on behalf of European Association of Graphic Paper Producers (EuroGraph).

## Intended applications
Implementation of regular Product Environmental Footprint (PEF) studies and Organisation Environmental Footprint (OEF) studies exclusively under the specified Product groups and sectors as defined in the Product Environmental Footprint Category Rules (PEFCR) and Organisation Environmental Footprint Sectorial Rules (OEFSR) listed in http://ec.europa.eu/environment/eussd/smgp/PEFCR_OEFSR.htm
