# milling, textiles, elementary; milling process; production mix, at plant; service

Dataset: ILCD process, Unit process, single operation
Geography: GLO
Reference year: 2021
Valid until: 2024
Classification: Other Services / Other services
LCI method principle: Attributional
LCI method approaches: Allocation - market value
Completeness: All relevant flows quantified
Project: Provision of process-based 3.0 Environmental Footprint-compliant life cycle inventory datasets - Apparel 1 - contract number 070201/2020/840291/SER/ENV.B.1
Generated by: Life Cycle Indonesia
Owner: PRé Sustainability B.V.
Compliance: Environmental Footprint non-primary supporting data set; Environmental Footprint 3.1
Amounts: no units in this file; such an amount is in the reference unit of its flow, which a separate flow dataset defines
copyright: true
licenseType: Free of charge for some user types or use types
accessRestrictions: Free of charge for all final users implementing a regular Product Environmental Footprint (PEF) studies and Organisation Environmental Footprint (OEF) studies exclusively under the specified Product groups and sectors as defined in the Product Environmental Footprint Category Rules (PEFCR) and Organisation Environmental Footprint Sectorial Rules (OEFSR) listed in http://ec.europa.eu/environment/eussd/smgp/PEFCR_OEFSR.htm and in accordance with the terms and conditions of the EULA (available at https://ecoinvent.lca-data.com/) exclusively until 31st December 2024. Any use of this dataset or any derivative data not within the specific context of one of the PEF/OEF projects or after the end of 2024 is not permitted.

## General comment
Notice: this data set supersedes the EF3.0-compliant version (see link under "preceding data set version" below calculated with the EF3.0). The life cycle inventory is not changed from the original EF3.0 data set. The LCIA results are calculated based on the EF3.1 methods which provide updated characterisation factors in the following impact categories: Climate Change, Ecotoxicity freshwater, Photochemical Ozone Formation, Acidification, Human Toxicity non-cancer, and Human Toxicity cancer. The review report and the data quality ratings refer to the original results. The data set has been updated by the European Commission on the basis of the original EF3.0 data set delivered by the data provider.This sub-process has limited documentation only. For all detailed documentation of the full model to which this data set belongs (such as DQRs, review reports and other technical documentation), please see this process: milling, textiles - GLO []

## Technology and included processes
During milling the cloth undergoes repeated intermittent compression in the various parts of the machine, but after each compression, fabric is allowed to recover. Some of the features of modemmachines include plastic milling rollers, chain drives, hydraulic control of pressure on milling rollers and spout, stainless steel and plastic parts, and large capacity units (Whewell, 1977). Some goods, such as felt hats and blankets, are milled under acidic conditions (pH 3) using dilute sulphuric acids. Acid milling is especially suitable for dyed goods, as many of the dyes applied on wool have poor resistance to neutral and alkaline treatments. It is more preferable since there is less fibre degradation and minimised washing off, resulting in lower water consumption (Choudhury, 2017).

In this model, the rinsing and hydroextracting/drying process is not covered. The activity starts when the raw materials enter the process. Materials entering the process are included as well as energy uses and infrastructure. There is no direct emission to air since the emission comes from electricity usage, while the emission to water comes from wastewater and waste lube oil. The amount of wastewater assumed same as water input, no water uptakes from wet fabrics input. In the model, the finishing process is not included in the scope of this dataset and enegy sources of machines used solely from electricity. The consumption of lubricating oil using a thermobonding oven as a proxy.

Whewell, C. S. 1977. The Chemistry of Wool Finishing. In Chemistry of Natural Protein Fibers, pp 333–370. New York : Plenum Press
Choudhury, Asum Kumar Roy. 2017. Wool and silk finishing processes. In Principle of textile Finishing, pp 417-466. United Kingdom: Woodhead Publishing.

## Reference product
- milling, textiles // milling, textiles // glo, elementary: 1

## Outputs
- biological oxygen demand, Emissions to water, unspecified: 0.00250374
- Suspended solids, unspecified, Emissions to water, unspecified: 0.00150225
- Oils, unspecified, Emissions to water, unspecified: 0.002003
- Dissolved solids, Emissions to water, unspecified: 0.00250374

## Impact indicators
- Ecotoxicity, freshwater: 1.60414
- Human toxicity, non-cancer: 3.92667e-11
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
## Deviations from the LCI method principle
The background data uses:
- the \xe2\x80\x9cRecycled content cut-off\xe2\x80\x9d approach to allocate end-of-life by-products and secondary materials. This allocation is explained in the description of the recycled content system model (http://www.ecoinvent.org/database/system-models-in-ecoinvent-3/cut-off-system-model/allocation-cut-off-by-classification.html).
OR
- EF compliant data

## Deviations from the LCI method approaches
Background data:
- the \xe2\x80\x9cRecycled content cut-off\xe2\x80\x9d approach to allocate end-of-life by-products and secondary materials. This allocation is explained in the description of the recycled content system model (http://www.ecoinvent.org/database/system-models-in-ecoinvent-3/cut-off-system-model/allocation-cut-off-by-classification.html). The ecoinvent database mostly relies on “Allocation – market values” apart for few exceptions particularly in the energy sector. ecoinvent energy data is replaced with EF3.0 core data as per the EF guidelines version 2.0.
OR
- EF compliant data

## Modelling constants
All modelling constants follow the requirements listed in the Tender Specifications 070201/2020/SER/ENV.B1. Completeness: There are no intentional cut-offs in the inventory no matter how small their contribution to all the EF impact categories is. Eventual cut-offs are in compliance with the Guide for EF compliant data sets (JRC 2020), i.e. only if below the 3% cut-off rule. Water use: water use is modelled at country level using separate flows for water withdrawal, water release and water evaporation. Handling multi-functional processes: the following PEF multi- functionality decision hierarchy is applied for resolving all multi- functionality problems: (1) subdivision or system expansion; (2) allocation based on a relevant underlying physical relationship (substitution may apply here); (3) allocation based on some other relationship. Direct land use change: GHG emissions from direct LUC allocated to good/service for 20 years after the LUC occurs, with IPCC default values. Carbon storage and delayed emissions: credits associated with temporary (carbon) storage or delayed emissions up to 300 years are not be considered. Emissions off-setting: are not included. Capital goods (including infrastructures) and their End of life: they are included. System boundaries: system boundaries include all processes linked to the product supply chain (e.g. maintenance). Time period: emissions and removals are modelled as if released or removed at the beginning of the assessment method. Fossil and biogenic carbon emissions and removals: removals and emissions are modelled as follows: All GHG emissions from fossil fuels (including peat and limestone) are modelled consistently with the most updated ILCD list of elementary flows. The non-fossil (biogenic) carbon flows are modelled consistently with the most updated ILCD list of elementary flows.

## Cut-off and completeness
There are no intentional cut-offs in the inventory no matter how small their contribution to all the EF impact categories is. Eventual cut-offs are in compliance with the Guide for EF compliant data sets (JRC 2020), i.e. only if below the 3% cut-off rule. The dataset dry mass and water balance has been checked to ensure the inventory is complete. Capital goods (e.g. infrastructure) and their end-of-life are included.

## Data selection and combination
These datasets include, in both their foreground and background data, links to EF3.0 compliant data.
The relevant background data on energy, transport, and End of Life are from the LCDN data node (http://lcdn.thinkstep.com/Node/).
All other background data in the supply of this product for which no EF3.0 process was available are from ecoinvent v3.7 database (www.ecoinvent.org) or other data sources.

## Data treatment and extrapolations
Several data sources have been used to model the inventory.

## Use advice
This data set is a supporting sub-data set and must be used exclusively as sub-data set of its corresponding level-1 partly disaggregated data set (see “General comment” field for exact name and UUID).

## Data sources
- Background Data for Representative products and organisations. EF 3.0 compliant (data stock)
- UN Data (2018) Statistics Data for Lubricants Productions, http://data.un.org/Data.aspx?q=Lubricants&d=EDATA&f=cmID%3aLU, United Nations Statistics Division, Global
- Biancalani (2021) Milla : Milling Made Easy, https://www.biancalani.com/storage/app/media/PRODUCTS/MILLA/MILLA_EN_WEB.pdf, BIANCALANI SRL, Prato, Italy.
- Asim Kumar Roy Choudhury (2017). Principles of Textile Finishing : Wool and silk finishing process. The textile Institute, Duxford, United Kingdom
- New Cloth Market (2008) Water Efficiency in textile processes, https://www.fibre2fashion.com/industry-article/3406/water-efficiency-in-textile-processe, Fibre2Fashion Pvt. Ltd. Bopal, India.
- R. P. HARKER AND B. M. ROCK (1971) Water Conservation and Effluent Disposal in the Wool Textile Industry, Wool lndustries Research Association, Leeds, UK.
- Lebon (2021) Nonwoven Oven Machine, Catalog and Company Messages, Qingdao Lebon Industry Co., Ltd., China

## Intended applications
Implementation of regular Product Environmental Footprint (PEF) studies and Organisation Environmental Footprint (OEF) studies exclusively under the specified Product groups and sectors as defined in the Product Environmental Footprint Category Rules (PEFCR) and Organisation Environmental Footprint Sectorial Rules (OEFSR) listed in http://ec.europa.eu/environment/eussd/smgp/PEFCR_OEFSR.htm
