# glass fiber, elementary; technology mix; production mix, at plant; 1 kg

Dataset: ILCD process, Unit process, single operation
Geography: GLO
Reference year: 2021
Valid until: 2024
Classification: Other Services / Other services
LCI method principle: Attributional
LCI method approaches: Allocation - market value
Completeness: All relevant flows quantified
Project: Provision of process-based 3.0 Environmental Footprint-compliant life cycle inventory datasets - Apparel 2 - contract number 070201/2020/840292/SER/ENV.B.1
Generated by: Life Cycle Indonesia
Owner: PRé Sustainability B.V.
Compliance: Environmental Footprint non-primary supporting data set; Environmental Footprint 3.1
Amounts: no units in this file; such an amount is in the reference unit of its flow, which a separate flow dataset defines
copyright: true
licenseType: Free of charge for some user types or use types
accessRestrictions: Free of charge for all final users implementing a regular Product Environmental Footprint (PEF) studies and Organisation Environmental Footprint (OEF) studies exclusively under the specified Product groups and sectors as defined in the Product Environmental Footprint Category Rules (PEFCR) and Organisation Environmental Footprint Sectorial Rules (OEFSR) listed in http://ec.europa.eu/environment/eussd/smgp/PEFCR_OEFSR.htm and in accordance with the terms and conditions of the EULA (available at https://ecoinvent.lca-data.com/) exclusively until 31st December 2024. Any use of this dataset or any derivative data not within the specific context of one of the PEF/OEF projects or after the end of 2024 is not permitted.

## General comment
Notice: this data set supersedes the EF3.0-compliant version (see link under "preceding data set version" below calculated with the EF3.0). The life cycle inventory is not changed from the original EF3.0 data set. The LCIA results are calculated based on the EF3.1 methods which provide updated characterisation factors in the following impact categories: Climate Change, Ecotoxicity freshwater, Photochemical Ozone Formation, Acidification, Human Toxicity non-cancer, and Human Toxicity cancer. The review report and the data quality ratings refer to the original results. The data set has been updated by the European Commission on the basis of the original EF3.0 data set delivered by the data provider.This sub-process has limited documentation only. For all detailed documentation of the full model to which this data set belongs (such as DQRs, review reports and other technical documentation), please see this process: glass fiber - GLO []

## Technology and included processes
There are 4 steps in making glass fiber: batch preparation, melting and refining, forming, and post-forming. During batch preparation, the pretreated raw materials are mixed together. Then, once in the melting process, they will be mixed together in elevated temperatures. This is followed up by the refining process, where the molten glass is homogenized and conditioned after it is freed of bubbles that could harm its formation. After refining, the molten glass flows to bushings, where it is drawn through openings in the bushings by a mechanical force to be fiberized. Immediately after leaving the bushings, the fibers are subjected to rapid cooling by air and water spray. A coating also referred to as size, is applied to the fibers before they enter the subsequent post-forming processes to protect and lubricate the brittle filaments. This process usually known as sizing process. The size applied also dictates the performance of the fibers in a composite, notably the interface interaction between the matrix and the filaments. The size is generally an aqueous mixture of polymers, lubricants, coupling agents, and additives. The exact composition, however, depends on the glass fiber being manufactured and remains proprietary. After sizing, the filaments are wound into a spun. Based on final application, additional post-processing steps may follow, such as roving assembly, twisting, strand chopping, etc.

The activity starts when the material enter the process. The materials entering the process are water, chemicals, energy uses and infrastructure. In this model, the infrastructure covered is the furnace and the sizing machine. Others were not included due to data limitations. There is no direct emission to soil, but there are the direct emission to air such as CO2, SOx, NOx, and PM comes from melting & refining process also water vapour comes from spraying in forming process and drying in post-forming process. The sizing materials (i.e. epoxy resins, boric oxide, dimethyldichlorosilane, and ethylene glycol) consumption is accounted as well in this model. The sizing materials remain the property of the glass fiber. The sizing materials that do not coat the final product assumed to be generated along with wastewater. The hazardous waste comes from waste lube oil. The consumption of lubricating oil using a thermalbonding machine as a proxy.

Dai, Q., Kelly, J., Sullivan, J. and Elgowainy, A., 2015. Life-Cycle Analysis Update of Glass and Glass Fiber for the GREETTM Model.

## Reference product
- glass fiber // glass fiber // glo, elementary: 1

## Outputs
- Water, Emissions to air, unspecified: 0.00261794
- carbon dioxide (fossil), Emissions to air, unspecified: 0.491336
- particles (PM10), Emissions to air, unspecified: 0.000175
- Nitrogen oxides, Emissions to air, unspecified: 0.00129426
- sulfur oxides, Emissions to air, unspecified: 0.00155834
- volatile organic compound, Emissions to air, unspecified: 0.00025
- Nitrogen oxides, Emissions to air, unspecified [AL]: 5.1854e-7
- Nitrogen oxides, Emissions to air, unspecified [AT]: 6.68105e-6
- Nitrogen oxides, Emissions to air, unspecified [BA]: 6.46433e-7
- Nitrogen oxides, Emissions to air, unspecified [BE]: 8.04169e-6
- Nitrogen oxides, Emissions to air, unspecified [BG]: 2.05922e-6
- Nitrogen oxides, Emissions to air, unspecified [BY]: 2.67386e-6
- Nitrogen oxides, Emissions to air, unspecified [CH]: 7.96827e-6
- Nitrogen oxides, Emissions to air, unspecified [CZ]: 5.54586e-6
- Nitrogen oxides, Emissions to air, unspecified [DE]: 6.03566e-5
- Nitrogen oxides, Emissions to air, unspecified [DK]: 4.37655e-6
- Nitrogen oxides, Emissions to air, unspecified [EE]: 5.97623e-7
- Nitrogen oxides, Emissions to air, unspecified [ES]: 2.59007e-5
- Nitrogen oxides, Emissions to air, unspecified [FI]: 3.7331e-6
- Nitrogen oxides, Emissions to air, unspecified [FR]: 4.25755e-5
- Nitrogen oxides, Emissions to air, unspecified [GB]: 4.23097e-5
- Nitrogen oxides, Emissions to air, unspecified [GR]: 4.813e-6
- Nitrogen oxides, Emissions to air, unspecified [HR]: 1.54754e-6
- Nitrogen oxides, Emissions to air, unspecified [HU]: 4.05687e-6
- Nitrogen oxides, Emissions to air, unspecified [IE]: 4.37004e-6
- Nitrogen oxides, Emissions to air, unspecified [IT]: 3.64267e-5
- Nitrogen oxides, Emissions to air, unspecified [LT]: 1.27603e-6
- Nitrogen oxides, Emissions to air, unspecified [LU]: 8.85823e-7
- Nitrogen oxides, Emissions to air, unspecified [LV]: 7.52428e-7
- Nitrogen oxides, Emissions to air, unspecified [MD]: 3.98123e-7
- Nitrogen oxides, Emissions to air, unspecified [MK]: 4.42969e-7
- Nitrogen oxides, Emissions to air, unspecified [NL]: 1.35029e-5
- Nitrogen oxides, Emissions to air, unspecified [NO]: 5.11123e-6
- Nitrogen oxides, Emissions to air, unspecified [PL]: 1.55403e-5
- Nitrogen oxides, Emissions to air, unspecified [PT]: 4.90351e-6
- Nitrogen oxides, Emissions to air, unspecified [RO]: 6.80764e-6
- Nitrogen oxides, Emissions to air, unspecified [RU]: 5.6362e-5
- Nitrogen oxides, Emissions to air, unspecified [SE]: 7.37545e-6
- Nitrogen oxides, Emissions to air, unspecified [SI]: 1.04447e-6
- Nitrogen oxides, Emissions to air, unspecified [SK]: 2.45153e-6
- Nitrogen oxides, Emissions to air, unspecified [UA]: 7.1879e-6
- sulfur oxides, Emissions to air, unspecified [AL]: 6.24342e-7
- sulfur oxides, Emissions to air, unspecified [AT]: 8.04425e-6
- sulfur oxides, Emissions to air, unspecified [BA]: 7.78331e-7
- sulfur oxides, Emissions to air, unspecified [BE]: 9.68251e-6
- sulfur oxides, Emissions to air, unspecified [BG]: 2.47938e-6
- sulfur oxides, Emissions to air, unspecified [BY]: 3.21944e-6
- sulfur oxides, Emissions to air, unspecified [CH]: 9.59411e-6
- sulfur oxides, Emissions to air, unspecified [CZ]: 6.67743e-6
- sulfur oxides, Emissions to air, unspecified [DE]: 7.26718e-5
- sulfur oxides, Emissions to air, unspecified [DK]: 5.26953e-6
- sulfur oxides, Emissions to air, unspecified [EE]: 7.19562e-7
- sulfur oxides, Emissions to air, unspecified [ES]: 3.11855e-5
- sulfur oxides, Emissions to air, unspecified [FI]: 4.4948e-6
- sulfur oxides, Emissions to air, unspecified [FR]: 5.12625e-5
- sulfur oxides, Emissions to air, unspecified [GB]: 5.09425e-5
- sulfur oxides, Emissions to air, unspecified [GR]: 5.79504e-6
- sulfur oxides, Emissions to air, unspecified [HR]: 1.8633e-6
- sulfur oxides, Emissions to air, unspecified [HU]: 4.88463e-6
- sulfur oxides, Emissions to air, unspecified [IE]: 5.2617e-6
- sulfur oxides, Emissions to air, unspecified [IT]: 4.38592e-5
- sulfur oxides, Emissions to air, unspecified [LT]: 1.53639e-6
- sulfur oxides, Emissions to air, unspecified [LU]: 1.06657e-6
- sulfur oxides, Emissions to air, unspecified [LV]: 9.05952e-7
- sulfur oxides, Emissions to air, unspecified [MD]: 4.79356e-7
- sulfur oxides, Emissions to air, unspecified [MK]: 5.33352e-7
- sulfur oxides, Emissions to air, unspecified [NL]: 1.6258e-5
- sulfur oxides, Emissions to air, unspecified [NO]: 6.15413e-6
- sulfur oxides, Emissions to air, unspecified [PL]: 1.87111e-5
- sulfur oxides, Emissions to air, unspecified [PT]: 5.90402e-6
- sulfur oxides, Emissions to air, unspecified [RO]: 8.19667e-6
- sulfur oxides, Emissions to air, unspecified [RU]: 6.78621e-5
- sulfur oxides, Emissions to air, unspecified [SE]: 8.88033e-6
- sulfur oxides, Emissions to air, unspecified [SI]: 1.25758e-6
- sulfur oxides, Emissions to air, unspecified [SK]: 2.95173e-6
- sulfur oxides, Emissions to air, unspecified [UA]: 8.65451e-6

## Impact indicators
- Eutrophication marine: 0.000654882
- Ecotoxicity, freshwater: 0.000479325
- Climate change: 0.491336
- Human toxicity, non-cancer: 1.2771e-11
- EF-particulate Matter: 2.85091e-8
- Photochemical ozone formation - human health: 0.00190664
- Acidification: 0.00360704
- Eutrophication, terrestrial: 0.00617541
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
## Deviations from the LCI method principle
The background data use the \xe2\x80\x9cRecycled content cut-off\xe2\x80\x9d approach to allocate end-of-life by-products and secondary materials. This allocation is explained in the description of the recycled content system model (http://www.ecoinvent.org/database/system-models-in-ecoinvent-3/cut-off-system-model/allocation-cut-off-by-classification.html).

## Deviations from the LCI method approaches
Background data:
- the \xe2\x80\x9cRecycled content cut-off\xe2\x80\x9d approach to allocate end-of-life by-products and secondary materials. This allocation is explained in the description of the recycled content system model (http://www.ecoinvent.org/database/system-models-in-ecoinvent-3/cut-off-system-model/allocation-cut-off-by-classification.html). The ecoinvent database mostly relies on “Allocation – market values” apart for few exceptions particularly in the energy sector. ecoinvent energy data is replaced with EF3.0 core data as per the EF guidelines version 2.0.
OR
- EF compliant data

## Modelling constants
All modelling constants follow the requirements listed in the Tender Specifications ENV.B.1/SER/2016/0038vl. Completeness: All known environmental flows are included. All known resource uses and emissions are listed in the inventory. Water use: water use is modelled at country level using separate flows for water withdrawal, water release and water evaporation. Cut-off: All known environmental flows are included. All known resource uses and emissions are listed in the inventory. Handling multi-functional processes: the following PEF multi- functionality decision hierarchy is applied for resolving all multi- functionality problems: (1) subdivision or system expansion; (2) allocation based on a relevant underlying physical relationship (substitution may apply here); (3) allocation based on some other relationship. Direct land use change: GHG emissions from direct LUC allocated to good/service for 20 years after the LUC occurs, with IPCC default values. Carbon storage and delayed emissions: credits associated with temporary (carbon) storage or delayed emissions up to 300 years are not be considered. Emissions off-setting: are not included. Capital goods (including infrastructures) and their End of life: they are included. System boundaries: system boundaries include all processes linked to the product supply chain (e.g. maintenance). Time period: emissions and removals are modelled as if released or removed at the beginning of the assessment method. Fossil and biogenic carbon emissions and removals: removals and emissions are modelled as follows: All GHG emissions from fossil fuels (including peat and limestone) are modelled consistently with the most updated ILCD list of elementary flows. The non-fossil (biogenic) carbon flows are modelled consistently with the most updated ILCD list of elementary flows.

## Cut-off and completeness
All known environmental flows are included. All known resource uses and emissions are listed in the inventory. The dataset dry mass balance has been checked to ensure the inventory is complete. Capital goods (e.g. infrastructure) and their end-of-life are included.

## Data selection and combination
These datasets include, in both their foreground and background data, links to EF3.0 compliant data.
The relevant background data on energy, transport, and End of Life are from the LCDN data node (http://lcdn.thinkstep.com/Node/).
All other background data in the supply of this product for which no EF3.0 process was available are from ecoinvent v3.7 database (www.ecoinvent.org) or other data sources.

## Data treatment and extrapolations
Several data sources have been used to model the inventory.

## Use advice
This data set is a supporting sub-data set and must be used exclusively as sub-data set of its corresponding level-1 partly disaggregated data set (see “General comment” field for exact name and UUID).

## Data sources
- Background Data for Representative products and organisations. EF 3.0 compliant (data stock)
- UN Data (2018) Statistics Data for Lubricants Productions, http://data.un.org/Data.aspx?q=Lubricants&d=EDATA&f=cmID%3aLU, United Nations Statistics Division, Global.
- Dai, Q., Kelly, J., Sullivan, J. and Elgowainy, A., 2015. Life-Cycle Analysis Update of Glass and Glass Fiber for the GREETTM Model, United States
- Scalet, B. M., Garcia Munoz, M., Sissa, A. Q., Roudier, W., Delgado Sancho, L., 2013. Best available techniques reference document for the manufacture of glass, Europian Union. http://eippcb.jrc.ec.europa.eu/reference/BREF/GLS_Adopted_03_2012.pdf
- Willy Piret, Nadia Masson, Luc Peters. 2013. Glass fibre sizing composition, European Patent Application. Battice, Belgium
- Joint Research Center, 2013. Best Available Techniques (BAT) Reference Document for the Manufacture of Glass. JRC Reference Report. Seville, Spain: European Commission.
- Lebon (2021) Nonwoven Oven Machine, Catalog and Company Messages, Qingdao Lebon Industry Co., Ltd., China
- T-Tech Japan (2021) Single-End-Sizing System, http://www.t-techjapan.co.jp/en/catalog/index.html, T-Tech Japan Corp., Ishikawa, Japan
- Izumi International (2021). Single End Sizing Machine KS7, https://www.izumiinternational.com/media/wysiwyg/brochure/KS7-SingleEndSizing-(BroF).pdf, Izumi International, Inc., Global
- Deltech Furnaces (2021) Glass Melt Furnaces, https://www.deltechfurnaces.com/products/glass-melt-furnaces/, Deltech Inc., USA
- Gardiner, Ginger (2009) The makinf of glass fiber, https://www.compositesworld.com/articles/the-making-of-glass-fiber, Gardner Business Media, Inc., USA

## Intended applications
Implementation of regular Product Environmental Footprint (PEF) studies and Organisation Environmental Footprint (OEF) studies exclusively under the specified Product groups and sectors as defined in the Product Environmental Footprint Category Rules (PEFCR) and Organisation Environmental Footprint Sectorial Rules (OEFSR) listed in http://ec.europa.eu/environment/eussd/smgp/PEFCR_OEFSR.htm
