# dyeing, continuous, disperse or cationic dyes; Dyeing; production mix, at plant; textile service for 1 kg of fabric

Dataset: ILCD process, Partly terminated system
Geography: GLO
Reference year: 2017
Valid until: 2024
Classification: Systems / Textiles, furnitures and other interiors
LCI method principle: Attributional
LCI method approaches: Allocation - market value
Completeness: All relevant flows quantified
Project: Provision of process-based 3.0 Environmental Footprint-compliant life cycle inventory datasets - Apparel 1 - contract number 070201/2020/840291/SER/ENV.B.1
Generated by: CADIS
Owner: PRé Sustainability B.V.
Compliance: ILCD Data Network - Entry-level; Suggestions for updating the PEF method 2019; ISO 14040 Environmental Management – Life Cycle Assessment – Principles and Framework, 2006; ISO 14044:2006. Environmental Management – Life Cycle Assessment – Requirements and guidelines.; Environmental Footprint 3.1
Review: Dependent internal review by Avraam Symeonidis, Emilia Moreno Ruiz; Independent review panel by Fábio Valebona
Data quality: Overall quality: Very good; Time representativeness: Good; Geographical representativeness: Fair; Technological representativeness: Very good; Precision: Very good; Methodological appropriateness and consistency: Not applicable
Amounts: no units in this file; such an amount is in the reference unit of its flow, which a separate flow dataset defines
copyright: true
licenseType: Free of charge for some user types or use types
accessRestrictions: Free of charge for all final users implementing a regular Product Environmental Footprint (PEF) studies and Organisation Environmental Footprint (OEF) studies exclusively under the specified Product groups and sectors as defined in the Product Environmental Footprint Category Rules (PEFCR) and Organisation Environmental Footprint Sectorial Rules (OEFSR) listed in http://ec.europa.eu/environment/eussd/smgp/PEFCR_OEFSR.htm and in accordance with the terms and conditions of the EULA (available at https://ecoinvent.lca-data.com/) exclusively until 31st December 2024. Any use of this dataset or any derivative data not within the specific context of one of the PEF/OEF projects or after the end of 2024 is not permitted.

## General comment
Notice: this data set supersedes the EF3.0-compliant version (see link under "preceding data set version" below calculated with the EF3.0). The life cycle inventory is not changed from the original EF3.0 data set. The LCIA results are calculated based on the EF3.1 methods which provide updated characterisation factors in the following impact categories: Climate Change, Ecotoxicity freshwater, Photochemical Ozone Formation, Acidification, Human Toxicity non-cancer, and Human Toxicity cancer. The review report and the data quality ratings refer to the original results. The data set has been updated by the European Commission on the basis of the original EF3.0 data set delivered by the data provider.This activity is modeled as a service, so no input of textile is considered. A user employing this service within their models should use it along with 1.019 kg of material to dye 1 kg of fabric. This activity includes dyeing and washing operations during textile processing. Water and energy consumption, wastewater and evaporated water (per kg of dyed fabric) were obtained as an industry average from seven manufacturers (Thinkstep, 2017). Chemicals used for dyeing go out the process disolved in the wastewater. Waste fiber should be included separately by user. Dyeing recipe was obtained from Islam et al. (2016) including auxiliary chemicals: dispersing agent (1g/L), acetic acid (0.5g/L), sequestering agent (1g/L), leveling agent (1g/L) and a liquor ratio of 1:9.75 [kg dyed fabric/Liter liquor] and a 2% dye shade. Life expectancy of dyeing machine is assumed to be 25 years (UNFCCC, 2012) with an average production capacity of 42.5 m/min and a machine weight of 20 tons (QDTONGDA, 2021), assuming a fabric weight of 300 g/m and 10 h/d operating time. Land use from factory building was calculated based on (EUREKA, 2021) from a total area of 325 thousand square meters, divided into five sub-productive areas: knitting, dyeing, printing, and home textiles. The respective area (1/5) of total area (65,000 m2) is divided by the total production capacity of the building in 60 years (assumed life span of the building), with a daily production of 125 ton of dyeing (EUREKA, 2021).

## Technology and included processes
Continuous dyeing is a process in which dyeing the fabric and fixation of the dye are carried out continuously in one simultaneous operation. Continuous dyeing methods are used to dye huge-length fabric in a uniform shade without any variation. Fabric is usually processed in open width. Dye can be applied directly (sprayed or printed onto the substrate) or by continuous immersion and excess liquor removed by squeeze rollers (padding). To obtain fixation of dyes on the surface, it is preferable to dry the fabric before it passes the next process (generally using steam at 100°C).
Polyester fibers are extremely crystalline, hydrophobic in nature and have a high transition temperature. Hence the fiber requires a high temperature around 130°C for its dyeing. As disperse dyes are mainly insoluble in water it is necessary to apply a dispersing agent under slightly acidic conditions.
To use with: Acetate, polyamide, polyester, acrylic

## Parameters
- kg_0: 0.00975
  Mass in kg, for alkylbenzene sulfonate // alkylbenzene sulfonate production // glo; Articulated lorry transport, Euro 4, Total weight >32 t; EU+EFTA+UK
- km_0: 1000
  Distance in km, for alkylbenzene sulfonate // alkylbenzene sulfonate production // glo; Articulated lorry transport, Euro 4, Total weight >32 t; EU+EFTA+UK
- kg_km_0: 9.75; = kg_0*km_0
  Transport amount in km*km, for alkylbenzene sulfonate // alkylbenzene sulfonate production // glo; Articulated lorry transport, Euro 4, Total weight >32 t; EU+EFTA+UK
- kg_1: 0.004875
  Mass in kg, for acetic acid // acetic acid production, product in 98% solution state // glo; Articulated lorry transport, Euro 4, Total weight >32 t; EU+EFTA+UK
- km_1: 1000
  Distance in km, for acetic acid // acetic acid production, product in 98% solution state // glo; Articulated lorry transport, Euro 4, Total weight >32 t; EU+EFTA+UK
- kg_km_1: 4.875; = kg_1*km_1
  Transport amount in km*km, for acetic acid // acetic acid production, product in 98% solution state // glo; Articulated lorry transport, Euro 4, Total weight >32 t; EU+EFTA+UK
- kg_2: 0.00975
  Mass in kg, for edta // edta production // eu+efta+uk; Articulated lorry transport, Euro 4, Total weight >32 t; EU+EFTA+UK
- km_2: 1000
  Distance in km, for edta // edta production // eu+efta+uk; Articulated lorry transport, Euro 4, Total weight >32 t; EU+EFTA+UK
- kg_km_2: 9.75; = kg_2*km_2
  Transport amount in km*km, for edta // edta production // eu+efta+uk; Articulated lorry transport, Euro 4, Total weight >32 t; EU+EFTA+UK
- kg_3: 0.00975
  Mass in kg, for alcohol ether sulphate (petro based) // alcohol ether sulphate (petro based) production // eu+efta+uk; Articulated lorry transport, Euro 4, Total weight >32 t; EU+EFTA+UK
- km_3: 1000
  Distance in km, for alcohol ether sulphate (petro based) // alcohol ether sulphate (petro based) production // eu+efta+uk; Articulated lorry transport, Euro 4, Total weight >32 t; EU+EFTA+UK
- kg_km_3: 9.75; = kg_3*km_3
  Transport amount in km*km, for alcohol ether sulphate (petro based) // alcohol ether sulphate (petro based) production // eu+efta+uk; Articulated lorry transport, Euro 4, Total weight >32 t; EU+EFTA+UK
- kg_4: 0.00975
  Mass in kg, for alkylbenzene sulfonate // alkylbenzene sulfonate production // glo; Transoceanic ship, containers; GLO
- km_4: 18000
  Distance in km, for alkylbenzene sulfonate // alkylbenzene sulfonate production // glo; Transoceanic ship, containers; GLO
- kg_km_4: 175.5; = kg_4*km_4
  Transport amount in km*km, for alkylbenzene sulfonate // alkylbenzene sulfonate production // glo; Transoceanic ship, containers; GLO
- kg_5: 0.004875
  Mass in kg, for acetic acid // acetic acid production, product in 98% solution state // glo; Transoceanic ship, containers; GLO
- km_5: 18000
  Distance in km, for acetic acid // acetic acid production, product in 98% solution state // glo; Transoceanic ship, containers; GLO
- kg_km_5: 87.75; = kg_5*km_5
  Transport amount in km*km, for acetic acid // acetic acid production, product in 98% solution state // glo; Transoceanic ship, containers; GLO
- kg_6: 0.00975
  Mass in kg, for edta // edta production // eu+efta+uk; Transoceanic ship, containers; GLO
- km_6: 18000
  Distance in km, for edta // edta production // eu+efta+uk; Transoceanic ship, containers; GLO
- kg_km_6: 175.5; = kg_6*km_6
  Transport amount in km*km, for edta // edta production // eu+efta+uk; Transoceanic ship, containers; GLO
- kg_7: 0.00975
  Mass in kg, for alcohol ether sulphate (petro based) // alcohol ether sulphate (petro based) production // eu+efta+uk; Transoceanic ship, containers; GLO
- km_7: 18000
  Distance in km, for alcohol ether sulphate (petro based) // alcohol ether sulphate (petro based) production // eu+efta+uk; Transoceanic ship, containers; GLO
- kg_km_7: 175.5; = kg_7*km_7
  Transport amount in km*km, for alcohol ether sulphate (petro based) // alcohol ether sulphate (petro based) production // eu+efta+uk; Transoceanic ship, containers; GLO

## Reference product
- dyeing, continuous, disperse or cationic dyes // dyeing, continuous, disperse or cationic dyes // glo: 1

## Inputs
- Electricity from Electricity grid mix 1kV-60kV - AU: 0.0036
- Electricity from Electricity grid mix 1kV-60kV - EU+EFTA+UK: 0.0535
- Electricity from Electricity grid mix 1kV-60kV - NZ: 0.0007
- Electricity from Electricity grid mix 1kV-60kV - RAF: 0.0117
- Electricity from Electricity grid mix 1kV-60kV - RNA: 0.0783
- Electricity from Electricity grid mix 1kV-60kV - RSA: 0.0266
- Electricity from Electricity grid mix 1kV-60kV - RU: 0.0157
- Thermal energy (MJ) from Thermal energy from hard coal - ROW: 0.637864
- Thermal energy (MJ) from Thermal energy from heavy fuel oil (HFO) - ROW: 0.0143689
- Thermal energy (MJ) from Thermal energy from LPG - ROW: 0.0114563
- Thermal energy (MJ) from Thermal energy from natural gas - ROW: 5.95146
- Transport of alkylbenzene sulfonate // alkylbenzene sulfonate production // glo by Articulated lorry transport, Euro 4, Total weight >32 t - EU+EFTA+UK: 9.75; = kg_km_0
- Transport of acetic acid // acetic acid production, product in 98% solution state // glo by Articulated lorry transport, Euro 4, Total weight >32 t - EU+EFTA+UK: 4.875; = kg_km_1
- Transport of edta // edta production // eu+efta+uk by Articulated lorry transport, Euro 4, Total weight >32 t - EU+EFTA+UK: 9.75; = kg_km_2
- Transport of alcohol ether sulphate (petro based) // alcohol ether sulphate (petro based) production // eu+efta+uk by Articulated lorry transport, Euro 4, Total weight >32 t - EU+EFTA+UK: 9.75; = kg_km_3
- Transport of alkylbenzene sulfonate // alkylbenzene sulfonate production // glo by Transoceanic ship, containers - GLO: 175.5; = kg_km_4
- Transport of acetic acid // acetic acid production, product in 98% solution state // glo by Transoceanic ship, containers - GLO: 87.75; = kg_km_5
- Transport of edta // edta production // eu+efta+uk by Transoceanic ship, containers - GLO: 175.5; = kg_km_6
- Transport of alcohol ether sulphate (petro based) // alcohol ether sulphate (petro based) production // eu+efta+uk by Transoceanic ship, containers - GLO: 175.5; = kg_km_7
- Electricity from Electricity grid mix 1kV-60kV - CN: 0.0802619
- Electricity from Electricity grid mix 1kV-60kV - RAS w/o CN: 0.0879381
- dyeing, continuous, disperse or cationic dyes // dyeing, continuous, disperse or cationic dyes // glo, blackbox: 1
- dyeing, continuous, disperse or cationic dyes // dyeing, continuous, disperse or cationic dyes // glo, elementary: 1

## Impact indicators
- Eutrophication marine: 0.00123333
- Ecotoxicity, freshwater: 8.08655
- Land use: 0.802328
- Water use: 1.35739
- Resource use, minerals and metals: 1.59961e-6
- Resource use, fossils: 18.6022
- Climate change: 1.2476
- Ozone depletion: 9.89768e-9
- Human toxicity, cancer: 1.82672e-9
- Human toxicity, non-cancer: 9.30076e-9
- EF-particulate Matter: 1.08856e-7
- Ionising radiation, human health: 0.151517
- Photochemical ozone formation - human health: 0.00292156
- Acidification: 0.00443172
- Eutrophication, terrestrial: 0.00989803
- Eutrophication, freshwater: 6.40733e-5

## Deviations from the LCI method principle
The background data uses:
- the \xe2\x80\x9cRecycled content cut-off\xe2\x80\x9d approach to allocate end-of-life by-products and secondary materials. This allocation is explained in the description of the recycled content system model (http://www.ecoinvent.org/database/system-models-in-ecoinvent-3/cut-off-system-model/allocation-cut-off-by-classification.html).
OR
- EF compliant data

## Deviations from the LCI method approaches
Background data:
- the \xe2\x80\x9cRecycled content cut-off\xe2\x80\x9d approach to allocate end-of-life by-products and secondary materials. This allocation is explained in the description of the recycled content system model (http://www.ecoinvent.org/database/system-models-in-ecoinvent-3/cut-off-system-model/allocation-cut-off-by-classification.html). The ecoinvent database mostly relies on “Allocation – market values” apart for few exceptions particularly in the energy sector. ecoinvent energy data is replaced with EF3.0 core data as per the EF guidelines version 2.0.
OR
- EF compliant data

## Modelling constants
All modelling constants follow the requirements listed in the Tender Specifications 070201/2020/SER/ENV.B1. Completeness: There are no intentional cut-offs in the inventory no matter how small their contribution to all the EF impact categories is. Eventual cut-offs are in compliance with the Guide for EF compliant data sets (JRC 2020), i.e. only if below the 3% cut-off rule. Water use: water use is modelled at country level using separate flows for water withdrawal, water release and water evaporation. Handling multi-functional processes: the following PEF multi- functionality decision hierarchy is applied for resolving all multi- functionality problems: (1) subdivision or system expansion; (2) allocation based on a relevant underlying physical relationship (substitution may apply here); (3) allocation based on some other relationship. Direct land use change: GHG emissions from direct LUC allocated to good/service for 20 years after the LUC occurs, with IPCC default values. Carbon storage and delayed emissions: credits associated with temporary (carbon) storage or delayed emissions up to 300 years are not be considered. Emissions off-setting: are not included. Capital goods (including infrastructures) and their End of life: they are included. System boundaries: system boundaries include all processes linked to the product supply chain (e.g. maintenance). Time period: emissions and removals are modelled as if released or removed at the beginning of the assessment method. Fossil and biogenic carbon emissions and removals: removals and emissions are modelled as follows: All GHG emissions from fossil fuels (including peat and limestone) are modelled consistently with the most updated ILCD list of elementary flows. The non-fossil (biogenic) carbon flows are modelled consistently with the most updated ILCD list of elementary flows.

## Cut-off and completeness
There are no intentional cut-offs in the inventory no matter how small their contribution to all the EF impact categories is. Eventual cut-offs are in compliance with the Guide for EF compliant data sets (JRC 2020), i.e. only if below the 3% cut-off rule. The dataset dry mass and water balance has been checked to ensure the inventory is complete. Capital goods (e.g. infrastructure) and their end-of-life are included.

## Data selection and combination
These datasets include, in both their foreground and background data, links to EF3.0 compliant data.
The relevant background data on energy, transport, and End of Life are from the LCDN data node (http://lcdn.thinkstep.com/Node/).
All other background data in the supply of this product for which no EF3.0 process was available are from ecoinvent v3.7 database (www.ecoinvent.org) or other data sources.

## Data treatment and extrapolations
Several data sources have been used to model the inventory.

## Review details
Internal reviews have been asked to review the plausibility of the unit process, LCIA scores, and DQRs. Internal reviewers have also been asked to review the data for EF compliancy. The consortium is therefore responsible for aspects such as compliancy with the ILCD format, including validation in Look@LCI, and nomenclature.
Internal reviwers have been asked to judge based on the process name, that the unit process models in a complete and representative way the process in the requested location. The review encompassed the plausability of:
- exchanges with nature (elementary flows) as well as exchanges such as product and waste flows.
- meta information (general comment, technology comment, system boundaries, allocation, cut-off rules, etc.). Reviewers were asked to judge if the provided information is enough to understand the content of the process.
- LCIA scores
- DQRs including precision, technology, time and geography. As well as the overall DQR.
External reviewers have been asked to provide their expertise in the field of interest. External reviewers have been asked to review the unit process, including eventual methodological choices, the LCIA scores (provided with contribution scores as well), and DQRs. External reviewers have been provided all the information in a tool developed by the consortium for the purpose of this project.
External reviewers have been asked to judge based on the process name, that the unit process models in a complete and representative way the process in the requested location. The review encompassed:
- Plausability and completeness of exchanges with nature (elementary flows) as well as exchanges such as product and waste flows.
- Review of meta information (general comment, technology comment, system boundaries, allocation, cut-off rules, etc.). Reviewers were asked to judge if the provided information is enough to understand the content of the process.
- Review of properties (biogenic carbon and water content).
- Review of allocation keys.
- Plausability of LCIA scores calculated by the consortium.
- Plausability of DQRs including precision, technology, time and geography. As well as the overall DQR.

## Data sources
- Background Data for Representative products and organisations. EF 3.0 compliant (data stock)
- thinkstep AG. 2017. LCA Update of Cotton Fiber and Fabric Life Cycle Inventory.
- Islam A, Rashaduzzaman, Rahman M, Biswas J, Khalil E (2016) A Study on the Effects of Material to Liquor Ratio on the Colorfastness of Synolon Yellow EXW Fluorescent Disperse Dye. International Journal of Materials Science and Applications; 5(6): 248-253. doi: 10.11648/j.ijmsa.20160506.13
- UNFCCC (2012) COMPONENT PROJECT ACTIVITIES DESIGN DOCUMENT (CPA-DD). Accessed online August 8th 2021: http://gec.jp/gec/jp/Activities/cdm-fs/2012/2012_cdmfs01_jPear_bangladesh_cpa-dd.pdf
- QDTONGDA (2021) Td638 Bunch Shaped Indigo Rope Dyeing Machine of Fast Dyeing Speed. Accessed online August 8th 2021: https://qdtongda.en.made-in-china.com/product/jyeQIDuEZXcl/China-Td638-Bunch-Shaped-Indigo-Rope-Dyeing-Machine-of-Fast-Dyeing-Speed.html
- EUREKA (2021) Production activities in line with the “green factory” approach in the textile sector. Accessed online August 8th 2021: https://eureka-eurogia-green.eu/offering_expertise/production-activities-in-line-with-the-green-factory-approach-in-the-textile-sector-13-04-2021/

## Intended applications
Implementation of regular Product Environmental Footprint (PEF) studies and Organisation Environmental Footprint (OEF) studies exclusively under the specified Product groups and sectors as defined in the Product Environmental Footprint Category Rules (PEFCR) and Organisation Environmental Footprint Sectorial Rules (OEFSR) listed in http://ec.europa.eu/environment/eussd/smgp/PEFCR_OEFSR.htm
