# hemp fibre; technology mix; production mix, at farm; raw fiber

Dataset: ILCD process, Partly terminated system
Geography: ASIA
Reference year: 2015
Valid until: 2024
Classification: Materials production / Food and renewable raw materials
LCI method principle: Attributional
LCI method approaches: Allocation - market value
Completeness: All relevant flows quantified
Project: Provision of process-based 3.0 Environmental Footprint-compliant life cycle inventory datasets - Renewable materials - contract number 070201/2020/840085/SER/ENV.B.1
Generated by: ecoinvent
Owner: ecoinvent
Compliance: ILCD Data Network - Entry-level; Suggestions for updating the PEF method 2019; ISO 14040 Environmental Management – Life Cycle Assessment – Principles and Framework, 2006; ISO 14044:2006. Environmental Management – Life Cycle Assessment – Requirements and guidelines.; Environmental Footprint 3.1
Review: Dependent internal review by Lucia Valsasina, Emilia Moreno Ruiz; Independent review panel by Philippa Notten
Data quality: Overall quality: Good; Time representativeness: Very good; Geographical representativeness: Good; Technological representativeness: Good; Precision: Good; Methodological appropriateness and consistency: Not applicable
Amounts: no units in this file; such an amount is in the reference unit of its flow, which a separate flow dataset defines
copyright: true
licenseType: Free of charge for some user types or use types
accessRestrictions: Free of charge for all final users implementing a regular Product Environmental Footprint (PEF) studies and Organisation Environmental Footprint (OEF) studies exclusively under the specified Product groups and sectors as defined in the Product Environmental Footprint Category Rules (PEFCR) and Organisation Environmental Footprint Sectorial Rules (OEFSR) listed in http://ec.europa.eu/environment/eussd/smgp/PEFCR_OEFSR.htm and in accordance with the terms and conditions of the EULA (available at https://ecoinvent.lca-data.com/) exclusively until 31st December 2024. Any use of this dataset or any derivative data not within the specific context of one of the PEF/OEF projects or after the end of 2024 is not permitted.

## General comment
Notice: this data set supersedes the EF3.0-compliant version (see link under "preceding data set version" below calculated with the EF3.0). The life cycle inventory is not changed from the original EF3.0 data set. The LCIA results are calculated based on the EF3.1 methods which provide updated characterisation factors in the following impact categories: Climate Change, Ecotoxicity freshwater, Photochemical Ozone Formation, Acidification, Human Toxicity non-cancer, and Human Toxicity cancer. The review report and the data quality ratings refer to the original results. The data set has been updated by the European Commission on the basis of the original EF3.0 data set delivered by the data provider.The dataset models the production of 1 kg hemp fibre. It is a natural fibre, with a length of 1-5 meters and diameter of 16-50 microns. It is used for many industrial applications like textiles production, paper production, biodegradable plastics, health food, fuels, ropes, sail cloth, etc.

Reference

Textile Blog, 2020. Hemp Fiber: Properties, Processing and Uses, Textile Blog Available at: https://www.textileblog.com/hemp-fiber-properties-processing-and-uses/

## Technology and included processes
Hemp fibre is produced from an annual, herbaceous plant, that is also called hemp or Cannabis sativa. Mature hemp stalks are manually harvested in bundles. In order to remove the non-fibrous material from the stem and skin of the hemp stalk, the bundles are going through the retting process. They are immersed into stagnant water and after several days of immersion, the hemp fibre gets loosen and are extracted from the stalks. Shivs (or hurds) are generated as by-product. For every kg of hemp fibre 1.6 kg of shivs is produced. The currently used process involves ribboning of green stems. After this the ribbons are immersed in water. Retting takes place from 5-7 days. The retted ribbons are dried in the sun and the resulting reeds are then sent to spinning mills for spinning. Only the electricity consumption is included in the dataset, not the input of spinning machinery. The retting process is based on the jute retting modelling. No infrastructure is added in the dataset because the retting process takes place the hemp cultivation field, tanks, ponds, ditches etc., or in slowly flowing clear water in canals, rivers etc.. The by-product of shivs is economically allocated, attributing an economic value of 0.25 Euros / kg shivs and 0.7 Euros / kg hemp fibre. The by-product of seeds is considered residues, meaning that according to FAO, 2014 for the cut-off modelling approach applied, upstream emissions shall not be attributes to it.

Reference

FAO, 2014. Environmental performance of animal feeds supply chain, Guidelines for quantification, Livestock Environmental Assessment and Performance Partnership (LEAP) Available at: https://www.fao.org/3/mj751e/mj751e.pdf

Van Eynde H., 2015. Comparative Life Cycle Assessment of hemp and cotton fibers used in Chinese textile manufacturing. Faculteit Bio-Ingenieurswetenschappen. Masters Thesis. KU Leuven. Available at: https://www.scriptiebank.be/sites/default/files/VanEyndeHannes_KUL_Eindwerk.pdf

Symeonidis A., fibre production, jute, retting, GLO, Undefined, ecoinvent database version 3.8

## Parameters
- kg_0: 9.31351
  Mass in kg, for sunn hemp plant, harvested // sunn hemp production // in; Articulated lorry transport, Euro 4, Total weight >32 t; EU+EFTA+UK
- km_0: 70
  Distance in km, for sunn hemp plant, harvested // sunn hemp production // in; Articulated lorry transport, Euro 4, Total weight >32 t; EU+EFTA+UK
- kg_km_0: 651.946; = kg_0*km_0
  Transport amount in km*km, for sunn hemp plant, harvested // sunn hemp production // in; Articulated lorry transport, Euro 4, Total weight >32 t; EU+EFTA+UK

## Reference product
- hemp fibre // hemp fibre // asia: 1

## Inputs
- Electricity from Electricity grid mix 1kV-60kV - RAS w/o CN: 0.147411
- Electricity from Electricity grid mix 1kV-60kV - RU: 0.0136939
- Transport of sunn hemp plant, harvested // sunn hemp production // in by Articulated lorry transport, Euro 4, Total weight >32 t - EU+EFTA+UK: 651.946; = kg_km_0
- hemp fibre // hemp fibre // asia, blackbox: 1
- hemp fibre // hemp fibre // asia, elementary: 1

## Impact indicators
- Eutrophication marine: 0.0147494
- Ecotoxicity, freshwater: 584.546
- Land use: 460.22
- Water use: 11.314
- Resource use, minerals and metals: 5.14995e-6
- Resource use, fossils: 5.57487
- Climate change: 0.943178
- Ozone depletion: 1.28827e-8
- Human toxicity, cancer: 7.88009e-9
- Human toxicity, non-cancer: -1.47773e-7
- EF-particulate Matter: 1.24775e-7
- Ionising radiation, human health: 0.00732461
- Photochemical ozone formation - human health: 0.0061952
- Acidification: 0.0108306
- Eutrophication, terrestrial: 0.0438272
- Eutrophication, freshwater: 0.00241985

## Deviations from the LCI method principle
The background data uses:
- the \xe2\x80\x9cRecycled content cut-off\xe2\x80\x9d approach to allocate end-of-life by-products and secondary materials. This allocation is explained in the description of the recycled content system model (http://www.ecoinvent.org/database/system-models-in-ecoinvent-3/cut-off-system-model/allocation-cut-off-by-classification.html).
OR
- EF compliant data

## Deviations from the LCI method approaches
Background data:
- the \xe2\x80\x9cRecycled content cut-off\xe2\x80\x9d approach to allocate end-of-life by-products and secondary materials. This allocation is explained in the description of the recycled content system model (http://www.ecoinvent.org/database/system-models-in-ecoinvent-3/cut-off-system-model/allocation-cut-off-by-classification.html). The ecoinvent database mostly relies on “Allocation – market values” apart for few exceptions particularly in the energy sector. ecoinvent energy data is replaced with EF3.0 core data as per the EF guidelines version 2.0.
OR
- EF compliant data

## Modelling constants
All modelling constants follow the requirements listed in the Tender Specifications 070201/2020/SER/ENV.B1. Completeness: There are no intentional cut-offs in the inventory no matter how small their contribution to all the EF impact categories is. Eventual cut-offs are in compliance with the Guide for EF compliant data sets (JRC 2020), i.e. only if below the 3% cut-off rule. Water use: water use is modelled at country level using separate flows for water withdrawal, water release and water evaporation. Handling multi-functional processes: the following PEF multi- functionality decision hierarchy is applied for resolving all multi- functionality problems: (1) subdivision or system expansion; (2) allocation based on a relevant underlying physical relationship (substitution may apply here); (3) allocation based on some other relationship. Direct land use change: GHG emissions from direct LUC allocated to good/service for 20 years after the LUC occurs, with IPCC default values. Carbon storage and delayed emissions: credits associated with temporary (carbon) storage or delayed emissions up to 300 years are not be considered. Emissions off-setting: are not included. Capital goods (including infrastructures) and their End of life: they are included. System boundaries: system boundaries include all processes linked to the product supply chain (e.g. maintenance). Time period: emissions and removals are modelled as if released or removed at the beginning of the assessment method. Fossil and biogenic carbon emissions and removals: removals and emissions are modelled as follows: All GHG emissions from fossil fuels (including peat and limestone) are modelled consistently with the most updated ILCD list of elementary flows. The non-fossil (biogenic) carbon flows are modelled consistently with the most updated ILCD list of elementary flows.

## Cut-off and completeness
There are no intentional cut-offs in the inventory no matter how small their contribution to all the EF impact categories is. Eventual cut-offs are in compliance with the Guide for EF compliant data sets (JRC 2020), i.e. only if below the 3% cut-off rule. The dataset dry mass and water balance has been checked to ensure the inventory is complete. Capital goods (e.g. infrastructure) and their end-of-life are included.

## Data selection and combination
These datasets include, in both their foreground and background data, links to EF3.0 compliant data.
The relevant background data on energy, transport, and End of Life are from the LCDN data node (http://lcdn.thinkstep.com/Node/).
All other background data in the supply of this product for which no EF3.0 process was available are from ecoinvent v3.7 database (www.ecoinvent.org) or other data sources.

## Data treatment and extrapolations
Several data sources have been used to model the inventory.

## Review details
Internal reviews have been asked to review the plausibility of the unit process, LCIA scores, and DQRs. Internal reviewers have also been asked to review the data for EF compliancy. The consortium is therefore responsible for aspects such as compliancy with the ILCD format, including validation in Look@LCI, and nomenclature.
Internal reviwers have been asked to judge based on the process name, that the unit process models in a complete and representative way the process in the requested location. The review encompassed the plausability of:
- exchanges with nature (elementary flows) as well as exchanges such as product and waste flows.
- meta information (general comment, technology comment, system boundaries, allocation, cut-off rules, etc.). Reviewers were asked to judge if the provided information is enough to understand the content of the process.
- LCIA scores
- DQRs including precision, technology, time and geography. As well as the overall DQR.
External reviewers have been asked to provide their expertise in the field of interest. External reviewers have been asked to review the unit process, including eventual methodological choices, the LCIA scores (provided with contribution scores as well), and DQRs. External reviewers have been provided all the information in a tool developed by the consortium for the purpose of this project.
External reviewers have been asked to judge based on the process name, that the unit process models in a complete and representative way the process in the requested location. The review encompassed:
- Plausability and completeness of exchanges with nature (elementary flows) as well as exchanges such as product and waste flows.
- Review of meta information (general comment, technology comment, system boundaries, allocation, cut-off rules, etc.). Reviewers were asked to judge if the provided information is enough to understand the content of the process.
- Review of properties (biogenic carbon and water content).
- Review of allocation keys.
- Plausability of LCIA scores calculated by the consortium.
- Plausability of DQRs including precision, technology, time and geography. As well as the overall DQR.

## Data sources
- Background Data for Representative products and organisations. EF 3.0 compliant (data stock)
- Van Eynde H., 2015. Comparative Life Cycle Assessment of hemp and cotton fibers used in Chinese textile manufacturing. Faculteit Bio-Ingenieurswetenschappen. Masters Thesis. KU Leuven. Available at: https://www.scriptiebank.be/sites/default/files/VanEyndeHannes_KUL_Eindwerk.pdf
- Symeonidis A., fibre production, jute, retting, GLO, Undefined, ecoinvent database version 3.8

## Intended applications
Implementation of regular Product Environmental Footprint (PEF) studies and Organisation Environmental Footprint (OEF) studies exclusively under the specified Product groups and sectors as defined in the Product Environmental Footprint Category Rules (PEFCR) and Organisation Environmental Footprint Sectorial Rules (OEFSR) listed in http://ec.europa.eu/environment/eussd/smgp/PEFCR_OEFSR.htm
