# lamination, solvent glue, elementary; lamination process; average service, at plant; 1 kg of solvent glue laminated fabric

Dataset: ILCD process, Unit process, single operation
Geography: GLO
Reference year: 2021
Valid until: 2024
Classification: Other Services / Other services
LCI method principle: Attributional
LCI method approaches: Allocation - market value
Completeness: All relevant flows quantified
Project: Provision of process-based 3.0 Environmental Footprint-compliant life cycle inventory datasets - Apparel 1 - contract number 070201/2020/840291/SER/ENV.B.1
Generated by: Metsims Sustainability Consulting
Owner: PRé Sustainability B.V.
Compliance: Environmental Footprint non-primary supporting data set; Environmental Footprint 3.1
Amounts: no units in this file; such an amount is in the reference unit of its flow, which a separate flow dataset defines
copyright: true
licenseType: Free of charge for some user types or use types
accessRestrictions: Free of charge for all final users implementing a regular Product Environmental Footprint (PEF) studies and Organisation Environmental Footprint (OEF) studies exclusively under the specified Product groups and sectors as defined in the Product Environmental Footprint Category Rules (PEFCR) and Organisation Environmental Footprint Sectorial Rules (OEFSR) listed in http://ec.europa.eu/environment/eussd/smgp/PEFCR_OEFSR.htm and in accordance with the terms and conditions of the EULA (available at https://ecoinvent.lca-data.com/) exclusively until 31st December 2024. Any use of this dataset or any derivative data not within the specific context of one of the PEF/OEF projects or after the end of 2024 is not permitted.

## General comment
Notice: this data set supersedes the EF3.0-compliant version (see link under "preceding data set version" below calculated with the EF3.0). The life cycle inventory is not changed from the original EF3.0 data set. The LCIA results are calculated based on the EF3.1 methods which provide updated characterisation factors in the following impact categories: Climate Change, Ecotoxicity freshwater, Photochemical Ozone Formation, Acidification, Human Toxicity non-cancer, and Human Toxicity cancer. The review report and the data quality ratings refer to the original results. The data set has been updated by the European Commission on the basis of the original EF3.0 data set delivered by the data provider.This sub-process has limited documentation only. For all detailed documentation of the full model to which this data set belongs (such as DQRs, review reports and other technical documentation), please see this process: lamination, solvent glue - GLO []

## Technology and included processes
This dataset consists of 2-5 layers solvent based glue lamination process mixture.

Lamination process realized by solvent based glues. Solvent emissions are occured from lamination adhesive. This dataset covers machine electricity consumption, solvent based PU adhesive, solvent emissions.

A user employing this service within their models should use it along with an 1.001 kg of material to produce an 1 kg of laminated fabric. 0.001 kg of waste shall also be added. A user is responsible for defining the nature of the recycling and/or disposal of this waste. Additionally, a user is responsible for accounting transportation expenditures for all extra input and output materials that need to be modelled alongside this service.*

*Waste rate is assumed.

## Reference product
- lamination, solvent glue // lamination, solvent glue // glo, elementary: 1

## Outputs
- acetone, Emissions to air, unspecified: 0.23

## Impact indicators
- Ecotoxicity, freshwater: 0.0550482
- Human toxicity, non-cancer: 1.23117e-9
- Photochemical ozone formation - human health: 0.03657
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
## Deviations from the LCI method principle
The background data uses:
- the \xe2\x80\x9cRecycled content cut-off\xe2\x80\x9d approach to allocate end-of-life by-products and secondary materials. This allocation is explained in the description of the recycled content system model (http://www.ecoinvent.org/database/system-models-in-ecoinvent-3/cut-off-system-model/allocation-cut-off-by-classification.html).
OR
- EF compliant data

## Deviations from the LCI method approaches
Background data:
- the \xe2\x80\x9cRecycled content cut-off\xe2\x80\x9d approach to allocate end-of-life by-products and secondary materials. This allocation is explained in the description of the recycled content system model (http://www.ecoinvent.org/database/system-models-in-ecoinvent-3/cut-off-system-model/allocation-cut-off-by-classification.html). The ecoinvent database mostly relies on “Allocation – market values” apart for few exceptions particularly in the energy sector. ecoinvent energy data is replaced with EF3.0 core data as per the EF guidelines version 2.0.
OR
- EF compliant data

## Modelling constants
All modelling constants follow the requirements listed in the Tender Specifications 070201/2020/SER/ENV.B1. Completeness: There are no intentional cut-offs in the inventory no matter how small their contribution to all the EF impact categories is. Eventual cut-offs are in compliance with the Guide for EF compliant data sets (JRC 2020), i.e. only if below the 3% cut-off rule. Water use: water use is modelled at country level using separate flows for water withdrawal, water release and water evaporation. Handling multi-functional processes: the following PEF multi- functionality decision hierarchy is applied for resolving all multi- functionality problems: (1) subdivision or system expansion; (2) allocation based on a relevant underlying physical relationship (substitution may apply here); (3) allocation based on some other relationship. Direct land use change: GHG emissions from direct LUC allocated to good/service for 20 years after the LUC occurs, with IPCC default values. Carbon storage and delayed emissions: credits associated with temporary (carbon) storage or delayed emissions up to 300 years are not be considered. Emissions off-setting: are not included. Capital goods (including infrastructures) and their End of life: they are included. System boundaries: system boundaries include all processes linked to the product supply chain (e.g. maintenance). Time period: emissions and removals are modelled as if released or removed at the beginning of the assessment method. Fossil and biogenic carbon emissions and removals: removals and emissions are modelled as follows: All GHG emissions from fossil fuels (including peat and limestone) are modelled consistently with the most updated ILCD list of elementary flows. The non-fossil (biogenic) carbon flows are modelled consistently with the most updated ILCD list of elementary flows.

## Cut-off and completeness
There are no intentional cut-offs in the inventory no matter how small their contribution to all the EF impact categories is. Eventual cut-offs are in compliance with the Guide for EF compliant data sets (JRC 2020), i.e. only if below the 3% cut-off rule. The dataset dry mass and water balance has been checked to ensure the inventory is complete. Capital goods (e.g. infrastructure) and their end-of-life are included.

## Data selection and combination
These datasets include, in both their foreground and background data, links to EF3.0 compliant data.
The relevant background data on energy, transport, and End of Life are from the LCDN data node (http://lcdn.thinkstep.com/Node/).
All other background data in the supply of this product for which no EF3.0 process was available are from ecoinvent v3.7 database (www.ecoinvent.org) or other data sources.

## Data treatment and extrapolations
Several data sources have been used to model the inventory.

## Use advice
This data set is a supporting sub-data set and must be used exclusively as sub-data set of its corresponding level-1 partly disaggregated data set (see “General comment” field for exact name and UUID).

## Data sources
- Background Data for Representative products and organisations. EF 3.0 compliant (data stock)
- Fung, W. (2002). Coated and laminated textiles (Vol. 23). Woodhead Publishing.
- Singha, K. (2012). A review on coating & lamination in textiles: processes and applications. American Journal of Polymer Science, 2(3), 39-49.
- Laminating Adhesive For Nylon/ Fabric To Foam | Chemix Guru, https://www.chemixguru.com/laminating-adhesive-for-nylon/, Access Date: 09.04.2021
- Kecin, İ. (2018). Teknik Tekstil için Laminasyon Poliüretanları, https://www.turkchem.net/teknik-tekstil-icin-laminasyon-poliuretanlari.html, Access Date: 09.04.2021
- Solvent Based Glue Laminating Machine, Bonding Machine,Lamination Machine, https://www.kuntai-group.com/laminating-machine/solvent-based-glue-laminating-machine/oil-glue-laminating-machine-bonding-machine-l.html, Web Access: 10.02.2021
- Fabric/Nonwoven/Film Laminating Machine, https://www.kuntai-group.com/laminating-machine/solvent-based-glue-laminating-machine/fabric-nonwoven-film-laminating-machine.html, Web Access: 10.02.2021
- China Solvent Based Glue Laminating Machine, https://www.kuntai-group.com/laminating-machine/solvent-based-glue-laminating-machine/china-solvent-based-glue-laminating-machine.html, Web Access: 10.02.2021
- Factory Sale Sofa Fabric Lamination Machine, https://www.kuntai-group.com/laminating-machine/solvent-based-glue-laminating-machine/factory-sale-sofa-lamination-machine.html, Web Access: 10.02.2021
- Sofa Fabric Laminating Machine, https://www.kuntai-group.com/laminating-machine/solvent-based-glue-laminating-machine/sofa-fabric-laminating-machine.html, Web Access: 10.02.2021
- Fabric To Film Laminating Machine, https://www.kuntai-group.com/laminating-machine/solvent-based-glue-laminating-machine/fabric-to-film-laminating-machine.html, Web Access: 10.02.2021
- TPU Film Laminating Machine, https://www.kuntai-group.com/laminating-machine/solvent-based-glue-laminating-machine/tpu-film-laminating-machine.html, Web Access: 10.02.2021
- Automatic Fabric To Fabric Laminating Machine, https://www.kuntai-group.com/laminating-machine/solvent-based-glue-laminating-machine/automatic-fabric-to-fabric-laminating-machine.html, Web Access: 10.02.2021
- Factory Sale Sofa Material Lamination Machine, https://www.kuntai-group.com/laminating-machine/solvent-based-glue-laminating-machine/factory-sale-sofa-material-lamination-machine.html, Web Access: 10.02.2021
- Maciel, V. G., Bockorny, G., Domingues, N., Scherer, M. B., Zortea, R. B., & Seferin, M. (2017). Comparative life cycle assessment among three polyurethane adhesive technologies for the footwear industry. ACS Sustainable Chemistry & Engineering, 5(9), 8464-8472.

## Intended applications
Implementation of regular Product Environmental Footprint (PEF) studies and Organisation Environmental Footprint (OEF) studies exclusively under the specified Product groups and sectors as defined in the Product Environmental Footprint Category Rules (PEFCR) and Organisation Environmental Footprint Sectorial Rules (OEFSR) listed in http://ec.europa.eu/environment/eussd/smgp/PEFCR_OEFSR.htm
