# carbonization, for fibers, elementary; carbonization in low temperature furnace; production mix, at plant; service

Dataset: ILCD process, Unit process, single operation
Geography: GLO
Reference year: 2021
Valid until: 2024
Classification: Other Services / Other services
LCI method principle: Attributional
LCI method approaches: Allocation - market value
Completeness: All relevant flows quantified
Project: Provision of process-based 3.0 Environmental Footprint-compliant life cycle inventory datasets - Apparel 2 - contract number 070201/2020/840292/SER/ENV.B.1
Generated by: Life Cycle Indonesia
Owner: PRé Sustainability B.V.
Compliance: Environmental Footprint non-primary supporting data set; Environmental Footprint 3.1
Amounts: no units in this file; such an amount is in the reference unit of its flow, which a separate flow dataset defines
copyright: true
licenseType: Free of charge for some user types or use types
accessRestrictions: Free of charge for all final users implementing a regular Product Environmental Footprint (PEF) studies and Organisation Environmental Footprint (OEF) studies exclusively under the specified Product groups and sectors as defined in the Product Environmental Footprint Category Rules (PEFCR) and Organisation Environmental Footprint Sectorial Rules (OEFSR) listed in http://ec.europa.eu/environment/eussd/smgp/PEFCR_OEFSR.htm and in accordance with the terms and conditions of the EULA (available at https://ecoinvent.lca-data.com/) exclusively until 31st December 2024. Any use of this dataset or any derivative data not within the specific context of one of the PEF/OEF projects or after the end of 2024 is not permitted.

## General comment
Notice: this data set supersedes the EF3.0-compliant version (see link under "preceding data set version" below calculated with the EF3.0). The life cycle inventory is not changed from the original EF3.0 data set. The LCIA results are calculated based on the EF3.1 methods which provide updated characterisation factors in the following impact categories: Climate Change, Ecotoxicity freshwater, Photochemical Ozone Formation, Acidification, Human Toxicity non-cancer, and Human Toxicity cancer. The review report and the data quality ratings refer to the original results. The data set has been updated by the European Commission on the basis of the original EF3.0 data set delivered by the data provider.This sub-process has limited documentation only. For all detailed documentation of the full model to which this data set belongs (such as DQRs, review reports and other technical documentation), please see this process: carbonization, for fibers - GLO []

## Technology and included processes
The carbonization process take place within two high temperature furnaces, LT (Low Temperature) and HT (High Temperature) Furnaces. Largest fiber mass loss occurs in the LT Furnace. The fiber release volatiles during the carbonization and they are strongly dependent on the operating conditions such as temperature, heating rate, residence time, and previous process (oxidation) (Lee and Witting, 2017). In the LT Furnaces, the fiber lose almost 50% of mass by off-gas release. The components in off-gas resulted from carbonization of stabilized polyacrylonitrile are H2, N2, CO, CH4, CO2, NH3, H2O, HCN, C2H4, and C2H6 (Lee and Witting, 2011).

In this model, the emission from off-gas is modeled of off-gas from polyacrylonitrile carbonization in LT Furnaces only and the amount of inert air needed is not assessed

The activity starts when the raw materials (stabilized fiber) enter the process. Materials entering the process are included as well as energy uses, infrastructure and chemicals. The waste and emissions result from the off-air gas produced in carbonization and waste lubricating oil. In the model, the finishng process is not included in the scope of this dataset and enegy sources of machines used solely from electricity.

Lee, Tae Seok and Witting, Peter. (2017). White Paper: Kinetic Model of Stabilized PAN Fiber Mass Loss During Carbonization. New York: Harper International Corporation
Lee, Tae Seok and Witting, Peter. (2011). White Paper: Computational Fluid Dynamics (CFD) analysis for Off-gas mixing and ventilation inside carbonization furnace during PAN-based carbon fiber manufacturing. New York: Harper International Corporation

## Reference product
- carbonization, for fibers // carbonization, for fibers // glo, elementary: 1

## Outputs
- Water, Emissions to air, unspecified: 9.31896e-5
- carbon dioxide (fossil), Emissions to air, unspecified: 0.0570764
- ammonia, Emissions to air, unspecified [AL]: 7.14605e-6
- ammonia, Emissions to air, unspecified [AT]: 9.20724e-5
- ammonia, Emissions to air, unspecified [BA]: 8.90857e-6
- ammonia, Emissions to air, unspecified [BE]: 0.000110823
- ammonia, Emissions to air, unspecified [BG]: 2.83784e-5
- ammonia, Emissions to air, unspecified [BY]: 3.68488e-5
- ammonia, Emissions to air, unspecified [CH]: 0.000109812
- ammonia, Emissions to air, unspecified [CZ]: 7.64281e-5
- ammonia, Emissions to air, unspecified [DE]: 0.000831782
- ammonia, Emissions to air, unspecified [DK]: 6.03137e-5
- ammonia, Emissions to air, unspecified [EE]: 8.23591e-6
- ammonia, Emissions to air, unspecified [ES]: 0.000356941
- ammonia, Emissions to air, unspecified [FI]: 5.14463e-5
- ammonia, Emissions to air, unspecified [FR]: 0.000586737
- ammonia, Emissions to air, unspecified [GB]: 0.000583075
- ammonia, Emissions to air, unspecified: 0.0178363
- ammonia, Emissions to air, unspecified [GR]: 6.63284e-5
- ammonia, Emissions to air, unspecified [HR]: 2.13268e-5
- ammonia, Emissions to air, unspecified [HU]: 5.59082e-5
- ammonia, Emissions to air, unspecified [IE]: 6.0224e-5
- ammonia, Emissions to air, unspecified [IT]: 0.000502001
- ammonia, Emissions to air, unspecified [LT]: 1.75851e-5
- ammonia, Emissions to air, unspecified [LU]: 1.22076e-5
- ammonia, Emissions to air, unspecified [LV]: 1.03693e-5
- ammonia, Emissions to air, unspecified [MD]: 5.48658e-6
- ammonia, Emissions to air, unspecified [MK]: 6.1046e-6
- ammonia, Emissions to air, unspecified [NL]: 0.000186084
- ammonia, Emissions to air, unspecified [NO]: 7.04385e-5
- ammonia, Emissions to air, unspecified [PL]: 0.000214162
- ammonia, Emissions to air, unspecified [PT]: 6.75758e-5
- ammonia, Emissions to air, unspecified [RO]: 9.38169e-5
- ammonia, Emissions to air, unspecified [RU]: 0.000776731
- ammonia, Emissions to air, unspecified [SE]: 0.000101642
- ammonia, Emissions to air, unspecified [SI]: 1.4394e-5
- ammonia, Emissions to air, unspecified [SK]: 3.37848e-5
- ammonia, Emissions to air, unspecified [UA]: 9.90573e-5
- dinitrogen, Emissions to air, unspecified: 0.243103
- carbon monoxide (fossil), Emissions to air, unspecified: 0.0362893
- hydrogen, Emissions to air, unspecified: 0.00022901
- methane (fossil), Emissions to air, unspecified: 0.0415742
- ethane, Emissions to air, unspecified: 0.00778635
- ethylene, Emissions to air, unspecified: 0.00725787
- hydrocyanic acid, Emissions to air, unspecified: 0.251911

## Impact indicators
- Eutrophication marine: 0.00213445
- Ecotoxicity, freshwater: 595.754
- Climate change: 1.29939
- Human toxicity, non-cancer: 9.94473e-7
- EF-particulate Matter: 4.87211e-7
- Photochemical ozone formation - human health: 0.01596
- Acidification: 0.0631227
- Eutrophication, terrestrial: 0.279008
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
## Deviations from the LCI method principle
The background data uses:
- the \xe2\x80\x9cRecycled content cut-off\xe2\x80\x9d approach to allocate end-of-life by-products and secondary materials. This allocation is explained in the description of the recycled content system model (http://www.ecoinvent.org/database/system-models-in-ecoinvent-3/cut-off-system-model/allocation-cut-off-by-classification.html).
OR
- EF compliant data

## Deviations from the LCI method approaches
Background data:
- the \xe2\x80\x9cRecycled content cut-off\xe2\x80\x9d approach to allocate end-of-life by-products and secondary materials. This allocation is explained in the description of the recycled content system model (http://www.ecoinvent.org/database/system-models-in-ecoinvent-3/cut-off-system-model/allocation-cut-off-by-classification.html). The ecoinvent database mostly relies on “Allocation – market values” apart for few exceptions particularly in the energy sector. ecoinvent energy data is replaced with EF3.0 core data as per the EF guidelines version 2.0.
OR
- EF compliant data

## Modelling constants
All modelling constants follow the requirements listed in the Tender Specifications 070201/2020/SER/ENV.B1. Completeness: There are no intentional cut-offs in the inventory no matter how small their contribution to all the EF impact categories is. Eventual cut-offs are in compliance with the Guide for EF compliant data sets (JRC 2020), i.e. only if below the 3% cut-off rule. Water use: water use is modelled at country level using separate flows for water withdrawal, water release and water evaporation. Handling multi-functional processes: the following PEF multi- functionality decision hierarchy is applied for resolving all multi- functionality problems: (1) subdivision or system expansion; (2) allocation based on a relevant underlying physical relationship (substitution may apply here); (3) allocation based on some other relationship. Direct land use change: GHG emissions from direct LUC allocated to good/service for 20 years after the LUC occurs, with IPCC default values. Carbon storage and delayed emissions: credits associated with temporary (carbon) storage or delayed emissions up to 300 years are not be considered. Emissions off-setting: are not included. Capital goods (including infrastructures) and their End of life: they are included. System boundaries: system boundaries include all processes linked to the product supply chain (e.g. maintenance). Time period: emissions and removals are modelled as if released or removed at the beginning of the assessment method. Fossil and biogenic carbon emissions and removals: removals and emissions are modelled as follows: All GHG emissions from fossil fuels (including peat and limestone) are modelled consistently with the most updated ILCD list of elementary flows. The non-fossil (biogenic) carbon flows are modelled consistently with the most updated ILCD list of elementary flows.

## Cut-off and completeness
There are no intentional cut-offs in the inventory no matter how small their contribution to all the EF impact categories is. Eventual cut-offs are in compliance with the Guide for EF compliant data sets (JRC 2020), i.e. only if below the 3% cut-off rule. The dataset dry mass and water balance has been checked to ensure the inventory is complete. Capital goods (e.g. infrastructure) and their end-of-life are included.

## Data selection and combination
These datasets include, in both their foreground and background data, links to EF3.0 compliant data.
The relevant background data on energy, transport, and End of Life are from the LCDN data node (http://lcdn.thinkstep.com/Node/).
All other background data in the supply of this product for which no EF3.0 process was available are from ecoinvent v3.7 database (www.ecoinvent.org) or other data sources.

## Data treatment and extrapolations
Several data sources have been used to model the inventory.

## Use advice
This data set is a supporting sub-data set and must be used exclusively as sub-data set of its corresponding level-1 partly disaggregated data set (see “General comment” field for exact name and UUID).

## Data sources
- Background Data for Representative products and organisations. EF 3.0 compliant (data stock)
- UN Data (2018) Statistics Data for Lubricants Productions, http://data.un.org/Data.aspx?q=Lubricants&d=EDATA&f=cmID%3aLU, United Nations Statistics Division, Global.
- Yi Bai Furnaces (2021) HT/LT series high / low temperature tempering furnace, http://www.yibaifurnaces.com/en/product/146.html, Shanghai Yibai Industrial Furnaces Co.,Ltd., Shanghai, China
- Lebon (2021) Nonwoven Oven Machine, Catalog and Company Messages, Qingdao Lebon Industry Co., Ltd., China
- Tae Seok Lee and Peter Witting (2011) White Paper: Computational Fluid Dynamics (CFD) analysis for Off-gas mixing and ventilation inside carbonization furnace during PAN-based carbon fiber manufacturing, https://www.harperintl.com/wp-content/uploads/2011/02/CFD-Analysis-Off-gas-mixing-ventilation-inside-carbonization-furnace-PAN-mfg.pdf, Harper International Corporation, New York, USA.

## Intended applications
Implementation of regular Product Environmental Footprint (PEF) studies and Organisation Environmental Footprint (OEF) studies exclusively under the specified Product groups and sectors as defined in the Product Environmental Footprint Category Rules (PEFCR) and Organisation Environmental Footprint Sectorial Rules (OEFSR) listed in http://ec.europa.eu/environment/eussd/smgp/PEFCR_OEFSR.htm
