# kenaf fibre, elementary; technology mix; production mix, at farm; raw fiber

Dataset: ILCD process, Unit process, single operation
Geography: GLO
Reference year: 2016
Valid until: 2024
Classification: Other Services / Other services
LCI method principle: Attributional
LCI method approaches: Allocation - market value
Completeness: All relevant flows quantified
Project: Provision of process-based 3.0 Environmental Footprint-compliant life cycle inventory datasets - Renewable materials - contract number 070201/2020/840085/SER/ENV.B.1
Generated by: ecoinvent
Owner: ecoinvent
Compliance: Environmental Footprint non-primary supporting data set; Environmental Footprint 3.1
Amounts: no units in this file; such an amount is in the reference unit of its flow, which a separate flow dataset defines
copyright: true
licenseType: Free of charge for some user types or use types
accessRestrictions: Free of charge for all final users implementing a regular Product Environmental Footprint (PEF) studies and Organisation Environmental Footprint (OEF) studies exclusively under the specified Product groups and sectors as defined in the Product Environmental Footprint Category Rules (PEFCR) and Organisation Environmental Footprint Sectorial Rules (OEFSR) listed in http://ec.europa.eu/environment/eussd/smgp/PEFCR_OEFSR.htm and in accordance with the terms and conditions of the EULA (available at https://ecoinvent.lca-data.com/) exclusively until 31st December 2024. Any use of this dataset or any derivative data not within the specific context of one of the PEF/OEF projects or after the end of 2024 is not permitted.

## General comment
Notice: this data set supersedes the EF3.0-compliant version (see link under "preceding data set version" below calculated with the EF3.0). The life cycle inventory is not changed from the original EF3.0 data set. The LCIA results are calculated based on the EF3.1 methods which provide updated characterisation factors in the following impact categories: Climate Change, Ecotoxicity freshwater, Photochemical Ozone Formation, Acidification, Human Toxicity non-cancer, and Human Toxicity cancer. The review report and the data quality ratings refer to the original results. The data set has been updated by the European Commission on the basis of the original EF3.0 data set delivered by the data provider.This sub-process has limited documentation only. For all detailed documentation of the full model to which this data set belongs (such as DQRs, review reports and other technical documentation), please see this process: kenaf fibre - GLO []

## Technology and included processes
Kenaf fibre is produced from the plant Hibiscus cannabinus. Mature kenaf stalks are manually harvested in bundles. In order to remove the non-fibrous material from the stem and skin of the kenaf stalk, the bundles are going through the retting process. They are immersed into stagnant water and after several days of immersion, the kenaf fibre gets loosen and are extracted from the stalks that are generated as by-product. For every kg of kenaf fibre 1.73 kg of stalks is produced. The currently used process involves ribboning of green stems. After this the ribbons are immersed in water. Retting takes place from 5-7 days. The retted ribbons are dried in the sun and the resulting reeds are then sent to spinning mills for spinning. Only the electricity consumption is included in the dataset, not the input of spinning machinery. No infrastructure is added in the dataset because the retting process takes place the kenaf cultivation field, tanks, ponds, ditches etc., or in slowly flowing clear water in canals, rivers etc.. The by-product of stalk is economically allocated, attributing an economic value of 0.00702 Euros / kg stalk and 0.227 Euros / kg kenaf fibre.

Reference

Sewport, 2022. What is Jute Fabric: Properties, How it`s Made and Where. Beila LTD Available at: https://sewport.com/fabrics-directory/jute-fabric

Symeonidis A., fibre production, kenaf, retting, GLO, Undefined, ecoinvent database version 3.8

## Reference product
- kenaf fibre // kenaf fibre // glo, elementary: 1

## Inputs
- lake water, Renewable material resources from water [BR]: 0.00458814
- lake water, Renewable material resources from water [DE]: 0.0057853
- lake water, Renewable material resources from water [ES]: 0.00248264
- lake water, Renewable material resources from water [FR]: 0.00408094
- lake water, Renewable material resources from water [GB]: 0.00405547
- lake water, Renewable material resources from water: 0.000810216
- lake water, Renewable material resources from water [IT]: 0.00349157
- lake water, Renewable material resources from water [MY]: 0.0010916
- lake water, Renewable material resources from water [NL]: 0.00129428
- lake water, Renewable material resources from water [PL]: 0.00148956
- lake water, Renewable material resources from water [RO]: 0.000652526
- lake water, Renewable material resources from water [US]: 0.026595
- lake water, Renewable material resources from water [TH]: 0.00161209
- lake water, Renewable material resources from water [AR]: 0.00131541
- lake water, Renewable material resources from water [AT]: 0.000640392
- lake water, Renewable material resources from water [AU]: 0.00162428
- lake water, Renewable material resources from water [BA]: 6.19619e-5
- lake water, Renewable material resources from water [BD]: 0.000785303
- lake water, Renewable material resources from water [BE]: 0.000770812
- lake water, Renewable material resources from water [BG]: 0.00019738
- lake water, Renewable material resources from water [CA]: 0.00241127
- lake water, Renewable material resources from water [CH]: 0.000763774
- lake water, Renewable material resources from water [CI]: 0.00012492
- lake water, Renewable material resources from water [CL]: 0.000590171
- lake water, Renewable material resources from water [CN]: 0.0252577
- lake water, Renewable material resources from water [CO]: 0.000923403
- lake water, Renewable material resources from water [CZ]: 0.000531582
- lake water, Renewable material resources from water [DK]: 0.000419501
- lake water, Renewable material resources from water [EE]: 5.72834e-5
- lake water, Renewable material resources from water [FI]: 0.000357825
- lake water, Renewable material resources from water [GR]: 0.000461335
- lake water, Renewable material resources from water [HU]: 0.000388859
- lake water, Renewable material resources from water [ID]: 0.00388076
- lake water, Renewable material resources from water [IE]: 0.000418877
- lake water, Renewable material resources from water [IN]: 0.0103587
- lake water, Renewable material resources from water [IS]: 2.39024e-5
- lake water, Renewable material resources from water [JP]: 0.00749575
- lake water, Renewable material resources from water [KR]: 0.00279159
- lake water, Renewable material resources from water [KZ]: 0.000604213
- lake water, Renewable material resources from water [LK]: 0.000343229
- lake water, Renewable material resources from water [LT]: 0.00012231
- lake water, Renewable material resources from water [LU]: 8.49079e-5
- lake water, Renewable material resources from water [LV]: 7.21217e-5
- lake water, Renewable material resources from water [MK]: 4.24594e-5
- lake water, Renewable material resources from water [MX]: 0.00326852
- lake water, Renewable material resources from water [NG]: 0.00137388
- lake water, Renewable material resources from water [NO]: 0.000489922
- lake water, Renewable material resources from water [NZ]: 0.000254724
- lake water, Renewable material resources from water [PH]: 0.00105726
- lake water, Renewable material resources from water [PK]: 0.00126791
- lake water, Renewable material resources from water [PT]: 0.000470011
- lake water, Renewable material resources from water [RS]: 0.000161927
- lake water, Renewable material resources from water [RU]: 0.00540241
- lake water, Renewable material resources from water [SE]: 0.000706951
- lake water, Renewable material resources from water [SG]: 0.000701831
- lake water, Renewable material resources from water [SI]: 0.000100115
- lake water, Renewable material resources from water [SK]: 0.000234984
- lake water, Renewable material resources from water [SL]: 1.60902e-5
- lake water, Renewable material resources from water [TR]: 0.00273007
- lake water, Renewable material resources from water [UA]: 0.000688975
- lake water, Renewable material resources from water [UZ]: 0.000281212
- lake water, Renewable material resources from water [VE]: 0.000771425
- lake water, Renewable material resources from water [VN]: 0.000798996
- lake water, Renewable material resources from water [ZA]: 0.00102851
- lake water, Renewable material resources from water [AE]: 0.000948828
- lake water, Renewable material resources from water [AF]: 9.74366e-5
- lake water, Renewable material resources from water [AG]: 2.8454e-6
- lake water, Renewable material resources from water [AL]: 4.9703e-5
- lake water, Renewable material resources from water [AM]: 4.39364e-5
- lake water, Renewable material resources from water [AO]: 0.000295148
- lake water, Renewable material resources from water [AW]: 5.71367e-6
- lake water, Renewable material resources from water [AZ]: 0.00022246
- lake water, Renewable material resources from water [BB]: 6.92096e-6
- lake water, Renewable material resources from water [BF]: 4.68856e-5
- lake water, Renewable material resources from water [BH]: 9.98316e-5
- lake water, Renewable material resources from water [BI]: 1.11567e-5
- lake water, Renewable material resources from water [BJ]: 4.31968e-5
- lake water, Renewable material resources from water [BN]: 4.6051e-5
- lake water, Renewable material resources from water [BO]: 0.000110838
- lake water, Renewable material resources from water [BS]: 1.89156e-5
- lake water, Renewable material resources from water [BT]: 9.68832e-6
- lake water, Renewable material resources from water [BW]: 4.94084e-5
- lake water, Renewable material resources from water [BY]: 0.000256295
- lake water, Renewable material resources from water [BZ]: 3.93567e-6
- lake water, Renewable material resources from water [CD]: 9.41464e-5
- lake water, Renewable material resources from water [CF]: 6.18096e-6
- lake water, Renewable material resources from water [CG]: 3.64754e-5
- lake water, Renewable material resources from water [CM]: 0.000108274
- lake water, Renewable material resources from water [CR]: 0.00011533
- lake water, Renewable material resources from water [CV]: 4.82391e-6
- lake water, Renewable material resources from water [CY]: 4.43432e-5
- lake water, Renewable material resources from water [DJ]: 6.20502e-6
- lake water, Renewable material resources from water [DM]: 1.17638e-6
- lake water, Renewable material resources from water [DO]: 0.000215254
- lake water, Renewable material resources from water [DZ]: 0.000748407
- lake water, Renewable material resources from water [EC]: 0.000261622
- lake water, Renewable material resources from water [EG]: 0.00148183
- lake water, Renewable material resources from water [ER]: 7.87034e-6
- lake water, Renewable material resources from water [ET]: 0.000226167
- lake water, Renewable material resources from water [FJ]: 1.4231e-5
- lake water, Renewable material resources from water [GA]: 4.25879e-5
- lake water, Renewable material resources from water [GD]: 2.20698e-6
- lake water, Renewable material resources from water [GE]: 6.22582e-5
- lake water, Renewable material resources from water [GH]: 0.000184887
- lake water, Renewable material resources from water [GM]: 6.68716e-6
- lake water, Renewable material resources from water [GN]: 3.3298e-5
- lake water, Renewable material resources from water [GQ]: 4.95419e-5
- lake water, Renewable material resources from water [GT]: 0.000179135
- lake water, Renewable material resources from water [GW]: 4.02652e-6
- lake water, Renewable material resources from water [GY]: 1.26955e-5
- lake water, Renewable material resources from water [HN]: 6.25338e-5
- lake water, Renewable material resources from water [HR]: 0.000148335
- lake water, Renewable material resources from water [HT]: 4.63664e-5
- lake water, Renewable material resources from water [IL]: 0.000429632
- lake water, Renewable material resources from water [IQ]: 0.000646811
- lake water, Renewable material resources from water [IR]: 0.00182837
- lake water, Renewable material resources from water [JM]: 3.83745e-5
- lake water, Renewable material resources from water [JO]: 0.000126526
- lake water, Renewable material resources from water [KE]: 0.000221063
- lake water, Renewable material resources from water [KG]: 3.67145e-5
- lake water, Renewable material resources from water [KH]: 7.46993e-5
- lake water, Renewable material resources from water [KM]: 3.08114e-6
- lake water, Renewable material resources from water [KN]: 1.8361e-6
- lake water, Renewable material resources from water [KW]: 0.000351764
- lake water, Renewable material resources from water [LA]: 5.71286e-5
- lake water, Renewable material resources from water [LB]: 0.000139333
- lake water, Renewable material resources from water [LC]: 3.74532e-6
- lake water, Renewable material resources from water [LR]: 8.51904e-6
- lake water, Renewable material resources from water [LS]: 8.27259e-6
- lake water, Renewable material resources from water [LY]: 0.000175886
- lake water, Renewable material resources from water [MA]: 0.000364635
- lake water, Renewable material resources from water [MD]: 3.81609e-5
- lake water, Renewable material resources from water [ME]: 1.53734e-5
- lake water, Renewable material resources from water [MG]: 5.63539e-5
- lake water, Renewable material resources from water [ML]: 5.11637e-5
- lake water, Renewable material resources from water [MM]: 0.000325473
- lake water, Renewable material resources from water [MN]: 4.55208e-5
- lake water, Renewable material resources from water [MR]: 2.68395e-5
- lake water, Renewable material resources from water [MT]: 2.3488e-5
- lake water, Renewable material resources from water [MU]: 3.58359e-5
- lake water, Renewable material resources from water [MW]: 2.58909e-5
- lake water, Renewable material resources from water [MZ]: 4.6288e-5
- lake water, Renewable material resources from water [NA]: 3.34753e-5
- lake water, Renewable material resources from water [NE]: 3.30957e-5
- lake water, Renewable material resources from water [NI]: 4.62421e-5
- lake water, Renewable material resources from water [NP]: 0.000102702
- lake water, Renewable material resources from water [OM]: 0.000218263
- lake water, Renewable material resources from water [PA]: 0.000135618
- lake water, Renewable material resources from water [PE]: 0.000521539
- lake water, Renewable material resources from water [PG]: 4.39269e-5
- lake water, Renewable material resources from water [PR]: 0.00017944
- lake water, Renewable material resources from water [PS]: 3.39596e-5
- lake water, Renewable material resources from water [PY]: 0.000112938
- lake water, Renewable material resources from water [QA]: 0.000408665
- lake water, Renewable material resources from water [RW]: 2.84883e-5
- lake water, Renewable material resources from water [SA]: 0.00240952
- lake water, Renewable material resources from water [SB]: 2.18264e-6
- lake water, Renewable material resources from water [SD]: 0.000252805
- lake water, Renewable material resources from water [SM]: 2.9246e-6
- lake water, Renewable material resources from water [SN]: 6.29971e-5
- lake water, Renewable material resources from water [SR]: 1.31204e-5
- lake water, Renewable material resources from water [ST]: 1.03766e-6
- lake water, Renewable material resources from water [SV]: 6.99787e-5
- lake water, Renewable material resources from water [SZ]: 1.41222e-5
- lake water, Renewable material resources from water [TC]: 1.26175e-6
- lake water, Renewable material resources from water [TD]: 3.50582e-5
- lake water, Renewable material resources from water [TG]: 1.45229e-5
- lake water, Renewable material resources from water [TJ]: 3.63856e-5
- lake water, Renewable material resources from water [TL]: 4.66637e-6
- lake water, Renewable material resources from water [TM]: 0.000105531
- lake water, Renewable material resources from water [TN]: 0.000175381
- lake water, Renewable material resources from water [TO]: 8.74869e-7
- lake water, Renewable material resources from water [TT]: 6.01302e-5
- lake water, Renewable material resources from water [TZ]: 0.000170299
- lake water, Renewable material resources from water [UG]: 0.000117986
- lake water, Renewable material resources from water [UY]: 0.000100644
- lake water, Renewable material resources from water [VC]: 1.89181e-6
- lake water, Renewable material resources from water [VU]: 1.20173e-6
- lake water, Renewable material resources from water [WS]: 1.7095e-6
- lake water, Renewable material resources from water [YE]: 0.000140684
- lake water, Renewable material resources from water [ZM]: 7.97816e-5
- lake water, Renewable material resources from water [ZW]: 5.18226e-5

## Outputs
- Water, Emissions to air, unspecified: 0.0120114
- Water, Emissions to fresh water [AL]: 4.9703e-5
- Water, Emissions to fresh water [AT]: 0.000640392
- Water, Emissions to fresh water [BA]: 6.19619e-5
- Water, Emissions to fresh water [BE]: 0.000770812
- Water, Emissions to fresh water [BG]: 0.00019738
- Water, Emissions to fresh water [BY]: 0.000256295
- Water, Emissions to fresh water [CH]: 0.000763774
- Water, Emissions to fresh water [CZ]: 0.000531582
- Water, Emissions to fresh water [DE]: 0.0057853
- Water, Emissions to fresh water [DK]: 0.000419501
- Water, Emissions to fresh water [EE]: 5.72834e-5
- Water, Emissions to fresh water [ES]: 0.00248264
- Water, Emissions to fresh water [FI]: 0.000357825
- Water, Emissions to fresh water [FR]: 0.00408094
- Water, Emissions to fresh water [GB]: 0.00405547
- Water, Emissions to fresh water: 0.000810216
- Water, Emissions to fresh water [GR]: 0.000461335
- Water, Emissions to fresh water [HR]: 0.000148335
- Water, Emissions to fresh water [HU]: 0.000388859
- Water, Emissions to fresh water [IE]: 0.000418877
- Water, Emissions to fresh water [IS]: 2.39024e-5
- Water, Emissions to fresh water [IT]: 0.00349157
- Water, Emissions to fresh water [LT]: 0.00012231
- Water, Emissions to fresh water [LU]: 8.49079e-5
- Water, Emissions to fresh water [LV]: 7.21217e-5
- Water, Emissions to fresh water [MD]: 3.81609e-5
- Water, Emissions to fresh water [ME]: 1.53734e-5
- Water, Emissions to fresh water [MK]: 4.24594e-5
- Water, Emissions to fresh water [MT]: 2.3488e-5
- Water, Emissions to fresh water [NL]: 0.00129428
- Water, Emissions to fresh water [NO]: 0.000489922
- Water, Emissions to fresh water [PL]: 0.00148956
- Water, Emissions to fresh water [PT]: 0.000470011
- Water, Emissions to fresh water [RO]: 0.000652526
- Water, Emissions to fresh water [RS]: 0.000161927
- Water, Emissions to fresh water [SE]: 0.000706951
- Water, Emissions to fresh water [SI]: 0.000100115
- Water, Emissions to fresh water [SK]: 0.000234984
- Water, Emissions to fresh water [SM]: 2.9246e-6
- Water, Emissions to fresh water [UA]: 0.000688975
- Water, Emissions to fresh water [AU]: 0.00162428
- Water, Emissions to fresh water [BR]: 0.00458814
- Water, Emissions to fresh water [CA]: 0.00241127
- Water, Emissions to fresh water [CI]: 0.00012492
- Water, Emissions to fresh water [CL]: 0.000590171
- Water, Emissions to fresh water [CN]: 0.0252577
- Water, Emissions to fresh water [CO]: 0.000923403
- Water, Emissions to fresh water [ID]: 0.00388076
- Water, Emissions to fresh water [IN]: 0.0103587
- Water, Emissions to fresh water [KR]: 0.00279159
- Water, Emissions to fresh water [KZ]: 0.000604213
- Water, Emissions to fresh water [MX]: 0.00326852
- Water, Emissions to fresh water [MY]: 0.0010916
- Water, Emissions to fresh water [NZ]: 0.000254724
- Water, Emissions to fresh water [RU]: 0.00540241
- Water, Emissions to fresh water [TH]: 0.00161209
- Water, Emissions to fresh water [TR]: 0.00273007
- Water, Emissions to fresh water [US]: 0.026595
- Water, Emissions to fresh water [VE]: 0.000771425
- Water, Emissions to fresh water [VN]: 0.000798996
- Water, Emissions to fresh water [ZA]: 0.00102851
- Water, Emissions to fresh water [PE]: 0.000521539
- Water, Emissions to fresh water [AE]: 0.000948828
- Water, Emissions to fresh water [AF]: 9.74366e-5
- Water, Emissions to fresh water [AG]: 2.8454e-6
- Water, Emissions to fresh water [AM]: 4.39364e-5
- Water, Emissions to fresh water [AO]: 0.000295148
- Water, Emissions to fresh water [AR]: 0.00131541
- Water, Emissions to fresh water [AW]: 5.71367e-6
- Water, Emissions to fresh water [AZ]: 0.00022246
- Water, Emissions to fresh water [BB]: 6.92096e-6
- Water, Emissions to fresh water [BD]: 0.000785303
- Water, Emissions to fresh water [BF]: 4.68856e-5
- Water, Emissions to fresh water [BH]: 9.98316e-5
- Water, Emissions to fresh water [BI]: 1.11567e-5
- Water, Emissions to fresh water [BJ]: 4.31968e-5
- Water, Emissions to fresh water [BN]: 4.6051e-5
- Water, Emissions to fresh water [BO]: 0.000110838
- Water, Emissions to fresh water [BS]: 1.89156e-5
- Water, Emissions to fresh water [BT]: 9.68832e-6
- Water, Emissions to fresh water [BW]: 4.94084e-5
- Water, Emissions to fresh water [BZ]: 3.93567e-6
- Water, Emissions to fresh water [CD]: 9.41464e-5
- Water, Emissions to fresh water [CF]: 6.18096e-6
- Water, Emissions to fresh water [CG]: 3.64754e-5
- Water, Emissions to fresh water [CM]: 0.000108274
- Water, Emissions to fresh water [CR]: 0.00011533
- Water, Emissions to fresh water [CV]: 4.82391e-6
- Water, Emissions to fresh water [CY]: 4.43432e-5
- Water, Emissions to fresh water [DJ]: 6.20502e-6
- Water, Emissions to fresh water [DM]: 1.17638e-6
- Water, Emissions to fresh water [DO]: 0.000215254
- Water, Emissions to fresh water [DZ]: 0.000748407
- Water, Emissions to fresh water [EC]: 0.000261622
- Water, Emissions to fresh water [EG]: 0.00148183
- Water, Emissions to fresh water [ER]: 7.87034e-6
- Water, Emissions to fresh water [ET]: 0.000226167
- Water, Emissions to fresh water [FJ]: 1.4231e-5
- Water, Emissions to fresh water [GA]: 4.25879e-5
- Water, Emissions to fresh water [GD]: 2.20698e-6
- Water, Emissions to fresh water [GE]: 6.22582e-5
- Water, Emissions to fresh water [GH]: 0.000184887
- Water, Emissions to fresh water [GM]: 6.68716e-6
- Water, Emissions to fresh water [GN]: 3.3298e-5
- Water, Emissions to fresh water [GQ]: 4.95419e-5
- Water, Emissions to fresh water [GT]: 0.000179135
- Water, Emissions to fresh water [GW]: 4.02652e-6
- Water, Emissions to fresh water [GY]: 1.26955e-5
- Water, Emissions to fresh water [HN]: 6.25338e-5
- Water, Emissions to fresh water [HT]: 4.63664e-5
- Water, Emissions to fresh water [IL]: 0.000429632
- Water, Emissions to fresh water [IQ]: 0.000646811
- Water, Emissions to fresh water [IR]: 0.00182837
- Water, Emissions to fresh water [JM]: 3.83745e-5
- Water, Emissions to fresh water [JO]: 0.000126526
- Water, Emissions to fresh water [JP]: 0.00749575
- Water, Emissions to fresh water [KE]: 0.000221063
- Water, Emissions to fresh water [KG]: 3.67145e-5
- Water, Emissions to fresh water [KH]: 7.46993e-5
- Water, Emissions to fresh water [KM]: 3.08114e-6
- Water, Emissions to fresh water [KN]: 1.8361e-6
- Water, Emissions to fresh water [KW]: 0.000351764
- Water, Emissions to fresh water [LA]: 5.71286e-5
- Water, Emissions to fresh water [LB]: 0.000139333
- Water, Emissions to fresh water [LC]: 3.74532e-6
- Water, Emissions to fresh water [LK]: 0.000343229
- Water, Emissions to fresh water [LR]: 8.51904e-6
- Water, Emissions to fresh water [LS]: 8.27259e-6
- Water, Emissions to fresh water [LY]: 0.000175886
- Water, Emissions to fresh water [MA]: 0.000364635
- Water, Emissions to fresh water [MG]: 5.63539e-5
- Water, Emissions to fresh water [ML]: 5.11637e-5
- Water, Emissions to fresh water [MM]: 0.000325473
- Water, Emissions to fresh water [MN]: 4.55208e-5
- Water, Emissions to fresh water [MR]: 2.68395e-5
- Water, Emissions to fresh water [MU]: 3.58359e-5
- Water, Emissions to fresh water [MW]: 2.58909e-5
- Water, Emissions to fresh water [MZ]: 4.6288e-5
- Water, Emissions to fresh water [NA]: 3.34753e-5
- Water, Emissions to fresh water [NE]: 3.30957e-5
- Water, Emissions to fresh water [NG]: 0.00137388
- Water, Emissions to fresh water [NI]: 4.62421e-5
- Water, Emissions to fresh water [NP]: 0.000102702
- Water, Emissions to fresh water [OM]: 0.000218263
- Water, Emissions to fresh water [PA]: 0.000135618
- Water, Emissions to fresh water [PG]: 4.39269e-5
- Water, Emissions to fresh water [PH]: 0.00105726
- Water, Emissions to fresh water [PK]: 0.00126791
- Water, Emissions to fresh water [PR]: 0.00017944
- Water, Emissions to fresh water [PS]: 3.39596e-5
- Water, Emissions to fresh water [PY]: 0.000112938
- Water, Emissions to fresh water [QA]: 0.000408665
- Water, Emissions to fresh water [RW]: 2.84883e-5
- Water, Emissions to fresh water [SA]: 0.00240952
- Water, Emissions to fresh water [SB]: 2.18264e-6
- Water, Emissions to fresh water [SD]: 0.000252805
- Water, Emissions to fresh water [SG]: 0.000701831
- Water, Emissions to fresh water [SL]: 1.60902e-5
- Water, Emissions to fresh water [SN]: 6.29971e-5
- Water, Emissions to fresh water [SR]: 1.31204e-5
- Water, Emissions to fresh water [ST]: 1.03766e-6
- Water, Emissions to fresh water [SV]: 6.99787e-5
- Water, Emissions to fresh water [SZ]: 1.41222e-5
- Water, Emissions to fresh water [TC]: 1.26175e-6
- Water, Emissions to fresh water [TD]: 3.50582e-5
- Water, Emissions to fresh water [TG]: 1.45229e-5
- Water, Emissions to fresh water [TJ]: 3.63856e-5
- Water, Emissions to fresh water [TL]: 4.66637e-6
- Water, Emissions to fresh water [TM]: 0.000105531
- Water, Emissions to fresh water [TN]: 0.000175381
- Water, Emissions to fresh water [TO]: 8.74869e-7
- Water, Emissions to fresh water [TT]: 6.01302e-5
- Water, Emissions to fresh water [TZ]: 0.000170299
- Water, Emissions to fresh water [UG]: 0.000117986
- Water, Emissions to fresh water [UY]: 0.000100644
- Water, Emissions to fresh water [UZ]: 0.000281212
- Water, Emissions to fresh water [VC]: 1.89181e-6
- Water, Emissions to fresh water [VU]: 1.20173e-6
- Water, Emissions to fresh water [WS]: 1.7095e-6
- Water, Emissions to fresh water [YE]: 0.000140684
- Water, Emissions to fresh water [ZM]: 7.97816e-5
- Water, Emissions to fresh water [ZW]: 5.18226e-5

## Impact indicators
- Water use: 3.92481e-15
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
## Deviations from the LCI method principle
The background data uses:
- the \xe2\x80\x9cRecycled content cut-off\xe2\x80\x9d approach to allocate end-of-life by-products and secondary materials. This allocation is explained in the description of the recycled content system model (http://www.ecoinvent.org/database/system-models-in-ecoinvent-3/cut-off-system-model/allocation-cut-off-by-classification.html).
OR
- EF compliant data

## Deviations from the LCI method approaches
Background data:
- the \xe2\x80\x9cRecycled content cut-off\xe2\x80\x9d approach to allocate end-of-life by-products and secondary materials. This allocation is explained in the description of the recycled content system model (http://www.ecoinvent.org/database/system-models-in-ecoinvent-3/cut-off-system-model/allocation-cut-off-by-classification.html). The ecoinvent database mostly relies on “Allocation – market values” apart for few exceptions particularly in the energy sector. ecoinvent energy data is replaced with EF3.0 core data as per the EF guidelines version 2.0.
OR
- EF compliant data

## Modelling constants
All modelling constants follow the requirements listed in the Tender Specifications 070201/2020/SER/ENV.B1. Completeness: There are no intentional cut-offs in the inventory no matter how small their contribution to all the EF impact categories is. Eventual cut-offs are in compliance with the Guide for EF compliant data sets (JRC 2020), i.e. only if below the 3% cut-off rule. Water use: water use is modelled at country level using separate flows for water withdrawal, water release and water evaporation. Handling multi-functional processes: the following PEF multi- functionality decision hierarchy is applied for resolving all multi- functionality problems: (1) subdivision or system expansion; (2) allocation based on a relevant underlying physical relationship (substitution may apply here); (3) allocation based on some other relationship. Direct land use change: GHG emissions from direct LUC allocated to good/service for 20 years after the LUC occurs, with IPCC default values. Carbon storage and delayed emissions: credits associated with temporary (carbon) storage or delayed emissions up to 300 years are not be considered. Emissions off-setting: are not included. Capital goods (including infrastructures) and their End of life: they are included. System boundaries: system boundaries include all processes linked to the product supply chain (e.g. maintenance). Time period: emissions and removals are modelled as if released or removed at the beginning of the assessment method. Fossil and biogenic carbon emissions and removals: removals and emissions are modelled as follows: All GHG emissions from fossil fuels (including peat and limestone) are modelled consistently with the most updated ILCD list of elementary flows. The non-fossil (biogenic) carbon flows are modelled consistently with the most updated ILCD list of elementary flows.

## Cut-off and completeness
There are no intentional cut-offs in the inventory no matter how small their contribution to all the EF impact categories is. Eventual cut-offs are in compliance with the Guide for EF compliant data sets (JRC 2020), i.e. only if below the 3% cut-off rule. The dataset dry mass and water balance has been checked to ensure the inventory is complete. Capital goods (e.g. infrastructure) and their end-of-life are included.

## Data selection and combination
These datasets include, in both their foreground and background data, links to EF3.0 compliant data.
The relevant background data on energy, transport, and End of Life are from the LCDN data node (http://lcdn.thinkstep.com/Node/).
All other background data in the supply of this product for which no EF3.0 process was available are from ecoinvent v3.7 database (www.ecoinvent.org) or other data sources.

## Data treatment and extrapolations
Several data sources have been used to model the inventory.

## Use advice
This data set is a supporting sub-data set and must be used exclusively as sub-data set of its corresponding level-1 partly disaggregated data set (see “General comment” field for exact name and UUID).

## Data sources
- Background Data for Representative products and organisations. EF 3.0 compliant (data stock)
- Symeonidis A., fibre production, kenaf, retting, GLO, Undefined, ecoinvent database version 3.8
- Bajaj S., Datta A., Nigam M., Mosharraf Hossain M., Noor Hossain, M. (2018). Life Cycle Inventories of Textile Products - India and Bangladesh.

## Intended applications
Implementation of regular Product Environmental Footprint (PEF) studies and Organisation Environmental Footprint (OEF) studies exclusively under the specified Product groups and sectors as defined in the Product Environmental Footprint Category Rules (PEFCR) and Organisation Environmental Footprint Sectorial Rules (OEFSR) listed in http://ec.europa.eu/environment/eussd/smgp/PEFCR_OEFSR.htm
