# wool; recycled, post-consumer; production mix, at plant; Textil, recycled

Dataset: ILCD process, Partly terminated system
Geography: GLO
Reference year: 2021
Valid until: 2024
Classification: End-of-life treatment / Material recycling
LCI method principle: Attributional
LCI method approaches: Allocation - physical causality
Completeness: All relevant flows quantified
Project: Provision of process-based 3.0 Environmental Footprint-compliant life cycle inventory datasets - Renewable materials - contract number 070201/2020/840085/SER/ENV.B.1
Generated by: CADIS
Owner: Blonk Sustainability Tools
Compliance: ILCD Data Network - Entry-level; Suggestions for updating the PEF method 2019; ISO 14040 Environmental Management – Life Cycle Assessment – Principles and Framework, 2006; ISO 14044:2006. Environmental Management – Life Cycle Assessment – Requirements and guidelines.; Environmental Footprint 3.1
Review: Dependent internal review by Hans Blonk, Emilia Moreno Ruiz; Independent review panel by Laura Batlle Bayer
Data quality: Overall quality: Good; Time representativeness: Very good; Geographical representativeness: Fair; Technological representativeness: Very good; Precision: Good; Methodological appropriateness and consistency: Not applicable
Amounts: no units in this file; such an amount is in the reference unit of its flow, which a separate flow dataset defines
copyright: true
licenseType: Free of charge for some user types or use types
accessRestrictions: Free of charge for all final users implementing a regular Product Environmental Footprint (PEF) studies and Organisation Environmental Footprint (OEF) studies exclusively under the specified Product groups and sectors as defined in the Product Environmental Footprint Category Rules (PEFCR) and Organisation Environmental Footprint Sectorial Rules (OEFSR) listed in http://ec.europa.eu/environment/eussd/smgp/PEFCR_OEFSR.htm and in accordance with the terms and conditions of the EULA (available at https://ecoinvent.lca-data.com/) exclusively until 31st December 2024. Any use of this dataset or any derivative data not within the specific context of one of the PEF/OEF projects or after the end of 2024 is not permitted.

## General comment
Notice: this data set supersedes the EF3.0-compliant version (see link under "preceding data set version" below calculated with the EF3.0). The life cycle inventory is not changed from the original EF3.0 data set. The LCIA results are calculated based on the EF3.1 methods which provide updated characterisation factors in the following impact categories: Climate Change, Ecotoxicity freshwater, Photochemical Ozone Formation, Acidification, Human Toxicity non-cancer, and Human Toxicity cancer. The review report and the data quality ratings refer to the original results. The data set has been updated by the European Commission on the basis of the original EF3.0 data set delivered by the data provider.The post-consumer wool clothing has long been exploited as a raw material for at least two hundred years. The compatibility of wool fibre recyclate with open and closed loop recycling systems is partly dependent upon minimising fibre breakage and maximising residual fibre length after mechanical pulling processes. The level of yarn twist and the type of fabric construction influences the amount of fibre breakage during mechanical recycling, (S. Russell et al., 2016).

## Technology and included processes
This dataset represent post-consumer wool recycling. Post-consumer waste is made up of clothing discarded by the user due to damage, being worn out or simply out of fashion. Post-consumer wool clothing has long been compatible with both open loop and closed loop mechanical recycling processes. Open loop recycling of wool involves mechanically pulling garments back into a fibrous state and using this material as a feedstock to make new products. The basic steps in a closed loop recycling process: Yarns containing recycled wool are converted into other relatively high-value clothing products using conventional processes. This activity includes wool collection and transport for washing. For every kg of clean wool (output), 1.2 kg of used wool is required (input). Assumptions include the use of fatty alcohol sulfate as detergent, (S. Russell et al., 2016).

## Parameters
- kg_0: 1.5
  Mass in kg, for wool, wasted - cut-off; Articulated lorry transport, Total weight 14-20 t, mix Euro 0-5; ROW w/o EU+EFTA
- km_0: 80
  Distance in km, for wool, wasted - cut-off; Articulated lorry transport, Total weight 14-20 t, mix Euro 0-5; ROW w/o EU+EFTA
- kg_km_0: 120; = kg_0*km_0
  Transport amount in km*km, for wool, wasted - cut-off; Articulated lorry transport, Total weight 14-20 t, mix Euro 0-5; ROW w/o EU+EFTA
- kg_1: 0.0108
  Mass in kg, for alkylbenzene sulfonate // alkylbenzene sulfonate production // eu+efta+uk; Articulated lorry transport, Euro 4, Total weight >32 t; EU+EFTA+UK
- km_1: 1000
  Distance in km, for alkylbenzene sulfonate // alkylbenzene sulfonate production // eu+efta+uk; Articulated lorry transport, Euro 4, Total weight >32 t; EU+EFTA+UK
- kg_km_1: 10.8; = kg_1*km_1
  Transport amount in km*km, for alkylbenzene sulfonate // alkylbenzene sulfonate production // eu+efta+uk; Articulated lorry transport, Euro 4, Total weight >32 t; EU+EFTA+UK
- kg_2: 0.0108
  Mass in kg, for alkylbenzene sulfonate // alkylbenzene sulfonate production // eu+efta+uk; Transoceanic ship, containers; GLO
- km_2: 18000
  Distance in km, for alkylbenzene sulfonate // alkylbenzene sulfonate production // eu+efta+uk; Transoceanic ship, containers; GLO
- kg_km_2: 194.4; = kg_2*km_2
  Transport amount in km*km, for alkylbenzene sulfonate // alkylbenzene sulfonate production // eu+efta+uk; Transoceanic ship, containers; GLO

## Reference product
- wool, recycled, post-consumer // wool // glo: 1

## Inputs
- Transport of wool, wasted - cut-off by Articulated lorry transport, Total weight 14-20 t, mix Euro 0-5 - ROW w/o EU+EFTA: 120; = kg_km_0
- Electricity from Electricity grid mix 1kV-60kV - AU: 0.0123
- Electricity from Electricity grid mix 1kV-60kV - NZ: 0.0023
- Electricity from Electricity grid mix 1kV-60kV - RU: 0.053
- Electricity from Electricity grid mix 1kV-60kV - RAF: 0.0396
- Electricity from Electricity grid mix 1kV-60kV - RAS w/o CN: 0.5694
- Electricity from Electricity grid mix 1kV-60kV - EU+EFTA+UK: 0.1812
- Electricity from Electricity grid mix 1kV-60kV - RSA: 0.09
- Electricity from Electricity grid mix 1kV-60kV - RNA: 0.2652
- Thermal energy (MJ) from Thermal energy from natural gas - ROW: 4.536
- Transport of alkylbenzene sulfonate // alkylbenzene sulfonate production // eu+efta+uk by Articulated lorry transport, Euro 4, Total weight >32 t - EU+EFTA+UK: 10.8; = kg_km_1
- Transport of alkylbenzene sulfonate // alkylbenzene sulfonate production // eu+efta+uk by Transoceanic ship, containers - GLO: 194.4; = kg_km_2
- wool, recycled, post-consumer // wool // glo, blackbox: 1
- wool, recycled, post-consumer // wool // glo, elementary: 1

## Impact indicators
- Eutrophication marine: 0.000787549
- Ecotoxicity, freshwater: 4.18938
- Land use: -0.535153
- Water use: 0.491594
- Resource use, minerals and metals: 2.58767e-7
- Resource use, fossils: 9.58672
- Climate change: 0.833396
- Ozone depletion: 1.42172e-9
- Human toxicity, cancer: 1.04646e-9
- Human toxicity, non-cancer: 4.83971e-9
- EF-particulate Matter: 3.48787e-8
- Ionising radiation, human health: 0.0153758
- Photochemical ozone formation - human health: 0.00167555
- Acidification: 0.00255575
- Eutrophication, terrestrial: 0.00570017
- Eutrophication, freshwater: 3.55927e-5

## Deviations from the LCI method principle
The background data use the \xe2\x80\x9cRecycled content cut-off\xe2\x80\x9d approach to allocate end-of-life by-products and secondary materials. This allocation is explained in the description of the recycled content system model (http://www.ecoinvent.org/database/system-models-in-ecoinvent-3/cut-off-system-model/allocation-cut-off-by-classification.html).

## Deviations from the LCI method approaches
Background data:
- the \xe2\x80\x9cRecycled content cut-off\xe2\x80\x9d approach to allocate end-of-life by-products and secondary materials. This allocation is explained in the description of the recycled content system model (http://www.ecoinvent.org/database/system-models-in-ecoinvent-3/cut-off-system-model/allocation-cut-off-by-classification.html). The ecoinvent database mostly relies on “Allocation – market values” apart for few exceptions particularly in the energy sector. ecoinvent energy data is replaced with EF3.0 core data as per the EF guidelines version 2.0.
OR
- EF compliant data

## Modelling constants
All modelling constants follow the requirements listed in the Tender Specifications ENV.B.1/SER/2016/0038vl. Completeness: All known environmental flows are included. All known resource uses and emissions are listed in the inventory. Water use: water use is modelled at country level using separate flows for water withdrawal, water release and water evaporation. Cut-off: All known environmental flows are included. All known resource uses and emissions are listed in the inventory. Handling multi-functional processes: the following PEF multi- functionality decision hierarchy is applied for resolving all multi- functionality problems: (1) subdivision or system expansion; (2) allocation based on a relevant underlying physical relationship (substitution may apply here); (3) allocation based on some other relationship. Direct land use change: GHG emissions from direct LUC allocated to good/service for 20 years after the LUC occurs, with IPCC default values. Carbon storage and delayed emissions: credits associated with temporary (carbon) storage or delayed emissions up to 300 years are not be considered. Emissions off-setting: are not included. Capital goods (including infrastructures) and their End of life: they are included. System boundaries: system boundaries include all processes linked to the product supply chain (e.g. maintenance). Time period: emissions and removals are modelled as if released or removed at the beginning of the assessment method. Fossil and biogenic carbon emissions and removals: removals and emissions are modelled as follows: All GHG emissions from fossil fuels (including peat and limestone) are modelled consistently with the most updated ILCD list of elementary flows. The non-fossil (biogenic) carbon flows are modelled consistently with the most updated ILCD list of elementary flows.

## Cut-off and completeness
All known environmental flows are included. All known resource uses and emissions are listed in the inventory. The dataset dry mass balance has been checked to ensure the inventory is complete. Capital goods (e.g. infrastructure) and their end-of-life are included.

## Data selection and combination
These datasets include, in both their foreground and background data, links to EF3.0 compliant data.
The relevant background data on energy, transport, and End of Life are from the LCDN data node (http://lcdn.thinkstep.com/Node/).
All other background data in the supply of this product for which no EF3.0 process was available are from ecoinvent v3.7 database (www.ecoinvent.org) or other data sources.

## Data treatment and extrapolations
Several data sources have been used to model the inventory.

## Review details
Internal reviews have been asked to review the plausibility of the unit process, LCIA scores, and DQRs. Internal reviewers have also been asked to review the data for EF compliancy. The consortium is therefore responsible for aspects such as compliancy with the ILCD format, including validation in Look@LCI, and nomenclature.
Internal reviwers have been asked to judge based on the process name, that the unit process models in a complete and representative way the process in the requested location. The review encompassed the plausability of:
- exchanges with nature (elementary flows) as well as exchanges such as product and waste flows.
- meta information (general comment, technology comment, system boundaries, allocation, cut-off rules, etc.). Reviewers were asked to judge if the provided information is enough to understand the content of the process.
- LCIA scores
- DQRs including precision, technology, time and geography. As well as the overall DQR.
External reviewers have been asked to provide their expertise in the field of interest. External reviewers have been asked to review the unit process, including eventual methodological choices, the LCIA scores (provided with contribution scores as well), and DQRs. External reviewers have been provided all the information in a tool developed by the consortium for the purpose of this project.
External reviewers have been asked to judge based on the process name, that the unit process models in a complete and representative way the process in the requested location. The review encompassed:
- Plausability and completeness of exchanges with nature (elementary flows) as well as exchanges such as product and waste flows.
- Review of meta information (general comment, technology comment, system boundaries, allocation, cut-off rules, etc.). Reviewers were asked to judge if the provided information is enough to understand the content of the process.
- Review of properties (biogenic carbon and water content).
- Review of allocation keys.
- Plausability of LCIA scores calculated by the consortium.
- Plausability of DQRs including precision, technology, time and geography. As well as the overall DQR.

## Data sources
- Background Data for Representative products and organisations. EF 3.0 compliant (data stock)
- S. Russell et al. (2016), Review of Wool Recycling and Reuse, RILEM Bookseries 12, pp 415-430
- Societat Orgánica, 2008. Recuperación de materiales textiles SA, Anàlisi ambiental dels aïllaments de llana d’ovella i de multifibres fabricats per RMT.
- EuroLab, 2021, Disponible en: https://www.laboratuvar.com/es/tekstil-testleri/kimyasal-ve-ekolojik-testler/nem-orani-tayini
- The Woolmark Company, 2019. WOOL AND THE CARBON CYCLE. Disponible en: https://www.paulo-oliveira.pt/assets/content/wool-carbon-cycle.pdf

## Intended applications
Implementation of regular Product Environmental Footprint (PEF) studies and Organisation Environmental Footprint (OEF) studies exclusively under the specified Product groups and sectors as defined in the Product Environmental Footprint Category Rules (PEFCR) and Organisation Environmental Footprint Sectorial Rules (OEFSR) listed in http://ec.europa.eu/environment/eussd/smgp/PEFCR_OEFSR.htm
