# lamination, water based glue, 4 times (for 5 layers), elementary; lamination process; service, at plant; 1 kg of 4 times water based glue laminated fabric

Dataset: ILCD process, Unit process, single operation
Geography: GLO
Reference year: 2021
Valid until: 2024
Classification: Other Services / Other services
LCI method principle: Attributional
LCI method approaches: Allocation - market value
Completeness: All relevant flows quantified
Project: Provision of process-based 3.0 Environmental Footprint-compliant life cycle inventory datasets - Apparel 2 - contract number 070201/2020/840292/SER/ENV.B.1
Generated by: Metsims Sustainability Consulting
Owner: PRé Sustainability B.V.
Compliance: Environmental Footprint non-primary supporting data set; Environmental Footprint 3.1
Amounts: no units in this file; such an amount is in the reference unit of its flow, which a separate flow dataset defines
copyright: true
licenseType: Free of charge for some user types or use types
accessRestrictions: Free of charge for all final users implementing a regular Product Environmental Footprint (PEF) studies and Organisation Environmental Footprint (OEF) studies exclusively under the specified Product groups and sectors as defined in the Product Environmental Footprint Category Rules (PEFCR) and Organisation Environmental Footprint Sectorial Rules (OEFSR) listed in http://ec.europa.eu/environment/eussd/smgp/PEFCR_OEFSR.htm and in accordance with the terms and conditions of the EULA (available at https://ecoinvent.lca-data.com/) exclusively until 31st December 2024. Any use of this dataset or any derivative data not within the specific context of one of the PEF/OEF projects or after the end of 2024 is not permitted.

## General comment
Notice: this data set supersedes the EF3.0-compliant version (see link under "preceding data set version" below calculated with the EF3.0). The life cycle inventory is not changed from the original EF3.0 data set. The LCIA results are calculated based on the EF3.1 methods which provide updated characterisation factors in the following impact categories: Climate Change, Ecotoxicity freshwater, Photochemical Ozone Formation, Acidification, Human Toxicity non-cancer, and Human Toxicity cancer. The review report and the data quality ratings refer to the original results. The data set has been updated by the European Commission on the basis of the original EF3.0 data set delivered by the data provider.This sub-process has limited documentation only. For all detailed documentation of the full model to which this data set belongs (such as DQRs, review reports and other technical documentation), please see this process: lamination, water based glue, 4 times (for 5 layers) - GLO []

## Technology and included processes
This dataset consists of 2-5 layers water based glue lamination process mixture.

This dataset covers machine electricity consumption, water based lamination adhesives (water based PU, Latex, Acrylic adhesive mix), air emissions (water).

A user employing this service within their models should use it along with an 1.001 kg of material to produce an 1 kg of laminated fabric. 0.001 kg of waste shall also be added. A user is responsible for defining the nature of the recycling and/or disposal of this waste. Additionally, a user is responsible for accounting transportation expenditures for all extra input and output materials that need to be modelled alongside this service.*

*Waste rate is assumed.

## Reference product
- lamination, water based glue, 4 times (for 5 layers) // lamination, water based glue, 4 times (for 5 layers) // glo, elementary: 1

## Outputs
- water vapour, Emissions to air, unspecified: 0.2

## Impact indicators
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
## Deviations from the LCI method principle
The background data uses:
- the \xe2\x80\x9cRecycled content cut-off\xe2\x80\x9d approach to allocate end-of-life by-products and secondary materials. This allocation is explained in the description of the recycled content system model (http://www.ecoinvent.org/database/system-models-in-ecoinvent-3/cut-off-system-model/allocation-cut-off-by-classification.html).
OR
- EF compliant data

## Deviations from the LCI method approaches
Background data:
- the \xe2\x80\x9cRecycled content cut-off\xe2\x80\x9d approach to allocate end-of-life by-products and secondary materials. This allocation is explained in the description of the recycled content system model (http://www.ecoinvent.org/database/system-models-in-ecoinvent-3/cut-off-system-model/allocation-cut-off-by-classification.html). The ecoinvent database mostly relies on “Allocation – market values” apart for few exceptions particularly in the energy sector. ecoinvent energy data is replaced with EF3.0 core data as per the EF guidelines version 2.0.
OR
- EF compliant data

## Modelling constants
All modelling constants follow the requirements listed in the Tender Specifications 070201/2020/SER/ENV.B1. Completeness: There are no intentional cut-offs in the inventory no matter how small their contribution to all the EF impact categories is. Eventual cut-offs are in compliance with the Guide for EF compliant data sets (JRC 2020), i.e. only if below the 3% cut-off rule. Water use: water use is modelled at country level using separate flows for water withdrawal, water release and water evaporation. Handling multi-functional processes: the following PEF multi- functionality decision hierarchy is applied for resolving all multi- functionality problems: (1) subdivision or system expansion; (2) allocation based on a relevant underlying physical relationship (substitution may apply here); (3) allocation based on some other relationship. Direct land use change: GHG emissions from direct LUC allocated to good/service for 20 years after the LUC occurs, with IPCC default values. Carbon storage and delayed emissions: credits associated with temporary (carbon) storage or delayed emissions up to 300 years are not be considered. Emissions off-setting: are not included. Capital goods (including infrastructures) and their End of life: they are included. System boundaries: system boundaries include all processes linked to the product supply chain (e.g. maintenance). Time period: emissions and removals are modelled as if released or removed at the beginning of the assessment method. Fossil and biogenic carbon emissions and removals: removals and emissions are modelled as follows: All GHG emissions from fossil fuels (including peat and limestone) are modelled consistently with the most updated ILCD list of elementary flows. The non-fossil (biogenic) carbon flows are modelled consistently with the most updated ILCD list of elementary flows.

## Cut-off and completeness
There are no intentional cut-offs in the inventory no matter how small their contribution to all the EF impact categories is. Eventual cut-offs are in compliance with the Guide for EF compliant data sets (JRC 2020), i.e. only if below the 3% cut-off rule. The dataset dry mass and water balance has been checked to ensure the inventory is complete. Capital goods (e.g. infrastructure) and their end-of-life are included.

## Data selection and combination
These datasets include, in both their foreground and background data, links to EF3.0 compliant data.
The relevant background data on energy, transport, and End of Life are from the LCDN data node (http://lcdn.thinkstep.com/Node/).
All other background data in the supply of this product for which no EF3.0 process was available are from ecoinvent v3.7 database (www.ecoinvent.org) or other data sources.

## Data treatment and extrapolations
Several data sources have been used to model the inventory.

## Use advice
This data set is a supporting sub-data set and must be used exclusively as sub-data set of its corresponding level-1 partly disaggregated data set (see “General comment” field for exact name and UUID).

## Data sources
- Background Data for Representative products and organisations. EF 3.0 compliant (data stock)
- Fung, W. (2002). Coated and laminated textiles (Vol. 23). Woodhead Publishing.
- Singha, K. (2012). A review on coating & lamination in textiles: processes and applications. American Journal of Polymer Science, 2(3), 39-49.
- Kecin, İ. (2018). Teknik Tekstil için Laminasyon Poliüretanları, https://www.turkchem.net/teknik-tekstil-icin-laminasyon-poliuretanlari.html, Access Date: 09.04.2021
- Fries, J. A. (1983). Adhesives for fabric lamination. Journal of Coated Fabrics, 12(3), 174-186.
- Water-Based Adhesives, https://www.henkel-adhesives.com/pk/en/products/industrial-adhesives/water-based-adhesives.html, Access Date: 09.04.2021
- WATER-BASED DRY LAMINATION ADHESIVE FOR LAMINATING FILM, https://www.sinogracechem.com/water-based-dry-lamination-adhesive-for-laminating-film_p391.html, Access Date: 09.04.2021
- Laminating Machine For Blanket, https://www.kuntai-group.com/laminating-machine/water-based-glue-laminating-machine/laminating-machine-for-blanket.html, Web Access: 10.02.2021
- Velcro Abrasive Laminating Machine, https://www.kuntai-group.com/laminating-machine/water-based-glue-laminating-machine/velcro-abrasive-laminating-machine.html, Web Access: 10.02.2021
- Shoe Material Laminating Machine, https://www.kuntai-group.com/laminating-machine/water-based-glue-laminating-machine/shoe-material-laminating-machine.html, Web Access: 10.02.2021
- EVA Foam Laminating Machine, https://www.kuntai-group.com/laminating-machine/water-based-glue-laminating-machine/eva-foam-laminating-machine.html, Web Access: 10.02.2021
- Mesh Belt Type Water Based Glue Laminating Machine, https://www.kuntai-group.com/laminating-machine/water-based-glue-laminating-machine/mesh-belt-type-water-based-glue-laminating.html, Web Access: 10.02.2021
- Mesh Belt Type Laminating Machine, https://www.kuntai-group.com/laminating-machine/water-based-glue-laminating-machine/mesh-belt-type-laminating-machine.html, Web Access: 10.02.2021
- Shoemaking Material Laminating Machine, https://www.kuntai-group.com/laminating-machine/water-based-glue-laminating-machine/shoemaking-material-laminating-machine.html, Web Access: 10.02.2021
- Factory Sale Shoe Material Laminating Machine, https://www.kuntai-group.com/laminating-machine/water-based-glue-laminating-machine/factory-sale-shoe-material-laminating-machine.html, Web Access: 10.02.2021
- CE Certificated High Quality Fabric Foam Lamination Machine, https://www.kuntai-group.com/laminating-machine/water-based-glue-laminating-machine/ce-certificated-high-quality-fabric-foam.html, Web Access: 10.02.2021
- Garment Materials Application Vertical Type Water Based Glue Laminating Machine, https://www.kuntai-group.com/laminating-machine/water-based-glue-laminating-machine/garment-materials-application-vertical-type.html, Web Access: 10.02.2021
- Fabric Water Based Glue Lamination Machine Distributor, https://www.kuntai-group.com/laminating-machine/water-based-glue-laminating-machine/fabric-water-based-glue-lamination-machine.html, Web Access: 10.02.2021
- Horizontal Mesh Belt Lamination Machine, Laminating Machine, https://www.kuntai-group.com/laminating-machine/water-based-glue-laminating-machine/horizontal-mesh-belt-lamination-machine-lamin.html, Web Access: 10.02.2021

## Intended applications
Implementation of regular Product Environmental Footprint (PEF) studies and Organisation Environmental Footprint (OEF) studies exclusively under the specified Product groups and sectors as defined in the Product Environmental Footprint Category Rules (PEFCR) and Organisation Environmental Footprint Sectorial Rules (OEFSR) listed in http://ec.europa.eu/environment/eussd/smgp/PEFCR_OEFSR.htm
