# kraft paper, elementary; technology mix; production mix, at plant; kg

Dataset: ILCD process, Unit process, single operation
Geography: EU+EFTA+UK
Reference year: 2018
Valid until: 2024
Classification: Other Services / Other services
LCI method principle: Attributional
LCI method approaches: Allocation - market value
Completeness: All relevant flows quantified
Project: Provision of process-based 3.0 Environmental Footprint-compliant life cycle inventory datasets - Renewable materials - contract number 070201/2020/840085/SER/ENV.B.1
Generated by: RISE
Owner: CEPI-Eurokraft/Eurosac
Compliance: Environmental Footprint non-primary supporting data set; Environmental Footprint 3.1
Amounts: no units in this file; such an amount is in the reference unit of its flow, which a separate flow dataset defines
copyright: true
licenseType: Free of charge for some user types or use types
accessRestrictions: Free of charge for all final users implementing a regular Product Environmental Footprint (PEF) studies and Organisation Environmental Footprint (OEF) studies exclusively under the specified Product groups and sectors as defined in the Product Environmental Footprint Category Rules (PEFCR) and Organisation Environmental Footprint Sectorial Rules (OEFSR) listed in http://ec.europa.eu/environment/eussd/smgp/PEFCR_OEFSR.htm and in accordance with the terms and conditions of the EULA (available at https://ecoinvent.lca-data.com/) exclusively until 31st December 2024. Any use of this dataset or any derivative data not within the specific context of one of the PEF/OEF projects or after the end of 2024 is not permitted.

## General comment
Notice: this data set supersedes the EF3.0-compliant version (see link under "preceding data set version" below calculated with the EF3.0). The life cycle inventory is not changed from the original EF3.0 data set. The LCIA results are calculated based on the EF3.1 methods which provide updated characterisation factors in the following impact categories: Climate Change, Ecotoxicity freshwater, Photochemical Ozone Formation, Acidification, Human Toxicity non-cancer, and Human Toxicity cancer. The review report and the data quality ratings refer to the original results. The data set has been updated by the European Commission on the basis of the original EF3.0 data set delivered by the data provider.This sub-process has limited documentation only. For all detailed documentation of the full model to which this data set belongs (such as DQRs, review reports and other technical documentation), please see this process: kraft paper - EU+EFTA+UK []

## Technology and included processes
Kraft paper is produced from chemical pulp produced in the kraft process. The activity includes transport of raw materials, pulp handling, material inputs, onsite energy production and process waste treatment.
The energy sources at an integrated pulp and paper mills consists of external and internal fuels plus electricity from the grid and internally produced electricity. External fuels can be fossil or biobased. The internal fuels mainly consist of the black liquor and bark from the wood input for pulp production. The amount of internal fuels used in the process are: Black liquor (16.87 GJ/t), Bark (1.73 GJ/t), Wood fuels (e.g. fuel chip) (0.07 GJ/t), Tall oil (0.2 GJ/t), Methanol (0.04 GJ/t), Strong gases (0.06 GJ/t), Biological fibre slush (0.03 GJ/t).

The following air emissions were reported in the study: CO2 (fossil and biogenic), CH4 (fossil and biogenic), N2O (fossil+ biogenic), CO (fossil+ biogenic), SO2, H2S, TRS, Total S, NOx, NH3, NMVOC, particles (all sizes), Pb and Hg. The listed air emissions are the most important emissions for the kraft paper production and cover all emissions at the mill, both from the cooking and recovering processes and combustion of fuels at different points at the plant.
For a more complete air emission profile for kraft paper production, however, additional air emissions (beyond the ones listed above) were added for the combustion of internal and external fuels using ecoinvent LCI datasets for combustion of different fuels as proxy. Proxies for the air emissions were calculated based on: Heavy fuel oil: "heat production, heavy fuel oil, at industrial furnace 1MW” Light fuel oil and diesel: "heat production, light fuel oil, at industrial furnace 1MW” Natural gas, strong gases and methanol: "heat production, natural gas, at industrial furnace >100kW” Brown coal lignite: "heat production, lignite briquette, at stove 5-15kW” Biofuels, wood and bark: "heat production, wood chips from industry, at furnace 1000kW”
No proxy was available for the combustion of black liquor, Biological fibre slush, and tall oil. Emissions from these internal energy generation processes are therefore only reflected in the key emission factors provided by the industry.
Amount of infrastructure taken from dataset “Johansson M, kraft paper production, RER, Undefined, ecoinvent database version 3.7.1.”

The following chemicals were excluded from the inventory: Aluminium sulphate, Sodium sulphate, rosin size, carbon dioxide, Magnesium sulfate, Sodium chloride, Sodium carbonate. The listed chemicals are not defined as mandatory in the PEFCR for intermediate paper products and have a total mass of below 1% of the paper weight.

## Reference product
- kraft paper // kraft paper // eu+efta+uk, elementary: 1

## Inputs
- ground water, Renewable material resources from water [AL]: 9.50333e-6
- ground water, Renewable material resources from water [AT]: 0.000122444
- ground water, Renewable material resources from water [BA]: 1.18472e-5
- ground water, Renewable material resources from water [BE]: 0.000147381
- ground water, Renewable material resources from water [BG]: 3.77396e-5
- ground water, Renewable material resources from water [BY]: 4.90042e-5
- ground water, Renewable material resources from water [CH]: 0.000146035
- ground water, Renewable material resources from water [CZ]: 0.00010164
- ground water, Renewable material resources from water [DE]: 0.00110616
- ground water, Renewable material resources from water [DK]: 8.02094e-5
- ground water, Renewable material resources from water [EE]: 1.09527e-5
- ground water, Renewable material resources from water [ES]: 0.000474685
- ground water, Renewable material resources from water [FI]: 6.8417e-5
- ground water, Renewable material resources from water [FR]: 0.000780285
- ground water, Renewable material resources from water [GB]: 0.000775414
- ground water, Renewable material resources from water: 4.81639e-6
- ground water, Renewable material resources from water [GR]: 8.82083e-5
- ground water, Renewable material resources from water [HR]: 2.83619e-5
- ground water, Renewable material resources from water [HU]: 7.43507e-5
- ground water, Renewable material resources from water [IE]: 8.00902e-5
- ground water, Renewable material resources from water [IS]: 4.57018e-6
- ground water, Renewable material resources from water [IT]: 0.000667596
- ground water, Renewable material resources from water [LT]: 2.33859e-5
- ground water, Renewable material resources from water [LU]: 1.62346e-5
- ground water, Renewable material resources from water [LV]: 1.37898e-5
- ground water, Renewable material resources from water [MD]: 7.29644e-6
- ground water, Renewable material resources from water [ME]: 2.93942e-6
- ground water, Renewable material resources from water [MK]: 8.11833e-6
- ground water, Renewable material resources from water [MT]: 4.49095e-6
- ground water, Renewable material resources from water [NL]: 0.000247468
- ground water, Renewable material resources from water [NO]: 9.36741e-5
- ground water, Renewable material resources from water [PL]: 0.000284808
- ground water, Renewable material resources from water [PT]: 8.98671e-5
- ground water, Renewable material resources from water [RO]: 0.000124764
- ground water, Renewable material resources from water [RS]: 3.09607e-5
- ground water, Renewable material resources from water [SE]: 0.000135171
- ground water, Renewable material resources from water [SI]: 1.91421e-5
- ground water, Renewable material resources from water [SK]: 4.49294e-5
- ground water, Renewable material resources from water [SM]: 5.5919e-7
- ground water, Renewable material resources from water [UA]: 0.000131733
- water, Renewable material resources from water [AL]: 8.3364e-5
- water, Renewable material resources from water [AT]: 0.00107409
- water, Renewable material resources from water [BA]: 0.000103925
- water, Renewable material resources from water [BE]: 0.00129284
- water, Renewable material resources from water [BG]: 0.000331055
- water, Renewable material resources from water [BY]: 0.000429869
- water, Renewable material resources from water [CH]: 0.00128103
- water, Renewable material resources from water [CZ]: 0.00089159
- water, Renewable material resources from water [DE]: 0.00970335
- water, Renewable material resources from water [DK]: 0.000703604
- water, Renewable material resources from water [EE]: 9.6078e-5
- water, Renewable material resources from water [ES]: 0.00416398
- water, Renewable material resources from water [FI]: 0.000600159
- water, Renewable material resources from water [FR]: 0.00684472
- water, Renewable material resources from water [GB]: 0.00680199
- water, Renewable material resources from water: 4.22498e-5
- water, Renewable material resources from water [GR]: 0.00077377
- water, Renewable material resources from water [HR]: 0.000248793
- water, Renewable material resources from water [HU]: 0.00065221
- water, Renewable material resources from water [IE]: 0.000702558
- water, Renewable material resources from water [IS]: 4.009e-5
- water, Renewable material resources from water [IT]: 0.00585621
- water, Renewable material resources from water [LT]: 0.000205143
- water, Renewable material resources from water [LU]: 0.000142411
- water, Renewable material resources from water [LV]: 0.000120965
- water, Renewable material resources from water [MD]: 6.4005e-5
- water, Renewable material resources from water [ME]: 2.57848e-5
- water, Renewable material resources from water [MK]: 7.12147e-5
- water, Renewable material resources from water [MT]: 3.9395e-5
- water, Renewable material resources from water [NL]: 0.00217081
- water, Renewable material resources from water [NO]: 0.000821717
- water, Renewable material resources from water [PL]: 0.00249836
- water, Renewable material resources from water [PT]: 0.000788322
- water, Renewable material resources from water [RO]: 0.00109444
- water, Renewable material resources from water [RS]: 0.00027159
- water, Renewable material resources from water [SE]: 0.00118573
- water, Renewable material resources from water [SI]: 0.000167916
- water, Renewable material resources from water [SK]: 0.000394124
- water, Renewable material resources from water [SM]: 4.90526e-6
- water, Renewable material resources from water [UA]: 0.00115558

## Outputs
- carbon dioxide (fossil), Emissions to urban air close to ground: 0.178589
- Water, Emissions to water, unspecified [AL]: 8.65101e-5
- Water, Emissions to water, unspecified [AT]: 0.00111463
- Water, Emissions to water, unspecified [BA]: 0.000107847
- Water, Emissions to water, unspecified [BE]: 0.00134163
- Water, Emissions to water, unspecified [BG]: 0.000343549
- Water, Emissions to water, unspecified [BY]: 0.000446092
- Water, Emissions to water, unspecified [CH]: 0.00132938
- Water, Emissions to water, unspecified [CZ]: 0.000925239
- Water, Emissions to water, unspecified [DE]: 0.0100696
- Water, Emissions to water, unspecified [DK]: 0.000730158
- Water, Emissions to water, unspecified [EE]: 9.9704e-5
- Water, Emissions to water, unspecified [ES]: 0.00432113
- Water, Emissions to water, unspecified [FI]: 0.000622809
- Water, Emissions to water, unspecified [FR]: 0.00710304
- Water, Emissions to water, unspecified [GB]: 0.0070587
- Water, Emissions to water, unspecified: 4.38443e-5
- Water, Emissions to water, unspecified [GR]: 0.000802972
- Water, Emissions to water, unspecified [HR]: 0.000258182
- Water, Emissions to water, unspecified [HU]: 0.000676825
- Water, Emissions to water, unspecified [IE]: 0.000729072
- Water, Emissions to water, unspecified [IS]: 4.1603e-5
- Water, Emissions to water, unspecified [IT]: 0.00607722
- Water, Emissions to water, unspecified [LT]: 0.000212885
- Water, Emissions to water, unspecified [LU]: 0.000147786
- Water, Emissions to water, unspecified [LV]: 0.000125531
- Water, Emissions to water, unspecified [MD]: 6.64205e-5
- Water, Emissions to water, unspecified [ME]: 2.67579e-5
- Water, Emissions to water, unspecified [MK]: 7.39023e-5
- Water, Emissions to water, unspecified [MT]: 4.08818e-5
- Water, Emissions to water, unspecified [NL]: 0.00225274
- Water, Emissions to water, unspecified [NO]: 0.000852729
- Water, Emissions to water, unspecified [PL]: 0.00259265
- Water, Emissions to water, unspecified [PT]: 0.000818073
- Water, Emissions to water, unspecified [RO]: 0.00113575
- Water, Emissions to water, unspecified [RS]: 0.00028184
- Water, Emissions to water, unspecified [SE]: 0.00123048
- Water, Emissions to water, unspecified [SI]: 0.000174253
- Water, Emissions to water, unspecified [SK]: 0.000408998
- Water, Emissions to water, unspecified [SM]: 5.09039e-6
- Water, Emissions to water, unspecified [UA]: 0.00119919
- Phosphorus, Emissions to water, unspecified: 1.1625e-5
- chromium (iii), Emissions to water, unspecified: 3.148e-8
- zinc (ii), Emissions to water, unspecified: 7.89443e-7
- cadmium (ii), Emissions to water, unspecified: 2.31794e-9
- nitrate, Emissions to water, unspecified: 2.0027e-5
- chloride, Emissions to water, unspecified: 0.000786208
- ammonium, Emissions to water, unspecified: 1.01534e-5
- biological oxygen demand, Emissions to water, unspecified: 0.000270121
- chemical oxygen demand, Emissions to water, unspecified: 0.00682683
- total organic carbon, Emissions to water, unspecified: 0.00151101
- DOC, Dissolved Organic Carbon, Emissions to water, unspecified: 0.00151101
- Suspended solids, unspecified, Emissions to water, unspecified: 0.00107671
- adsorbable organic halogen compounds, Emissions to water, unspecified: 1.31006e-5
- lead, Emissions to water, unspecified: 2.75926e-8
- dinitrogen, Emissions to water, unspecified: 0.000151125
- sulfur dioxide, Emissions to air, unspecified (long-term): 2.83723e-6
- ammonia, Emissions to urban air close to ground: 1.2549e-6
- copper (ii), Emissions to fresh water: 1.5206e-7
- mercury, Emissions to water, unspecified: 1.1545e-9
- Water, Emissions to non-urban air or from high stacks: 0.004192
- acetic acid, Emissions to urban air close to ground: 3.56404e-7
- formaldehyde, Emissions to urban air close to ground: 8.14771e-7
- hydrogen sulfide, Emissions to urban air close to ground: 1.67704e-5
- acetone, Emissions to urban air close to ground: 5.59254e-8
- ammonia, Emissions to urban air close to ground [AL]: 2.46721e-7
- ammonia, Emissions to urban air close to ground [AT]: 3.17884e-6
- ammonia, Emissions to urban air close to ground [BA]: 3.07572e-7
- ammonia, Emissions to urban air close to ground [BE]: 3.82623e-6
- ammonia, Emissions to urban air close to ground [BG]: 9.79775e-7
- ammonia, Emissions to urban air close to ground [BY]: 1.27222e-6
- ammonia, Emissions to urban air close to ground [CH]: 3.79129e-6
- ammonia, Emissions to urban air close to ground [CZ]: 2.63871e-6
- ammonia, Emissions to urban air close to ground [DE]: 2.87176e-5
- ammonia, Emissions to urban air close to ground [DK]: 2.08236e-6
- ammonia, Emissions to urban air close to ground [EE]: 2.84348e-7
- ammonia, Emissions to urban air close to ground [ES]: 1.23235e-5
- ammonia, Emissions to urban air close to ground [FI]: 1.77621e-6
- ammonia, Emissions to urban air close to ground [FR]: 2.02574e-5
- ammonia, Emissions to urban air close to ground [GB]: 2.01309e-5
- ammonia, Emissions to urban air close to ground [GR]: 2.29002e-6
- ammonia, Emissions to urban air close to ground [HR]: 7.36317e-7
- ammonia, Emissions to urban air close to ground [HU]: 1.93025e-6
- ammonia, Emissions to urban air close to ground [IE]: 2.07926e-6
- ammonia, Emissions to urban air close to ground [IT]: 1.73318e-5
- ammonia, Emissions to urban air close to ground [LT]: 6.07133e-7
- ammonia, Emissions to urban air close to ground [LU]: 4.21473e-7
- ammonia, Emissions to urban air close to ground [LV]: 3.58004e-7
- ammonia, Emissions to urban air close to ground [MD]: 1.89427e-7
- ammonia, Emissions to urban air close to ground [MK]: 2.10764e-7
- ammonia, Emissions to urban air close to ground [NL]: 6.42464e-6
- ammonia, Emissions to urban air close to ground [NO]: 2.43192e-6
- ammonia, Emissions to urban air close to ground [PL]: 7.39404e-6
- ammonia, Emissions to urban air close to ground [PT]: 2.33308e-6
- ammonia, Emissions to urban air close to ground [RO]: 3.23907e-6
- ammonia, Emissions to urban air close to ground [SE]: 3.50923e-6
- ammonia, Emissions to urban air close to ground [SI]: 4.96958e-7
- ammonia, Emissions to urban air close to ground [SK]: 1.16643e-6
- ammonia, Emissions to urban air close to ground [UA]: 3.41999e-6
- phenol, Emissions to urban air close to ground: 5.03458e-7
- chlorine, Emissions to urban air close to ground: 5.79604e-7
- toluene, Emissions to urban air close to ground: 2.16235e-6
- carbon monoxide (fossil), Emissions to urban air close to ground: 0.000661489
- Nitrogen oxides, Emissions to urban air close to ground [AL]: 2.08102e-6
- Nitrogen oxides, Emissions to urban air close to ground [AT]: 2.68127e-5
- Nitrogen oxides, Emissions to urban air close to ground [BA]: 2.59429e-6
- Nitrogen oxides, Emissions to urban air close to ground [BE]: 3.22732e-5
- Nitrogen oxides, Emissions to urban air close to ground [BG]: 8.26414e-6
- Nitrogen oxides, Emissions to urban air close to ground [BY]: 1.07309e-5
- Nitrogen oxides, Emissions to urban air close to ground [CH]: 3.19786e-5
- Nitrogen oxides, Emissions to urban air close to ground [CZ]: 2.22568e-5
- Nitrogen oxides, Emissions to urban air close to ground [DE]: 0.000242226
- Nitrogen oxides, Emissions to urban air close to ground [DK]: 1.75641e-5
- Nitrogen oxides, Emissions to urban air close to ground [EE]: 2.3984e-6
- Nitrogen oxides, Emissions to urban air close to ground [ES]: 0.000103946
- Nitrogen oxides, Emissions to urban air close to ground [FI]: 1.49818e-5
- Nitrogen oxides, Emissions to urban air close to ground [FR]: 0.000170865
- Nitrogen oxides, Emissions to urban air close to ground [GB]: 0.000169799
- Nitrogen oxides, Emissions to urban air close to ground: 1.05847e-5
- Nitrogen oxides, Emissions to urban air close to ground [GR]: 1.93157e-5
- Nitrogen oxides, Emissions to urban air close to ground [HR]: 6.21064e-6
- Nitrogen oxides, Emissions to urban air close to ground [HU]: 1.62812e-5
- Nitrogen oxides, Emissions to urban air close to ground [IE]: 1.7538e-5
- Nitrogen oxides, Emissions to urban air close to ground [IT]: 0.000146189
- Nitrogen oxides, Emissions to urban air close to ground [LT]: 5.12101e-6
- Nitrogen oxides, Emissions to urban air close to ground [LU]: 3.55502e-6
- Nitrogen oxides, Emissions to urban air close to ground [LV]: 3.01967e-6
- Nitrogen oxides, Emissions to urban air close to ground [MD]: 1.59776e-6
- Nitrogen oxides, Emissions to urban air close to ground [MK]: 1.77774e-6
- Nitrogen oxides, Emissions to urban air close to ground [NL]: 5.41902e-5
- Nitrogen oxides, Emissions to urban air close to ground [NO]: 2.05126e-5
- Nitrogen oxides, Emissions to urban air close to ground [PL]: 6.23668e-5
- Nitrogen oxides, Emissions to urban air close to ground [PT]: 1.96789e-5
- Nitrogen oxides, Emissions to urban air close to ground [RO]: 2.73207e-5
- Nitrogen oxides, Emissions to urban air close to ground [SE]: 2.95994e-5
- Nitrogen oxides, Emissions to urban air close to ground [SI]: 4.19171e-6
- Nitrogen oxides, Emissions to urban air close to ground [SK]: 9.83856e-6
- Nitrogen oxides, Emissions to urban air close to ground [UA]: 2.88467e-5
- ethylene, Emissions to urban air close to ground: 3.02075e-5
- acetaldehyde, Emissions to urban air close to ground: 2.53231e-7
- methanol, Emissions to urban air close to ground: 1.90146e-7
- propionic acid, Emissions to urban air close to ground: 1.76936e-8
- EDTA, Emissions to water, unspecified: 5.5852e-7
- manganese, Emissions to water, unspecified: 2.92789e-6
- aluminium, Emissions to water, unspecified: 7.47219e-6
- non-methane volatile organic compounds, Emissions to urban air close to ground: 0.00070607
- benzene, Emissions to urban air close to ground: 8.31933e-6
- particles (PM2.5), Emissions to urban air close to ground: 8.25488e-6
- nitrous oxide, Emissions to urban air close to ground: 2.94743e-5
- zinc, Emissions to urban air close to ground: 1.0272e-6
- particles (> PM10), Emissions to urban air close to ground: 7.66505e-5
- particles (PM2.5 - PM10), Emissions to urban air close to ground: 9.41737e-5
- nickel, Emissions to urban air close to ground: 2.59303e-7
- selenium, Emissions to urban air close to ground: 8.07983e-8
- chromium, Emissions to urban air close to ground: 8.51816e-8
- lead, Emissions to urban air close to ground: 3.74031e-8
- cadmium, Emissions to urban air close to ground: 1.00173e-8
- copper, Emissions to urban air close to ground: 1.34003e-7
- methane (fossil), Emissions to urban air close to ground: 1.21262e-5
- xylene (all isomers), Emissions to urban air close to ground: 3.32282e-6
- pentachlorophenol, Emissions to urban air close to ground: 2.60822e-11
- arsenic, Emissions to urban air close to ground: 5.89161e-8
- benzo[a]pyrene, Emissions to urban air close to ground: 2.17688e-8
- carbon dioxide (biogenic), Emissions to urban air close to ground: 2.1188
- cobalt, Emissions to urban air close to ground: 5.04657e-8
- ethanol, Emissions to urban air close to ground: 1.11851e-7
- fluorine, Emissions to urban air close to ground: 1.61001e-7
- iron, Emissions to urban air close to ground: 1.39998e-5
- m-xylene, Emissions to urban air close to ground: 3.86403e-7
- hydrogen chloride, Emissions to urban air close to ground: 3.87387e-6
- polycyclic aromatic hydrocarbons, Emissions to urban air close to ground: 4.48203e-8
- manganese, Emissions to urban air close to ground: 5.72879e-7
- pentane, Emissions to urban air close to ground: 1.07077e-6
- hexachlorobenzene, Emissions to urban air close to ground: 2.31842e-14
- Hydrocarbons, aromatic, Emissions to urban air close to ground: 5.72332e-8
- magnesium, Emissions to urban air close to ground: 8.79163e-6
- potassium, Emissions to urban air close to ground: 7.6879e-5
- sodium, Emissions to urban air close to ground: 6.75135e-6
- calcium, Emissions to urban air close to ground: 6.97274e-5
- vanadium, Emissions to urban air close to ground: 5.06756e-7
- bromine, Emissions to urban air close to ground: 2.08506e-7
- n-butane, Emissions to urban air close to ground: 6.33008e-7
- Hydrocarbons, aliphatic, unsaturated, Emissions to urban air close to ground: 1.50278e-5
- Hydrocarbons, aliphatic, alkanes, unspecified, Emissions to urban air close to ground: 8.20942e-6
- carbon monoxide (biogenic), Emissions to urban air close to ground: 0.00163288
- Phosphorus, Emissions to urban air close to ground: 1.0677e-6
- ethyl benzene, Emissions to urban air close to ground: 9.66006e-8
- chromium (vi), Emissions to urban air close to ground: 8.60339e-10
- molybdenum, Emissions to urban air close to ground: 4.74884e-8
- mercury, Emissions to urban air close to ground: 5.19023e-9
- methane (biogenic), Emissions to urban air close to ground: 4.07619e-5
- hydrogen fluoride, Emissions to urban air close to ground: 1.43146e-7
- propane, Emissions to urban air close to ground: 1.02582e-5
- 2,3,7,8-tetrachlorodibenzo-p-dioxin, Emissions to urban air close to ground: 1.02048e-13
- ethane, Emissions to urban air close to ground: 1.51037e-5
- nickel (ii), Emissions to water, unspecified: 1.02231e-8
- lead-210, Emissions to urban air close to ground: 6.24288e-5
- antimony, Emissions to urban air close to ground: 2.5475e-8
- polonium-210, Emissions to urban air close to ground: 0.000114788
- radium-226, Emissions to urban air close to ground: 1.61107e-5
- thallium, Emissions to urban air close to ground: 1.26871e-10
- tin, Emissions to urban air close to ground: 2.03397e-9
- titanium, Emissions to urban air close to ground: 2.5475e-7
- boron, Emissions to urban air close to ground: 1.14788e-5
- Silicon, Emissions to urban air close to ground: 0.000121837
- acetylene, Emissions to urban air close to ground: 5.03458e-6
- beryllium, Emissions to urban air close to ground: 2.5475e-9
- aluminium, Emissions to urban air close to ground: 1.19823e-5
- iodine, Emissions to urban air close to ground: 4.58147e-8
- barium, Emissions to urban air close to ground: 2.5475e-7
- propene, Emissions to urban air close to ground: 5.03458e-6
- radon-222, Emissions to urban air close to ground: 4.02766e-6
- strontium, Emissions to urban air close to ground: 2.66833e-7
- uranium-238, Emissions to urban air close to ground: 1.34927e-5
- potassium-40, Emissions to urban air close to ground: 1.68155e-5
- radium-228, Emissions to urban air close to ground: 8.65948e-6
- scandium, Emissions to urban air close to ground: 6.36371e-10
- thorium-232, Emissions to urban air close to ground: 4.63181e-6
- Uranium, Emissions to urban air close to ground: 5.08493e-9
- Thorium, Emissions to urban air close to ground: 3.05096e-9
- total reduced sulphur compounds, Emissions to air, unspecified: 3.02047e-5
- radon-220, Emissions to urban air close to ground: 4.02766e-6
- thorium-228, Emissions to urban air close to ground: 7.45118e-6
- sulfur dioxide, Emissions to air, unspecified (long-term) [AL]: 5.57818e-7
- sulfur dioxide, Emissions to air, unspecified (long-term) [AT]: 7.18713e-6
- sulfur dioxide, Emissions to air, unspecified (long-term) [BA]: 6.95399e-7
- sulfur dioxide, Emissions to air, unspecified (long-term) [BE]: 8.65083e-6
- sulfur dioxide, Emissions to air, unspecified (long-term) [BG]: 2.2152e-6
- sulfur dioxide, Emissions to air, unspecified (long-term) [BY]: 2.8764e-6
- sulfur dioxide, Emissions to air, unspecified (long-term) [CH]: 8.57185e-6
- sulfur dioxide, Emissions to air, unspecified (long-term) [CZ]: 5.96595e-6
- sulfur dioxide, Emissions to air, unspecified (long-term) [DE]: 6.49285e-5
- sulfur dioxide, Emissions to air, unspecified (long-term) [DK]: 4.70806e-6
- sulfur dioxide, Emissions to air, unspecified (long-term) [EE]: 6.42892e-7
- sulfur dioxide, Emissions to air, unspecified (long-term) [ES]: 2.78627e-5
- sulfur dioxide, Emissions to air, unspecified (long-term) [FI]: 4.01588e-6
- sulfur dioxide, Emissions to air, unspecified (long-term) [FR]: 4.58005e-5
- sulfur dioxide, Emissions to air, unspecified (long-term) [GB]: 4.55145e-5
- sulfur dioxide, Emissions to air, unspecified (long-term) [GR]: 5.17757e-6
- sulfur dioxide, Emissions to air, unspecified (long-term) [HR]: 1.66476e-6
- sulfur dioxide, Emissions to air, unspecified (long-term) [HU]: 4.36417e-6
- sulfur dioxide, Emissions to air, unspecified (long-term) [IE]: 4.70106e-6
- sulfur dioxide, Emissions to air, unspecified (long-term) [IT]: 3.9186e-5
- sulfur dioxide, Emissions to air, unspecified (long-term) [LT]: 1.37268e-6
- sulfur dioxide, Emissions to air, unspecified (long-term) [LU]: 9.52922e-7
- sulfur dioxide, Emissions to air, unspecified (long-term) [LV]: 8.09422e-7
- sulfur dioxide, Emissions to air, unspecified (long-term) [MD]: 4.2828e-7
- sulfur dioxide, Emissions to air, unspecified (long-term) [MK]: 4.76523e-7
- sulfur dioxide, Emissions to air, unspecified (long-term) [NL]: 1.45257e-5
- sulfur dioxide, Emissions to air, unspecified (long-term) [NO]: 5.4984e-6
- sulfur dioxide, Emissions to air, unspecified (long-term) [PL]: 1.67174e-5
- sulfur dioxide, Emissions to air, unspecified (long-term) [PT]: 5.27494e-6
- sulfur dioxide, Emissions to air, unspecified (long-term) [RO]: 7.32331e-6
- sulfur dioxide, Emissions to air, unspecified (long-term) [SE]: 7.93412e-6
- sulfur dioxide, Emissions to air, unspecified (long-term) [SI]: 1.12359e-6
- sulfur dioxide, Emissions to air, unspecified (long-term) [SK]: 2.63722e-6
- sulfur dioxide, Emissions to air, unspecified (long-term) [UA]: 7.73237e-6

## Impact indicators
- Eutrophication marine: 0.000550904
- Ecotoxicity, freshwater: 0.681662
- Land use: 0
- Water use: 0.0651611
- Resource use, minerals and metals: 0
- Resource use, fossils: 0
- Climate change: 0.188104
- Ozone depletion: 0
- Human toxicity, cancer: 1.47589e-10
- Human toxicity, non-cancer: 1.11737e-9
- EF-particulate Matter: 9.24556e-9
- Ionising radiation, human health: 1.85572e-5
- Photochemical ozone formation - human health: 0.00218859
- Acidification: 0.00137215
- Eutrophication, terrestrial: 0.00384205
- Eutrophication, freshwater: 1.1625e-5

## Deviations from the LCI method principle
The background data uses:
- the \xe2\x80\x9cRecycled content cut-off\xe2\x80\x9d approach to allocate end-of-life by-products and secondary materials. This allocation is explained in the description of the recycled content system model (http://www.ecoinvent.org/database/system-models-in-ecoinvent-3/cut-off-system-model/allocation-cut-off-by-classification.html).
OR
- EF compliant data

## Deviations from the LCI method approaches
Background data:
- the \xe2\x80\x9cRecycled content cut-off\xe2\x80\x9d approach to allocate end-of-life by-products and secondary materials. This allocation is explained in the description of the recycled content system model (http://www.ecoinvent.org/database/system-models-in-ecoinvent-3/cut-off-system-model/allocation-cut-off-by-classification.html). The ecoinvent database mostly relies on “Allocation – market values” apart for few exceptions particularly in the energy sector. ecoinvent energy data is replaced with EF3.0 core data as per the EF guidelines version 2.0.
OR
- EF compliant data

## Modelling constants
All modelling constants follow the requirements listed in the Tender Specifications 070201/2020/SER/ENV.B1. Completeness: There are no intentional cut-offs in the inventory no matter how small their contribution to all the EF impact categories is. Eventual cut-offs are in compliance with the Guide for EF compliant data sets (JRC 2020), i.e. only if below the 3% cut-off rule. Water use: water use is modelled at country level using separate flows for water withdrawal, water release and water evaporation. Handling multi-functional processes: the following PEF multi- functionality decision hierarchy is applied for resolving all multi- functionality problems: (1) subdivision or system expansion; (2) allocation based on a relevant underlying physical relationship (substitution may apply here); (3) allocation based on some other relationship. Direct land use change: GHG emissions from direct LUC allocated to good/service for 20 years after the LUC occurs, with IPCC default values. Carbon storage and delayed emissions: credits associated with temporary (carbon) storage or delayed emissions up to 300 years are not be considered. Emissions off-setting: are not included. Capital goods (including infrastructures) and their End of life: they are included. System boundaries: system boundaries include all processes linked to the product supply chain (e.g. maintenance). Time period: emissions and removals are modelled as if released or removed at the beginning of the assessment method. Fossil and biogenic carbon emissions and removals: removals and emissions are modelled as follows: All GHG emissions from fossil fuels (including peat and limestone) are modelled consistently with the most updated ILCD list of elementary flows. The non-fossil (biogenic) carbon flows are modelled consistently with the most updated ILCD list of elementary flows.

## Cut-off and completeness
There are no intentional cut-offs in the inventory no matter how small their contribution to all the EF impact categories is. Eventual cut-offs are in compliance with the Guide for EF compliant data sets (JRC 2020), i.e. only if below the 3% cut-off rule. The dataset dry mass and water balance has been checked to ensure the inventory is complete. Capital goods (e.g. infrastructure) and their end-of-life are included.

## Data selection and combination
These datasets include, in both their foreground and background data, links to EF3.0 compliant data.
The relevant background data on energy, transport, and End of Life are from the LCDN data node (http://lcdn.thinkstep.com/Node/).
All other background data in the supply of this product for which no EF3.0 process was available are from ecoinvent v3.7 database (www.ecoinvent.org) or other data sources.

## Data treatment and extrapolations
Several data sources have been used to model the inventory.

## Use advice
This data set is a supporting sub-data set and must be used exclusively as sub-data set of its corresponding level-1 partly disaggregated data set (see “General comment” field for exact name and UUID).

## Data sources
- Background Data for Representative products and organisations. EF 3.0 compliant (data stock)
- RISE Research Institutes of Sweden on behalf of CEPI-Eurokraft/Eurosac, (2020). LCA of Average European Sack Kraft Paper", available on request.

## Intended applications
Implementation of regular Product Environmental Footprint (PEF) studies and Organisation Environmental Footprint (OEF) studies exclusively under the specified Product groups and sectors as defined in the Product Environmental Footprint Category Rules (PEFCR) and Organisation Environmental Footprint Sectorial Rules (OEFSR) listed in http://ec.europa.eu/environment/eussd/smgp/PEFCR_OEFSR.htm
