# leather, alligator; technology mix; production mix, at plant; 1 m2

Dataset: ILCD process, Partly terminated system
Geography: GLO
Reference year: 2018
Valid until: 2024
Classification: Systems / Textiles, furnitures and other interiors
LCI method principle: Attributional
LCI method approaches: Allocation - market value
Completeness: All relevant flows quantified
Project: Provision of process-based 3.0 Environmental Footprint-compliant life cycle inventory datasets - Apparel 2 - contract number 070201/2020/840292/SER/ENV.B.1
Generated by: PRé Sustainability B.V.
Owner: PRé Sustainability B.V.
Compliance: ILCD Data Network - Entry-level; Suggestions for updating the PEF method 2019; ISO 14040 Environmental Management – Life Cycle Assessment – Principles and Framework, 2006; ISO 14044:2006. Environmental Management – Life Cycle Assessment – Requirements and guidelines.; Environmental Footprint 3.1
Review: Dependent internal review by Avraam Symeonidis, Marisa Vieira; Independent review panel by Madhuri Nigam
Data quality: Overall quality: Fair; Time representativeness: Good; Geographical representativeness: Fair; Technological representativeness: Fair; Precision: Good; Methodological appropriateness and consistency: Not applicable
Amounts: no units in this file; such an amount is in the reference unit of its flow, which a separate flow dataset defines
copyright: true
licenseType: Free of charge for some user types or use types
accessRestrictions: Free of charge for all final users implementing a regular Product Environmental Footprint (PEF) studies and Organisation Environmental Footprint (OEF) studies exclusively under the specified Product groups and sectors as defined in the Product Environmental Footprint Category Rules (PEFCR) and Organisation Environmental Footprint Sectorial Rules (OEFSR) listed in http://ec.europa.eu/environment/eussd/smgp/PEFCR_OEFSR.htm and in accordance with the terms and conditions of the EULA (available at https://ecoinvent.lca-data.com/) exclusively until 31st December 2024. Any use of this dataset or any derivative data not within the specific context of one of the PEF/OEF projects or after the end of 2024 is not permitted.

## General comment
Notice: this data set supersedes the EF3.0-compliant version (see link under "preceding data set version" below calculated with the EF3.0). The life cycle inventory is not changed from the original EF3.0 data set. The LCIA results are calculated based on the EF3.1 methods which provide updated characterisation factors in the following impact categories: Climate Change, Ecotoxicity freshwater, Photochemical Ozone Formation, Acidification, Human Toxicity non-cancer, and Human Toxicity cancer. The review report and the data quality ratings refer to the original results. The data set has been updated by the European Commission on the basis of the original EF3.0 data set delivered by the data provider.The dataset "alligator leather" represent the production of reptile skins from the egg to the tanned and finished skins.

## Technology and included processes
The data was collected at a reptile farm in the USA . The dataset includes following steps:
- Collection of eggs in the wild (alligator)
- Reptile farming
- Slaughtering and skin salting
- Transport to the tanning facility
- Tanning and finishing

## Parameters
- kg_0: 0.9
  Mass in kg, for alligators salted skins, at slaughterhouse // alligators salted skins, at slaughterhouse // us; Articulated lorry transport, Total weight >32 t, mix Euro 0-5; ROW w/o EU+EFTA
- km_0: 3700
  Distance in km, for alligators salted skins, at slaughterhouse // alligators salted skins, at slaughterhouse // us; Articulated lorry transport, Total weight >32 t, mix Euro 0-5; ROW w/o EU+EFTA
- kg_km_0: 3330; = kg_0*km_0
  Transport amount in km*km, for alligators salted skins, at slaughterhouse // alligators salted skins, at slaughterhouse // us; Articulated lorry transport, Total weight >32 t, mix Euro 0-5; ROW w/o EU+EFTA

## Reference product
- leather, alligator // leather, alligator // glo: 1

## Inputs
- Transport of alligators salted skins, at slaughterhouse // alligators salted skins, at slaughterhouse // us by Articulated lorry transport, Total weight >32 t, mix Euro 0-5 - ROW w/o EU+EFTA: 3330; = kg_km_0
- leather, alligator // leather, alligator // glo, blackbox: 1
- leather, alligator // leather, alligator // glo, elementary: 1

## Impact indicators
- Eutrophication marine: 0.789985
- Ecotoxicity, freshwater: 5077.96
- Land use: 3629.49
- Water use: 737.019
- Resource use, minerals and metals: 0.00231865
- Resource use, fossils: 9205.14
- Climate change: 669.987
- Ozone depletion: 0.00013595
- Human toxicity, cancer: 5.70099e-7
- Human toxicity, non-cancer: 6.45008e-6
- EF-particulate Matter: 2.61694e-5
- Ionising radiation, human health: 65.0386
- Photochemical ozone formation - human health: 1.86867
- Acidification: 3.06735
- Eutrophication, terrestrial: 8.27274
- Eutrophication, freshwater: 0.130908

## Deviations from the LCI method approaches
Economic allocation at slaughterhouse following a similar decision in the PEF and OEF methods for allocation of multi-output product at slaughterhouse from cattle product

## Modelling constants
All modelling constants follow the requirements listed in the Tender Specifications ENV.B.1/SER/2016/0038vl. Completeness: All known environmental flows are included. All known resource uses and emissions are listed in the inventory. Water use: water use is modelled at country level using separate flows for water withdrawal, water release and water evaporation. Cut-off: All known environmental flows are included. All known resource uses and emissions are listed in the inventory. Handling multi-functional processes: the following PEF multi- functionality decision hierarchy is applied for resolving all multi- functionality problems: (1) subdivision or system expansion; (2) allocation based on a relevant underlying physical relationship (substitution may apply here); (3) allocation based on some other relationship. Direct land use change: GHG emissions from direct LUC allocated to good/service for 20 years after the LUC occurs, with IPCC default values. Carbon storage and delayed emissions: credits associated with temporary (carbon) storage or delayed emissions up to 300 years are not be considered. Emissions off-setting: are not included. Capital goods (including infrastructures) and their End of life: they are included. System boundaries: system boundaries include all processes linked to the product supply chain (e.g. maintenance). Time period: emissions and removals are modelled as if released or removed at the beginning of the assessment method. Fossil and biogenic carbon emissions and removals: removals and emissions are modelled as follows: All GHG emissions from fossil fuels (including peat and limestone) are modelled consistently with the most updated ILCD list of elementary flows. The non-fossil (biogenic) carbon flows are modelled consistently with the most updated ILCD list of elementary flows.

## Cut-off and completeness
All known environmental flows are included. All known resource uses and emissions are listed in the inventory. The dataset dry mass balance has been checked to ensure the inventory is complete. Capital goods (e.g. infrastructure) and their end-of-life are included.

## Data selection and combination
These datasets include, in both their foreground and background data, links to EF3.0 compliant data.
The relevant background data on energy, transport, and End of Life are from the LCDN data node (http://lcdn.thinkstep.com/Node/).
All other background data in the supply of this product for which no EF3.0 process was available are from ecoinvent v3.7 database (www.ecoinvent.org) or other data sources.

## Data treatment and extrapolations
Several data sources have been used to model the inventory.

## Review details
Internal reviews have been asked to review the plausibility of the unit process, LCIA scores, and DQRs. Internal reviewers have also been asked to review the data for EF compliancy. The consortium is therefore responsible for aspects such as compliancy with the ILCD format, including validation in Look@LCI, and nomenclature.
Internal reviwers have been asked to judge based on the process name, that the unit process models in a complete and representative way the process in the requested location. The review encompassed the plausability of:
- exchanges with nature (elementary flows) as well as exchanges such as product and waste flows.
- meta information (general comment, technology comment, system boundaries, allocation, cut-off rules, etc.). Reviewers were asked to judge if the provided information is enough to understand the content of the process.
- LCIA scores
- DQRs including precision, technology, time and geography. As well as the overall DQR.
External reviewers have been asked to provide their expertise in the field of interest. External reviewers have been asked to review the unit process, including eventual methodological choices, the LCIA scores (provided with contribution scores as well), and DQRs. External reviewers have been provided all the information in a tool developed by the consortium for the purpose of this project.
External reviewers have been asked to judge based on the process name, that the unit process models in a complete and representative way the process in the requested location. The review encompassed:
- Plausability and completeness of exchanges with nature (elementary flows) as well as exchanges such as product and waste flows.
- Review of meta information (general comment, technology comment, system boundaries, allocation, cut-off rules, etc.). Reviewers were asked to judge if the provided information is enough to understand the content of the process.
- Review of properties (biogenic carbon and water content).
- Review of allocation keys.
- Plausability of LCIA scores calculated by the consortium.
- Plausability of DQRs including precision, technology, time and geography. As well as the overall DQR.

## Data sources
- Background Data for Representative products and organisations. EF 3.0 compliant (data stock)
- Quantis International. ‘World Apparel and Footwear Life Cycle Assessment Database (WALDB: Apparel + Footwear)’. Quantis. Accessed 21 July 2021. https://quantis-intl.com/metrics/databases/waldb-apparel-footwear/.
- UNIDO. ‘The Tanning and Industrial Production of Reptile Leather under Conditions Encountered in Developing Countries’, 1971. https://open.unido.org/api/documents/4685419/download/THE%20TANNING%20AND%20INDUSTRIAL%20PRODUCTION%20OF%20REPTILE%20LEATHER%20UNDER%20CONDITIONS%20ENCOUNTERED%20IN%20DEVELOPING%20COUNTRIES%20(02323d.en).

## Intended applications
Implementation of regular Product Environmental Footprint (PEF) studies and Organisation Environmental Footprint (OEF) studies exclusively under the specified Product groups and sectors as defined in the Product Environmental Footprint Category Rules (PEFCR) and Organisation Environmental Footprint Sectorial Rules (OEFSR) listed in http://ec.europa.eu/environment/eussd/smgp/PEFCR_OEFSR.htm
