# cashmere fiber; raw; production mix

Dataset: ILCD process, Partly terminated system
Geography: GLO
Reference year: 2005
Valid until: 2024
Classification: Materials production / Food and renewable raw materials
LCI method principle: Attributional
LCI method approaches: Allocation - market value
Completeness: All relevant flows quantified
Project: Provision of process-based 3.0 Environmental Footprint-compliant life cycle inventory datasets - Renewable materials - contract number 070201/2020/840085/SER/ENV.B.1
Generated by: ACV Brasil
Owner: Blonk Sustainability Tools
Compliance: ILCD Data Network - Entry-level; Suggestions for updating the PEF method 2019; ISO 14040 Environmental Management – Life Cycle Assessment – Principles and Framework, 2006; ISO 14044:2006. Environmental Management – Life Cycle Assessment – Requirements and guidelines.; Environmental Footprint 3.1
Review: Dependent internal review by Avraam Symeonidis, Emilia Moreno Ruiz; Independent review panel by Philippa Notten
Data quality: Overall quality: Good; Time representativeness: Very good; Geographical representativeness: Good; Technological representativeness: Very good; Precision: Good; Methodological appropriateness and consistency: Not applicable
Amounts: no units in this file; such an amount is in the reference unit of its flow, which a separate flow dataset defines
copyright: true
licenseType: Free of charge for some user types or use types
accessRestrictions: Free of charge for all final users implementing a regular Product Environmental Footprint (PEF) studies and Organisation Environmental Footprint (OEF) studies exclusively under the specified Product groups and sectors as defined in the Product Environmental Footprint Category Rules (PEFCR) and Organisation Environmental Footprint Sectorial Rules (OEFSR) listed in http://ec.europa.eu/environment/eussd/smgp/PEFCR_OEFSR.htm and in accordance with the terms and conditions of the EULA (available at https://ecoinvent.lca-data.com/) exclusively until 31st December 2024. Any use of this dataset or any derivative data not within the specific context of one of the PEF/OEF projects or after the end of 2024 is not permitted.

## General comment
Notice: this data set supersedes the EF3.0-compliant version (see link under "preceding data set version" below calculated with the EF3.0). The life cycle inventory is not changed from the original EF3.0 data set. The LCIA results are calculated based on the EF3.1 methods which provide updated characterisation factors in the following impact categories: Climate Change, Ecotoxicity freshwater, Photochemical Ozone Formation, Acidification, Human Toxicity non-cancer, and Human Toxicity cancer. The review report and the data quality ratings refer to the original results. The data set has been updated by the European Commission on the basis of the original EF3.0 data set delivered by the data provider.Cashmere is a noble ancient natural fibre extracted from the downy under layer of hair on a goat. Almost all cashmere comes from the Central and East Asian steppe, which provide the ideal cold and dry conditions for producing high-quality fibre (SFA 2021). Mongolia and China are the biggest producers, contributing approximately 85% of the world’s supply (SFA 2021). Cashmere fibre is used to make a variety of fashion and luxury woollen products such as scarves, shawls, pullovers and cardigans (ISHRAT et al. 2018). The value of cashmere to the consumer relates to the properties of the product itself (softness, fineness) and the traditions and practices associated with its production (ISHRAT et al. 2018). In the last few decades, the automation of cashmere manufacturing is fast replacing the centuries-old traditional practices and there is an increase in demand worldwide, and especially in Europe (ISHRAT et al. 2018 and UNDP Mongolia 2019).
Ishrat S.I., Grigg N.P., Jayamaha N., Pulakanam V. Cashmere Industry: Value Chains and Sustainability. In: Lo C., Ha-Brookshire J. (eds) Sustainability in Luxury Fashion Business. Springer Series in Fashion Business. Springer, Singapore. 2018. https://doi.org/10.1007/978-981-10-8878-0_7
SFA. Sustainable Fiber Alliance. https://sustainablefibre.org/about-cashmere/. 2021.
UNDP Mongolia. Sustainable cashmere from Mongolia: a market assessment. 2019.

## Technology and included processes
This dataset aims at representing the production of (raw) cashmere fibre produced globally. Production quantities from the major producers worldwide, China (15437,8 tones) and Mongolia (9800 tones), in 2019, are used to calculate a share of extensive rangelands/intensive farming (approximately 40%/60%). The activity starts with grazing herds on privately owned intensive farms or communally owned rangelands. On the farms, the grazing pasture is not always sufficient to last the full year and goats are often brought indoors and fed hay over the winter months. On the rangelands, supplementary feeding is assumed only during winter. All activities of a goat farm are included, that is all inputs as feeds, straw, water (watering and cleaning), fuels and energy as well as the transport of these inputs to the farm; the housing for animals; the enteric emissions as well as emissions due to the effluent management. The activity ends with the hair being manually or electronically sheared.
The allocation of upstream burdens at the farm/rangeland level among goat outputs leaving the farm/rangeland is retrieved from the Product Environmental Footprint Category Rules Guidance – PEFCR Guidance (EC, 2018). The allocation factors have been calculated according to the biophysical approach: Goat milk (73.9%), meat (2.51%) and hair (23.64%).

## Reference product
- cashmere fiber (raw), at farm/rangeland // cashmere fiber // glo: 1

## Inputs
- cashmere fiber (raw), at farm/rangeland // cashmere fiber // glo, blackbox: 1
- cashmere fiber (raw), at farm/rangeland // cashmere fiber // glo, elementary: 1

## Impact indicators
- Eutrophication marine: 729.708
- Ecotoxicity, freshwater: 5.28213e6
- Land use: 2.41254e7
- Water use: 77312.5
- Resource use, minerals and metals: 0.203281
- Resource use, fossils: 220526
- Climate change: 64858.9
- Ozone depletion: 0.000104209
- Human toxicity, cancer: 1.64353e-5
- Human toxicity, non-cancer: 0.000326915
- EF-particulate Matter: 0.00844554
- Ionising radiation, human health: 568.231
- Photochemical ozone formation - human health: 114.858
- Acidification: 958.728
- Eutrophication, terrestrial: 4182.32
- Eutrophication, freshwater: 8.96406

## Deviations from the LCI method principle
The background data uses:
- the \xe2\x80\x9cRecycled content cut-off\xe2\x80\x9d approach to allocate end-of-life by-products and secondary materials. This allocation is explained in the description of the recycled content system model (http://www.ecoinvent.org/database/system-models-in-ecoinvent-3/cut-off-system-model/allocation-cut-off-by-classification.html).
OR
- EF compliant data

## Deviations from the LCI method approaches
Background data:
- implemented within the processes producing cashmere inputs: 0.0132384524637917 from biophysical allocation: fator calculated based on IPCC (2019) formulas of the energy requirements for maintenance, activity, lactation, gestation, and fibre, considering lowland cashmere goats from Asia, and following the animal class allocation metodology from Koch and Salou (2020)
- the \xe2\x80\x9cRecycled content cut-off\xe2\x80\x9d approach to allocate end-of-life by-products and secondary materials. This allocation is explained in the description of the recycled content system model (http://www.ecoinvent.org/database/system-models-in-ecoinvent-3/cut-off-system-model/allocation-cut-off-by-classification.html). The ecoinvent database mostly relies on “Allocation – market values” apart for few exceptions particularly in the energy sector. ecoinvent energy data is replaced with EF3.0 core data as per the EF guidelines version 2.0.
OR
- EF compliant data

## Modelling constants
All modelling constants follow the requirements listed in the Tender Specifications 070201/2020/SER/ENV.B1. Completeness: There are no intentional cut-offs in the inventory no matter how small their contribution to all the EF impact categories is. Eventual cut-offs are in compliance with the Guide for EF compliant data sets (JRC 2020), i.e. only if below the 3% cut-off rule. Water use: water use is modelled at country level using separate flows for water withdrawal, water release and water evaporation. Handling multi-functional processes: the following PEF multi- functionality decision hierarchy is applied for resolving all multi- functionality problems: (1) subdivision or system expansion; (2) allocation based on a relevant underlying physical relationship (substitution may apply here); (3) allocation based on some other relationship. Direct land use change: GHG emissions from direct LUC allocated to good/service for 20 years after the LUC occurs, with IPCC default values. Carbon storage and delayed emissions: credits associated with temporary (carbon) storage or delayed emissions up to 300 years are not be considered. Emissions off-setting: are not included. Capital goods (including infrastructures) and their End of life: they are included. System boundaries: system boundaries include all processes linked to the product supply chain (e.g. maintenance). Time period: emissions and removals are modelled as if released or removed at the beginning of the assessment method. Fossil and biogenic carbon emissions and removals: removals and emissions are modelled as follows: All GHG emissions from fossil fuels (including peat and limestone) are modelled consistently with the most updated ILCD list of elementary flows. The non-fossil (biogenic) carbon flows are modelled consistently with the most updated ILCD list of elementary flows.

## Cut-off and completeness
There are no intentional cut-offs in the inventory no matter how small their contribution to all the EF impact categories is. Eventual cut-offs are in compliance with the Guide for EF compliant data sets (JRC 2020), i.e. only if below the 3% cut-off rule. The dataset dry mass and water balance has been checked to ensure the inventory is complete. Capital goods (e.g. infrastructure) and their end-of-life are included.

## Data selection and combination
These datasets include, in both their foreground and background data, links to EF3.0 compliant data.
The relevant background data on energy, transport, and End of Life are from the LCDN data node (http://lcdn.thinkstep.com/Node/).
All other background data in the supply of this product for which no EF3.0 process was available are from ecoinvent v3.7 database (www.ecoinvent.org) or other data sources.

## Data treatment and extrapolations
Several data sources have been used to model the inventory.

## Review details
Internal reviews have been asked to review the plausibility of the unit process, LCIA scores, and DQRs. Internal reviewers have also been asked to review the data for EF compliancy. The consortium is therefore responsible for aspects such as compliancy with the ILCD format, including validation in Look@LCI, and nomenclature.
Internal reviwers have been asked to judge based on the process name, that the unit process models in a complete and representative way the process in the requested location. The review encompassed the plausability of:
- exchanges with nature (elementary flows) as well as exchanges such as product and waste flows.
- meta information (general comment, technology comment, system boundaries, allocation, cut-off rules, etc.). Reviewers were asked to judge if the provided information is enough to understand the content of the process.
- LCIA scores
- DQRs including precision, technology, time and geography. As well as the overall DQR.
External reviewers have been asked to provide their expertise in the field of interest. External reviewers have been asked to review the unit process, including eventual methodological choices, the LCIA scores (provided with contribution scores as well), and DQRs. External reviewers have been provided all the information in a tool developed by the consortium for the purpose of this project.
External reviewers have been asked to judge based on the process name, that the unit process models in a complete and representative way the process in the requested location. The review encompassed:
- Plausability and completeness of exchanges with nature (elementary flows) as well as exchanges such as product and waste flows.
- Review of meta information (general comment, technology comment, system boundaries, allocation, cut-off rules, etc.). Reviewers were asked to judge if the provided information is enough to understand the content of the process.
- Review of properties (biogenic carbon and water content).
- Review of allocation keys.
- Plausability of LCIA scores calculated by the consortium.
- Plausability of DQRs including precision, technology, time and geography. As well as the overall DQR.

## Data sources
- Background Data for Representative products and organisations. EF 3.0 compliant (data stock)
- Bynie, B. MONGOLIA: THE COUNTRY REFORT ON ANIMAL GENETIC RESOURCES. National Consultative Committee on Animal genetic resources of Mongolia Ulaanbaatar, September 2002.
- Hunter, L. Mohair, Cashmere and other animal hair fibers. In: Kozlowski et al. Handbook of Natural Fibres: Vol. 1: Types, Properties and Factors Affecting Breeding and Cultivation. Ensevier, 2020.
- IPCC (2019). Chapter 10: Emissions from Livestoch and Manure Management. Refinement to the 2006 IPCC Guidelines for National Greenhouse Gas Inventories.
- Jordan et al. Spatio-temporal patterns of herbage availability and livestock movements: A cross-border analysis in the Chinese-Mongolian Altay. Pastoralism volume 6, Article number: 12 (2016).
- Koch, P., Salou, T. AGRIBALYSE® : METHODOLOGY, AGRICULTURAL STAGE. Version 3.0. April 2020.
- SFA. Sustainable Fiber Alliance. https://sustainablefibre.org/about-cashmere/. 2021.
- The Schneider Group (2020). ANNUAL CASHMERE MARKET REPORT 2019. Available at: https://www.gschneider.com/2020/03/30/annual-cashmere-market-report-2019/
- Wang et al. Relationships between cashmere production and other important economic traits of Inner Mongolia cashmere goats. ITALIAN JOURNAL OF ANIMAL SCIENCE 2019, VOL. 18, NO. 1, 1154–1160.

## Intended applications
Implementation of regular Product Environmental Footprint (PEF) studies and Organisation Environmental Footprint (OEF) studies exclusively under the specified Product groups and sectors as defined in the Product Environmental Footprint Category Rules (PEFCR) and Organisation Environmental Footprint Sectorial Rules (OEFSR) listed in http://ec.europa.eu/environment/eussd/smgp/PEFCR_OEFSR.htm
