# eucalyptus forestry; technology mix; production mix, at plantation; 1 kg of DM (average basic wood density 500 kg/m³)

Dataset: ILCD process, Partly terminated system
Geography: EU+EFTA+UK
Reference year: 2018
Valid until: 2024
Classification: Materials production / Wood
LCI method principle: Attributional
LCI method approaches: Allocation - market value
Completeness: All relevant flows quantified
Project: Provision of process-based 3.0 Environmental Footprint-compliant life cycle inventory datasets - Renewable materials - contract number 070201/2020/840085/SER/ENV.B.1
Generated by: ACV Brasil
Owner: ecoinvent
Compliance: ILCD Data Network - Entry-level; Suggestions for updating the PEF method 2019; ISO 14040 Environmental Management – Life Cycle Assessment – Principles and Framework, 2006; ISO 14044:2006. Environmental Management – Life Cycle Assessment – Requirements and guidelines.; Environmental Footprint 3.1
Review: Dependent internal review by Hans Blonk, Lucia Valsasina; Independent review panel by Laura Batlle Bayer
Data quality: Overall quality: Very good; Time representativeness: Good; Geographical representativeness: Very good; Technological representativeness: Very good; Precision: Very good; Methodological appropriateness and consistency: Not applicable
Amounts: no units in this file; such an amount is in the reference unit of its flow, which a separate flow dataset defines
copyright: true
licenseType: Free of charge for some user types or use types
accessRestrictions: Free of charge for all final users implementing a regular Product Environmental Footprint (PEF) studies and Organisation Environmental Footprint (OEF) studies exclusively under the specified Product groups and sectors as defined in the Product Environmental Footprint Category Rules (PEFCR) and Organisation Environmental Footprint Sectorial Rules (OEFSR) listed in http://ec.europa.eu/environment/eussd/smgp/PEFCR_OEFSR.htm and in accordance with the terms and conditions of the EULA (available at https://ecoinvent.lca-data.com/) exclusively until 31st December 2024. Any use of this dataset or any derivative data not within the specific context of one of the PEF/OEF projects or after the end of 2024 is not permitted.

## General comment
Notice: this data set supersedes the EF3.0-compliant version (see link under "preceding data set version" below calculated with the EF3.0). The life cycle inventory is not changed from the original EF3.0 data set. The LCIA results are calculated based on the EF3.1 methods which provide updated characterisation factors in the following impact categories: Climate Change, Ecotoxicity freshwater, Photochemical Ozone Formation, Acidification, Human Toxicity non-cancer, and Human Toxicity cancer. The review report and the data quality ratings refer to the original results. The data set has been updated by the European Commission on the basis of the original EF3.0 data set delivered by the data provider.This dataset represents the production of 1 kg of Eucalyptus on a dry mass basis. Inventory for diesel consumption by forestry machinery, productivity and rotation period are retrieved from EFO-LCI: A New Life Cycle Inventory Database of Forestry Operations in Europe (Cardellini et al., 2018). The arithmetic average of the inventory data for production of Eucalyptus in Portugal and Spain was calculated from EFO-LCI. Other specific exchange flows not available in EFO-LCI are extrapolated from data reported by two pulp and paper companies in Brazil. The sites used to represent European production are the ones located in the Southern and Southeast regions of Brazil, namely in the states of São Paulo and Paraná. These sites have been selected because they are classified with a subtropical climate, according to the Köppen-Geiger classification, while other sites are located in a tropical climate region. The average basic wood density considered is 500 kg/m³ (Cardellini et al., 2018).

## Technology and included processes
The production of Eucalyptus starts with the cultivation of seedlings in greenhouses, which are transplanted to the plantation area. Machines are used for site preparation. Eucalyptus cultivation is enhanced by means of herbicides, pesticides and fertilizers, especially in the first years of growth. After a growing period of eleven years, machines are used for thinning and clear cut of the trees (Cardellini et al., 2018).
This activity includes the seedling production, the inputs of fertilizers, herbicides and pesticides as well as the fuel burned in the machines.
References:
Cardellini, G., Valada, T., Cornillier, C., Vial, E., Dragoi, M., Goudiaby, V., Muys, B. (2018). EFO-LCI: A new life cycle inventory database of forestry operations in Europe. Environmental Management, 61(6), 1031-1047.

## Parameters
- kg_0: 0.00539896
  Mass in kg, for dolomite; Barge; EU+EFTA+UK
- km_0: 21.869
  Distance in km, for dolomite; Barge; EU+EFTA+UK
- kg_km_0: 0.11807; = kg_0*km_0
  Transport amount in km*km, for dolomite; Barge; EU+EFTA+UK
- kg_1: 0.00539896
  Mass in kg, for dolomite; Articulated lorry transport, Euro 4, Total weight >32 t; EU+EFTA+UK
- km_1: 171.299
  Distance in km, for dolomite; Articulated lorry transport, Euro 4, Total weight >32 t; EU+EFTA+UK
- kg_km_1: 0.924837; = kg_1*km_1
  Transport amount in km*km, for dolomite; Articulated lorry transport, Euro 4, Total weight >32 t; EU+EFTA+UK
- kg_2: 0.00539896
  Mass in kg, for dolomite; Freight train, diesel traction; EU+EFTA+UK
- km_2: 17.0024
  Distance in km, for dolomite; Freight train, diesel traction; EU+EFTA+UK
- kg_km_2: 0.0917955; = kg_2*km_2
  Transport amount in km*km, for dolomite; Freight train, diesel traction; EU+EFTA+UK
- kg_3: 0.00539896
  Mass in kg, for dolomite; Freight train, electricity traction; EU+EFTA+UK
- km_3: 26.8172
  Distance in km, for dolomite; Freight train, electricity traction; EU+EFTA+UK
- kg_km_3: 0.144785; = kg_3*km_3
  Transport amount in km*km, for dolomite; Freight train, electricity traction; EU+EFTA+UK
- kg_4: 1.47572e-5
  Mass in kg, for crude vegetable oil blend, from crushing, at plant // rer; Freight train, average; EU+EFTA+UK
- km_4: 240
  Distance in km, for crude vegetable oil blend, from crushing, at plant // rer; Freight train, average; EU+EFTA+UK
- kg_km_4: 0.00354172; = kg_4*km_4
  Transport amount in km*km, for crude vegetable oil blend, from crushing, at plant // rer; Freight train, average; EU+EFTA+UK
- kg_5: 1.50897e-5
  Mass in kg, for polyacrylamide // polyacrylamide production // eu+efta+uk; Freight train, average; EU+EFTA+UK
- km_5: 240
  Distance in km, for polyacrylamide // polyacrylamide production // eu+efta+uk; Freight train, average; EU+EFTA+UK
- kg_km_5: 0.00362153; = kg_5*km_5
  Transport amount in km*km, for polyacrylamide // polyacrylamide production // eu+efta+uk; Freight train, average; EU+EFTA+UK
- kg_6: 3.27175e-7
  Mass in kg, for urea, per kg n, production mix, at plant // urea, per kg n // eu+efta+uk; Freight train, average; EU+EFTA+UK
- km_6: 240
  Distance in km, for urea, per kg n, production mix, at plant // urea, per kg n // eu+efta+uk; Freight train, average; EU+EFTA+UK
- kg_km_6: 7.8522e-5; = kg_6*km_6
  Transport amount in km*km, for urea, per kg n, production mix, at plant // urea, per kg n // eu+efta+uk; Freight train, average; EU+EFTA+UK
- kg_7: 0.000716753
  Mass in kg, for pesticide, unspecified // pesticide production, unspecified // rer; Freight train, average; EU+EFTA+UK
- km_7: 240
  Distance in km, for pesticide, unspecified // pesticide production, unspecified // rer; Freight train, average; EU+EFTA+UK
- kg_km_7: 0.172021; = kg_7*km_7
  Transport amount in km*km, for pesticide, unspecified // pesticide production, unspecified // rer; Freight train, average; EU+EFTA+UK
- kg_8: 2.6193e-5
  Mass in kg, for glyphosate // glyphosate // eu+efta+uk; Freight train, average; EU+EFTA+UK
- km_8: 240
  Distance in km, for glyphosate // glyphosate // eu+efta+uk; Freight train, average; EU+EFTA+UK
- kg_km_8: 0.00628632; = kg_8*km_8
  Transport amount in km*km, for glyphosate // glyphosate // eu+efta+uk; Freight train, average; EU+EFTA+UK
- kg_9: 9.16755e-5
  Mass in kg, for mono ammonium phosphate, per kg n, production mix, at plant // mono ammonium phosphate, per kg n // eu+efta+uk; Freight train, average; EU+EFTA+UK
- km_9: 240
  Distance in km, for mono ammonium phosphate, per kg n, production mix, at plant // mono ammonium phosphate, per kg n // eu+efta+uk; Freight train, average; EU+EFTA+UK
- kg_km_9: 0.0220021; = kg_9*km_9
  Transport amount in km*km, for mono ammonium phosphate, per kg n, production mix, at plant // mono ammonium phosphate, per kg n // eu+efta+uk; Freight train, average; EU+EFTA+UK
- kg_10: 0.000214016
  Mass in kg, for triple super phosphate, per kg substance, production mix, at plant // triple super phosphate, per kg substance // eu+efta+uk; Freight train, average; EU+EFTA+UK
- km_10: 240
  Distance in km, for triple super phosphate, per kg substance, production mix, at plant // triple super phosphate, per kg substance // eu+efta+uk; Freight train, average; EU+EFTA+UK
- kg_km_10: 0.0513638; = kg_10*km_10
  Transport amount in km*km, for triple super phosphate, per kg substance, production mix, at plant // triple super phosphate, per kg substance // eu+efta+uk; Freight train, average; EU+EFTA+UK
- kg_11: 0.000505329
  Mass in kg, for inorganic potassium fertiliser, as k2o // nutrient supply from potassium chloride // rer; Freight train, average; EU+EFTA+UK
- km_11: 119.849
  Distance in km, for inorganic potassium fertiliser, as k2o // nutrient supply from potassium chloride // rer; Freight train, average; EU+EFTA+UK
- kg_km_11: 0.0605633; = kg_11*km_11
  Transport amount in km*km, for inorganic potassium fertiliser, as k2o // nutrient supply from potassium chloride // rer; Freight train, average; EU+EFTA+UK
- kg_12: 1.07487e-5
  Mass in kg, for wax // wax production // eu+efta+uk; Freight train, average; EU+EFTA+UK
- km_12: 240
  Distance in km, for wax // wax production // eu+efta+uk; Freight train, average; EU+EFTA+UK
- kg_km_12: 0.00257969; = kg_12*km_12
  Transport amount in km*km, for wax // wax production // eu+efta+uk; Freight train, average; EU+EFTA+UK
- kg_13: 0.000475946
  Mass in kg, for acrylic acid // acrylic acid production // eu+efta+uk; Freight train, average; EU+EFTA+UK
- km_13: 240
  Distance in km, for acrylic acid // acrylic acid production // eu+efta+uk; Freight train, average; EU+EFTA+UK
- kg_km_13: 0.114227; = kg_13*km_13
  Transport amount in km*km, for acrylic acid // acrylic acid production // eu+efta+uk; Freight train, average; EU+EFTA+UK
- kg_14: 1.47572e-5
  Mass in kg, for crude vegetable oil blend, from crushing, at plant // rer; Barge; EU+EFTA+UK
- km_14: 270
  Distance in km, for crude vegetable oil blend, from crushing, at plant // rer; Barge; EU+EFTA+UK
- kg_km_14: 0.00398443; = kg_14*km_14
  Transport amount in km*km, for crude vegetable oil blend, from crushing, at plant // rer; Barge; EU+EFTA+UK
- kg_15: 1.50897e-5
  Mass in kg, for polyacrylamide // polyacrylamide production // eu+efta+uk; Barge; EU+EFTA+UK
- km_15: 270
  Distance in km, for polyacrylamide // polyacrylamide production // eu+efta+uk; Barge; EU+EFTA+UK
- kg_km_15: 0.00407422; = kg_15*km_15
  Transport amount in km*km, for polyacrylamide // polyacrylamide production // eu+efta+uk; Barge; EU+EFTA+UK
- kg_16: 3.27175e-7
  Mass in kg, for urea, per kg n, production mix, at plant // urea, per kg n // eu+efta+uk; Barge; EU+EFTA+UK
- km_16: 270
  Distance in km, for urea, per kg n, production mix, at plant // urea, per kg n // eu+efta+uk; Barge; EU+EFTA+UK
- kg_km_16: 8.83373e-5; = kg_16*km_16
  Transport amount in km*km, for urea, per kg n, production mix, at plant // urea, per kg n // eu+efta+uk; Barge; EU+EFTA+UK
- kg_17: 0.000716753
  Mass in kg, for pesticide, unspecified // pesticide production, unspecified // rer; Barge; EU+EFTA+UK
- km_17: 270
  Distance in km, for pesticide, unspecified // pesticide production, unspecified // rer; Barge; EU+EFTA+UK
- kg_km_17: 0.193523; = kg_17*km_17
  Transport amount in km*km, for pesticide, unspecified // pesticide production, unspecified // rer; Barge; EU+EFTA+UK
- kg_18: 2.6193e-5
  Mass in kg, for glyphosate // glyphosate // eu+efta+uk; Barge; EU+EFTA+UK
- km_18: 270
  Distance in km, for glyphosate // glyphosate // eu+efta+uk; Barge; EU+EFTA+UK
- kg_km_18: 0.00707211; = kg_18*km_18
  Transport amount in km*km, for glyphosate // glyphosate // eu+efta+uk; Barge; EU+EFTA+UK
- kg_19: 9.16755e-5
  Mass in kg, for mono ammonium phosphate, per kg n, production mix, at plant // mono ammonium phosphate, per kg n // eu+efta+uk; Barge; EU+EFTA+UK
- km_19: 270
  Distance in km, for mono ammonium phosphate, per kg n, production mix, at plant // mono ammonium phosphate, per kg n // eu+efta+uk; Barge; EU+EFTA+UK
- kg_km_19: 0.0247524; = kg_19*km_19
  Transport amount in km*km, for mono ammonium phosphate, per kg n, production mix, at plant // mono ammonium phosphate, per kg n // eu+efta+uk; Barge; EU+EFTA+UK
- kg_20: 0.000214016
  Mass in kg, for triple super phosphate, per kg substance, production mix, at plant // triple super phosphate, per kg substance // eu+efta+uk; Barge; EU+EFTA+UK
- km_20: 270
  Distance in km, for triple super phosphate, per kg substance, production mix, at plant // triple super phosphate, per kg substance // eu+efta+uk; Barge; EU+EFTA+UK
- kg_km_20: 0.0577843; = kg_20*km_20
  Transport amount in km*km, for triple super phosphate, per kg substance, production mix, at plant // triple super phosphate, per kg substance // eu+efta+uk; Barge; EU+EFTA+UK
- kg_21: 0.000505329
  Mass in kg, for inorganic potassium fertiliser, as k2o // nutrient supply from potassium chloride // rer; Barge; EU+EFTA+UK
- km_21: 134.831
  Distance in km, for inorganic potassium fertiliser, as k2o // nutrient supply from potassium chloride // rer; Barge; EU+EFTA+UK
- kg_km_21: 0.0681338; = kg_21*km_21
  Transport amount in km*km, for inorganic potassium fertiliser, as k2o // nutrient supply from potassium chloride // rer; Barge; EU+EFTA+UK
- kg_22: 1.07487e-5
  Mass in kg, for wax // wax production // eu+efta+uk; Barge; EU+EFTA+UK
- km_22: 270
  Distance in km, for wax // wax production // eu+efta+uk; Barge; EU+EFTA+UK
- kg_km_22: 0.00290215; = kg_22*km_22
  Transport amount in km*km, for wax // wax production // eu+efta+uk; Barge; EU+EFTA+UK
- kg_23: 0.000475946
  Mass in kg, for acrylic acid // acrylic acid production // eu+efta+uk; Barge; EU+EFTA+UK
- km_23: 270
  Distance in km, for acrylic acid // acrylic acid production // eu+efta+uk; Barge; EU+EFTA+UK
- kg_km_23: 0.128505; = kg_23*km_23
  Transport amount in km*km, for acrylic acid // acrylic acid production // eu+efta+uk; Barge; EU+EFTA+UK
- kg_24: 1.47572e-5
  Mass in kg, for crude vegetable oil blend, from crushing, at plant // rer; Articulated lorry transport, Euro 4, Total weight >32 t; EU+EFTA+UK
- km_24: 130
  Distance in km, for crude vegetable oil blend, from crushing, at plant // rer; Articulated lorry transport, Euro 4, Total weight >32 t; EU+EFTA+UK
- kg_km_24: 0.00191843; = kg_24*km_24
  Transport amount in km*km, for crude vegetable oil blend, from crushing, at plant // rer; Articulated lorry transport, Euro 4, Total weight >32 t; EU+EFTA+UK
- kg_25: 1.50897e-5
  Mass in kg, for polyacrylamide // polyacrylamide production // eu+efta+uk; Articulated lorry transport, Euro 4, Total weight >32 t; EU+EFTA+UK
- km_25: 130
  Distance in km, for polyacrylamide // polyacrylamide production // eu+efta+uk; Articulated lorry transport, Euro 4, Total weight >32 t; EU+EFTA+UK
- kg_km_25: 0.00196166; = kg_25*km_25
  Transport amount in km*km, for polyacrylamide // polyacrylamide production // eu+efta+uk; Articulated lorry transport, Euro 4, Total weight >32 t; EU+EFTA+UK
- kg_26: 3.27175e-7
  Mass in kg, for urea, per kg n, production mix, at plant // urea, per kg n // eu+efta+uk; Articulated lorry transport, Euro 4, Total weight >32 t; EU+EFTA+UK
- km_26: 130
  Distance in km, for urea, per kg n, production mix, at plant // urea, per kg n // eu+efta+uk; Articulated lorry transport, Euro 4, Total weight >32 t; EU+EFTA+UK
- kg_km_26: 4.25328e-5; = kg_26*km_26
  Transport amount in km*km, for urea, per kg n, production mix, at plant // urea, per kg n // eu+efta+uk; Articulated lorry transport, Euro 4, Total weight >32 t; EU+EFTA+UK
- kg_27: 0.000716753
  Mass in kg, for pesticide, unspecified // pesticide production, unspecified // rer; Articulated lorry transport, Euro 4, Total weight >32 t; EU+EFTA+UK
- km_27: 130
  Distance in km, for pesticide, unspecified // pesticide production, unspecified // rer; Articulated lorry transport, Euro 4, Total weight >32 t; EU+EFTA+UK
- kg_km_27: 0.0931779; = kg_27*km_27
  Transport amount in km*km, for pesticide, unspecified // pesticide production, unspecified // rer; Articulated lorry transport, Euro 4, Total weight >32 t; EU+EFTA+UK
- kg_28: 2.6193e-5
  Mass in kg, for glyphosate // glyphosate // eu+efta+uk; Articulated lorry transport, Euro 4, Total weight >32 t; EU+EFTA+UK
- km_28: 130
  Distance in km, for glyphosate // glyphosate // eu+efta+uk; Articulated lorry transport, Euro 4, Total weight >32 t; EU+EFTA+UK
- kg_km_28: 0.00340509; = kg_28*km_28
  Transport amount in km*km, for glyphosate // glyphosate // eu+efta+uk; Articulated lorry transport, Euro 4, Total weight >32 t; EU+EFTA+UK
- kg_29: 9.16755e-5
  Mass in kg, for mono ammonium phosphate, per kg n, production mix, at plant // mono ammonium phosphate, per kg n // eu+efta+uk; Articulated lorry transport, Euro 4, Total weight >32 t; EU+EFTA+UK
- km_29: 130
  Distance in km, for mono ammonium phosphate, per kg n, production mix, at plant // mono ammonium phosphate, per kg n // eu+efta+uk; Articulated lorry transport, Euro 4, Total weight >32 t; EU+EFTA+UK
- kg_km_29: 0.0119178; = kg_29*km_29
  Transport amount in km*km, for mono ammonium phosphate, per kg n, production mix, at plant // mono ammonium phosphate, per kg n // eu+efta+uk; Articulated lorry transport, Euro 4, Total weight >32 t; EU+EFTA+UK
- kg_30: 0.000214016
  Mass in kg, for triple super phosphate, per kg substance, production mix, at plant // triple super phosphate, per kg substance // eu+efta+uk; Articulated lorry transport, Euro 4, Total weight >32 t; EU+EFTA+UK
- km_30: 130
  Distance in km, for triple super phosphate, per kg substance, production mix, at plant // triple super phosphate, per kg substance // eu+efta+uk; Articulated lorry transport, Euro 4, Total weight >32 t; EU+EFTA+UK
- kg_km_30: 0.0278221; = kg_30*km_30
  Transport amount in km*km, for triple super phosphate, per kg substance, production mix, at plant // triple super phosphate, per kg substance // eu+efta+uk; Articulated lorry transport, Euro 4, Total weight >32 t; EU+EFTA+UK
- kg_31: 0.000505329
  Mass in kg, for inorganic potassium fertiliser, as k2o // nutrient supply from potassium chloride // rer; Articulated lorry transport, Euro 4, Total weight >32 t; EU+EFTA+UK
- km_31: 64.9184
  Distance in km, for inorganic potassium fertiliser, as k2o // nutrient supply from potassium chloride // rer; Articulated lorry transport, Euro 4, Total weight >32 t; EU+EFTA+UK
- kg_km_31: 0.0328051; = kg_31*km_31
  Transport amount in km*km, for inorganic potassium fertiliser, as k2o // nutrient supply from potassium chloride // rer; Articulated lorry transport, Euro 4, Total weight >32 t; EU+EFTA+UK
- kg_32: 1.07487e-5
  Mass in kg, for wax // wax production // eu+efta+uk; Articulated lorry transport, Euro 4, Total weight >32 t; EU+EFTA+UK
- km_32: 130
  Distance in km, for wax // wax production // eu+efta+uk; Articulated lorry transport, Euro 4, Total weight >32 t; EU+EFTA+UK
- kg_km_32: 0.00139733; = kg_32*km_32
  Transport amount in km*km, for wax // wax production // eu+efta+uk; Articulated lorry transport, Euro 4, Total weight >32 t; EU+EFTA+UK
- kg_33: 0.000475946
  Mass in kg, for acrylic acid // acrylic acid production // eu+efta+uk; Articulated lorry transport, Euro 4, Total weight >32 t; EU+EFTA+UK
- km_33: 130
  Distance in km, for acrylic acid // acrylic acid production // eu+efta+uk; Articulated lorry transport, Euro 4, Total weight >32 t; EU+EFTA+UK
- kg_km_33: 0.061873; = kg_33*km_33
  Transport amount in km*km, for acrylic acid // acrylic acid production // eu+efta+uk; Articulated lorry transport, Euro 4, Total weight >32 t; EU+EFTA+UK

## Reference product
- eucalyptus forestry // eucalyptus forestry // eu+efta+uk: 1

## Inputs
- Transport of dolomite by Barge - EU+EFTA+UK: 0.11807; = kg_km_0
- Transport of dolomite by Articulated lorry transport, Euro 4, Total weight >32 t - EU+EFTA+UK: 0.924837; = kg_km_1
- Transport of dolomite by Freight train, diesel traction - EU+EFTA+UK: 0.0917955; = kg_km_2
- Transport of dolomite by Freight train, electricity traction - EU+EFTA+UK: 0.144785; = kg_km_3
- Transport of crude vegetable oil blend, from crushing, at plant // rer by Freight train, average - EU+EFTA+UK: 0.00354172; = kg_km_4
- Transport of polyacrylamide // polyacrylamide production // eu+efta+uk by Freight train, average - EU+EFTA+UK: 0.00362153; = kg_km_5
- Transport of urea, per kg n, production mix, at plant // urea, per kg n // eu+efta+uk by Freight train, average - EU+EFTA+UK: 7.8522e-5; = kg_km_6
- Transport of pesticide, unspecified // pesticide production, unspecified // rer by Freight train, average - EU+EFTA+UK: 0.172021; = kg_km_7
- Transport of glyphosate // glyphosate // eu+efta+uk by Freight train, average - EU+EFTA+UK: 0.00628632; = kg_km_8
- Transport of mono ammonium phosphate, per kg n, production mix, at plant // mono ammonium phosphate, per kg n // eu+efta+uk by Freight train, average - EU+EFTA+UK: 0.0220021; = kg_km_9
- Transport of triple super phosphate, per kg substance, production mix, at plant // triple super phosphate, per kg substance // eu+efta+uk by Freight train, average - EU+EFTA+UK: 0.0513638; = kg_km_10
- Transport of inorganic potassium fertiliser, as k2o // nutrient supply from potassium chloride // rer by Freight train, average - EU+EFTA+UK: 0.0605633; = kg_km_11
- Transport of wax // wax production // eu+efta+uk by Freight train, average - EU+EFTA+UK: 0.00257969; = kg_km_12
- Transport of acrylic acid // acrylic acid production // eu+efta+uk by Freight train, average - EU+EFTA+UK: 0.114227; = kg_km_13
- Transport of crude vegetable oil blend, from crushing, at plant // rer by Barge - EU+EFTA+UK: 0.00398443; = kg_km_14
- Transport of polyacrylamide // polyacrylamide production // eu+efta+uk by Barge - EU+EFTA+UK: 0.00407422; = kg_km_15
- Transport of urea, per kg n, production mix, at plant // urea, per kg n // eu+efta+uk by Barge - EU+EFTA+UK: 8.83373e-5; = kg_km_16
- Transport of pesticide, unspecified // pesticide production, unspecified // rer by Barge - EU+EFTA+UK: 0.193523; = kg_km_17
- Transport of glyphosate // glyphosate // eu+efta+uk by Barge - EU+EFTA+UK: 0.00707211; = kg_km_18
- Transport of mono ammonium phosphate, per kg n, production mix, at plant // mono ammonium phosphate, per kg n // eu+efta+uk by Barge - EU+EFTA+UK: 0.0247524; = kg_km_19
- Transport of triple super phosphate, per kg substance, production mix, at plant // triple super phosphate, per kg substance // eu+efta+uk by Barge - EU+EFTA+UK: 0.0577843; = kg_km_20
- Transport of inorganic potassium fertiliser, as k2o // nutrient supply from potassium chloride // rer by Barge - EU+EFTA+UK: 0.0681338; = kg_km_21
- Transport of wax // wax production // eu+efta+uk by Barge - EU+EFTA+UK: 0.00290215; = kg_km_22
- Transport of acrylic acid // acrylic acid production // eu+efta+uk by Barge - EU+EFTA+UK: 0.128505; = kg_km_23
- Transport of crude vegetable oil blend, from crushing, at plant // rer by Articulated lorry transport, Euro 4, Total weight >32 t - EU+EFTA+UK: 0.00191843; = kg_km_24
- Transport of polyacrylamide // polyacrylamide production // eu+efta+uk by Articulated lorry transport, Euro 4, Total weight >32 t - EU+EFTA+UK: 0.00196166; = kg_km_25
- Transport of urea, per kg n, production mix, at plant // urea, per kg n // eu+efta+uk by Articulated lorry transport, Euro 4, Total weight >32 t - EU+EFTA+UK: 4.25328e-5; = kg_km_26
- Transport of pesticide, unspecified // pesticide production, unspecified // rer by Articulated lorry transport, Euro 4, Total weight >32 t - EU+EFTA+UK: 0.0931779; = kg_km_27
- Transport of glyphosate // glyphosate // eu+efta+uk by Articulated lorry transport, Euro 4, Total weight >32 t - EU+EFTA+UK: 0.00340509; = kg_km_28
- Transport of mono ammonium phosphate, per kg n, production mix, at plant // mono ammonium phosphate, per kg n // eu+efta+uk by Articulated lorry transport, Euro 4, Total weight >32 t - EU+EFTA+UK: 0.0119178; = kg_km_29
- Transport of triple super phosphate, per kg substance, production mix, at plant // triple super phosphate, per kg substance // eu+efta+uk by Articulated lorry transport, Euro 4, Total weight >32 t - EU+EFTA+UK: 0.0278221; = kg_km_30
- Transport of inorganic potassium fertiliser, as k2o // nutrient supply from potassium chloride // rer by Articulated lorry transport, Euro 4, Total weight >32 t - EU+EFTA+UK: 0.0328051; = kg_km_31
- Transport of wax // wax production // eu+efta+uk by Articulated lorry transport, Euro 4, Total weight >32 t - EU+EFTA+UK: 0.00139733; = kg_km_32
- Transport of acrylic acid // acrylic acid production // eu+efta+uk by Articulated lorry transport, Euro 4, Total weight >32 t - EU+EFTA+UK: 0.061873; = kg_km_33
- eucalyptus forestry // eucalyptus forestry // eu+efta+uk, blackbox: 1
- eucalyptus forestry // eucalyptus forestry // eu+efta+uk, elementary: 1

## Impact indicators
- Eutrophication marine: 0.000152833
- Ecotoxicity, freshwater: 51.0327
- Land use: 59.4144
- Water use: 0.00372239
- Resource use, minerals and metals: 1.62111e-7
- Resource use, fossils: 0.406029
- Climate change: 0.0325019
- Ozone depletion: 1.28717e-8
- Human toxicity, cancer: 1.80029e-11
- Human toxicity, non-cancer: 9.92479e-9
- EF-particulate Matter: 7.24638e-9
- Ionising radiation, human health: 0.00105576
- Photochemical ozone formation - human health: 0.000353386
- Acidification: 0.000433869
- Eutrophication, terrestrial: 0.00184319
- Eutrophication, freshwater: 1.32823e-5

## Deviations from the LCI method principle
The background data uses:
- the \xe2\x80\x9cRecycled content cut-off\xe2\x80\x9d approach to allocate end-of-life by-products and secondary materials. This allocation is explained in the description of the recycled content system model (http://www.ecoinvent.org/database/system-models-in-ecoinvent-3/cut-off-system-model/allocation-cut-off-by-classification.html).
OR
- EF compliant data

## Deviations from the LCI method approaches
Background data:
- the \xe2\x80\x9cRecycled content cut-off\xe2\x80\x9d approach to allocate end-of-life by-products and secondary materials. This allocation is explained in the description of the recycled content system model (http://www.ecoinvent.org/database/system-models-in-ecoinvent-3/cut-off-system-model/allocation-cut-off-by-classification.html). The ecoinvent database mostly relies on “Allocation – market values” apart for few exceptions particularly in the energy sector. ecoinvent energy data is replaced with EF3.0 core data as per the EF guidelines version 2.0.
OR
- EF compliant data

## Modelling constants
All modelling constants follow the requirements listed in the Tender Specifications 070201/2020/SER/ENV.B1. Completeness: There are no intentional cut-offs in the inventory no matter how small their contribution to all the EF impact categories is. Eventual cut-offs are in compliance with the Guide for EF compliant data sets (JRC 2020), i.e. only if below the 3% cut-off rule. Water use: water use is modelled at country level using separate flows for water withdrawal, water release and water evaporation. Handling multi-functional processes: the following PEF multi- functionality decision hierarchy is applied for resolving all multi- functionality problems: (1) subdivision or system expansion; (2) allocation based on a relevant underlying physical relationship (substitution may apply here); (3) allocation based on some other relationship. Direct land use change: GHG emissions from direct LUC allocated to good/service for 20 years after the LUC occurs, with IPCC default values. Carbon storage and delayed emissions: credits associated with temporary (carbon) storage or delayed emissions up to 300 years are not be considered. Emissions off-setting: are not included. Capital goods (including infrastructures) and their End of life: they are included. System boundaries: system boundaries include all processes linked to the product supply chain (e.g. maintenance). Time period: emissions and removals are modelled as if released or removed at the beginning of the assessment method. Fossil and biogenic carbon emissions and removals: removals and emissions are modelled as follows: All GHG emissions from fossil fuels (including peat and limestone) are modelled consistently with the most updated ILCD list of elementary flows. The non-fossil (biogenic) carbon flows are modelled consistently with the most updated ILCD list of elementary flows.

## Cut-off and completeness
There are no intentional cut-offs in the inventory no matter how small their contribution to all the EF impact categories is. Eventual cut-offs are in compliance with the Guide for EF compliant data sets (JRC 2020), i.e. only if below the 3% cut-off rule. The dataset dry mass and water balance has been checked to ensure the inventory is complete. Capital goods (e.g. infrastructure) and their end-of-life are included.

## Data selection and combination
These datasets include, in both their foreground and background data, links to EF3.0 compliant data.
The relevant background data on energy, transport, and End of Life are from the LCDN data node (http://lcdn.thinkstep.com/Node/).
All other background data in the supply of this product for which no EF3.0 process was available are from ecoinvent v3.7 database (www.ecoinvent.org) or other data sources.

## Data treatment and extrapolations
Several data sources have been used to model the inventory.

## Review details
Internal reviews have been asked to review the plausibility of the unit process, LCIA scores, and DQRs. Internal reviewers have also been asked to review the data for EF compliancy. The consortium is therefore responsible for aspects such as compliancy with the ILCD format, including validation in Look@LCI, and nomenclature.
Internal reviwers have been asked to judge based on the process name, that the unit process models in a complete and representative way the process in the requested location. The review encompassed the plausability of:
- exchanges with nature (elementary flows) as well as exchanges such as product and waste flows.
- meta information (general comment, technology comment, system boundaries, allocation, cut-off rules, etc.). Reviewers were asked to judge if the provided information is enough to understand the content of the process.
- LCIA scores
- DQRs including precision, technology, time and geography. As well as the overall DQR.
External reviewers have been asked to provide their expertise in the field of interest. External reviewers have been asked to review the unit process, including eventual methodological choices, the LCIA scores (provided with contribution scores as well), and DQRs. External reviewers have been provided all the information in a tool developed by the consortium for the purpose of this project.
External reviewers have been asked to judge based on the process name, that the unit process models in a complete and representative way the process in the requested location. The review encompassed:
- Plausability and completeness of exchanges with nature (elementary flows) as well as exchanges such as product and waste flows.
- Review of meta information (general comment, technology comment, system boundaries, allocation, cut-off rules, etc.). Reviewers were asked to judge if the provided information is enough to understand the content of the process.
- Review of properties (biogenic carbon and water content).
- Review of allocation keys.
- Plausability of LCIA scores calculated by the consortium.
- Plausability of DQRs including precision, technology, time and geography. As well as the overall DQR.

## Data sources
- Background Data for Representative products and organisations. EF 3.0 compliant (data stock)
- Cardellini, G., Valada, T., Cornillier, C., Vial, E., Dragoi, M., Goudiaby, V., Muys, B. (2018). EFO-LCI: A new life cycle inventory database of forestry operations in Europe. Environmental Management, 61(6), 1031-1047.
- Novais & Smyth (1999) Fósforo em solo e planta em condições tropicais. Viçosa: Universidade Federal de Viçosa, p. 399.
- Nemecek, T.; Schnetzer, J (2011). Methods of assessment of direct field emissions for LCIs of agricultural production systems, Data v3.0 (2011): http://www.ecoinvent.org/fileadmin/talkpages/pages/01-01-crop-production/01_crop_production_-_direct_field_emissions___natural_resources_v1.1.pdf.

## Intended applications
Implementation of regular Product Environmental Footprint (PEF) studies and Organisation Environmental Footprint (OEF) studies exclusively under the specified Product groups and sectors as defined in the Product Environmental Footprint Category Rules (PEFCR) and Organisation Environmental Footprint Sectorial Rules (OEFSR) listed in http://ec.europa.eu/environment/eussd/smgp/PEFCR_OEFSR.htm
