# printing, ink-jet; printing service; production mix, at plant; service of printing, Ink-Jet on 1m2 of fabric

Dataset: ILCD process, Partly terminated system
Geography: GLO
Reference year: 2021
Valid until: 2024
Classification: Systems / Textiles, furnitures and other interiors
LCI method principle: Attributional
LCI method approaches: Allocation - market value
Completeness: All relevant flows quantified
Project: Provision of process-based 3.0 Environmental Footprint-compliant life cycle inventory datasets - Apparel 1 - contract number 070201/2020/840291/SER/ENV.B.1
Generated by: Metsims Sustainability Consulting
Owner: PRé Sustainability B.V.
Compliance: ILCD Data Network - Entry-level; Suggestions for updating the PEF method 2019; ISO 14040 Environmental Management – Life Cycle Assessment – Principles and Framework, 2006; ISO 14044:2006. Environmental Management – Life Cycle Assessment – Requirements and guidelines.; Environmental Footprint 3.1
Review: Dependent internal review by Avraam Symeonidis, Emilia Moreno Ruiz; Independent review panel by Fábio Valebona
Data quality: Overall quality: Very good; Time representativeness: Very good; Geographical representativeness: Fair; Technological representativeness: Good; Precision: Very good; Methodological appropriateness and consistency: Not applicable
Amounts: no units in this file; such an amount is in the reference unit of its flow, which a separate flow dataset defines
copyright: true
licenseType: Free of charge for some user types or use types
accessRestrictions: Free of charge for all final users implementing a regular Product Environmental Footprint (PEF) studies and Organisation Environmental Footprint (OEF) studies exclusively under the specified Product groups and sectors as defined in the Product Environmental Footprint Category Rules (PEFCR) and Organisation Environmental Footprint Sectorial Rules (OEFSR) listed in http://ec.europa.eu/environment/eussd/smgp/PEFCR_OEFSR.htm and in accordance with the terms and conditions of the EULA (available at https://ecoinvent.lca-data.com/) exclusively until 31st December 2024. Any use of this dataset or any derivative data not within the specific context of one of the PEF/OEF projects or after the end of 2024 is not permitted.

## General comment
Notice: this data set supersedes the EF3.0-compliant version (see link under "preceding data set version" below calculated with the EF3.0). The life cycle inventory is not changed from the original EF3.0 data set. The LCIA results are calculated based on the EF3.1 methods which provide updated characterisation factors in the following impact categories: Climate Change, Ecotoxicity freshwater, Photochemical Ozone Formation, Acidification, Human Toxicity non-cancer, and Human Toxicity cancer. The review report and the data quality ratings refer to the original results. The data set has been updated by the European Commission on the basis of the original EF3.0 data set delivered by the data provider.This dataset covers mix of digital printing of fabric which includes single pass and multi pass ink-jet printing. Single pass electricity consumption is assumed as 20% lower than multi pass.
Pre and post treatment processes of printing belongs reactive ink-jet printing and includes following processes: Fabric roll opening, gassing, bleaching, pre washing, sample printing, screen preparation, printing, fixing, after washing, sanforizing and quality control.

In textile digital (ink-jet) printing piezo electric printheads are used which have long lifetime over years. So, production of printheads was cut-off due to contribute under %1, nevertheless waste of printhead was included as landfill. Transport to landfill is assumed 70 km.

## Technology and included processes
This dataset covers mix of digital printing of fabric which includes single pass and multi pass ink-jet printing. Single pass electricity consumption is assumed as 20% lower than multi pass.
Pre and post treatment processes of printing belongs reactive ink-jet printing and includes following processes: Fabric roll opening, gassing, bleaching, pre washing, sample printing, screen preparation, printing, fixing, after washing, sanforizing and quality control. Transport to landfill is assumed 70 km.

Used electricity, thermal energy, inks, and water is included to dataset.

A user employing this service within their models should use it along with an 1.0125 kg of material to produce an 1 kg of yarn. 0.0125 kg of waste shall also be added. A user is responsible for defining the nature of the recycling and/or disposal of this waste. Additionally, a user is responsible for accounting transportation expenditures for all extra input and output materials that need to be modelled alongside this service.*

*Ref: Altun, S. (2012). Prediction of textile waste profile and recycling opportunities in Turk. Fibres & Textiles in Eastern Europe.

## Parameters
- kg_0: 0.0286041
  Mass in kg, for urea; Freight train, diesel traction; EU+EFTA+UK
- km_0: 179.708
  Distance in km, for urea; Freight train, diesel traction; EU+EFTA+UK
- kg_km_0: 5.14038; = kg_0*km_0
  Transport amount in km*km, for urea; Freight train, diesel traction; EU+EFTA+UK
- kg_1: 0.0286041
  Mass in kg, for urea; Freight train, electricity traction; EU+EFTA+UK
- km_1: 94.9991
  Distance in km, for urea; Freight train, electricity traction; EU+EFTA+UK
- kg_km_1: 2.71737; = kg_1*km_1
  Transport amount in km*km, for urea; Freight train, electricity traction; EU+EFTA+UK
- kg_2: 0.0286041
  Mass in kg, for urea; Articulated lorry transport, Total weight >32 t, mix Euro 0-5; ROW w/o EU+EFTA
- km_2: 148
  Distance in km, for urea; Articulated lorry transport, Total weight >32 t, mix Euro 0-5; ROW w/o EU+EFTA
- kg_km_2: 4.23341; = kg_2*km_2
  Transport amount in km*km, for urea; Articulated lorry transport, Total weight >32 t, mix Euro 0-5; ROW w/o EU+EFTA
- kg_3: 0.0286041
  Mass in kg, for urea; Transoceanic ship, containers; GLO
- km_3: 841
  Distance in km, for urea; Transoceanic ship, containers; GLO
- kg_km_3: 24.0561; = kg_3*km_3
  Transport amount in km*km, for urea; Transoceanic ship, containers; GLO
- kg_4: 0.0286041
  Mass in kg, for urea; Freight train, average; EU+EFTA+UK
- km_4: 1.2931
  Distance in km, for urea; Freight train, average; EU+EFTA+UK
- kg_km_4: 0.036988; = kg_4*km_4
  Transport amount in km*km, for urea; Freight train, average; EU+EFTA+UK
- kg_5: 0.0286041
  Mass in kg, for urea; Barge; ROW w/o EU+EFTA
- km_5: 47
  Distance in km, for urea; Barge; ROW w/o EU+EFTA
- kg_km_5: 1.34439; = kg_5*km_5
  Transport amount in km*km, for urea; Barge; ROW w/o EU+EFTA
- kg_6: 0.67
  Mass in kg, for solvent-free printing ink, rotogravure printing // solvent-free printing ink production // eu+efta+uk; Articulated lorry transport, Euro 4, Total weight >32 t; EU+EFTA+UK
- km_6: 1000
  Distance in km, for solvent-free printing ink, rotogravure printing // solvent-free printing ink production // eu+efta+uk; Articulated lorry transport, Euro 4, Total weight >32 t; EU+EFTA+UK
- kg_km_6: 670; = kg_6*km_6
  Transport amount in km*km, for solvent-free printing ink, rotogravure printing // solvent-free printing ink production // eu+efta+uk; Articulated lorry transport, Euro 4, Total weight >32 t; EU+EFTA+UK
- kg_7: 8.6e-5
  Mass in kg, for waste (unspecified) // landfill of inert (steel) // eu+efta+uk; Articulated lorry transport, Euro 4, Total weight >32 t; EU+EFTA+UK
- km_7: 70
  Distance in km, for waste (unspecified) // landfill of inert (steel) // eu+efta+uk; Articulated lorry transport, Euro 4, Total weight >32 t; EU+EFTA+UK
- kg_km_7: 0.00602; = kg_7*km_7
  Transport amount in km*km, for waste (unspecified) // landfill of inert (steel) // eu+efta+uk; Articulated lorry transport, Euro 4, Total weight >32 t; EU+EFTA+UK
- kg_8: 0.67
  Mass in kg, for solvent-free printing ink, rotogravure printing // solvent-free printing ink production // eu+efta+uk; Transoceanic ship, containers; GLO
- km_8: 18059.7
  Distance in km, for solvent-free printing ink, rotogravure printing // solvent-free printing ink production // eu+efta+uk; Transoceanic ship, containers; GLO
- kg_km_8: 12100; = kg_8*km_8
  Transport amount in km*km, for solvent-free printing ink, rotogravure printing // solvent-free printing ink production // eu+efta+uk; Transoceanic ship, containers; GLO

## Reference product
- printing, ink-jet // printing, ink-jet // glo: 1

## Inputs
- Transport of urea by Freight train, diesel traction - EU+EFTA+UK: 5.14038; = kg_km_0
- Transport of urea by Freight train, electricity traction - EU+EFTA+UK: 2.71737; = kg_km_1
- Transport of urea by Articulated lorry transport, Total weight >32 t, mix Euro 0-5 - ROW w/o EU+EFTA: 4.23341; = kg_km_2
- Transport of urea by Transoceanic ship, containers - GLO: 24.0561; = kg_km_3
- Transport of urea by Freight train, average - EU+EFTA+UK: 0.036988; = kg_km_4
- Transport of urea by Barge - ROW w/o EU+EFTA: 1.34439; = kg_km_5
- Transport of solvent-free printing ink, rotogravure printing // solvent-free printing ink production // eu+efta+uk by Articulated lorry transport, Euro 4, Total weight >32 t - EU+EFTA+UK: 670; = kg_km_6
- Transport of waste (unspecified) // landfill of inert (steel) // eu+efta+uk by Articulated lorry transport, Euro 4, Total weight >32 t - EU+EFTA+UK: 0.00602; = kg_km_7
- Transport of solvent-free printing ink, rotogravure printing // solvent-free printing ink production // eu+efta+uk by Transoceanic ship, containers - GLO: 12100; = kg_km_8
- Electricity from Electricity grid mix 1kV-60kV - AU: 0.0077
- Electricity from Electricity grid mix 1kV-60kV - EU+EFTA+UK: 0.1129
- Electricity from Electricity grid mix 1kV-60kV - NZ: 0.0015
- Electricity from Electricity grid mix 1kV-60kV - RAF: 0.0247
- Electricity from Electricity grid mix 1kV-60kV - RNA: 0.1652
- Electricity from Electricity grid mix 1kV-60kV - RSA: 0.0561
- Electricity from Electricity grid mix 1kV-60kV - RU: 0.033
- Thermal energy (MJ) from Thermal energy from hard coal - ROW: 2.38697
- Thermal energy (MJ) from Thermal energy from heavy fuel oil (HFO) - ROW: 0.0530438
- Thermal energy (MJ) from Thermal energy from light fuel oil (LFO) - ROW: 0.742613
- Thermal energy (MJ) from Thermal energy from natural gas - ROW: 2.12175
- Electricity from Electricity grid mix 1kV-60kV - CN: 0.169256
- Electricity from Electricity grid mix 1kV-60kV - RAS w/o CN: 0.185444
- printing, ink-jet // printing, ink-jet // glo, blackbox: 1
- printing, ink-jet // printing, ink-jet // glo, elementary: 1

## Impact indicators
- Eutrophication marine: 0.00523333
- Ecotoxicity, freshwater: 65.2739
- Land use: 11.7751
- Water use: 2.17936
- Resource use, minerals and metals: 4.75051e-5
- Resource use, fossils: 52.8055
- Climate change: 3.79557
- Ozone depletion: 7.34625e-8
- Human toxicity, cancer: 4.92009e-9
- Human toxicity, non-cancer: 3.28886e-8
- EF-particulate Matter: 5.76831e-7
- Ionising radiation, human health: 0.0931251
- Photochemical ozone formation - human health: 0.0147941
- Acidification: 0.0233223
- Eutrophication, terrestrial: 0.0506944
- Eutrophication, freshwater: 0.000223727

## Deviations from the LCI method principle
The background data uses:
- the \xe2\x80\x9cRecycled content cut-off\xe2\x80\x9d approach to allocate end-of-life by-products and secondary materials. This allocation is explained in the description of the recycled content system model (http://www.ecoinvent.org/database/system-models-in-ecoinvent-3/cut-off-system-model/allocation-cut-off-by-classification.html).
OR
- EF compliant data

## Deviations from the LCI method approaches
Background data:
- the \xe2\x80\x9cRecycled content cut-off\xe2\x80\x9d approach to allocate end-of-life by-products and secondary materials. This allocation is explained in the description of the recycled content system model (http://www.ecoinvent.org/database/system-models-in-ecoinvent-3/cut-off-system-model/allocation-cut-off-by-classification.html). The ecoinvent database mostly relies on “Allocation – market values” apart for few exceptions particularly in the energy sector. ecoinvent energy data is replaced with EF3.0 core data as per the EF guidelines version 2.0.
OR
- EF compliant data

## Modelling constants
All modelling constants follow the requirements listed in the Tender Specifications 070201/2020/SER/ENV.B1. Completeness: There are no intentional cut-offs in the inventory no matter how small their contribution to all the EF impact categories is. Eventual cut-offs are in compliance with the Guide for EF compliant data sets (JRC 2020), i.e. only if below the 3% cut-off rule. Water use: water use is modelled at country level using separate flows for water withdrawal, water release and water evaporation. Handling multi-functional processes: the following PEF multi- functionality decision hierarchy is applied for resolving all multi- functionality problems: (1) subdivision or system expansion; (2) allocation based on a relevant underlying physical relationship (substitution may apply here); (3) allocation based on some other relationship. Direct land use change: GHG emissions from direct LUC allocated to good/service for 20 years after the LUC occurs, with IPCC default values. Carbon storage and delayed emissions: credits associated with temporary (carbon) storage or delayed emissions up to 300 years are not be considered. Emissions off-setting: are not included. Capital goods (including infrastructures) and their End of life: they are included. System boundaries: system boundaries include all processes linked to the product supply chain (e.g. maintenance). Time period: emissions and removals are modelled as if released or removed at the beginning of the assessment method. Fossil and biogenic carbon emissions and removals: removals and emissions are modelled as follows: All GHG emissions from fossil fuels (including peat and limestone) are modelled consistently with the most updated ILCD list of elementary flows. The non-fossil (biogenic) carbon flows are modelled consistently with the most updated ILCD list of elementary flows.

## Cut-off and completeness
There are no intentional cut-offs in the inventory no matter how small their contribution to all the EF impact categories is. Eventual cut-offs are in compliance with the Guide for EF compliant data sets (JRC 2020), i.e. only if below the 3% cut-off rule. The dataset dry mass and water balance has been checked to ensure the inventory is complete. Capital goods (e.g. infrastructure) and their end-of-life are included.

## Data selection and combination
These datasets include, in both their foreground and background data, links to EF3.0 compliant data.
The relevant background data on energy, transport, and End of Life are from the LCDN data node (http://lcdn.thinkstep.com/Node/).
All other background data in the supply of this product for which no EF3.0 process was available are from ecoinvent v3.7 database (www.ecoinvent.org) or other data sources.

## Data treatment and extrapolations
Several data sources have been used to model the inventory.

## Review details
Internal reviews have been asked to review the plausibility of the unit process, LCIA scores, and DQRs. Internal reviewers have also been asked to review the data for EF compliancy. The consortium is therefore responsible for aspects such as compliancy with the ILCD format, including validation in Look@LCI, and nomenclature.
Internal reviwers have been asked to judge based on the process name, that the unit process models in a complete and representative way the process in the requested location. The review encompassed the plausability of:
- exchanges with nature (elementary flows) as well as exchanges such as product and waste flows.
- meta information (general comment, technology comment, system boundaries, allocation, cut-off rules, etc.). Reviewers were asked to judge if the provided information is enough to understand the content of the process.
- LCIA scores
- DQRs including precision, technology, time and geography. As well as the overall DQR.
External reviewers have been asked to provide their expertise in the field of interest. External reviewers have been asked to review the unit process, including eventual methodological choices, the LCIA scores (provided with contribution scores as well), and DQRs. External reviewers have been provided all the information in a tool developed by the consortium for the purpose of this project.
External reviewers have been asked to judge based on the process name, that the unit process models in a complete and representative way the process in the requested location. The review encompassed:
- Plausability and completeness of exchanges with nature (elementary flows) as well as exchanges such as product and waste flows.
- Review of meta information (general comment, technology comment, system boundaries, allocation, cut-off rules, etc.). Reviewers were asked to judge if the provided information is enough to understand the content of the process.
- Review of properties (biogenic carbon and water content).
- Review of allocation keys.
- Plausability of LCIA scores calculated by the consortium.
- Plausability of DQRs including precision, technology, time and geography. As well as the overall DQR.

## Data sources
- Background Data for Representative products and organisations. EF 3.0 compliant (data stock)
- Textile Fabric Printing, https://www3.epa.gov/ttnchie1/ap42/ch04/final/c4s11.pdf, Access Date: 16.04.2021
- Rüzgar, A. (2019). The Comparison of Environmental Impacts Between Rotary Screen And Digital Reactive Printing By Life Cycle Assessment (Master's thesis, Bursa Uludağ University).
- Hangzhou Aily Digital Printing Technology Co., Ltd., https://www.alibaba.com/product-detail/T-shirt-Printing-Machine-Digital-Print_62092507589.html?spm=a2700.7724857.normal_offer.d_title.4642729eqa4heM&s=p, Access Date: 16.04.2021
- Yite (Guangzhou) Trade Co., Ltd., https://www.alibaba.com/product-detail/T-Shirt-Printing-Machine-Digital-Tshirt_1600106193706.html?spm=a2700.7724857.normal_offer.d_title.4642729eqa4heM&s=p, Access Date: 16.04.2021
- Epson T-Shirt Printing Machine, Automation Grade: Automatic, https://www.indiamart.com/proddetail/epson-t-shirt-printing-machine-13469841797.html, Access Date: 16.04.2021
- PowerJet, http://www.powerjet.com.tr/anasayfa/pdf/powerjet3_2h.pdf, Access Date: 20.04.2021

## Intended applications
Implementation of regular Product Environmental Footprint (PEF) studies and Organisation Environmental Footprint (OEF) studies exclusively under the specified Product groups and sectors as defined in the Product Environmental Footprint Category Rules (PEFCR) and Organisation Environmental Footprint Sectorial Rules (OEFSR) listed in http://ec.europa.eu/environment/eussd/smgp/PEFCR_OEFSR.htm
