# medium-density fibreboard (mdf); technology mix; production mix, at plant

Dataset: ILCD process, Partly terminated system
Geography: GLO
Reference year: 2012
Valid until: 2024
Classification: Materials production / Wood
LCI method principle: Attributional
LCI method approaches: Allocation - market value
Completeness: All relevant flows quantified
Project: Provision of process-based 3.0 Environmental Footprint-compliant life cycle inventory datasets - Renewable materials - contract number 070201/2020/840085/SER/ENV.B.1
Generated by: ecoinvent
Owner: ecoinvent
Compliance: ILCD Data Network - Entry-level; Suggestions for updating the PEF method 2019; ISO 14040 Environmental Management – Life Cycle Assessment – Principles and Framework, 2006; ISO 14044:2006. Environmental Management – Life Cycle Assessment – Requirements and guidelines.; Environmental Footprint 3.1
Review: Dependent internal review by Emilia Moreno Ruiz, Marisa Vieira; Independent review panel by Laura Batlle Bayer
Data quality: Overall quality: Good; Time representativeness: Very good; Geographical representativeness: Good; Technological representativeness: Good; Precision: Good; Methodological appropriateness and consistency: Not applicable
Amounts: no units in this file; such an amount is in the reference unit of its flow, which a separate flow dataset defines
copyright: true
licenseType: Free of charge for some user types or use types
accessRestrictions: Free of charge for all final users implementing a regular Product Environmental Footprint (PEF) studies and Organisation Environmental Footprint (OEF) studies exclusively under the specified Product groups and sectors as defined in the Product Environmental Footprint Category Rules (PEFCR) and Organisation Environmental Footprint Sectorial Rules (OEFSR) listed in http://ec.europa.eu/environment/eussd/smgp/PEFCR_OEFSR.htm and in accordance with the terms and conditions of the EULA (available at https://ecoinvent.lca-data.com/) exclusively until 31st December 2024. Any use of this dataset or any derivative data not within the specific context of one of the PEF/OEF projects or after the end of 2024 is not permitted.

## General comment
Notice: this data set supersedes the EF3.0-compliant version (see link under "preceding data set version" below calculated with the EF3.0). The life cycle inventory is not changed from the original EF3.0 data set. The LCIA results are calculated based on the EF3.1 methods which provide updated characterisation factors in the following impact categories: Climate Change, Ecotoxicity freshwater, Photochemical Ozone Formation, Acidification, Human Toxicity non-cancer, and Human Toxicity cancer. The review report and the data quality ratings refer to the original results. The data set has been updated by the European Commission on the basis of the original EF3.0 data set delivered by the data provider.This activity represents the production of 1 m3 of medium density fibreboard (MDF). MDF is an engineered wood product. MDF is used as an alternative to solid wood for applications such as furniture, exhibition displays, wall panelling, and architectural mouldings. The produced MDF has a density of 684 kg/m3.

## Technology and included processes
The process includes transport of raw materials, direct emissions, energy use, ancillary products, and waste treatment. This dataset is modelled according to the activity ‘medium density fibreboard production, uncoated-RER', published in the ecoinvent database 3.7.1. Data is based on a survey among member companies of the European Panel Federation

## Parameters
- kg_0: 0.0226877
  Mass in kg, for aluminium sulphate powder // aluminium sulphate powder production // eu+efta+uk; Articulated lorry transport, Euro 4, Total weight >32 t; EU+EFTA+UK
- km_0: 1000.54
  Distance in km, for aluminium sulphate powder // aluminium sulphate powder production // eu+efta+uk; Articulated lorry transport, Euro 4, Total weight >32 t; EU+EFTA+UK
- kg_km_0: 22.7; = kg_0*km_0
  Transport amount in km*km, for aluminium sulphate powder // aluminium sulphate powder production // eu+efta+uk; Articulated lorry transport, Euro 4, Total weight >32 t; EU+EFTA+UK
- kg_1: 0.0226877
  Mass in kg, for aluminium sulphate powder // aluminium sulphate powder production // eu+efta+uk; Transoceanic ship, containers; GLO
- km_1: 17983.3
  Distance in km, for aluminium sulphate powder // aluminium sulphate powder production // eu+efta+uk; Transoceanic ship, containers; GLO
- kg_km_1: 408; = kg_1*km_1
  Transport amount in km*km, for aluminium sulphate powder // aluminium sulphate powder production // eu+efta+uk; Transoceanic ship, containers; GLO
- kg_2: 0.130454
  Mass in kg, for lubricating oil // lubricants at refinery // eu+efta+uk; Articulated lorry transport, Euro 4, Total weight >32 t; EU+EFTA+UK
- km_2: 996.517
  Distance in km, for lubricating oil // lubricants at refinery // eu+efta+uk; Articulated lorry transport, Euro 4, Total weight >32 t; EU+EFTA+UK
- kg_km_2: 130; = kg_2*km_2
  Transport amount in km*km, for lubricating oil // lubricants at refinery // eu+efta+uk; Articulated lorry transport, Euro 4, Total weight >32 t; EU+EFTA+UK
- kg_3: 0.130454
  Mass in kg, for lubricating oil // lubricants at refinery // eu+efta+uk; Transoceanic ship, containers; GLO
- km_3: 18014
  Distance in km, for lubricating oil // lubricants at refinery // eu+efta+uk; Transoceanic ship, containers; GLO
- kg_km_3: 2350; = kg_3*km_3
  Transport amount in km*km, for lubricating oil // lubricants at refinery // eu+efta+uk; Transoceanic ship, containers; GLO
- kg_4: 41.7932
  Mass in kg, for melamine formaldehyde resin // melamine formaldehyde resin production // eu+efta+uk; Articulated lorry transport, Euro 4, Total weight >32 t; EU+EFTA+UK
- km_4: 1000.16
  Distance in km, for melamine formaldehyde resin // melamine formaldehyde resin production // eu+efta+uk; Articulated lorry transport, Euro 4, Total weight >32 t; EU+EFTA+UK
- kg_km_4: 41800; = kg_4*km_4
  Transport amount in km*km, for melamine formaldehyde resin // melamine formaldehyde resin production // eu+efta+uk; Articulated lorry transport, Euro 4, Total weight >32 t; EU+EFTA+UK
- kg_5: 41.7932
  Mass in kg, for melamine formaldehyde resin // melamine formaldehyde resin production // eu+efta+uk; Transoceanic ship, containers; GLO
- km_5: 17993.4
  Distance in km, for melamine formaldehyde resin // melamine formaldehyde resin production // eu+efta+uk; Transoceanic ship, containers; GLO
- kg_km_5: 752000; = kg_5*km_5
  Transport amount in km*km, for melamine formaldehyde resin // melamine formaldehyde resin production // eu+efta+uk; Transoceanic ship, containers; GLO
- kg_6: 4.69675
  Mass in kg, for wax // wax production // eu+efta+uk; Articulated lorry transport, Euro 4, Total weight >32 t; EU+EFTA+UK
- km_6: 1000.69
  Distance in km, for wax // wax production // eu+efta+uk; Articulated lorry transport, Euro 4, Total weight >32 t; EU+EFTA+UK
- kg_km_6: 4700; = kg_6*km_6
  Transport amount in km*km, for wax // wax production // eu+efta+uk; Articulated lorry transport, Euro 4, Total weight >32 t; EU+EFTA+UK
- kg_7: 4.69675
  Mass in kg, for wax // wax production // eu+efta+uk; Transoceanic ship, containers; GLO
- km_7: 17991.1
  Distance in km, for wax // wax production // eu+efta+uk; Transoceanic ship, containers; GLO
- kg_km_7: 84500; = kg_7*km_7
  Transport amount in km*km, for wax // wax production // eu+efta+uk; Transoceanic ship, containers; GLO
- kg_8: 464.705
  Mass in kg, for softwood under bark // softwood forestry // glo; Articulated lorry transport, Euro 4, Total weight >32 t; EU+EFTA+UK
- km_8: 1000.63
  Distance in km, for softwood under bark // softwood forestry // glo; Articulated lorry transport, Euro 4, Total weight >32 t; EU+EFTA+UK
- kg_km_8: 465000; = kg_8*km_8
  Transport amount in km*km, for softwood under bark // softwood forestry // glo; Articulated lorry transport, Euro 4, Total weight >32 t; EU+EFTA+UK
- kg_9: 464.705
  Mass in kg, for softwood under bark // softwood forestry // glo; Transoceanic ship, containers; GLO
- km_9: 17989.9
  Distance in km, for softwood under bark // softwood forestry // glo; Transoceanic ship, containers; GLO
- kg_km_9: 8.36e6; = kg_9*km_9
  Transport amount in km*km, for softwood under bark // softwood forestry // glo; Transoceanic ship, containers; GLO
- kg_10: 8.5899
  Mass in kg, for hardwood under bark // hardwood forestry // glo; Articulated lorry transport, Euro 4, Total weight >32 t; EU+EFTA+UK
- km_10: 1000.01
  Distance in km, for hardwood under bark // hardwood forestry // glo; Articulated lorry transport, Euro 4, Total weight >32 t; EU+EFTA+UK
- kg_km_10: 8590; = kg_10*km_10
  Transport amount in km*km, for hardwood under bark // hardwood forestry // glo; Articulated lorry transport, Euro 4, Total weight >32 t; EU+EFTA+UK
- kg_11: 8.5899
  Mass in kg, for hardwood under bark // hardwood forestry // glo; Transoceanic ship, containers; GLO
- km_11: 18044.4
  Distance in km, for hardwood under bark // hardwood forestry // glo; Transoceanic ship, containers; GLO
- kg_km_11: 155000; = kg_11*km_11
  Transport amount in km*km, for hardwood under bark // hardwood forestry // glo; Transoceanic ship, containers; GLO
- kg_12: 9.85781
  Mass in kg, for sawdust hardwood, loose, wet, measured as dry mass // sawdust hardwood, loose, wet, measured as dry mass // eu+efta+uk; Articulated lorry transport, Euro 4, Total weight >32 t; EU+EFTA+UK
- km_12: 1000.22
  Distance in km, for sawdust hardwood, loose, wet, measured as dry mass // sawdust hardwood, loose, wet, measured as dry mass // eu+efta+uk; Articulated lorry transport, Euro 4, Total weight >32 t; EU+EFTA+UK
- kg_km_12: 9860; = kg_12*km_12
  Transport amount in km*km, for sawdust hardwood, loose, wet, measured as dry mass // sawdust hardwood, loose, wet, measured as dry mass // eu+efta+uk; Articulated lorry transport, Euro 4, Total weight >32 t; EU+EFTA+UK
- kg_13: 9.85781
  Mass in kg, for sawdust hardwood, loose, wet, measured as dry mass // sawdust hardwood, loose, wet, measured as dry mass // eu+efta+uk; Transoceanic ship, containers; GLO
- km_13: 17955.3
  Distance in km, for sawdust hardwood, loose, wet, measured as dry mass // sawdust hardwood, loose, wet, measured as dry mass // eu+efta+uk; Transoceanic ship, containers; GLO
- kg_km_13: 177000; = kg_13*km_13
  Transport amount in km*km, for sawdust hardwood, loose, wet, measured as dry mass // sawdust hardwood, loose, wet, measured as dry mass // eu+efta+uk; Transoceanic ship, containers; GLO
- kg_14: 20.0143
  Mass in kg, for sawdust softwood, loose, wet, measured as dry mass // sawdust softwood, loose, wet, measured as dry mass // eu+efta+uk; Articulated lorry transport, Euro 4, Total weight >32 t; EU+EFTA+UK
- km_14: 1493.93
  Distance in km, for sawdust softwood, loose, wet, measured as dry mass // sawdust softwood, loose, wet, measured as dry mass // eu+efta+uk; Articulated lorry transport, Euro 4, Total weight >32 t; EU+EFTA+UK
- kg_km_14: 29900; = kg_14*km_14
  Transport amount in km*km, for sawdust softwood, loose, wet, measured as dry mass // sawdust softwood, loose, wet, measured as dry mass // eu+efta+uk; Articulated lorry transport, Euro 4, Total weight >32 t; EU+EFTA+UK
- kg_15: 20.0143
  Mass in kg, for sawdust softwood, loose, wet, measured as dry mass // sawdust softwood, loose, wet, measured as dry mass // eu+efta+uk; Transoceanic ship, containers; GLO
- km_15: 26880.7
  Distance in km, for sawdust softwood, loose, wet, measured as dry mass // sawdust softwood, loose, wet, measured as dry mass // eu+efta+uk; Transoceanic ship, containers; GLO
- kg_km_15: 538000; = kg_15*km_15
  Transport amount in km*km, for sawdust softwood, loose, wet, measured as dry mass // sawdust softwood, loose, wet, measured as dry mass // eu+efta+uk; Transoceanic ship, containers; GLO
- kg_16: 3.24793
  Mass in kg, for slab and siding, softwood, wet, measured as dry mass // slab and siding, softwood, wet, measured as dry mass // eu+efta+uk; Articulated lorry transport, Euro 4, Total weight >32 t; EU+EFTA+UK
- km_16: 1000.64
  Distance in km, for slab and siding, softwood, wet, measured as dry mass // slab and siding, softwood, wet, measured as dry mass // eu+efta+uk; Articulated lorry transport, Euro 4, Total weight >32 t; EU+EFTA+UK
- kg_km_16: 3250; = kg_16*km_16
  Transport amount in km*km, for slab and siding, softwood, wet, measured as dry mass // slab and siding, softwood, wet, measured as dry mass // eu+efta+uk; Articulated lorry transport, Euro 4, Total weight >32 t; EU+EFTA+UK
- kg_17: 3.24793
  Mass in kg, for slab and siding, softwood, wet, measured as dry mass // slab and siding, softwood, wet, measured as dry mass // eu+efta+uk; Transoceanic ship, containers; GLO
- km_17: 18011.5
  Distance in km, for slab and siding, softwood, wet, measured as dry mass // slab and siding, softwood, wet, measured as dry mass // eu+efta+uk; Transoceanic ship, containers; GLO
- kg_km_17: 58500; = kg_17*km_17
  Transport amount in km*km, for slab and siding, softwood, wet, measured as dry mass // slab and siding, softwood, wet, measured as dry mass // eu+efta+uk; Transoceanic ship, containers; GLO
- kg_18: 2.43594
  Mass in kg, for slab and siding, softwood, wet, measured as dry mass // slab and siding, softwood, wet, measured as dry mass // rna; Articulated lorry transport, Euro 4, Total weight >32 t; EU+EFTA+UK
- km_18: 1001.67
  Distance in km, for slab and siding, softwood, wet, measured as dry mass // slab and siding, softwood, wet, measured as dry mass // rna; Articulated lorry transport, Euro 4, Total weight >32 t; EU+EFTA+UK
- kg_km_18: 2440; = kg_18*km_18
  Transport amount in km*km, for slab and siding, softwood, wet, measured as dry mass // slab and siding, softwood, wet, measured as dry mass // rna; Articulated lorry transport, Euro 4, Total weight >32 t; EU+EFTA+UK
- kg_19: 2.43594
  Mass in kg, for slab and siding, softwood, wet, measured as dry mass // slab and siding, softwood, wet, measured as dry mass // rna; Transoceanic ship, containers; GLO
- km_19: 17980.7
  Distance in km, for slab and siding, softwood, wet, measured as dry mass // slab and siding, softwood, wet, measured as dry mass // rna; Transoceanic ship, containers; GLO
- kg_km_19: 43800; = kg_19*km_19
  Transport amount in km*km, for slab and siding, softwood, wet, measured as dry mass // slab and siding, softwood, wet, measured as dry mass // rna; Transoceanic ship, containers; GLO
- kg_20: 4.4659
  Mass in kg, for slab and siding, softwood, wet, measured as dry mass // slab and siding, softwood, wet, measured as dry mass // world (without eu+efta+uk, us and ca); Articulated lorry transport, Euro 4, Total weight >32 t; EU+EFTA+UK
- km_20: 1000.92
  Distance in km, for slab and siding, softwood, wet, measured as dry mass // slab and siding, softwood, wet, measured as dry mass // world (without eu+efta+uk, us and ca); Articulated lorry transport, Euro 4, Total weight >32 t; EU+EFTA+UK
- kg_km_20: 4470; = kg_20*km_20
  Transport amount in km*km, for slab and siding, softwood, wet, measured as dry mass // slab and siding, softwood, wet, measured as dry mass // world (without eu+efta+uk, us and ca); Articulated lorry transport, Euro 4, Total weight >32 t; EU+EFTA+UK
- kg_21: 4.4659
  Mass in kg, for slab and siding, softwood, wet, measured as dry mass // slab and siding, softwood, wet, measured as dry mass // world (without eu+efta+uk, us and ca); Transoceanic ship, containers; GLO
- km_21: 18003.1
  Distance in km, for slab and siding, softwood, wet, measured as dry mass // slab and siding, softwood, wet, measured as dry mass // world (without eu+efta+uk, us and ca); Transoceanic ship, containers; GLO
- kg_km_21: 80400; = kg_21*km_21
  Transport amount in km*km, for slab and siding, softwood, wet, measured as dry mass // slab and siding, softwood, wet, measured as dry mass // world (without eu+efta+uk, us and ca); Transoceanic ship, containers; GLO
- kg_22: 0.325982
  Mass in kg, for urea, per kg n, production mix, at plant // urea, per kg n // glo; Articulated lorry transport, Euro 4, Total weight >32 t; EU+EFTA+UK
- km_22: 1000.06
  Distance in km, for urea, per kg n, production mix, at plant // urea, per kg n // glo; Articulated lorry transport, Euro 4, Total weight >32 t; EU+EFTA+UK
- kg_km_22: 326; = kg_22*km_22
  Transport amount in km*km, for urea, per kg n, production mix, at plant // urea, per kg n // glo; Articulated lorry transport, Euro 4, Total weight >32 t; EU+EFTA+UK
- kg_23: 0.325982
  Mass in kg, for urea, per kg n, production mix, at plant // urea, per kg n // glo; Transoceanic ship, containers; GLO
- km_23: 18007.1
  Distance in km, for urea, per kg n, production mix, at plant // urea, per kg n // glo; Transoceanic ship, containers; GLO
- kg_km_23: 5870; = kg_23*km_23
  Transport amount in km*km, for urea, per kg n, production mix, at plant // urea, per kg n // glo; Transoceanic ship, containers; GLO
- kg_24: 46.3705
  Mass in kg, for urea-formaldehyde resin // urea-formaldehyde resin production // eu+efta+uk; Articulated lorry transport, Euro 4, Total weight >32 t; EU+EFTA+UK
- km_24: 1000.64
  Distance in km, for urea-formaldehyde resin // urea-formaldehyde resin production // eu+efta+uk; Articulated lorry transport, Euro 4, Total weight >32 t; EU+EFTA+UK
- kg_km_24: 46400; = kg_24*km_24
  Transport amount in km*km, for urea-formaldehyde resin // urea-formaldehyde resin production // eu+efta+uk; Articulated lorry transport, Euro 4, Total weight >32 t; EU+EFTA+UK
- kg_25: 46.3705
  Mass in kg, for urea-formaldehyde resin // urea-formaldehyde resin production // eu+efta+uk; Transoceanic ship, containers; GLO
- km_25: 18007.1
  Distance in km, for urea-formaldehyde resin // urea-formaldehyde resin production // eu+efta+uk; Transoceanic ship, containers; GLO
- kg_km_25: 835000; = kg_25*km_25
  Transport amount in km*km, for urea-formaldehyde resin // urea-formaldehyde resin production // eu+efta+uk; Transoceanic ship, containers; GLO
- kg_26: 56.4448
  Mass in kg, for wood chips, hardwood // wood chips, hardwood // eu+efta+uk; Articulated lorry transport, Euro 4, Total weight >32 t; EU+EFTA+UK
- km_26: 999.207
  Distance in km, for wood chips, hardwood // wood chips, hardwood // eu+efta+uk; Articulated lorry transport, Euro 4, Total weight >32 t; EU+EFTA+UK
- kg_km_26: 56400; = kg_26*km_26
  Transport amount in km*km, for wood chips, hardwood // wood chips, hardwood // eu+efta+uk; Articulated lorry transport, Euro 4, Total weight >32 t; EU+EFTA+UK
- kg_27: 56.4448
  Mass in kg, for wood chips, hardwood // wood chips, hardwood // eu+efta+uk; Transoceanic ship, containers; GLO
- km_27: 18070.8
  Distance in km, for wood chips, hardwood // wood chips, hardwood // eu+efta+uk; Transoceanic ship, containers; GLO
- kg_km_27: 1.02e6; = kg_27*km_27
  Transport amount in km*km, for wood chips, hardwood // wood chips, hardwood // eu+efta+uk; Transoceanic ship, containers; GLO
- kg_28: 42.3336
  Mass in kg, for wood chips, hardwood // wood chips, hardwood // rna; Articulated lorry transport, Euro 4, Total weight >32 t; EU+EFTA+UK
- km_28: 999.207
  Distance in km, for wood chips, hardwood // wood chips, hardwood // rna; Articulated lorry transport, Euro 4, Total weight >32 t; EU+EFTA+UK
- kg_km_28: 42300; = kg_28*km_28
  Transport amount in km*km, for wood chips, hardwood // wood chips, hardwood // rna; Articulated lorry transport, Euro 4, Total weight >32 t; EU+EFTA+UK
- kg_29: 42.3336
  Mass in kg, for wood chips, hardwood // wood chips, hardwood // rna; Transoceanic ship, containers; GLO
- km_29: 17999.9
  Distance in km, for wood chips, hardwood // wood chips, hardwood // rna; Transoceanic ship, containers; GLO
- kg_km_29: 762000; = kg_29*km_29
  Transport amount in km*km, for wood chips, hardwood // wood chips, hardwood // rna; Transoceanic ship, containers; GLO
- kg_30: 209.761
  Mass in kg, for wood chips, hardwood // wood chips, hardwood // world (without eu+efta+uk, us and ca); Articulated lorry transport, Euro 4, Total weight >32 t; EU+EFTA+UK
- km_30: 999.232
  Distance in km, for wood chips, hardwood // wood chips, hardwood // world (without eu+efta+uk, us and ca); Articulated lorry transport, Euro 4, Total weight >32 t; EU+EFTA+UK
- kg_km_30: 209600; = kg_30*km_30
  Transport amount in km*km, for wood chips, hardwood // wood chips, hardwood // world (without eu+efta+uk, us and ca); Articulated lorry transport, Euro 4, Total weight >32 t; EU+EFTA+UK
- kg_31: 209.761
  Mass in kg, for wood chips, hardwood // wood chips, hardwood // world (without eu+efta+uk, us and ca); Transoceanic ship, containers; GLO
- km_31: 18020.5
  Distance in km, for wood chips, hardwood // wood chips, hardwood // world (without eu+efta+uk, us and ca); Transoceanic ship, containers; GLO
- kg_km_31: 3.78e6; = kg_31*km_31
  Transport amount in km*km, for wood chips, hardwood // wood chips, hardwood // world (without eu+efta+uk, us and ca); Transoceanic ship, containers; GLO
- kg_32: 96.1087
  Mass in kg, for wood chips, softwood // wood chips, softwood // eu+efta+uk; Articulated lorry transport, Euro 4, Total weight >32 t; EU+EFTA+UK
- km_32: 999.91
  Distance in km, for wood chips, softwood // wood chips, softwood // eu+efta+uk; Articulated lorry transport, Euro 4, Total weight >32 t; EU+EFTA+UK
- kg_km_32: 96100; = kg_32*km_32
  Transport amount in km*km, for wood chips, softwood // wood chips, softwood // eu+efta+uk; Articulated lorry transport, Euro 4, Total weight >32 t; EU+EFTA+UK
- kg_33: 96.1087
  Mass in kg, for wood chips, softwood // wood chips, softwood // eu+efta+uk; Transoceanic ship, containers; GLO
- km_33: 18000.5
  Distance in km, for wood chips, softwood // wood chips, softwood // eu+efta+uk; Transoceanic ship, containers; GLO
- kg_km_33: 1.73e6; = kg_33*km_33
  Transport amount in km*km, for wood chips, softwood // wood chips, softwood // eu+efta+uk; Transoceanic ship, containers; GLO
- kg_34: 72.0815
  Mass in kg, for wood chips, softwood // wood chips, softwood // rna; Articulated lorry transport, Euro 4, Total weight >32 t; EU+EFTA+UK
- km_34: 1000.26
  Distance in km, for wood chips, softwood // wood chips, softwood // rna; Articulated lorry transport, Euro 4, Total weight >32 t; EU+EFTA+UK
- kg_km_34: 72100; = kg_34*km_34
  Transport amount in km*km, for wood chips, softwood // wood chips, softwood // rna; Articulated lorry transport, Euro 4, Total weight >32 t; EU+EFTA+UK
- kg_35: 72.0815
  Mass in kg, for wood chips, softwood // wood chips, softwood // rna; Transoceanic ship, containers; GLO
- km_35: 18035.1
  Distance in km, for wood chips, softwood // wood chips, softwood // rna; Transoceanic ship, containers; GLO
- kg_km_35: 1.3e6; = kg_35*km_35
  Transport amount in km*km, for wood chips, softwood // wood chips, softwood // rna; Transoceanic ship, containers; GLO
- kg_36: 0.898553
  Mass in kg, for biodegradable waste to landfill // landfill of biodegradable waste // eu+efta+uk; Articulated lorry transport, Euro 4, Total weight >32 t; EU+EFTA+UK
- km_36: 77
  Distance in km, for biodegradable waste to landfill // landfill of biodegradable waste // eu+efta+uk; Articulated lorry transport, Euro 4, Total weight >32 t; EU+EFTA+UK
- kg_km_36: 69.1886; = kg_36*km_36
  Transport amount in km*km, for biodegradable waste to landfill // landfill of biodegradable waste // eu+efta+uk; Articulated lorry transport, Euro 4, Total weight >32 t; EU+EFTA+UK
- kg_37: 2.66128
  Mass in kg, for waste (unspecified) // landfill of inert material (other materials) // eu+efta+uk; Articulated lorry transport, Euro 4, Total weight >32 t; EU+EFTA+UK
- km_37: 77
  Distance in km, for waste (unspecified) // landfill of inert material (other materials) // eu+efta+uk; Articulated lorry transport, Euro 4, Total weight >32 t; EU+EFTA+UK
- kg_km_37: 204.919; = kg_37*km_37
  Transport amount in km*km, for waste (unspecified) // landfill of inert material (other materials) // eu+efta+uk; Articulated lorry transport, Euro 4, Total weight >32 t; EU+EFTA+UK

## Reference product
- medium density fibreboard // medium-density fibreboard (mdf) // glo: 1

## Inputs
- Electricity from Electricity grid mix 1kV-60kV - AU: 8.0349
- Electricity from Electricity grid mix 1kV-60kV - NZ: 1.5309
- Electricity from Electricity grid mix 1kV-60kV - RU: 34.6379
- Electricity from Electricity grid mix 1kV-60kV - RAF: 25.8661
- Electricity from Electricity grid mix 1kV-60kV - EU+EFTA+UK: 118.368
- Electricity from Electricity grid mix 1kV-60kV - RSA: 58.7782
- Electricity from Electricity grid mix 1kV-60kV - RNA: 173.225
- Thermal energy (MJ) from Thermal energy from natural gas - ROW: 1068.05
- Thermal energy (MJ) from Thermal energy from light fuel oil (LFO) - ROW: 15.3526
- Thermal energy (MJ) from Thermal energy from heavy fuel oil (HFO) - ROW: 25.2086
- Transport of aluminium sulphate powder // aluminium sulphate powder production // eu+efta+uk by Articulated lorry transport, Euro 4, Total weight >32 t - EU+EFTA+UK: 22.7; = kg_km_0
- Transport of aluminium sulphate powder // aluminium sulphate powder production // eu+efta+uk by Transoceanic ship, containers - GLO: 408; = kg_km_1
- Transport of lubricating oil // lubricants at refinery // eu+efta+uk by Articulated lorry transport, Euro 4, Total weight >32 t - EU+EFTA+UK: 130; = kg_km_2
- Transport of lubricating oil // lubricants at refinery // eu+efta+uk by Transoceanic ship, containers - GLO: 2350; = kg_km_3
- Transport of melamine formaldehyde resin // melamine formaldehyde resin production // eu+efta+uk by Articulated lorry transport, Euro 4, Total weight >32 t - EU+EFTA+UK: 41800; = kg_km_4
- Transport of melamine formaldehyde resin // melamine formaldehyde resin production // eu+efta+uk by Transoceanic ship, containers - GLO: 752000; = kg_km_5
- Transport of wax // wax production // eu+efta+uk by Articulated lorry transport, Euro 4, Total weight >32 t - EU+EFTA+UK: 4700; = kg_km_6
- Transport of wax // wax production // eu+efta+uk by Transoceanic ship, containers - GLO: 84500; = kg_km_7
- Transport of softwood under bark // softwood forestry // glo by Articulated lorry transport, Euro 4, Total weight >32 t - EU+EFTA+UK: 465000; = kg_km_8
- Transport of softwood under bark // softwood forestry // glo by Transoceanic ship, containers - GLO: 8.36e6; = kg_km_9
- Transport of hardwood under bark // hardwood forestry // glo by Articulated lorry transport, Euro 4, Total weight >32 t - EU+EFTA+UK: 8590; = kg_km_10
- Transport of hardwood under bark // hardwood forestry // glo by Transoceanic ship, containers - GLO: 155000; = kg_km_11
- Transport of sawdust hardwood, loose, wet, measured as dry mass // sawdust hardwood, loose, wet, measured as dry mass // eu+efta+uk by Articulated lorry transport, Euro 4, Total weight >32 t - EU+EFTA+UK: 9860; = kg_km_12
- Transport of sawdust hardwood, loose, wet, measured as dry mass // sawdust hardwood, loose, wet, measured as dry mass // eu+efta+uk by Transoceanic ship, containers - GLO: 177000; = kg_km_13
- Transport of sawdust softwood, loose, wet, measured as dry mass // sawdust softwood, loose, wet, measured as dry mass // eu+efta+uk by Articulated lorry transport, Euro 4, Total weight >32 t - EU+EFTA+UK: 29900; = kg_km_14
- Transport of sawdust softwood, loose, wet, measured as dry mass // sawdust softwood, loose, wet, measured as dry mass // eu+efta+uk by Transoceanic ship, containers - GLO: 538000; = kg_km_15
- Transport of slab and siding, softwood, wet, measured as dry mass // slab and siding, softwood, wet, measured as dry mass // eu+efta+uk by Articulated lorry transport, Euro 4, Total weight >32 t - EU+EFTA+UK: 3250; = kg_km_16
- Transport of slab and siding, softwood, wet, measured as dry mass // slab and siding, softwood, wet, measured as dry mass // eu+efta+uk by Transoceanic ship, containers - GLO: 58500; = kg_km_17
- Transport of slab and siding, softwood, wet, measured as dry mass // slab and siding, softwood, wet, measured as dry mass // rna by Articulated lorry transport, Euro 4, Total weight >32 t - EU+EFTA+UK: 2440; = kg_km_18
- Transport of slab and siding, softwood, wet, measured as dry mass // slab and siding, softwood, wet, measured as dry mass // rna by Transoceanic ship, containers - GLO: 43800; = kg_km_19
- Transport of slab and siding, softwood, wet, measured as dry mass // slab and siding, softwood, wet, measured as dry mass // world (without eu+efta+uk, us and ca) by Articulated lorry transport, Euro 4, Total weight >32 t - EU+EFTA+UK: 4470; = kg_km_20
- Transport of slab and siding, softwood, wet, measured as dry mass // slab and siding, softwood, wet, measured as dry mass // world (without eu+efta+uk, us and ca) by Transoceanic ship, containers - GLO: 80400; = kg_km_21
- Transport of urea, per kg n, production mix, at plant // urea, per kg n // glo by Articulated lorry transport, Euro 4, Total weight >32 t - EU+EFTA+UK: 326; = kg_km_22
- Transport of urea, per kg n, production mix, at plant // urea, per kg n // glo by Transoceanic ship, containers - GLO: 5870; = kg_km_23
- Transport of urea-formaldehyde resin // urea-formaldehyde resin production // eu+efta+uk by Articulated lorry transport, Euro 4, Total weight >32 t - EU+EFTA+UK: 46400; = kg_km_24
- Transport of urea-formaldehyde resin // urea-formaldehyde resin production // eu+efta+uk by Transoceanic ship, containers - GLO: 835000; = kg_km_25
- Transport of wood chips, hardwood // wood chips, hardwood // eu+efta+uk by Articulated lorry transport, Euro 4, Total weight >32 t - EU+EFTA+UK: 56400; = kg_km_26
- Transport of wood chips, hardwood // wood chips, hardwood // eu+efta+uk by Transoceanic ship, containers - GLO: 1.02e6; = kg_km_27
- Transport of wood chips, hardwood // wood chips, hardwood // rna by Articulated lorry transport, Euro 4, Total weight >32 t - EU+EFTA+UK: 42300; = kg_km_28
- Transport of wood chips, hardwood // wood chips, hardwood // rna by Transoceanic ship, containers - GLO: 762000; = kg_km_29
- Transport of wood chips, hardwood // wood chips, hardwood // world (without eu+efta+uk, us and ca) by Articulated lorry transport, Euro 4, Total weight >32 t - EU+EFTA+UK: 209600; = kg_km_30
- Transport of wood chips, hardwood // wood chips, hardwood // world (without eu+efta+uk, us and ca) by Transoceanic ship, containers - GLO: 3.78e6; = kg_km_31
- Transport of wood chips, softwood // wood chips, softwood // eu+efta+uk by Articulated lorry transport, Euro 4, Total weight >32 t - EU+EFTA+UK: 96100; = kg_km_32
- Transport of wood chips, softwood // wood chips, softwood // eu+efta+uk by Transoceanic ship, containers - GLO: 1.73e6; = kg_km_33
- Transport of wood chips, softwood // wood chips, softwood // rna by Articulated lorry transport, Euro 4, Total weight >32 t - EU+EFTA+UK: 72100; = kg_km_34
- Transport of wood chips, softwood // wood chips, softwood // rna by Transoceanic ship, containers - GLO: 1.3e6; = kg_km_35
- Transport of biodegradable waste to landfill // landfill of biodegradable waste // eu+efta+uk by Articulated lorry transport, Euro 4, Total weight >32 t - EU+EFTA+UK: 69.1886; = kg_km_36
- Transport of waste (unspecified) // landfill of inert material (other materials) // eu+efta+uk by Articulated lorry transport, Euro 4, Total weight >32 t - EU+EFTA+UK: 204.919; = kg_km_37
- Electricity from Electricity grid mix 1kV-60kV - CN: 177.491
- Electricity from Electricity grid mix 1kV-60kV - RAS w/o CN: 194.466
- medium density fibreboard // medium-density fibreboard (mdf) // glo, blackbox: 1
- medium density fibreboard // medium-density fibreboard (mdf) // glo, elementary: 1

## Impact indicators
- Eutrophication marine: 2.83424
- Ecotoxicity, freshwater: 6096.97
- Land use: 102663
- Water use: 523.084
- Resource use, minerals and metals: 0.00219849
- Resource use, fossils: 13814.4
- Climate change: 866.096
- Ozone depletion: 5.2809e-7
- Human toxicity, cancer: 4.94237e-6
- Human toxicity, non-cancer: 5.57337e-6
- EF-particulate Matter: 0.000227788
- Ionising radiation, human health: 20.0748
- Photochemical ozone formation - human health: 8.38605
- Acidification: 11.0075
- Eutrophication, terrestrial: 34.0061
- Eutrophication, freshwater: 0.0423107

## Deviations from the LCI method principle
The background data uses:
- the \xe2\x80\x9cRecycled content cut-off\xe2\x80\x9d approach to allocate end-of-life by-products and secondary materials. This allocation is explained in the description of the recycled content system model (http://www.ecoinvent.org/database/system-models-in-ecoinvent-3/cut-off-system-model/allocation-cut-off-by-classification.html).
OR
- EF compliant data

## Deviations from the LCI method approaches
Background data:
- the \xe2\x80\x9cRecycled content cut-off\xe2\x80\x9d approach to allocate end-of-life by-products and secondary materials. This allocation is explained in the description of the recycled content system model (http://www.ecoinvent.org/database/system-models-in-ecoinvent-3/cut-off-system-model/allocation-cut-off-by-classification.html). The ecoinvent database mostly relies on “Allocation – market values” apart for few exceptions particularly in the energy sector. ecoinvent energy data is replaced with EF3.0 core data as per the EF guidelines version 2.0.
OR
- EF compliant data

## Modelling constants
All modelling constants follow the requirements listed in the Tender Specifications 070201/2020/SER/ENV.B1. Completeness: There are no intentional cut-offs in the inventory no matter how small their contribution to all the EF impact categories is. Eventual cut-offs are in compliance with the Guide for EF compliant data sets (JRC 2020), i.e. only if below the 3% cut-off rule. Water use: water use is modelled at country level using separate flows for water withdrawal, water release and water evaporation. Handling multi-functional processes: the following PEF multi- functionality decision hierarchy is applied for resolving all multi- functionality problems: (1) subdivision or system expansion; (2) allocation based on a relevant underlying physical relationship (substitution may apply here); (3) allocation based on some other relationship. Direct land use change: GHG emissions from direct LUC allocated to good/service for 20 years after the LUC occurs, with IPCC default values. Carbon storage and delayed emissions: credits associated with temporary (carbon) storage or delayed emissions up to 300 years are not be considered. Emissions off-setting: are not included. Capital goods (including infrastructures) and their End of life: they are included. System boundaries: system boundaries include all processes linked to the product supply chain (e.g. maintenance). Time period: emissions and removals are modelled as if released or removed at the beginning of the assessment method. Fossil and biogenic carbon emissions and removals: removals and emissions are modelled as follows: All GHG emissions from fossil fuels (including peat and limestone) are modelled consistently with the most updated ILCD list of elementary flows. The non-fossil (biogenic) carbon flows are modelled consistently with the most updated ILCD list of elementary flows.

## Cut-off and completeness
There are no intentional cut-offs in the inventory no matter how small their contribution to all the EF impact categories is. Eventual cut-offs are in compliance with the Guide for EF compliant data sets (JRC 2020), i.e. only if below the 3% cut-off rule. The dataset dry mass and water balance has been checked to ensure the inventory is complete. Capital goods (e.g. infrastructure) and their end-of-life are included.

## Data selection and combination
These datasets include, in both their foreground and background data, links to EF3.0 compliant data.
The relevant background data on energy, transport, and End of Life are from the LCDN data node (http://lcdn.thinkstep.com/Node/).
All other background data in the supply of this product for which no EF3.0 process was available are from ecoinvent v3.7 database (www.ecoinvent.org) or other data sources.

## Data treatment and extrapolations
Several data sources have been used to model the inventory.

## Review details
Internal reviews have been asked to review the plausibility of the unit process, LCIA scores, and DQRs. Internal reviewers have also been asked to review the data for EF compliancy. The consortium is therefore responsible for aspects such as compliancy with the ILCD format, including validation in Look@LCI, and nomenclature.
Internal reviwers have been asked to judge based on the process name, that the unit process models in a complete and representative way the process in the requested location. The review encompassed the plausability of:
- exchanges with nature (elementary flows) as well as exchanges such as product and waste flows.
- meta information (general comment, technology comment, system boundaries, allocation, cut-off rules, etc.). Reviewers were asked to judge if the provided information is enough to understand the content of the process.
- LCIA scores
- DQRs including precision, technology, time and geography. As well as the overall DQR.
External reviewers have been asked to provide their expertise in the field of interest. External reviewers have been asked to review the unit process, including eventual methodological choices, the LCIA scores (provided with contribution scores as well), and DQRs. External reviewers have been provided all the information in a tool developed by the consortium for the purpose of this project.
External reviewers have been asked to judge based on the process name, that the unit process models in a complete and representative way the process in the requested location. The review encompassed:
- Plausability and completeness of exchanges with nature (elementary flows) as well as exchanges such as product and waste flows.
- Review of meta information (general comment, technology comment, system boundaries, allocation, cut-off rules, etc.). Reviewers were asked to judge if the provided information is enough to understand the content of the process.
- Review of properties (biogenic carbon and water content).
- Review of allocation keys.
- Plausability of LCIA scores calculated by the consortium.
- Plausability of DQRs including precision, technology, time and geography. As well as the overall DQR.

## Data sources
- Background Data for Representative products and organisations. EF 3.0 compliant (data stock)
- Werner F., medium density fibreboard production, uncoated, RER, Allocation, cut-off by classification, ecoinvent database version 3.7.1
- Survey among member companies of the European Panel Federation; emissions profile per MJ wood input from PSI (2014)

## Intended applications
Implementation of regular Product Environmental Footprint (PEF) studies and Organisation Environmental Footprint (OEF) studies exclusively under the specified Product groups and sectors as defined in the Product Environmental Footprint Category Rules (PEFCR) and Organisation Environmental Footprint Sectorial Rules (OEFSR) listed in http://ec.europa.eu/environment/eussd/smgp/PEFCR_OEFSR.htm
