# treatment, surface, leather (including embossing, buffing, etc.), elementary; Buffing/dedusting and embossing/plating proces; production mix, at plant; service

Dataset: ILCD process, Unit process, single operation
Geography: GLO
Reference year: 2021
Valid until: 2024
Classification: Other Services / Other services
LCI method principle: Attributional
LCI method approaches: Allocation - market value
Completeness: All relevant flows quantified
Project: Provision of process-based 3.0 Environmental Footprint-compliant life cycle inventory datasets - Apparel 1 - contract number 070201/2020/840291/SER/ENV.B.1
Generated by: Life Cycle Indonesia
Owner: PRé Sustainability B.V.
Compliance: Environmental Footprint non-primary supporting data set; Environmental Footprint 3.1
Amounts: no units in this file; such an amount is in the reference unit of its flow, which a separate flow dataset defines
copyright: true
licenseType: Free of charge for some user types or use types
accessRestrictions: Free of charge for all final users implementing a regular Product Environmental Footprint (PEF) studies and Organisation Environmental Footprint (OEF) studies exclusively under the specified Product groups and sectors as defined in the Product Environmental Footprint Category Rules (PEFCR) and Organisation Environmental Footprint Sectorial Rules (OEFSR) listed in http://ec.europa.eu/environment/eussd/smgp/PEFCR_OEFSR.htm and in accordance with the terms and conditions of the EULA (available at https://ecoinvent.lca-data.com/) exclusively until 31st December 2024. Any use of this dataset or any derivative data not within the specific context of one of the PEF/OEF projects or after the end of 2024 is not permitted.

## General comment
Notice: this data set supersedes the EF3.0-compliant version (see link under "preceding data set version" below calculated with the EF3.0). The life cycle inventory is not changed from the original EF3.0 data set. The LCIA results are calculated based on the EF3.1 methods which provide updated characterisation factors in the following impact categories: Climate Change, Ecotoxicity freshwater, Photochemical Ozone Formation, Acidification, Human Toxicity non-cancer, and Human Toxicity cancer. The review report and the data quality ratings refer to the original results. The data set has been updated by the European Commission on the basis of the original EF3.0 data set delivered by the data provider.This sub-process has limited documentation only. For all detailed documentation of the full model to which this data set belongs (such as DQRs, review reports and other technical documentation), please see this process: treatment, surface, leather (including embossing, buffing, etc.) - GLO []

## Technology and included processes
Mechanical Finishing processes are used for this model, i.e Buffing/dedusting and embossing/plating process. Buffing / dedusting is the process of abrading the leather surface and removing the resulting dust from the leather surface. Plating/embossing is the process of flattening or printing a pattern into the leather (IFC, 2007).

The model represents the process itself, hence the input raw materials are not included in the model. This process requires only the tools (Buffing machine or embossing machine) which runs on electricity with lube oil usage and without any added materials to complete the process. The user will use this dataset along with the input raw materials (leather footwear that its surface will be treated). The materials entering the process are energy uses and infrastructure. There is no direct emission water and air since the emission comes from electricity usage, while the hazardous waste comes from waste lube oil. Non-hazardous waste comes from buffing process which generate dust. In the model, enegy sources of machines used solely from electricity. The consumption of lubricating oil using a thermobonding oven as a proxy. Waste lube oil will be treated as harazdous waste and incinerated. The dust collected is treated as residual landfill.

IFC (2007). Environmental, Health, and Safety Guidelines for Tanning and Leather Finishing
, https://www.ifc.org/wps/wcm/connect/e497d468-6fbe-462e-86a9-e3ff55ea0236/Final%2B-%2BTanning%2Band%2BLeather%2BFinishing.pdf?MOD=AJPERES&CVID=jqezJDY&id=1323152378134, International Finance Corportaion, United States

## Reference product
- treatment, surface, leather (including embossing, buffing, etc.) // treatment, surface, leather (including embossing, buffing, etc.) // glo, elementary: 1

## Impact indicators
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
## Deviations from the LCI method principle
The background data use the \xe2\x80\x9cRecycled content cut-off\xe2\x80\x9d approach to allocate end-of-life by-products and secondary materials. This allocation is explained in the description of the recycled content system model (http://www.ecoinvent.org/database/system-models-in-ecoinvent-3/cut-off-system-model/allocation-cut-off-by-classification.html).

## Deviations from the LCI method approaches
Background data:
- the \xe2\x80\x9cRecycled content cut-off\xe2\x80\x9d approach to allocate end-of-life by-products and secondary materials. This allocation is explained in the description of the recycled content system model (http://www.ecoinvent.org/database/system-models-in-ecoinvent-3/cut-off-system-model/allocation-cut-off-by-classification.html). The ecoinvent database mostly relies on “Allocation – market values” apart for few exceptions particularly in the energy sector. ecoinvent energy data is replaced with EF3.0 core data as per the EF guidelines version 2.0.
OR
- EF compliant data

## Modelling constants
All modelling constants follow the requirements listed in the Tender Specifications ENV.B.1/SER/2016/0038vl. Completeness: All known environmental flows are included. All known resource uses and emissions are listed in the inventory. Water use: water use is modelled at country level using separate flows for water withdrawal, water release and water evaporation. Cut-off: All known environmental flows are included. All known resource uses and emissions are listed in the inventory. Handling multi-functional processes: the following PEF multi- functionality decision hierarchy is applied for resolving all multi- functionality problems: (1) subdivision or system expansion; (2) allocation based on a relevant underlying physical relationship (substitution may apply here); (3) allocation based on some other relationship. Direct land use change: GHG emissions from direct LUC allocated to good/service for 20 years after the LUC occurs, with IPCC default values. Carbon storage and delayed emissions: credits associated with temporary (carbon) storage or delayed emissions up to 300 years are not be considered. Emissions off-setting: are not included. Capital goods (including infrastructures) and their End of life: they are included. System boundaries: system boundaries include all processes linked to the product supply chain (e.g. maintenance). Time period: emissions and removals are modelled as if released or removed at the beginning of the assessment method. Fossil and biogenic carbon emissions and removals: removals and emissions are modelled as follows: All GHG emissions from fossil fuels (including peat and limestone) are modelled consistently with the most updated ILCD list of elementary flows. The non-fossil (biogenic) carbon flows are modelled consistently with the most updated ILCD list of elementary flows.

## Cut-off and completeness
All known environmental flows are included. All known resource uses and emissions are listed in the inventory. The dataset dry mass balance has been checked to ensure the inventory is complete. Capital goods (e.g. infrastructure) and their end-of-life are included.

## Data selection and combination
These datasets include, in both their foreground and background data, links to EF3.0 compliant data.
The relevant background data on energy, transport, and End of Life are from the LCDN data node (http://lcdn.thinkstep.com/Node/).
All other background data in the supply of this product for which no EF3.0 process was available are from ecoinvent v3.7 database (www.ecoinvent.org) or other data sources.

## Data treatment and extrapolations
Several data sources have been used to model the inventory.

## Use advice
This data set is a supporting sub-data set and must be used exclusively as sub-data set of its corresponding level-1 partly disaggregated data set (see “General comment” field for exact name and UUID).

## Data sources
- Background Data for Representative products and organisations. EF 3.0 compliant (data stock)
- UN Data (2018) Statistics Data for Lubricants Productions, http://data.un.org/Data.aspx?q=Lubricants&d=EDATA&f=cmID%3aLU, United Nations Statistics Division, Global.
- Dong Guan Yong Hui Leather Machinery Co. Ltd (2021) Footwear shoe shoemaking polishing buffing machine, https://yonghuimachine.en.alibaba.com/?fbclid=IwAR0HJgryZw7040eDq4RJIGskdafJxcY-Tgbb2uWqTir7e70RklJHI-fILNk, Dong Guan Yong Hui Leather Machinery Co., Ltd, Guangdong, China
- Luen Cheong (2021) Pneumatic Embossing Stamping Machines TC-200, http://www.cn-print.com/sdp/305729/4/pd-1155620/1956315-1855361/Pneumatic_Embossing_Stamping_Machines_TC-200.html, Luen Cheong Printing Equipment Ltd., Guang Dong, China
- Lebon (2021) Nonwoven Oven Machine, Catalog and Company Messages, Qingdao Lebon Industry Co., Ltd., China
- J Kanagaraj, K C Velappan, N K Chandra Babu and S Sadulla (2006), Solid wastes generation in the leather industry and its utilization for cleaner environment - A review, https://www.researchgate.net/publication/250468977_Solid_Wastes_Generation_in_the_Leather_Industry_and_Its_Utilization_for_Cleaner_Environment, Journal of Scientific & Industrial Research, Chennai, India
- WillyMocs (2021) WillyMocs: FAQs, https://www.willymoc.com/bizpages/willymocs_faq.html, Willy & Barb O'Neal, Arizona, United States
- SICAM (2021) FINISHING LINES FOR NEEDLE PUNCHED WEBS: Synthethic leather plant, https://www.sicamsrl.com/impianto/synthetic-leather-plantsynthetic-leather-200-300-gsm/, SICAM s.r.l., Milano, Italy

## Intended applications
Implementation of regular Product Environmental Footprint (PEF) studies and Organisation Environmental Footprint (OEF) studies exclusively under the specified Product groups and sectors as defined in the Product Environmental Footprint Category Rules (PEFCR) and Organisation Environmental Footprint Sectorial Rules (OEFSR) listed in http://ec.europa.eu/environment/eussd/smgp/PEFCR_OEFSR.htm
