# sawn wood, softwood; technology mix; production mix, at plant; wet mass

Dataset: ILCD process, Partly terminated system
Geography: WORLD (WITHOUT EU+EFTA+UK, US AND CA)
Reference year: 2017
Valid until: 2024
Classification: Materials production / Wood
LCI method principle: Attributional
LCI method approaches: Allocation - market value
Completeness: All relevant flows quantified
Project: Provision of process-based 3.0 Environmental Footprint-compliant life cycle inventory datasets - Renewable materials - contract number 070201/2020/840085/SER/ENV.B.1
Generated by: ecoinvent
Owner: ecoinvent
Compliance: ILCD Data Network - Entry-level; Suggestions for updating the PEF method 2019; ISO 14040 Environmental Management – Life Cycle Assessment – Principles and Framework, 2006; ISO 14044:2006. Environmental Management – Life Cycle Assessment – Requirements and guidelines.; Environmental Footprint 3.1
Review: Dependent internal review by Lucia Valsasina, Emilia Moreno Ruiz; Independent review panel by Jens Lansche
Data quality: Overall quality: Very good; Time representativeness: Very good; Geographical representativeness: Very good; Technological representativeness: Very good; Precision: Good; Methodological appropriateness and consistency: Not applicable
Amounts: no units in this file; such an amount is in the reference unit of its flow, which a separate flow dataset defines
copyright: true
licenseType: Free of charge for some user types or use types
accessRestrictions: Free of charge for all final users implementing a regular Product Environmental Footprint (PEF) studies and Organisation Environmental Footprint (OEF) studies exclusively under the specified Product groups and sectors as defined in the Product Environmental Footprint Category Rules (PEFCR) and Organisation Environmental Footprint Sectorial Rules (OEFSR) listed in http://ec.europa.eu/environment/eussd/smgp/PEFCR_OEFSR.htm and in accordance with the terms and conditions of the EULA (available at https://ecoinvent.lca-data.com/) exclusively until 31st December 2024. Any use of this dataset or any derivative data not within the specific context of one of the PEF/OEF projects or after the end of 2024 is not permitted.

## General comment
Notice: this data set supersedes the EF3.0-compliant version (see link under "preceding data set version" below calculated with the EF3.0). The life cycle inventory is not changed from the original EF3.0 data set. The LCIA results are calculated based on the EF3.1 methods which provide updated characterisation factors in the following impact categories: Climate Change, Ecotoxicity freshwater, Photochemical Ozone Formation, Acidification, Human Toxicity non-cancer, and Human Toxicity cancer. The review report and the data quality ratings refer to the original results. The data set has been updated by the European Commission on the basis of the original EF3.0 data set delivered by the data provider.This dataset represents the production of 1 kg sawn, dried, and planed softwood. The dataset represents a mix of more specific sawn wood products, i.e., beam board and laths. The split of beam, board and lath is assumed to be 0.5, 0.33, and 0.17, respectively. It was assumed that 50 % of the wood is dried to a gravimetric water content of u = 20 % and the remaining 50 % to u = 10 % resulting in a gravimetric water content of ca. 15 %. 80 % of the wood dried to u = 20 % are assumed to be dried by kiln drying, the remaining 20 % are assumed to be dried by air drying. All wood dried to a gravimetric water content of 10 % is dried by kiln drying. The basic wood density (dry mass/wet volume) is assumed to be 360.16 Kg/m3. The planing mill is assumed to be located at the sawmill site. In the planing process shavings are produced as a by-product. The allocation keys for sawn wood, softwood and shavings are 97.13% and 2.87%, respectively.

## Technology and included processes
The activity starts with the dried sawn wood from air and kiln drying with a gravimetric water content of ca. 15 %. The dataset includes the planning process and the input of dried, sawn wood. The dataset does not include dust emission. The activity ends with planed softwood at the planning mill.

## Reference product
- sawn wood, softwood // sawn wood, softwood // world (without eu+efta+uk, us and ca): 1

## Inputs
- Electricity from Electricity grid mix 1kV-60kV - AU: 0.0016
- Electricity from Electricity grid mix 1kV-60kV - NZ: 0.0003
- Electricity from Electricity grid mix 1kV-60kV - RU: 0.007
- Electricity from Electricity grid mix 1kV-60kV - RAF: 0.0052
- Electricity from Electricity grid mix 1kV-60kV - RSA: 0.0119
- Electricity from Electricity grid mix 1kV-60kV - RNA: 0.035
- Electricity from Electricity grid mix 1kV-60kV - CN: 0.0358363
- Electricity from Electricity grid mix 1kV-60kV - RAS w/o CN: 0.0392637
- sawn wood, softwood // sawn wood, softwood // world (without eu+efta+uk, us and ca), blackbox: 1
- sawn wood, softwood // sawn wood, softwood // world (without eu+efta+uk, us and ca), elementary: 1

## Impact indicators
- Eutrophication marine: 0.000550774
- Ecotoxicity, freshwater: 1.66412
- Land use: 346.689
- Water use: 0.0461148
- Resource use, minerals and metals: 4.00157e-7
- Resource use, fossils: 2.92318
- Climate change: 0.208344
- Ozone depletion: 3.06626e-10
- Human toxicity, cancer: 2.3216e-10
- Human toxicity, non-cancer: 1.58963e-9
- EF-particulate Matter: 5.82714e-8
- Ionising radiation, human health: 0.0144335
- Photochemical ozone formation - human health: 0.00179127
- Acidification: 0.00156927
- Eutrophication, terrestrial: 0.00614149
- Eutrophication, freshwater: 1.30472e-5

## Deviations from the LCI method principle
The background data use the \xe2\x80\x9cRecycled content cut-off\xe2\x80\x9d approach to allocate end-of-life by-products and secondary materials. This allocation is explained in the description of the recycled content system model (http://www.ecoinvent.org/database/system-models-in-ecoinvent-3/cut-off-system-model/allocation-cut-off-by-classification.html).

## Deviations from the LCI method approaches
Background data:
- the \xe2\x80\x9cRecycled content cut-off\xe2\x80\x9d approach to allocate end-of-life by-products and secondary materials. This allocation is explained in the description of the recycled content system model (http://www.ecoinvent.org/database/system-models-in-ecoinvent-3/cut-off-system-model/allocation-cut-off-by-classification.html). The ecoinvent database mostly relies on “Allocation – market values” apart for few exceptions particularly in the energy sector. ecoinvent energy data is replaced with EF3.0 core data as per the EF guidelines version 2.0.
OR
- EF compliant data

## Modelling constants
All modelling constants follow the requirements listed in the Tender Specifications ENV.B.1/SER/2016/0038vl. Completeness: All known environmental flows are included. All known resource uses and emissions are listed in the inventory. Water use: water use is modelled at country level using separate flows for water withdrawal, water release and water evaporation. Cut-off: All known environmental flows are included. All known resource uses and emissions are listed in the inventory. Handling multi-functional processes: the following PEF multi- functionality decision hierarchy is applied for resolving all multi- functionality problems: (1) subdivision or system expansion; (2) allocation based on a relevant underlying physical relationship (substitution may apply here); (3) allocation based on some other relationship. Direct land use change: GHG emissions from direct LUC allocated to good/service for 20 years after the LUC occurs, with IPCC default values. Carbon storage and delayed emissions: credits associated with temporary (carbon) storage or delayed emissions up to 300 years are not be considered. Emissions off-setting: are not included. Capital goods (including infrastructures) and their End of life: they are included. System boundaries: system boundaries include all processes linked to the product supply chain (e.g. maintenance). Time period: emissions and removals are modelled as if released or removed at the beginning of the assessment method. Fossil and biogenic carbon emissions and removals: removals and emissions are modelled as follows: All GHG emissions from fossil fuels (including peat and limestone) are modelled consistently with the most updated ILCD list of elementary flows. The non-fossil (biogenic) carbon flows are modelled consistently with the most updated ILCD list of elementary flows.

## Cut-off and completeness
All known environmental flows are included. All known resource uses and emissions are listed in the inventory. The dataset dry mass balance has been checked to ensure the inventory is complete. Capital goods (e.g. infrastructure) and their end-of-life are included.

## Data selection and combination
These datasets include, in both their foreground and background data, links to EF3.0 compliant data.
The relevant background data on energy, transport, and End of Life are from the LCDN data node (http://lcdn.thinkstep.com/Node/).
All other background data in the supply of this product for which no EF3.0 process was available are from ecoinvent v3.7 database (www.ecoinvent.org) or other data sources.

## Data treatment and extrapolations
Several data sources have been used to model the inventory.

## Review details
Internal reviews have been asked to review the plausibility of the unit process, LCIA scores, and DQRs. Internal reviewers have also been asked to review the data for EF compliancy. The consortium is therefore responsible for aspects such as compliancy with the ILCD format, including validation in Look@LCI, and nomenclature.
Internal reviwers have been asked to judge based on the process name, that the unit process models in a complete and representative way the process in the requested location. The review encompassed the plausability of:
- exchanges with nature (elementary flows) as well as exchanges such as product and waste flows.
- meta information (general comment, technology comment, system boundaries, allocation, cut-off rules, etc.). Reviewers were asked to judge if the provided information is enough to understand the content of the process.
- LCIA scores
- DQRs including precision, technology, time and geography. As well as the overall DQR.
External reviewers have been asked to provide their expertise in the field of interest. External reviewers have been asked to review the unit process, including eventual methodological choices, the LCIA scores (provided with contribution scores as well), and DQRs. External reviewers have been provided all the information in a tool developed by the consortium for the purpose of this project.
External reviewers have been asked to judge based on the process name, that the unit process models in a complete and representative way the process in the requested location. The review encompassed:
- Plausability and completeness of exchanges with nature (elementary flows) as well as exchanges such as product and waste flows.
- Review of meta information (general comment, technology comment, system boundaries, allocation, cut-off rules, etc.). Reviewers were asked to judge if the provided information is enough to understand the content of the process.
- Review of properties (biogenic carbon and water content).
- Review of allocation keys.
- Plausability of LCIA scores calculated by the consortium.
- Plausability of DQRs including precision, technology, time and geography. As well as the overall DQR.

## Data sources
- Background Data for Representative products and organisations. EF 3.0 compliant (data stock)
- Werner, F., planing, lath, softwood, u=20%, Europe without Switzerland, undefined, ecoinvent database version 3.7.1.
- Werner, F., planing, lath, softwood, u=10%, Europe without Switzerland, undefined, ecoinvent database version 3.7.1.
- Werner, F., planing, beam, softwood, u=20%, Europe without Switzerland, undefined, ecoinvent database version 3.7.1.
- Werner, F., planing, beam, softwood, u=10%, Europe without Switzerland, undefined, ecoinvent database version 3.7.1.
- Werner, F., planing, board, softwood, u=20%, Europe without Switzerland, undefined, ecoinvent database version 3.7.1.
- Werner, F., planing, board, softwood, u=10%, Europe without Switzerland, undefined, ecoinvent database version 3.7.1.
- Werner F., Bauer C., Büsser S., Doka G., Kaufmann E., Kono J., Luginbühl, U., Mina M., Frischknecht R., Thees O, Wallbaum H., Zimmermann W., Hischer R. (2015). Aktualisierung der Modelle und Datensätze zu Holz und Holzprodukten in der Datenbank ecoinvent. Auftraggeberin: Bundesamt für Umwelt, Aktionsplan Holz, Bern, Auftragnehmer: Eidgenössische Materialprüfungs- und Forschungsanstalt EMPA.
- Abbas, D., & Handler, R. M. (2018). Life-cycle assessment of forest harvesting and transportation operations in Tennessee. Journal of Cleaner Production, 176, 512-520.
- Oneil et al. (2010). LIFE-CYCLE IMPACTS OF INLAND NORTHWEST AND NORTHEAST/NORTH CENTRAL FOREST RESOURCES. Available at: https://corrim.org/wp-content/uploads/2017/12/WFS_SI_Impacts_of_Inland_NW_NE_NC_Forest_Resources.pdf
- Athena Sustainable Materials Institute (2018). A Cradle-to-Gate Life Cycle Assessment of Canadian Surfaced Dry Softwood Lumber. Available at: http://www.athenasmi.org/wp-content/uploads/2018/07/CtoG-LCA-of-Canadian-Surfaced-Dry-Softwood-Lumber.pdf
- European Organization of the Sawmill Industry – EOS (2019). Annual Report of the European Sawmill Industry. Available at: https://www.eos-oes.eu/downloads/EOS-annual-report-2018-2019.pdf
- Cardellini, G., Valada, T., Cornillier, C., Vial, E., Dragoi, M., Goudiaby, V., Muys, B. (2018). EFO-LCI: A new life cycle inventory database of forestry operations in Europe. Environmental Management, 61(6), 1031-1047.
- Eurostat (2021). Roundwood removals by type of wood and assortment. Tree species: Coniferous. Wood products: Roundwood under bark. Available at: ec.europa.eu/eurostat/databrowser/bookmark/2fe47d27-a1ea-4028-a4cc-06c1f8725af0?lang=en [Accessed on 25/06/2021]

## Intended applications
Implementation of regular Product Environmental Footprint (PEF) studies and Organisation Environmental Footprint (OEF) studies exclusively under the specified Product groups and sectors as defined in the Product Environmental Footprint Category Rules (PEFCR) and Organisation Environmental Footprint Sectorial Rules (OEFSR) listed in http://ec.europa.eu/environment/eussd/smgp/PEFCR_OEFSR.htm
