# autoclaving, elementary; autoclave vulcanizing; production mix, at plant; service for 1 pair

Dataset: ILCD process, Unit process, single operation
Geography: GLO
Reference year: 2021
Valid until: 2024
Classification: Other Services / Other services
LCI method principle: Attributional
LCI method approaches: Allocation - market value
Completeness: All relevant flows quantified
Project: Provision of process-based 3.0 Environmental Footprint-compliant life cycle inventory datasets - Apparel 2 - contract number 070201/2020/840292/SER/ENV.B.1
Generated by: Life Cycle Indonesia
Owner: PRé Sustainability B.V.
Compliance: Environmental Footprint non-primary supporting data set; Environmental Footprint 3.1
Amounts: no units in this file; such an amount is in the reference unit of its flow, which a separate flow dataset defines
copyright: true
licenseType: Free of charge for some user types or use types
accessRestrictions: Free of charge for all final users implementing a regular Product Environmental Footprint (PEF) studies and Organisation Environmental Footprint (OEF) studies exclusively under the specified Product groups and sectors as defined in the Product Environmental Footprint Category Rules (PEFCR) and Organisation Environmental Footprint Sectorial Rules (OEFSR) listed in http://ec.europa.eu/environment/eussd/smgp/PEFCR_OEFSR.htm and in accordance with the terms and conditions of the EULA (available at https://ecoinvent.lca-data.com/) exclusively until 31st December 2024. Any use of this dataset or any derivative data not within the specific context of one of the PEF/OEF projects or after the end of 2024 is not permitted.

## General comment
Notice: this data set supersedes the EF3.0-compliant version (see link under "preceding data set version" below calculated with the EF3.0). The life cycle inventory is not changed from the original EF3.0 data set. The LCIA results are calculated based on the EF3.1 methods which provide updated characterisation factors in the following impact categories: Climate Change, Ecotoxicity freshwater, Photochemical Ozone Formation, Acidification, Human Toxicity non-cancer, and Human Toxicity cancer. The review report and the data quality ratings refer to the original results. The data set has been updated by the European Commission on the basis of the original EF3.0 data set delivered by the data provider.This sub-process has limited documentation only. For all detailed documentation of the full model to which this data set belongs (such as DQRs, review reports and other technical documentation), please see this process: autoclaving - GLO []

## Technology and included processes
The autoclave vulcanizing tank has the function of curing the shoe rubber using an electrical heating system.
Before entering the autoclave, the shoes undergo cross-type foxing pressing machine. The cross-type foxing pressing machine has the function to press foxing tape in the shoemaking process so that the foxing tapes are firmly bonded to the shoes before entering the autoclave tank. Accelerators, organic compounds containing nitrogen and sulphur molecules, need to be added along with sulphur. It is an essential ingredient as they increase the reaction speed and cross-linking density, hence the yield of sulphur forming cross-links is improved (Kruzelak, et a., 2016).

The model represents the process itself, hence the input raw materials are not included in the model. The user will use this dataset along with the input raw materials. The sulphur is used to cure the rubber, the process is sometimes called crosslinking/curing/vulcanisation. As sulphur is added and with the help of heat, the elastomers (rubbers) would form a cross-link that leads to the formation of 3D networks of the rubber matrix. The generated product would be elastic and not sticky at elevated temperatures. The accelerator is used to increase the reaction speed, lowering the vulcanisation temperature and the amount of sulphur needed. Many kinds of accelerators can be used, but mainly organics. No glue is used for this process. Energy uses and infrastructure is included in the model. Direct emission to air might come from possible volatilization of sulphur and accelerators, but it is not covered in the model. Hence, there is no direct emission to soil and air since the emission comes from electricity usage, while the hazardous waste comes from the waste lube oil. In the model, the energy sources of machines are used solely from electricity. The sulphur, accelerators and foxing tape consumption is accounted as well in this model. For cross-type foxing pressing machines, the consumption of lubricating oil using a stitch bonding machine as a proxy. While for autoclave vulcanizing tank, the consumption of lubricating oil using a thermobonding oven as a proxy.

Kruzelak, Jan, Sykora, Richard, and Hudec, Ivan 2016, 'Sulphur and peroxide vulcanisation of rubber compounds – overview', Chemical Paper, Vol 70, No 12, pp 1533-1555

## Reference product
- autoclaving // autoclaving // glo, elementary: 1

## Impact indicators
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
## Deviations from the LCI method principle
The background data uses:
- the \xe2\x80\x9cRecycled content cut-off\xe2\x80\x9d approach to allocate end-of-life by-products and secondary materials. This allocation is explained in the description of the recycled content system model (http://www.ecoinvent.org/database/system-models-in-ecoinvent-3/cut-off-system-model/allocation-cut-off-by-classification.html).
OR
- EF compliant data

## Deviations from the LCI method approaches
Background data:
- the \xe2\x80\x9cRecycled content cut-off\xe2\x80\x9d approach to allocate end-of-life by-products and secondary materials. This allocation is explained in the description of the recycled content system model (http://www.ecoinvent.org/database/system-models-in-ecoinvent-3/cut-off-system-model/allocation-cut-off-by-classification.html). The ecoinvent database mostly relies on “Allocation – market values” apart for few exceptions particularly in the energy sector. ecoinvent energy data is replaced with EF3.0 core data as per the EF guidelines version 2.0.
OR
- EF compliant data

## Modelling constants
All modelling constants follow the requirements listed in the Tender Specifications 070201/2020/SER/ENV.B1. Completeness: There are no intentional cut-offs in the inventory no matter how small their contribution to all the EF impact categories is. Eventual cut-offs are in compliance with the Guide for EF compliant data sets (JRC 2020), i.e. only if below the 3% cut-off rule. Water use: water use is modelled at country level using separate flows for water withdrawal, water release and water evaporation. Handling multi-functional processes: the following PEF multi- functionality decision hierarchy is applied for resolving all multi- functionality problems: (1) subdivision or system expansion; (2) allocation based on a relevant underlying physical relationship (substitution may apply here); (3) allocation based on some other relationship. Direct land use change: GHG emissions from direct LUC allocated to good/service for 20 years after the LUC occurs, with IPCC default values. Carbon storage and delayed emissions: credits associated with temporary (carbon) storage or delayed emissions up to 300 years are not be considered. Emissions off-setting: are not included. Capital goods (including infrastructures) and their End of life: they are included. System boundaries: system boundaries include all processes linked to the product supply chain (e.g. maintenance). Time period: emissions and removals are modelled as if released or removed at the beginning of the assessment method. Fossil and biogenic carbon emissions and removals: removals and emissions are modelled as follows: All GHG emissions from fossil fuels (including peat and limestone) are modelled consistently with the most updated ILCD list of elementary flows. The non-fossil (biogenic) carbon flows are modelled consistently with the most updated ILCD list of elementary flows.

## Cut-off and completeness
There are no intentional cut-offs in the inventory no matter how small their contribution to all the EF impact categories is. Eventual cut-offs are in compliance with the Guide for EF compliant data sets (JRC 2020), i.e. only if below the 3% cut-off rule. The dataset dry mass and water balance has been checked to ensure the inventory is complete. Capital goods (e.g. infrastructure) and their end-of-life are included.

## Data selection and combination
These datasets include, in both their foreground and background data, links to EF3.0 compliant data.
The relevant background data on energy, transport, and End of Life are from the LCDN data node (http://lcdn.thinkstep.com/Node/).
All other background data in the supply of this product for which no EF3.0 process was available are from ecoinvent v3.7 database (www.ecoinvent.org) or other data sources.

## Data treatment and extrapolations
Several data sources have been used to model the inventory.

## Use advice
This data set is a supporting sub-data set and must be used exclusively as sub-data set of its corresponding level-1 partly disaggregated data set (see “General comment” field for exact name and UUID).

## Data sources
- Background Data for Representative products and organisations. EF 3.0 compliant (data stock)
- UN Data (2018) Statistics Data for Lubricants Productions, http://data.un.org/Data.aspx?q=Lubricants&d=EDATA&f=cmID%3aLU, United Nations Statistics Division, Global
- Lebon (2021) Nonwoven Oven Machine, Catalog and Company Messages, Qingdao Lebon Industry Co., Ltd., China
- Hongda (2021) Cross Type Foxing Pressing Machine, http://shoe-equipment.com/6-foxing-pressing-machine.html, Ruian Hongda Leather and Plastic Machinery Factory, China
- Tungsheng (2021) Vulcanizing Tank (Thermal Fluid Type) Autoclave vulcanizing tank, https://www.tungsheng.com.tw/product/autoclave-boiler/vulcanizing-tank-thermal-fluid-type-autoclave-vulcanizing-tank, Tung Sheng Strong Basic Co., Ltd, Taiwan
- Tash Leake (2012) Vulcanized Shoes Production Line, https://www.youtube.com/watch?v=BbSNc8mnn6Y, Industrial Data Youtube, China
- Taizhou (2021) 668 Natural Rubber Sole, http://cnjiaoxiang.com/eproducts.asp?cid=2, Taizhou Huangyan Linghui Plastic Co., Ltd., Zhejiang, China https://www.alibaba.com/product-detail/668-natural-rubber-sole-for-shoes_60454247478.html?spm=a2700.7724857.normal_offer.d_image.5d1a7187jkM0Dn
- Ján Kruželák, Richard Sýkora, Ivan Hudec (2016) Chemical Papers: Sulphur and peroxide vulcanisation of rubber compounds – overview https://www.researchgate.net/publication/308739736_Sulphur_and_peroxide_vulcanisation_of_rubber_compounds_-_overview

## Intended applications
Implementation of regular Product Environmental Footprint (PEF) studies and Organisation Environmental Footprint (OEF) studies exclusively under the specified Product groups and sectors as defined in the Product Environmental Footprint Category Rules (PEFCR) and Organisation Environmental Footprint Sectorial Rules (OEFSR) listed in http://ec.europa.eu/environment/eussd/smgp/PEFCR_OEFSR.htm
