# autoclaving; autoclave vulcanizing; production mix, at plant; service for 1 pair

Dataset: ILCD process, Partly terminated system
Geography: GLO
Reference year: 2021
Valid until: 2024
Classification: Systems / Textiles, furnitures and other interiors
LCI method principle: Attributional
LCI method approaches: Allocation - market value
Completeness: All relevant flows quantified
Project: Provision of process-based 3.0 Environmental Footprint-compliant life cycle inventory datasets - Apparel 2 - contract number 070201/2020/840292/SER/ENV.B.1
Generated by: Life Cycle Indonesia
Owner: PRé Sustainability B.V.
Compliance: ILCD Data Network - Entry-level; Suggestions for updating the PEF method 2019; ISO 14040 Environmental Management – Life Cycle Assessment – Principles and Framework, 2006; ISO 14044:2006. Environmental Management – Life Cycle Assessment – Requirements and guidelines.; Environmental Footprint 3.1
Review: Dependent internal review by Avraam Symeonidis, Emilia Moreno Ruiz; Independent review panel by Subramanian Senthilkannan Muthu
Data quality: Overall quality: Good; Time representativeness: Very good; Geographical representativeness: Good; Technological representativeness: Very good; Precision: Good; Methodological appropriateness and consistency: Not applicable
Amounts: no units in this file; such an amount is in the reference unit of its flow, which a separate flow dataset defines
copyright: true
licenseType: Free of charge for some user types or use types
accessRestrictions: Free of charge for all final users implementing a regular Product Environmental Footprint (PEF) studies and Organisation Environmental Footprint (OEF) studies exclusively under the specified Product groups and sectors as defined in the Product Environmental Footprint Category Rules (PEFCR) and Organisation Environmental Footprint Sectorial Rules (OEFSR) listed in http://ec.europa.eu/environment/eussd/smgp/PEFCR_OEFSR.htm and in accordance with the terms and conditions of the EULA (available at https://ecoinvent.lca-data.com/) exclusively until 31st December 2024. Any use of this dataset or any derivative data not within the specific context of one of the PEF/OEF projects or after the end of 2024 is not permitted.

## General comment
Notice: this data set supersedes the EF3.0-compliant version (see link under "preceding data set version" below calculated with the EF3.0). The life cycle inventory is not changed from the original EF3.0 data set. The LCIA results are calculated based on the EF3.1 methods which provide updated characterisation factors in the following impact categories: Climate Change, Ecotoxicity freshwater, Photochemical Ozone Formation, Acidification, Human Toxicity non-cancer, and Human Toxicity cancer. The review report and the data quality ratings refer to the original results. The data set has been updated by the European Commission on the basis of the original EF3.0 data set delivered by the data provider.The fundamental of vulcanisation is the forming of chemical cross-links between rubber macromolecules which lead to the transformation of a three-dimensional network of rubber matrix by the reactions between functional groups of elastomer chains and suitable curing agents. Several curing systems have also been developed to vulcanise rubber compounds such as sulphur, peroxides, metal oxides, phenolic resins, etc. Sulphur vulcanisation is the oldest and most widely used method. When the rubber is heated with sulphur, the product obtained is pliable at ambient temperature and not sticky at elevated temperature (Kruzelak, et a., 2016).

A commonly used method for vulcanisation is an autoclave. It is a large chamber that employs high pressures and temperatures. Vulcanizing autoclaves—also known as vulcanizers—facilitate this process, enabling rubber manufacturers to convert natural rubber and plastic quickly and easily into cured parts and products. (Bondtech, 2021)

Kruzelak, Jan, Sykora, Richard, and Hudec, Ivan 2016, 'Sulphur and peroxide vulcanisation of rubber compounds – overview', Chemical Paper, Vol 70, No 12, pp 1533-1555
Bondtech (2021) BONDTECH RUBBER VULCANIZING, https://bondtech.com/autoclaves/rubber-vulcanizing/, Bondtech Corporation United States

## Technology and included processes
The autoclave vulcanizing tank has the function of curing the shoe rubber using an electrical heating system.
Before entering the autoclave, the shoes undergo cross-type foxing pressing machine. The cross-type foxing pressing machine has the function to press foxing tape in the shoemaking process so that the foxing tapes are firmly bonded to the shoes before entering the autoclave tank. Accelerators, organic compounds containing nitrogen and sulphur molecules, need to be added along with sulphur. It is an essential ingredient as they increase the reaction speed and cross-linking density, hence the yield of sulphur forming cross-links is improved (Kruzelak, et a., 2016).

The model represents the process itself, hence the input raw materials are not included in the model. The user will use this dataset along with the input raw materials. The sulphur is used to cure the rubber, the process is sometimes called crosslinking/curing/vulcanisation. As sulphur is added and with the help of heat, the elastomers (rubbers) would form a cross-link that leads to the formation of 3D networks of the rubber matrix. The generated product would be elastic and not sticky at elevated temperatures. The accelerator is used to increase the reaction speed, lowering the vulcanisation temperature and the amount of sulphur needed. Many kinds of accelerators can be used, but mainly organics. No glue is used for this process. Energy uses and infrastructure is included in the model. Direct emission to air might come from possible volatilization of sulphur and accelerators, but it is not covered in the model. Hence, there is no direct emission to soil and air since the emission comes from electricity usage, while the hazardous waste comes from the waste lube oil. In the model, the energy sources of machines are used solely from electricity. The sulphur, accelerators and foxing tape consumption is accounted as well in this model. For cross-type foxing pressing machines, the consumption of lubricating oil using a stitch bonding machine as a proxy. While for autoclave vulcanizing tank, the consumption of lubricating oil using a thermobonding oven as a proxy.

Kruzelak, Jan, Sykora, Richard, and Hudec, Ivan 2016, 'Sulphur and peroxide vulcanisation of rubber compounds – overview', Chemical Paper, Vol 70, No 12, pp 1533-1555

## Parameters
- kg_0: 0.00164265
  Mass in kg, for sulphur // sulphur (elemental) at refinery // eu+efta+uk; Articulated lorry transport, Euro 4, Total weight >32 t; EU+EFTA+UK
- km_0: 998.386
  Distance in km, for sulphur // sulphur (elemental) at refinery // eu+efta+uk; Articulated lorry transport, Euro 4, Total weight >32 t; EU+EFTA+UK
- kg_km_0: 1.64; = kg_0*km_0
  Transport amount in km*km, for sulphur // sulphur (elemental) at refinery // eu+efta+uk; Articulated lorry transport, Euro 4, Total weight >32 t; EU+EFTA+UK
- kg_1: 8.7999e-7
  Mass in kg, for lubricating oil // lubricants at refinery // rsa; Articulated lorry transport, Euro 4, Total weight >32 t; EU+EFTA+UK
- km_1: 1000
  Distance in km, for lubricating oil // lubricants at refinery // rsa; Articulated lorry transport, Euro 4, Total weight >32 t; EU+EFTA+UK
- kg_km_1: 0.00087999; = kg_1*km_1
  Transport amount in km*km, for lubricating oil // lubricants at refinery // rsa; Articulated lorry transport, Euro 4, Total weight >32 t; EU+EFTA+UK
- kg_2: 3.61022e-7
  Mass in kg, for lubricating oil // lubricants at refinery // raf; Articulated lorry transport, Euro 4, Total weight >32 t; EU+EFTA+UK
- km_2: 1000
  Distance in km, for lubricating oil // lubricants at refinery // raf; Articulated lorry transport, Euro 4, Total weight >32 t; EU+EFTA+UK
- kg_km_2: 0.000361022; = kg_2*km_2
  Transport amount in km*km, for lubricating oil // lubricants at refinery // raf; Articulated lorry transport, Euro 4, Total weight >32 t; EU+EFTA+UK
- kg_3: 9.4607e-6
  Mass in kg, for lubricating oil // lubricants at refinery // ras w/o cn; Articulated lorry transport, Euro 4, Total weight >32 t; EU+EFTA+UK
- km_3: 1000
  Distance in km, for lubricating oil // lubricants at refinery // ras w/o cn; Articulated lorry transport, Euro 4, Total weight >32 t; EU+EFTA+UK
- kg_km_3: 0.0094607; = kg_3*km_3
  Transport amount in km*km, for lubricating oil // lubricants at refinery // ras w/o cn; Articulated lorry transport, Euro 4, Total weight >32 t; EU+EFTA+UK
- kg_4: 7.82321e-6
  Mass in kg, for lubricating oil // lubricants at refinery // ru; Articulated lorry transport, Euro 4, Total weight >32 t; EU+EFTA+UK
- km_4: 1000
  Distance in km, for lubricating oil // lubricants at refinery // ru; Articulated lorry transport, Euro 4, Total weight >32 t; EU+EFTA+UK
- kg_km_4: 0.00782321; = kg_4*km_4
  Transport amount in km*km, for lubricating oil // lubricants at refinery // ru; Articulated lorry transport, Euro 4, Total weight >32 t; EU+EFTA+UK
- kg_5: 7.38482e-6
  Mass in kg, for lubricating oil // lubricants at refinery // rna; Articulated lorry transport, Euro 4, Total weight >32 t; EU+EFTA+UK
- km_5: 1000
  Distance in km, for lubricating oil // lubricants at refinery // rna; Articulated lorry transport, Euro 4, Total weight >32 t; EU+EFTA+UK
- kg_km_5: 0.00738482; = kg_5*km_5
  Transport amount in km*km, for lubricating oil // lubricants at refinery // rna; Articulated lorry transport, Euro 4, Total weight >32 t; EU+EFTA+UK
- kg_6: 1.50211e-6
  Mass in kg, for lubricating oil // lubricants at refinery // cn; Articulated lorry transport, Euro 4, Total weight >32 t; EU+EFTA+UK
- km_6: 1000
  Distance in km, for lubricating oil // lubricants at refinery // cn; Articulated lorry transport, Euro 4, Total weight >32 t; EU+EFTA+UK
- kg_km_6: 0.00150211; = kg_6*km_6
  Transport amount in km*km, for lubricating oil // lubricants at refinery // cn; Articulated lorry transport, Euro 4, Total weight >32 t; EU+EFTA+UK
- kg_7: 4.81899e-6
  Mass in kg, for lubricating oil // lubricants at refinery // eu+efta+uk; Articulated lorry transport, Euro 4, Total weight >32 t; EU+EFTA+UK
- km_7: 1000.21
  Distance in km, for lubricating oil // lubricants at refinery // eu+efta+uk; Articulated lorry transport, Euro 4, Total weight >32 t; EU+EFTA+UK
- kg_km_7: 0.00482; = kg_7*km_7
  Transport amount in km*km, for lubricating oil // lubricants at refinery // eu+efta+uk; Articulated lorry transport, Euro 4, Total weight >32 t; EU+EFTA+UK
- kg_8: 0.00164265
  Mass in kg, for sulphur // sulphur (elemental) at refinery // eu+efta+uk; Transoceanic ship, containers; GLO
- km_8: 18019.6
  Distance in km, for sulphur // sulphur (elemental) at refinery // eu+efta+uk; Transoceanic ship, containers; GLO
- kg_km_8: 29.6; = kg_8*km_8
  Transport amount in km*km, for sulphur // sulphur (elemental) at refinery // eu+efta+uk; Transoceanic ship, containers; GLO
- kg_9: 8.7999e-7
  Mass in kg, for lubricating oil // lubricants at refinery // rsa; Transoceanic ship, containers; GLO
- km_9: 1000
  Distance in km, for lubricating oil // lubricants at refinery // rsa; Transoceanic ship, containers; GLO
- kg_km_9: 0.00087999; = kg_9*km_9
  Transport amount in km*km, for lubricating oil // lubricants at refinery // rsa; Transoceanic ship, containers; GLO
- kg_10: 3.61022e-7
  Mass in kg, for lubricating oil // lubricants at refinery // raf; Transoceanic ship, containers; GLO
- km_10: 1000
  Distance in km, for lubricating oil // lubricants at refinery // raf; Transoceanic ship, containers; GLO
- kg_km_10: 0.000361022; = kg_10*km_10
  Transport amount in km*km, for lubricating oil // lubricants at refinery // raf; Transoceanic ship, containers; GLO
- kg_11: 9.4607e-6
  Mass in kg, for lubricating oil // lubricants at refinery // ras w/o cn; Transoceanic ship, containers; GLO
- km_11: 1000
  Distance in km, for lubricating oil // lubricants at refinery // ras w/o cn; Transoceanic ship, containers; GLO
- kg_km_11: 0.0094607; = kg_11*km_11
  Transport amount in km*km, for lubricating oil // lubricants at refinery // ras w/o cn; Transoceanic ship, containers; GLO
- kg_12: 7.82321e-6
  Mass in kg, for lubricating oil // lubricants at refinery // ru; Transoceanic ship, containers; GLO
- km_12: 1000
  Distance in km, for lubricating oil // lubricants at refinery // ru; Transoceanic ship, containers; GLO
- kg_km_12: 0.00782321; = kg_12*km_12
  Transport amount in km*km, for lubricating oil // lubricants at refinery // ru; Transoceanic ship, containers; GLO
- kg_13: 7.38482e-6
  Mass in kg, for lubricating oil // lubricants at refinery // rna; Transoceanic ship, containers; GLO
- km_13: 1000
  Distance in km, for lubricating oil // lubricants at refinery // rna; Transoceanic ship, containers; GLO
- kg_km_13: 0.00738482; = kg_13*km_13
  Transport amount in km*km, for lubricating oil // lubricants at refinery // rna; Transoceanic ship, containers; GLO
- kg_14: 1.50211e-6
  Mass in kg, for lubricating oil // lubricants at refinery // cn; Transoceanic ship, containers; GLO
- km_14: 1000
  Distance in km, for lubricating oil // lubricants at refinery // cn; Transoceanic ship, containers; GLO
- kg_km_14: 0.00150211; = kg_14*km_14
  Transport amount in km*km, for lubricating oil // lubricants at refinery // cn; Transoceanic ship, containers; GLO
- kg_15: 4.81899e-6
  Mass in kg, for lubricating oil // lubricants at refinery // eu+efta+uk; Transoceanic ship, containers; GLO
- km_15: 17991.3
  Distance in km, for lubricating oil // lubricants at refinery // eu+efta+uk; Transoceanic ship, containers; GLO
- kg_km_15: 0.0867; = kg_15*km_15
  Transport amount in km*km, for lubricating oil // lubricants at refinery // eu+efta+uk; Transoceanic ship, containers; GLO

## Reference product
- autoclaving // autoclaving // glo: 1

## Inputs
- Electricity from Electricity grid mix 1kV-60kV - AU: 0.003
- Electricity from Electricity grid mix 1kV-60kV - EU+EFTA+UK: 0.0435
- Electricity from Electricity grid mix 1kV-60kV - NZ: 0.0006
- Electricity from Electricity grid mix 1kV-60kV - RAF: 0.0095
- Electricity from Electricity grid mix 1kV-60kV - RNA: 0.0636
- Electricity from Electricity grid mix 1kV-60kV - RSA: 0.0216
- Electricity from Electricity grid mix 1kV-60kV - RU: 0.0127
- Transport of sulphur // sulphur (elemental) at refinery // eu+efta+uk by Articulated lorry transport, Euro 4, Total weight >32 t - EU+EFTA+UK: 1.64; = kg_km_0
- Transport of lubricating oil // lubricants at refinery // rsa by Articulated lorry transport, Euro 4, Total weight >32 t - EU+EFTA+UK: 0.00087999; = kg_km_1
- Transport of lubricating oil // lubricants at refinery // raf by Articulated lorry transport, Euro 4, Total weight >32 t - EU+EFTA+UK: 0.000361022; = kg_km_2
- Transport of lubricating oil // lubricants at refinery // ras w/o cn by Articulated lorry transport, Euro 4, Total weight >32 t - EU+EFTA+UK: 0.0094607; = kg_km_3
- Transport of lubricating oil // lubricants at refinery // ru by Articulated lorry transport, Euro 4, Total weight >32 t - EU+EFTA+UK: 0.00782321; = kg_km_4
- Transport of lubricating oil // lubricants at refinery // rna by Articulated lorry transport, Euro 4, Total weight >32 t - EU+EFTA+UK: 0.00738482; = kg_km_5
- Transport of lubricating oil // lubricants at refinery // cn by Articulated lorry transport, Euro 4, Total weight >32 t - EU+EFTA+UK: 0.00150211; = kg_km_6
- Transport of lubricating oil // lubricants at refinery // eu+efta+uk by Articulated lorry transport, Euro 4, Total weight >32 t - EU+EFTA+UK: 0.00482; = kg_km_7
- Transport of sulphur // sulphur (elemental) at refinery // eu+efta+uk by Transoceanic ship, containers - GLO: 29.6; = kg_km_8
- Transport of lubricating oil // lubricants at refinery // rsa by Transoceanic ship, containers - GLO: 0.00087999; = kg_km_9
- Transport of lubricating oil // lubricants at refinery // raf by Transoceanic ship, containers - GLO: 0.000361022; = kg_km_10
- Transport of lubricating oil // lubricants at refinery // ras w/o cn by Transoceanic ship, containers - GLO: 0.0094607; = kg_km_11
- Transport of lubricating oil // lubricants at refinery // ru by Transoceanic ship, containers - GLO: 0.00782321; = kg_km_12
- Transport of lubricating oil // lubricants at refinery // rna by Transoceanic ship, containers - GLO: 0.00738482; = kg_km_13
- Transport of lubricating oil // lubricants at refinery // cn by Transoceanic ship, containers - GLO: 0.00150211; = kg_km_14
- Transport of lubricating oil // lubricants at refinery // eu+efta+uk by Transoceanic ship, containers - GLO: 0.0867; = kg_km_15
- Electricity from Electricity grid mix 1kV-60kV - CN: 0.065183
- Electricity from Electricity grid mix 1kV-60kV - RAS w/o CN: 0.071417
- autoclaving // autoclaving // glo, blackbox: 1
- autoclaving // autoclaving // glo, elementary: 1

## Impact indicators
- Eutrophication marine: 7.0545e-5
- Ecotoxicity, freshwater: 0.391733
- Land use: 0.103515
- Water use: 0.02853
- Resource use, minerals and metals: 2.53558e-7
- Resource use, fossils: 1.0628
- Climate change: 0.0794326
- Ozone depletion: 8.08049e-10
- Human toxicity, cancer: 9.65401e-11
- Human toxicity, non-cancer: 4.64291e-10
- EF-particulate Matter: 1.56028e-8
- Ionising radiation, human health: 0.00448307
- Photochemical ozone formation - human health: 0.000257629
- Acidification: 0.000468908
- Eutrophication, terrestrial: 0.000763542
- Eutrophication, freshwater: 9.50159e-7

## Deviations from the LCI method principle
The background data uses:
- the \xe2\x80\x9cRecycled content cut-off\xe2\x80\x9d approach to allocate end-of-life by-products and secondary materials. This allocation is explained in the description of the recycled content system model (http://www.ecoinvent.org/database/system-models-in-ecoinvent-3/cut-off-system-model/allocation-cut-off-by-classification.html).
OR
- EF compliant data

## Deviations from the LCI method approaches
Background data:
- the \xe2\x80\x9cRecycled content cut-off\xe2\x80\x9d approach to allocate end-of-life by-products and secondary materials. This allocation is explained in the description of the recycled content system model (http://www.ecoinvent.org/database/system-models-in-ecoinvent-3/cut-off-system-model/allocation-cut-off-by-classification.html). The ecoinvent database mostly relies on “Allocation – market values” apart for few exceptions particularly in the energy sector. ecoinvent energy data is replaced with EF3.0 core data as per the EF guidelines version 2.0.
OR
- EF compliant data

## Modelling constants
All modelling constants follow the requirements listed in the Tender Specifications 070201/2020/SER/ENV.B1. Completeness: There are no intentional cut-offs in the inventory no matter how small their contribution to all the EF impact categories is. Eventual cut-offs are in compliance with the Guide for EF compliant data sets (JRC 2020), i.e. only if below the 3% cut-off rule. Water use: water use is modelled at country level using separate flows for water withdrawal, water release and water evaporation. Handling multi-functional processes: the following PEF multi- functionality decision hierarchy is applied for resolving all multi- functionality problems: (1) subdivision or system expansion; (2) allocation based on a relevant underlying physical relationship (substitution may apply here); (3) allocation based on some other relationship. Direct land use change: GHG emissions from direct LUC allocated to good/service for 20 years after the LUC occurs, with IPCC default values. Carbon storage and delayed emissions: credits associated with temporary (carbon) storage or delayed emissions up to 300 years are not be considered. Emissions off-setting: are not included. Capital goods (including infrastructures) and their End of life: they are included. System boundaries: system boundaries include all processes linked to the product supply chain (e.g. maintenance). Time period: emissions and removals are modelled as if released or removed at the beginning of the assessment method. Fossil and biogenic carbon emissions and removals: removals and emissions are modelled as follows: All GHG emissions from fossil fuels (including peat and limestone) are modelled consistently with the most updated ILCD list of elementary flows. The non-fossil (biogenic) carbon flows are modelled consistently with the most updated ILCD list of elementary flows.

## Cut-off and completeness
There are no intentional cut-offs in the inventory no matter how small their contribution to all the EF impact categories is. Eventual cut-offs are in compliance with the Guide for EF compliant data sets (JRC 2020), i.e. only if below the 3% cut-off rule. The dataset dry mass and water balance has been checked to ensure the inventory is complete. Capital goods (e.g. infrastructure) and their end-of-life are included.

## Data selection and combination
These datasets include, in both their foreground and background data, links to EF3.0 compliant data.
The relevant background data on energy, transport, and End of Life are from the LCDN data node (http://lcdn.thinkstep.com/Node/).
All other background data in the supply of this product for which no EF3.0 process was available are from ecoinvent v3.7 database (www.ecoinvent.org) or other data sources.

## Data treatment and extrapolations
Several data sources have been used to model the inventory.

## Review details
Internal reviews have been asked to review the plausibility of the unit process, LCIA scores, and DQRs. Internal reviewers have also been asked to review the data for EF compliancy. The consortium is therefore responsible for aspects such as compliancy with the ILCD format, including validation in Look@LCI, and nomenclature.
Internal reviwers have been asked to judge based on the process name, that the unit process models in a complete and representative way the process in the requested location. The review encompassed the plausability of:
- exchanges with nature (elementary flows) as well as exchanges such as product and waste flows.
- meta information (general comment, technology comment, system boundaries, allocation, cut-off rules, etc.). Reviewers were asked to judge if the provided information is enough to understand the content of the process.
- LCIA scores
- DQRs including precision, technology, time and geography. As well as the overall DQR.
External reviewers have been asked to provide their expertise in the field of interest. External reviewers have been asked to review the unit process, including eventual methodological choices, the LCIA scores (provided with contribution scores as well), and DQRs. External reviewers have been provided all the information in a tool developed by the consortium for the purpose of this project.
External reviewers have been asked to judge based on the process name, that the unit process models in a complete and representative way the process in the requested location. The review encompassed:
- Plausability and completeness of exchanges with nature (elementary flows) as well as exchanges such as product and waste flows.
- Review of meta information (general comment, technology comment, system boundaries, allocation, cut-off rules, etc.). Reviewers were asked to judge if the provided information is enough to understand the content of the process.
- Review of properties (biogenic carbon and water content).
- Review of allocation keys.
- Plausability of LCIA scores calculated by the consortium.
- Plausability of DQRs including precision, technology, time and geography. As well as the overall DQR.

## Data sources
- Background Data for Representative products and organisations. EF 3.0 compliant (data stock)
- UN Data (2018) Statistics Data for Lubricants Productions, http://data.un.org/Data.aspx?q=Lubricants&d=EDATA&f=cmID%3aLU, United Nations Statistics Division, Global
- Lebon (2021) Nonwoven Oven Machine, Catalog and Company Messages, Qingdao Lebon Industry Co., Ltd., China
- Hongda (2021) Cross Type Foxing Pressing Machine, http://shoe-equipment.com/6-foxing-pressing-machine.html, Ruian Hongda Leather and Plastic Machinery Factory, China
- Tungsheng (2021) Vulcanizing Tank (Thermal Fluid Type) Autoclave vulcanizing tank, https://www.tungsheng.com.tw/product/autoclave-boiler/vulcanizing-tank-thermal-fluid-type-autoclave-vulcanizing-tank, Tung Sheng Strong Basic Co., Ltd, Taiwan
- Tash Leake (2012) Vulcanized Shoes Production Line, https://www.youtube.com/watch?v=BbSNc8mnn6Y, Industrial Data Youtube, China
- Taizhou (2021) 668 Natural Rubber Sole, http://cnjiaoxiang.com/eproducts.asp?cid=2, Taizhou Huangyan Linghui Plastic Co., Ltd., Zhejiang, China https://www.alibaba.com/product-detail/668-natural-rubber-sole-for-shoes_60454247478.html?spm=a2700.7724857.normal_offer.d_image.5d1a7187jkM0Dn
- Ján Kruželák, Richard Sýkora, Ivan Hudec (2016) Chemical Papers: Sulphur and peroxide vulcanisation of rubber compounds – overview https://www.researchgate.net/publication/308739736_Sulphur_and_peroxide_vulcanisation_of_rubber_compounds_-_overview

## Intended applications
Implementation of regular Product Environmental Footprint (PEF) studies and Organisation Environmental Footprint (OEF) studies exclusively under the specified Product groups and sectors as defined in the Product Environmental Footprint Category Rules (PEFCR) and Organisation Environmental Footprint Sectorial Rules (OEFSR) listed in http://ec.europa.eu/environment/eussd/smgp/PEFCR_OEFSR.htm
