# bonding, mechanical, needle punch, non- woven fabric; technology mix; production mix, at plant; service (raw materials excluded)

Dataset: ILCD process, Partly terminated system
Geography: GLO
Reference year: 2021
Valid until: 2024
Classification: Systems / Textiles, furnitures and other interiors
LCI method principle: Attributional
LCI method approaches: Allocation - market value
Completeness: All relevant flows quantified
Project: Provision of process-based 3.0 Environmental Footprint-compliant life cycle inventory datasets - Apparel 1 - contract number 070201/2020/840291/SER/ENV.B.1
Generated by: Life Cycle Indonesia
Owner: PRé Sustainability B.V.
Compliance: ILCD Data Network - Entry-level; Suggestions for updating the PEF method 2019; ISO 14040 Environmental Management – Life Cycle Assessment – Principles and Framework, 2006; ISO 14044:2006. Environmental Management – Life Cycle Assessment – Requirements and guidelines.; Environmental Footprint 3.1
Review: Dependent internal review by Avraam Symeonidis, Emilia Moreno Ruiz; Independent review panel by Fábio Valebona
Data quality: Overall quality: Very good; Time representativeness: Very good; Geographical representativeness: Good; Technological representativeness: Very good; Precision: Good; Methodological appropriateness and consistency: Not applicable
Amounts: no units in this file; such an amount is in the reference unit of its flow, which a separate flow dataset defines
copyright: true
licenseType: Free of charge for some user types or use types
accessRestrictions: Free of charge for all final users implementing a regular Product Environmental Footprint (PEF) studies and Organisation Environmental Footprint (OEF) studies exclusively under the specified Product groups and sectors as defined in the Product Environmental Footprint Category Rules (PEFCR) and Organisation Environmental Footprint Sectorial Rules (OEFSR) listed in http://ec.europa.eu/environment/eussd/smgp/PEFCR_OEFSR.htm and in accordance with the terms and conditions of the EULA (available at https://ecoinvent.lca-data.com/) exclusively until 31st December 2024. Any use of this dataset or any derivative data not within the specific context of one of the PEF/OEF projects or after the end of 2024 is not permitted.

## General comment
Notice: this data set supersedes the EF3.0-compliant version (see link under "preceding data set version" below calculated with the EF3.0). The life cycle inventory is not changed from the original EF3.0 data set. The LCIA results are calculated based on the EF3.1 methods which provide updated characterisation factors in the following impact categories: Climate Change, Ecotoxicity freshwater, Photochemical Ozone Formation, Acidification, Human Toxicity non-cancer, and Human Toxicity cancer. The review report and the data quality ratings refer to the original results. The data set has been updated by the European Commission on the basis of the original EF3.0 data set delivered by the data provider.Non-woven fabric can be produced from a mechanical needlepunching bonding process. Needle punched nonwoven fabrics are made from various fibrous webs (usually carded webs) with large variety of textile-length fibres. Fibres used in needle punched filters might also be required to have thermal resistance to high temperature, flame retardancy, chemical resistance, and abrasion resistance. Basofil, Miraflex, polypropylene, polyester, polyethylene, polyamide, polytetrafluoroethylene, acrylic, waste clothing, jute, flax, kenaf, sisal, coil, and cotton can be needle punched. Needle punched fabrics have characteristic periodicities in their structural architecture that result from the interaction of fibres with the needle barbs. Fibre segments are reorientated and migrated from the surface of the web towards the interior of the fabric, forming pillars of fibre orientated approximately perpendicular to the plane. Besides that, needle punched fabrics have a high breaking tenacity and also high tear strength so they're good to be used for mouldable applications, but the modulus is low and the recovery from extension is also poor. The applications of needlepunched fabrics are extensive and extend into many niche product areas including, for example geosynthetics, filtration media, synthetic leather, waddings and paddings, floor coverings, wall coverings, automotive fabrics, insulation, blankets, wipes, and roofing.

References:
Russel, S.J. 2007. Handbook of Nonwovens. England: Woodhead Publishing Limited. pp 223-255
Mao, N. 2016. Nonwoven Fabric Filters. United Kingdom: Leeds University
Khartik, T., dkk. 2016. Non-woven - Process, Structure, Properties and Applications. New Delhi: Woodhead Publishing India. pp 111-112

## Technology and included processes
The process of needlepunching, also known as needle felting was originally developed to produce mechanically bonded nonwoven fabrics from fibres that could not be felted like wool. The fibres are mechanically entangled to produce a fabric by reciprocating barbed needles (felting needles) through a moving batt of fibres in a needleloom (Russel, 2007).

Webs are laid by a cross-lapper to produce a batt to the required width and basis weight. Drafting operation to reduce the basis weight of fabric could takes place before, during or after pre-needling operation. Generally, the needle loom comprises three main components, namely, needle board, bed plate and stripper plate. The needle-punched fabrics are delivered when pointed needles are pushed through a stringy cross-laid web driving a few filaments through the web, where they remain when the needles are withdrawn. A needle-punched nonwoven is a fabric made from webs or batts of fibers in which some of the fibers have been driven upward or downward or both by barbed needles. This needling action interlocks fibers and holds the structure together by friction forces. Needlepunching machines can be classified as single-board, multi-board, structuring or speciality and their use varies depending on application. Most of the needle loom comprises two needle boards i.e. pre-needling and final needling for effective needling operation and to reduce the thickness of the batt. After final needling, the fabric is transported away from the needling zone by take-up rollers to finisihing process, the movement of which may be intermittent or continuous. The finisihing process of final needling fabrics are heat setting, calendaring, chemical bonding, coating, and lamination (Khartik et al., 2016).

The production capacity of the needle loom machine depends on the type (GSM) of fabric used. The size and the delivery speed of the machine will influence the production capacity of machine. The model represents the process of bonding, hence the input raw materials are not included in the model. The user will use this dataset along with the input raw materials. Energy consumption and infrastructure are included in the model. There is no direct emission to air and soil from this process. In the model, needle-punched nonwoven fabric is needling through two types of machines i.e pre needle loom and main needle loom. There are two types needle-punched nonwoven fabrics output i.e. twice needled and thrice needled. Both twice and thrice needled must enter the pre needle loom machine. After pre needling, the twice needled fabric enter the main needle loom one time, while thrice needled fabric enter the main needle loom two times. The calculation model uses the average value of twice needled and thrice needled. The needle replacement throughout the machine lifecycle is not significant so that it is not included in the process. The finishing process is not included in the scope of this dataset.

References:
Russel, S.J. 2007. Handbook of Nonwovens. England: Woodhead Publishing Limited. pp 240-241
Khartik, T., dkk. 2016. Non-woven - Process, Structure, Properties and Applications. New Delhi: Woodhead Publishing India. pp 97

## Parameters
- kg_0: 1.07938e-5
  Mass in kg, for lubricating oil // lubricants at refinery // cn; Articulated lorry transport, Euro 4, Total weight >32 t; EU+EFTA+UK
- km_0: 1000
  Distance in km, for lubricating oil // lubricants at refinery // cn; Articulated lorry transport, Euro 4, Total weight >32 t; EU+EFTA+UK
- kg_km_0: 0.0107938; = kg_0*km_0
  Transport amount in km*km, for lubricating oil // lubricants at refinery // cn; Articulated lorry transport, Euro 4, Total weight >32 t; EU+EFTA+UK
- kg_1: 3.46283e-5
  Mass in kg, for lubricating oil // lubricants at refinery // eu+efta+uk; Articulated lorry transport, Euro 4, Total weight >32 t; EU+EFTA+UK
- km_1: 999.183
  Distance in km, for lubricating oil // lubricants at refinery // eu+efta+uk; Articulated lorry transport, Euro 4, Total weight >32 t; EU+EFTA+UK
- kg_km_1: 0.0346; = kg_1*km_1
  Transport amount in km*km, for lubricating oil // lubricants at refinery // eu+efta+uk; Articulated lorry transport, Euro 4, Total weight >32 t; EU+EFTA+UK
- kg_2: 2.59423e-6
  Mass in kg, for lubricating oil // lubricants at refinery // raf; Articulated lorry transport, Euro 4, Total weight >32 t; EU+EFTA+UK
- km_2: 1000
  Distance in km, for lubricating oil // lubricants at refinery // raf; Articulated lorry transport, Euro 4, Total weight >32 t; EU+EFTA+UK
- kg_km_2: 0.00259423; = kg_2*km_2
  Transport amount in km*km, for lubricating oil // lubricants at refinery // raf; Articulated lorry transport, Euro 4, Total weight >32 t; EU+EFTA+UK
- kg_3: 6.79826e-5
  Mass in kg, for lubricating oil // lubricants at refinery // ras w/o cn; Articulated lorry transport, Euro 4, Total weight >32 t; EU+EFTA+UK
- km_3: 1000
  Distance in km, for lubricating oil // lubricants at refinery // ras w/o cn; Articulated lorry transport, Euro 4, Total weight >32 t; EU+EFTA+UK
- kg_km_3: 0.0679826; = kg_3*km_3
  Transport amount in km*km, for lubricating oil // lubricants at refinery // ras w/o cn; Articulated lorry transport, Euro 4, Total weight >32 t; EU+EFTA+UK
- kg_4: 5.30658e-5
  Mass in kg, for lubricating oil // lubricants at refinery // rna; Articulated lorry transport, Euro 4, Total weight >32 t; EU+EFTA+UK
- km_4: 1000
  Distance in km, for lubricating oil // lubricants at refinery // rna; Articulated lorry transport, Euro 4, Total weight >32 t; EU+EFTA+UK
- kg_km_4: 0.0530658; = kg_4*km_4
  Transport amount in km*km, for lubricating oil // lubricants at refinery // rna; Articulated lorry transport, Euro 4, Total weight >32 t; EU+EFTA+UK
- kg_5: 6.32343e-6
  Mass in kg, for lubricating oil // lubricants at refinery // rsa; Articulated lorry transport, Euro 4, Total weight >32 t; EU+EFTA+UK
- km_5: 1000
  Distance in km, for lubricating oil // lubricants at refinery // rsa; Articulated lorry transport, Euro 4, Total weight >32 t; EU+EFTA+UK
- kg_km_5: 0.00632343; = kg_5*km_5
  Transport amount in km*km, for lubricating oil // lubricants at refinery // rsa; Articulated lorry transport, Euro 4, Total weight >32 t; EU+EFTA+UK
- kg_6: 5.6216e-5
  Mass in kg, for lubricating oil // lubricants at refinery // ru; Articulated lorry transport, Euro 4, Total weight >32 t; EU+EFTA+UK
- km_6: 1000
  Distance in km, for lubricating oil // lubricants at refinery // ru; Articulated lorry transport, Euro 4, Total weight >32 t; EU+EFTA+UK
- kg_km_6: 0.056216; = kg_6*km_6
  Transport amount in km*km, for lubricating oil // lubricants at refinery // ru; Articulated lorry transport, Euro 4, Total weight >32 t; EU+EFTA+UK
- kg_7: 1.07938e-5
  Mass in kg, for lubricating oil // lubricants at refinery // cn; Transoceanic ship, containers; GLO
- km_7: 18000
  Distance in km, for lubricating oil // lubricants at refinery // cn; Transoceanic ship, containers; GLO
- kg_km_7: 0.194289; = kg_7*km_7
  Transport amount in km*km, for lubricating oil // lubricants at refinery // cn; Transoceanic ship, containers; GLO
- kg_8: 2.59423e-6
  Mass in kg, for lubricating oil // lubricants at refinery // raf; Transoceanic ship, containers; GLO
- km_8: 18000
  Distance in km, for lubricating oil // lubricants at refinery // raf; Transoceanic ship, containers; GLO
- kg_km_8: 0.0466961; = kg_8*km_8
  Transport amount in km*km, for lubricating oil // lubricants at refinery // raf; Transoceanic ship, containers; GLO
- kg_9: 6.79826e-5
  Mass in kg, for lubricating oil // lubricants at refinery // ras w/o cn; Transoceanic ship, containers; GLO
- km_9: 18000
  Distance in km, for lubricating oil // lubricants at refinery // ras w/o cn; Transoceanic ship, containers; GLO
- kg_km_9: 1.22369; = kg_9*km_9
  Transport amount in km*km, for lubricating oil // lubricants at refinery // ras w/o cn; Transoceanic ship, containers; GLO
- kg_10: 3.46283e-5
  Mass in kg, for lubricating oil // lubricants at refinery // eu+efta+uk; Transoceanic ship, containers; GLO
- km_10: 17991.1
  Distance in km, for lubricating oil // lubricants at refinery // eu+efta+uk; Transoceanic ship, containers; GLO
- kg_km_10: 0.623; = kg_10*km_10
  Transport amount in km*km, for lubricating oil // lubricants at refinery // eu+efta+uk; Transoceanic ship, containers; GLO
- kg_11: 5.30658e-5
  Mass in kg, for lubricating oil // lubricants at refinery // rna; Transoceanic ship, containers; GLO
- km_11: 18000
  Distance in km, for lubricating oil // lubricants at refinery // rna; Transoceanic ship, containers; GLO
- kg_km_11: 0.955185; = kg_11*km_11
  Transport amount in km*km, for lubricating oil // lubricants at refinery // rna; Transoceanic ship, containers; GLO
- kg_12: 6.32343e-6
  Mass in kg, for lubricating oil // lubricants at refinery // rsa; Transoceanic ship, containers; GLO
- km_12: 18000
  Distance in km, for lubricating oil // lubricants at refinery // rsa; Transoceanic ship, containers; GLO
- kg_km_12: 0.113822; = kg_12*km_12
  Transport amount in km*km, for lubricating oil // lubricants at refinery // rsa; Transoceanic ship, containers; GLO
- kg_13: 5.6216e-5
  Mass in kg, for lubricating oil // lubricants at refinery // ru; Transoceanic ship, containers; GLO
- km_13: 18000
  Distance in km, for lubricating oil // lubricants at refinery // ru; Transoceanic ship, containers; GLO
- kg_km_13: 1.01189; = kg_13*km_13
  Transport amount in km*km, for lubricating oil // lubricants at refinery // ru; Transoceanic ship, containers; GLO

## Reference product
- non-woven fabric // bonding, mechanical, needle punch, non- woven fabric // glo: 1

## Inputs
- Transport of lubricating oil // lubricants at refinery // cn by Articulated lorry transport, Euro 4, Total weight >32 t - EU+EFTA+UK: 0.0107938; = kg_km_0
- Transport of lubricating oil // lubricants at refinery // eu+efta+uk by Articulated lorry transport, Euro 4, Total weight >32 t - EU+EFTA+UK: 0.0346; = kg_km_1
- Transport of lubricating oil // lubricants at refinery // raf by Articulated lorry transport, Euro 4, Total weight >32 t - EU+EFTA+UK: 0.00259423; = kg_km_2
- Transport of lubricating oil // lubricants at refinery // ras w/o cn by Articulated lorry transport, Euro 4, Total weight >32 t - EU+EFTA+UK: 0.0679826; = kg_km_3
- Transport of lubricating oil // lubricants at refinery // rna by Articulated lorry transport, Euro 4, Total weight >32 t - EU+EFTA+UK: 0.0530658; = kg_km_4
- Transport of lubricating oil // lubricants at refinery // rsa by Articulated lorry transport, Euro 4, Total weight >32 t - EU+EFTA+UK: 0.00632343; = kg_km_5
- Transport of lubricating oil // lubricants at refinery // ru by Articulated lorry transport, Euro 4, Total weight >32 t - EU+EFTA+UK: 0.056216; = kg_km_6
- Electricity from Electricity grid mix 1kV-60kV - AU: 0.0053
- Electricity from Electricity grid mix 1kV-60kV - EU+EFTA+UK: 0.0771
- Electricity from Electricity grid mix 1kV-60kV - NZ: 0.001
- Electricity from Electricity grid mix 1kV-60kV - RU: 0.0226
- Electricity from Electricity grid mix 1kV-60kV - RSA: 0.0383
- Electricity from Electricity grid mix 1kV-60kV - RNA: 0.1129
- Electricity from Electricity grid mix 1kV-60kV - RAF: 0.0168
- Transport of lubricating oil // lubricants at refinery // cn by Transoceanic ship, containers - GLO: 0.194289; = kg_km_7
- Transport of lubricating oil // lubricants at refinery // raf by Transoceanic ship, containers - GLO: 0.0466961; = kg_km_8
- Transport of lubricating oil // lubricants at refinery // ras w/o cn by Transoceanic ship, containers - GLO: 1.22369; = kg_km_9
- Transport of lubricating oil // lubricants at refinery // eu+efta+uk by Transoceanic ship, containers - GLO: 0.623; = kg_km_10
- Transport of lubricating oil // lubricants at refinery // rna by Transoceanic ship, containers - GLO: 0.955185; = kg_km_11
- Transport of lubricating oil // lubricants at refinery // rsa by Transoceanic ship, containers - GLO: 0.113822; = kg_km_12
- Transport of lubricating oil // lubricants at refinery // ru by Transoceanic ship, containers - GLO: 1.01189; = kg_km_13
- Electricity from Electricity grid mix 1kV-60kV - CN: 0.115669
- Electricity from Electricity grid mix 1kV-60kV - RAS w/o CN: 0.126731
- non-woven fabric // bonding, mechanical, needle punch, non- woven fabric // glo, blackbox: 1
- non-woven fabric // bonding, mechanical, needle punch, non- woven fabric // glo, elementary: 1

## Impact indicators
- Eutrophication marine: 9.03249e-5
- Ecotoxicity, freshwater: 0.471944
- Land use: 0.139518
- Water use: 0.0326217
- Resource use, minerals and metals: 1.46006e-7
- Resource use, fossils: 1.35983
- Climate change: 0.102214
- Ozone depletion: 2.62611e-11
- Human toxicity, cancer: 8.34149e-11
- Human toxicity, non-cancer: 6.25498e-10
- EF-particulate Matter: 2.41575e-8
- Ionising radiation, human health: 0.00721736
- Photochemical ozone formation - human health: 0.000277258
- Acidification: 0.000652631
- Eutrophication, terrestrial: 0.000984076
- Eutrophication, freshwater: 5.71658e-7

## Deviations from the LCI method principle
The background data uses:
- the \xe2\x80\x9cRecycled content cut-off\xe2\x80\x9d approach to allocate end-of-life by-products and secondary materials. This allocation is explained in the description of the recycled content system model (http://www.ecoinvent.org/database/system-models-in-ecoinvent-3/cut-off-system-model/allocation-cut-off-by-classification.html).
OR
- EF compliant data

## Deviations from the LCI method approaches
Background data:
- the \xe2\x80\x9cRecycled content cut-off\xe2\x80\x9d approach to allocate end-of-life by-products and secondary materials. This allocation is explained in the description of the recycled content system model (http://www.ecoinvent.org/database/system-models-in-ecoinvent-3/cut-off-system-model/allocation-cut-off-by-classification.html). The ecoinvent database mostly relies on “Allocation – market values” apart for few exceptions particularly in the energy sector. ecoinvent energy data is replaced with EF3.0 core data as per the EF guidelines version 2.0.
OR
- EF compliant data

## Modelling constants
All modelling constants follow the requirements listed in the Tender Specifications 070201/2020/SER/ENV.B1. Completeness: There are no intentional cut-offs in the inventory no matter how small their contribution to all the EF impact categories is. Eventual cut-offs are in compliance with the Guide for EF compliant data sets (JRC 2020), i.e. only if below the 3% cut-off rule. Water use: water use is modelled at country level using separate flows for water withdrawal, water release and water evaporation. Handling multi-functional processes: the following PEF multi- functionality decision hierarchy is applied for resolving all multi- functionality problems: (1) subdivision or system expansion; (2) allocation based on a relevant underlying physical relationship (substitution may apply here); (3) allocation based on some other relationship. Direct land use change: GHG emissions from direct LUC allocated to good/service for 20 years after the LUC occurs, with IPCC default values. Carbon storage and delayed emissions: credits associated with temporary (carbon) storage or delayed emissions up to 300 years are not be considered. Emissions off-setting: are not included. Capital goods (including infrastructures) and their End of life: they are included. System boundaries: system boundaries include all processes linked to the product supply chain (e.g. maintenance). Time period: emissions and removals are modelled as if released or removed at the beginning of the assessment method. Fossil and biogenic carbon emissions and removals: removals and emissions are modelled as follows: All GHG emissions from fossil fuels (including peat and limestone) are modelled consistently with the most updated ILCD list of elementary flows. The non-fossil (biogenic) carbon flows are modelled consistently with the most updated ILCD list of elementary flows.

## Cut-off and completeness
There are no intentional cut-offs in the inventory no matter how small their contribution to all the EF impact categories is. Eventual cut-offs are in compliance with the Guide for EF compliant data sets (JRC 2020), i.e. only if below the 3% cut-off rule. The dataset dry mass and water balance has been checked to ensure the inventory is complete. Capital goods (e.g. infrastructure) and their end-of-life are included.

## Data selection and combination
These datasets include, in both their foreground and background data, links to EF3.0 compliant data.
The relevant background data on energy, transport, and End of Life are from the LCDN data node (http://lcdn.thinkstep.com/Node/).
All other background data in the supply of this product for which no EF3.0 process was available are from ecoinvent v3.7 database (www.ecoinvent.org) or other data sources.

## Data treatment and extrapolations
Several data sources have been used to model the inventory.

## Review details
Internal reviews have been asked to review the plausibility of the unit process, LCIA scores, and DQRs. Internal reviewers have also been asked to review the data for EF compliancy. The consortium is therefore responsible for aspects such as compliancy with the ILCD format, including validation in Look@LCI, and nomenclature.
Internal reviwers have been asked to judge based on the process name, that the unit process models in a complete and representative way the process in the requested location. The review encompassed the plausability of:
- exchanges with nature (elementary flows) as well as exchanges such as product and waste flows.
- meta information (general comment, technology comment, system boundaries, allocation, cut-off rules, etc.). Reviewers were asked to judge if the provided information is enough to understand the content of the process.
- LCIA scores
- DQRs including precision, technology, time and geography. As well as the overall DQR.
External reviewers have been asked to provide their expertise in the field of interest. External reviewers have been asked to review the unit process, including eventual methodological choices, the LCIA scores (provided with contribution scores as well), and DQRs. External reviewers have been provided all the information in a tool developed by the consortium for the purpose of this project.
External reviewers have been asked to judge based on the process name, that the unit process models in a complete and representative way the process in the requested location. The review encompassed:
- Plausability and completeness of exchanges with nature (elementary flows) as well as exchanges such as product and waste flows.
- Review of meta information (general comment, technology comment, system boundaries, allocation, cut-off rules, etc.). Reviewers were asked to judge if the provided information is enough to understand the content of the process.
- Review of properties (biogenic carbon and water content).
- Review of allocation keys.
- Plausability of LCIA scores calculated by the consortium.
- Plausability of DQRs including precision, technology, time and geography. As well as the overall DQR.

## Data sources
- Background Data for Representative products and organisations. EF 3.0 compliant (data stock)
- Prof. Akber Ali Affandi, Ghulam Mohiuddin, Muhammad Daniyal Usman, Muhammad Rashid, Muhammad Saeed, Muhammad Tariq (2010). Oil Consumption In Knitting Machine. Hamdard University, Pakistan
- UN Data (2018) Statistics Data for Lubricants Productions, http://data.un.org/Data.aspx?q=Lubricants&d=EDATA&f=cmID%3aLU, United Nations Statistics Division, Global
- Sail (2021) Pre Needle Loom Machine, E-mail Company, Sail Nonwoven Machinery Co. Ltd., China
- Sail (2021) Main Needle Loom Machine, E-mail Company, Sail Nonwoven Machinery Co. Ltd., China
- Mustafa Sabri Ozen, Erhan Sancak, Mehmet Akalin (2015). The effect of needle-punched nonwoven fabric thickness on electromagnetic shielding effectiveness. Textile Research Journal, United Kingdom

## Intended applications
Implementation of regular Product Environmental Footprint (PEF) studies and Organisation Environmental Footprint (OEF) studies exclusively under the specified Product groups and sectors as defined in the Product Environmental Footprint Category Rules (PEFCR) and Organisation Environmental Footprint Sectorial Rules (OEFSR) listed in http://ec.europa.eu/environment/eussd/smgp/PEFCR_OEFSR.htm
