# sawn wood, hardwood, elementary; technology mix; production mix, at plant; wet mass

Dataset: ILCD process, Unit process, single operation
Geography: WORLD (WITHOUT EU+EFTA+UK, US AND CA)
Reference year: 2019
Valid until: 2024
Classification: Other Services / Other services
LCI method principle: Attributional
LCI method approaches: Allocation - market value
Completeness: All relevant flows quantified
Project: Provision of process-based 3.0 Environmental Footprint-compliant life cycle inventory datasets - Renewable materials - contract number 070201/2020/840085/SER/ENV.B.1
Generated by: ecoinvent
Owner: ecoinvent
Compliance: Environmental Footprint non-primary supporting data set; Environmental Footprint 3.1
Amounts: no units in this file; such an amount is in the reference unit of its flow, which a separate flow dataset defines
copyright: true
licenseType: Free of charge for some user types or use types
accessRestrictions: Free of charge for all final users implementing a regular Product Environmental Footprint (PEF) studies and Organisation Environmental Footprint (OEF) studies exclusively under the specified Product groups and sectors as defined in the Product Environmental Footprint Category Rules (PEFCR) and Organisation Environmental Footprint Sectorial Rules (OEFSR) listed in http://ec.europa.eu/environment/eussd/smgp/PEFCR_OEFSR.htm and in accordance with the terms and conditions of the EULA (available at https://ecoinvent.lca-data.com/) exclusively until 31st December 2024. Any use of this dataset or any derivative data not within the specific context of one of the PEF/OEF projects or after the end of 2024 is not permitted.

## General comment
Notice: this data set supersedes the EF3.0-compliant version (see link under "preceding data set version" below calculated with the EF3.0). The life cycle inventory is not changed from the original EF3.0 data set. The LCIA results are calculated based on the EF3.1 methods which provide updated characterisation factors in the following impact categories: Climate Change, Ecotoxicity freshwater, Photochemical Ozone Formation, Acidification, Human Toxicity non-cancer, and Human Toxicity cancer. The review report and the data quality ratings refer to the original results. The data set has been updated by the European Commission on the basis of the original EF3.0 data set delivered by the data provider.This sub-process has limited documentation only. For all detailed documentation of the full model to which this data set belongs (such as DQRs, review reports and other technical documentation), please see this process: sawn wood, hardwood - WORLD (WITHOUT EU+EFTA+UK, US AND CA) []

## Technology and included processes
The activity starts with the dried sawn wood from air and kiln drying with a gravimetric water content of ca. 15 %. The dataset includes the planning process and the input of dried, sawn wood. The dataset does not include dust emission. The activity ends with planed hardwood at the planning mill.

## Reference product
- sawn wood, hardwood // sawn wood, hardwood // world (without eu+efta+uk, us and ca), elementary: 1

## Impact indicators
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
## Deviations from the LCI method principle
The background data use the \xe2\x80\x9cRecycled content cut-off\xe2\x80\x9d approach to allocate end-of-life by-products and secondary materials. This allocation is explained in the description of the recycled content system model (http://www.ecoinvent.org/database/system-models-in-ecoinvent-3/cut-off-system-model/allocation-cut-off-by-classification.html).

## Deviations from the LCI method approaches
Background data:
- the \xe2\x80\x9cRecycled content cut-off\xe2\x80\x9d approach to allocate end-of-life by-products and secondary materials. This allocation is explained in the description of the recycled content system model (http://www.ecoinvent.org/database/system-models-in-ecoinvent-3/cut-off-system-model/allocation-cut-off-by-classification.html). The ecoinvent database mostly relies on “Allocation – market values” apart for few exceptions particularly in the energy sector. ecoinvent energy data is replaced with EF3.0 core data as per the EF guidelines version 2.0.
OR
- EF compliant data

## Modelling constants
All modelling constants follow the requirements listed in the Tender Specifications ENV.B.1/SER/2016/0038vl. Completeness: All known environmental flows are included. All known resource uses and emissions are listed in the inventory. Water use: water use is modelled at country level using separate flows for water withdrawal, water release and water evaporation. Cut-off: All known environmental flows are included. All known resource uses and emissions are listed in the inventory. Handling multi-functional processes: the following PEF multi- functionality decision hierarchy is applied for resolving all multi- functionality problems: (1) subdivision or system expansion; (2) allocation based on a relevant underlying physical relationship (substitution may apply here); (3) allocation based on some other relationship. Direct land use change: GHG emissions from direct LUC allocated to good/service for 20 years after the LUC occurs, with IPCC default values. Carbon storage and delayed emissions: credits associated with temporary (carbon) storage or delayed emissions up to 300 years are not be considered. Emissions off-setting: are not included. Capital goods (including infrastructures) and their End of life: they are included. System boundaries: system boundaries include all processes linked to the product supply chain (e.g. maintenance). Time period: emissions and removals are modelled as if released or removed at the beginning of the assessment method. Fossil and biogenic carbon emissions and removals: removals and emissions are modelled as follows: All GHG emissions from fossil fuels (including peat and limestone) are modelled consistently with the most updated ILCD list of elementary flows. The non-fossil (biogenic) carbon flows are modelled consistently with the most updated ILCD list of elementary flows.

## Cut-off and completeness
All known environmental flows are included. All known resource uses and emissions are listed in the inventory. The dataset dry mass balance has been checked to ensure the inventory is complete. Capital goods (e.g. infrastructure) and their end-of-life are included.

## Data selection and combination
These datasets include, in both their foreground and background data, links to EF3.0 compliant data.
The relevant background data on energy, transport, and End of Life are from the LCDN data node (http://lcdn.thinkstep.com/Node/).
All other background data in the supply of this product for which no EF3.0 process was available are from ecoinvent v3.7 database (www.ecoinvent.org) or other data sources.

## Data treatment and extrapolations
Several data sources have been used to model the inventory.

## Use advice
This data set is a supporting sub-data set and must be used exclusively as sub-data set of its corresponding level-1 partly disaggregated data set (see “General comment” field for exact name and UUID).

## Data sources
- Background Data for Representative products and organisations. EF 3.0 compliant (data stock)
- Werner, F., planing, lath, hardwood, u=20%, Europe without Switzerland, undefined, ecoinvent database version 3.7.1.
- Werner, F., planing, lath, hardwood, u=10%, Europe without Switzerland, undefined, ecoinvent database version 3.7.1.
- Werner, F., planing, beam, hardwood, u=20%, Europe without Switzerland, undefined, ecoinvent database version 3.7.1.
- Werner, F., planing, beam, hardwood, u=10%, Europe without Switzerland, undefined, ecoinvent database version 3.7.1.
- Werner, F., planing, board, hardwood, u=20%, Europe without Switzerland, undefined, ecoinvent database version 3.7.1.
- Werner, F., planing, board, hardwood, u=10%, Europe without Switzerland, undefined, ecoinvent database version 3.7.1.
- Werner F., Bauer C., Büsser S., Doka G., Kaufmann E., Kono J., Luginbühl, U., Mina M., Frischknecht R., Thees O, Wallbaum H., Zimmermann W., Hischer R. (2015). Aktualisierung der Modelle und Datensätze zu Holz und Holzprodukten in der Datenbank ecoinvent. Auftraggeberin: Bundesamt für Umwelt, Aktionsplan Holz, Bern, Auftragnehmer: Eidgenössische Materialprüfungs- und Forschungsanstalt EMPA.
- Abbas, D., & Handler, R. M. (2018). Life-cycle assessment of forest harvesting and transportation operations in Tennessee. Journal of Cleaner Production, 176, 512-520.
- Oneil et al. (2010). LIFE-CYCLE IMPACTS OF INLAND NORTHWEST AND NORTHEAST/NORTH CENTRAL FOREST RESOURCES. Available at: https://corrim.org/wp-content/uploads/2017/12/WFS_SI_Impacts_of_Inland_NW_NE_NC_Forest_Resources.pdf
- Athena Sustainable Materials Institute (2018). A Cradle-to-Gate Life Cycle Assessment of Canadian Surfaced Dry Softwood Lumber. Available at: http://www.athenasmi.org/wp-content/uploads/2018/07/CtoG-LCA-of-Canadian-Surfaced-Dry-Softwood-Lumber.pdf
- European Organization of the Sawmill Industry – EOS (2019). Annual Report of the European Sawmill Industry. Available at: https://www.eos-oes.eu/downloads/EOS-annual-report-2018-2019.pdf
- Cardellini, G., Valada, T., Cornillier, C., Vial, E., Dragoi, M., Goudiaby, V., Muys, B. (2018). EFO-LCI: A new life cycle inventory database of forestry operations in Europe. Environmental Management, 61(6), 1031-1047.
- Eurostat (2021). Roundwood removals by type of wood and assortment. Tree species: Coniferous. Wood products: Roundwood under bark. Available at: ec.europa.eu/eurostat/databrowser/bookmark/2fe47d27-a1ea-4028-a4cc-06c1f8725af0?lang=en [Accessed on 25/06/2021]

## Intended applications
Implementation of regular Product Environmental Footprint (PEF) studies and Organisation Environmental Footprint (OEF) studies exclusively under the specified Product groups and sectors as defined in the Product Environmental Footprint Category Rules (PEFCR) and Organisation Environmental Footprint Sectorial Rules (OEFSR) listed in http://ec.europa.eu/environment/eussd/smgp/PEFCR_OEFSR.htm
