# tumble drying; drying, condenser tumble dryer; production mix, at plant; service

Dataset: ILCD process, Partly terminated system
Geography: EU+EFTA+UK
Reference year: 2021
Valid until: 2024
Classification: Systems / Textiles, furnitures and other interiors
LCI method principle: Attributional
LCI method approaches: Allocation - market value
Completeness: All relevant flows quantified
Project: Provision of process-based 3.0 Environmental Footprint-compliant life cycle inventory datasets - Others - contract number 070201/2020/840235/SER/ENV.B.1
Generated by: Life Cycle Indonesia
Owner: PRé Sustainability B.V.
Compliance: ILCD Data Network - Entry-level; Suggestions for updating the PEF method 2019; ISO 14040 Environmental Management – Life Cycle Assessment – Principles and Framework, 2006; ISO 14044:2006. Environmental Management – Life Cycle Assessment – Requirements and guidelines.; Environmental Footprint 3.1
Review: Dependent internal review by Avraam Symeonidis, Emilia Moreno Ruiz; Independent review panel by Fábio Valebona
Data quality: Overall quality: Very good; Time representativeness: Very good; Geographical representativeness: Very good; Technological representativeness: Very good; Precision: Good; Methodological appropriateness and consistency: Not applicable
Amounts: no units in this file; such an amount is in the reference unit of its flow, which a separate flow dataset defines
copyright: true
licenseType: Free of charge for some user types or use types
accessRestrictions: Free of charge for all final users implementing a regular Product Environmental Footprint (PEF) studies and Organisation Environmental Footprint (OEF) studies exclusively under the specified Product groups and sectors as defined in the Product Environmental Footprint Category Rules (PEFCR) and Organisation Environmental Footprint Sectorial Rules (OEFSR) listed in http://ec.europa.eu/environment/eussd/smgp/PEFCR_OEFSR.htm and in accordance with the terms and conditions of the EULA (available at https://ecoinvent.lca-data.com/) exclusively until 31st December 2024. Any use of this dataset or any derivative data not within the specific context of one of the PEF/OEF projects or after the end of 2024 is not permitted.

## General comment
Notice: this data set supersedes the EF3.0-compliant version (see link under "preceding data set version" below calculated with the EF3.0). The life cycle inventory is not changed from the original EF3.0 data set. The LCIA results are calculated based on the EF3.1 methods which provide updated characterisation factors in the following impact categories: Climate Change, Ecotoxicity freshwater, Photochemical Ozone Formation, Acidification, Human Toxicity non-cancer, and Human Toxicity cancer. The review report and the data quality ratings refer to the original results. The data set has been updated by the European Commission on the basis of the original EF3.0 data set delivered by the data provider.Tumble dry is a term for drying clothing in a dryer machine as opposed to hanging them on the line. The advantage or tumble dry for clothing is the speed. Line drying can take days whereas using a machine can get your clothes dry in an hour or less. Tumble dryers take up less room than clotheslines making them ideal for small apartments and houses. Clothes put in a tumble dry machine have fewer creases and are toasty warm when they come out. On the other side, there are a couple of disadvantages to tumble drying. Some clothing can be ruined by the heat and have their life span shortened. It is not recommended you tumble dry synthetic clothing such as polyester underwear. Dark colors can fade and fabrics can shrink.

Tumble dry high is best for cotton and other items that take longer to dry (sweatshirts, jeans, beach towels from family vacay, etc.). Tumble dry low (or Delicate/Gentle cycle) is ideal for loosely woven fabrics or anything with embellishment, like beading, sequins and iron-on decals (sports jerseys). Low heat items are usually thin or delicate. Often the machine will have this labelled as delicate or gentle cycles with lower times. Polyester blend items may have this symbol with the one dot. It’s especially important to dry spandex/exercise clothing on low heat because it prevents the fabric from fraying, fading and stretching.

Treasurie (2021) TUMBLE DRY – How to Tumble Dry Correctly, https://blog.treasurie.com/tumble-dry/
Whirlpool (2021) What does tumble dry mean? And what does it do?, https://www.whirlpool.com/blog/washers-and-dryers/what-is-tumble-dry.html

## Technology and included processes
There is a tumble dry symbol on the cloth tags. The symbol is a square with a circle inside it. It may have black dots inside the circle indicating the level of heat. The more dots, the hotter the machine. Solid circle means tumble dry with no heat, one dot means low heat or normal, two dots means medium heat, and three dots means high heat. If the symbol is a square with a circle and a cross through it, this means do NOT tumble dry. The clothing will be damaged by putting it in a tumbler. (Treasurie, 2021)

There are three dryer types of tumble dryer. Vented models pump out the hot and damp air from the drum through a flexible hose to the outside, so the dryer need to be put next to a wall or window. Condensers model don’t need to connect the exhaust hose through a vent to the outside, and these dryers can be put anywhere in home that’s well ventilated. Condensers work by condensing the steam inside the machine and turning it into water whisch is then collected in a removable container or reservoir. The newest model is heat-pump. The operated models use clever technology to dry your laundry by using hot air to extract water from the load, which then evaporates in a tank. (Anderson, 2020)

This dataset describes the process of condenser tumble dryer (average between high and low temperature). The activity starts when the raw materials enter the process. Materials entering the process are included as well as energy uses and infrastructure. There is no direct emission to soil and air since the emission comes from electricity usage, while the emission to water comes from waste lube oil. Lost fibers left in the dryer filter are not included in this dataset. The consumption of lubricating oil using a oven bonding machines as a proxy.

Treasurie (2021) TUMBLE DRY – How to Tumble Dry Correctly, https://blog.treasurie.com/tumble-dry/
Anderson (2020) Our expert guide to buying a tumble dryer, https://www.goodhousekeeping.com/uk/product-reviews/electricals/a656810/how-to-buy-best-tumble-dryer/#:~:text=Tumble%20dryers%20are%20simple%20to,choose%20the%20most%20suitable%20setting.

## Parameters
- kg_0: 0.0225798
  Mass in kg, for lubricating oil; Freight train, average; EU+EFTA+UK
- km_0: 157.22
  Distance in km, for lubricating oil; Freight train, average; EU+EFTA+UK
- kg_km_0: 3.55; = kg_0*km_0
  Transport amount in km*km, for lubricating oil; Freight train, average; EU+EFTA+UK
- kg_1: 0.0225798
  Mass in kg, for lubricating oil; Barge; EU+EFTA+UK
- km_1: 75.7315
  Distance in km, for lubricating oil; Barge; EU+EFTA+UK
- kg_km_1: 1.71; = kg_1*km_1
  Transport amount in km*km, for lubricating oil; Barge; EU+EFTA+UK
- kg_2: 0.0225798
  Mass in kg, for lubricating oil; Articulated lorry transport, Euro 4, Total weight >32 t; EU+EFTA+UK
- km_2: 580.166
  Distance in km, for lubricating oil; Articulated lorry transport, Euro 4, Total weight >32 t; EU+EFTA+UK
- kg_km_2: 13.1; = kg_2*km_2
  Transport amount in km*km, for lubricating oil; Articulated lorry transport, Euro 4, Total weight >32 t; EU+EFTA+UK
- kg_3: 0.0041336
  Mass in kg, for dryer; Transoceanic ship, containers; GLO
- km_3: 737
  Distance in km, for dryer; Transoceanic ship, containers; GLO
- kg_km_3: 3.04646; = kg_3*km_3
  Transport amount in km*km, for dryer; Transoceanic ship, containers; GLO
- kg_4: 0.0041336
  Mass in kg, for dryer; Freight train, diesel traction; EU+EFTA+UK
- km_4: 13.3513
  Distance in km, for dryer; Freight train, diesel traction; EU+EFTA+UK
- kg_km_4: 0.055189; = kg_4*km_4
  Transport amount in km*km, for dryer; Freight train, diesel traction; EU+EFTA+UK
- kg_5: 0.0041336
  Mass in kg, for dryer; Freight train, electricity traction; EU+EFTA+UK
- km_5: 4.54157
  Distance in km, for dryer; Freight train, electricity traction; EU+EFTA+UK
- kg_km_5: 0.018773; = kg_5*km_5
  Transport amount in km*km, for dryer; Freight train, electricity traction; EU+EFTA+UK
- kg_6: 0.0041336
  Mass in kg, for dryer; Freight train, average; EU+EFTA+UK
- km_6: 0.107115
  Distance in km, for dryer; Freight train, average; EU+EFTA+UK
- kg_km_6: 0.000442771; = kg_6*km_6
  Transport amount in km*km, for dryer; Freight train, average; EU+EFTA+UK
- kg_7: 0.0041336
  Mass in kg, for dryer; Barge; EU+EFTA+UK
- km_7: 0.328736
  Distance in km, for dryer; Barge; EU+EFTA+UK
- kg_km_7: 0.00135886; = kg_7*km_7
  Transport amount in km*km, for dryer; Barge; EU+EFTA+UK
- kg_8: 0.0041336
  Mass in kg, for dryer; Barge; ROW w/o EU+EFTA
- km_8: 0.671264
  Distance in km, for dryer; Barge; ROW w/o EU+EFTA
- kg_km_8: 0.00277473; = kg_8*km_8
  Transport amount in km*km, for dryer; Barge; ROW w/o EU+EFTA
- kg_9: 0.0041336
  Mass in kg, for dryer; Articulated lorry transport, Total weight <7.5 t, mix Euro 0-5; EU+EFTA+UK
- km_9: 9.50673
  Distance in km, for dryer; Articulated lorry transport, Total weight <7.5 t, mix Euro 0-5; EU+EFTA+UK
- kg_km_9: 0.039297; = kg_9*km_9
  Transport amount in km*km, for dryer; Articulated lorry transport, Total weight <7.5 t, mix Euro 0-5; EU+EFTA+UK
- kg_10: 0.0041336
  Mass in kg, for dryer; Articulated lorry transport, Euro 4, Total weight >32 t; EU+EFTA+UK
- km_10: 86.5577
  Distance in km, for dryer; Articulated lorry transport, Euro 4, Total weight >32 t; EU+EFTA+UK
- kg_km_10: 0.357795; = kg_10*km_10
  Transport amount in km*km, for dryer; Articulated lorry transport, Euro 4, Total weight >32 t; EU+EFTA+UK
- kg_11: 0.0041336
  Mass in kg, for dryer; Articulated lorry transport, Total weight >32 t, mix Euro 0-5; ROW w/o EU+EFTA
- km_11: 228.442
  Distance in km, for dryer; Articulated lorry transport, Total weight >32 t, mix Euro 0-5; ROW w/o EU+EFTA
- kg_km_11: 0.944289; = kg_11*km_11
  Transport amount in km*km, for dryer; Articulated lorry transport, Total weight >32 t, mix Euro 0-5; ROW w/o EU+EFTA

## Reference product
- tumble drying // tumble drying // eu+efta+uk: 1

## Inputs
- Transport of lubricating oil by Freight train, average - EU+EFTA+UK: 3.55; = kg_km_0
- Transport of lubricating oil by Barge - EU+EFTA+UK: 1.71; = kg_km_1
- Transport of lubricating oil by Articulated lorry transport, Euro 4, Total weight >32 t - EU+EFTA+UK: 13.1; = kg_km_2
- Electricity from Electricity grid mix 1kV-60kV - EU+EFTA+UK: 1.51254
- Transport of dryer by Transoceanic ship, containers - GLO: 3.04646; = kg_km_3
- Transport of dryer by Freight train, diesel traction - EU+EFTA+UK: 0.055189; = kg_km_4
- Transport of dryer by Freight train, electricity traction - EU+EFTA+UK: 0.018773; = kg_km_5
- Transport of dryer by Freight train, average - EU+EFTA+UK: 0.000442771; = kg_km_6
- Transport of dryer by Barge - EU+EFTA+UK: 0.00135886; = kg_km_7
- Transport of dryer by Barge - ROW w/o EU+EFTA: 0.00277473; = kg_km_8
- Transport of dryer by Articulated lorry transport, Total weight <7.5 t, mix Euro 0-5 - EU+EFTA+UK: 0.039297; = kg_km_9
- Transport of dryer by Articulated lorry transport, Euro 4, Total weight >32 t - EU+EFTA+UK: 0.357795; = kg_km_10
- Transport of dryer by Articulated lorry transport, Total weight >32 t, mix Euro 0-5 - ROW w/o EU+EFTA: 0.944289; = kg_km_11
- tumble drying // tumble drying // eu+efta+uk, blackbox: 1
- tumble drying // tumble drying // eu+efta+uk, elementary: 1

## Impact indicators
- Eutrophication marine: 0.000158596
- Ecotoxicity, freshwater: 1.96838
- Land use: 0.939683
- Water use: 0.0676243
- Resource use, minerals and metals: 4.71484e-6
- Resource use, fossils: 4.38394
- Climate change: 0.230087
- Ozone depletion: 4.31748e-10
- Human toxicity, cancer: 2.22315e-10
- Human toxicity, non-cancer: 1.81469e-9
- EF-particulate Matter: 1.3539e-8
- Ionising radiation, human health: 0.0752208
- Photochemical ozone formation - human health: 0.000480159
- Acidification: 0.000819661
- Eutrophication, terrestrial: 0.00168893
- Eutrophication, freshwater: 1.41111e-5

## Deviations from the LCI method principle
The background data uses:
- the \xe2\x80\x9cRecycled content cut-off\xe2\x80\x9d approach to allocate end-of-life by-products and secondary materials. This allocation is explained in the description of the recycled content system model (http://www.ecoinvent.org/database/system-models-in-ecoinvent-3/cut-off-system-model/allocation-cut-off-by-classification.html).
OR
- EF compliant data

## Deviations from the LCI method approaches
Background data:
- the \xe2\x80\x9cRecycled content cut-off\xe2\x80\x9d approach to allocate end-of-life by-products and secondary materials. This allocation is explained in the description of the recycled content system model (http://www.ecoinvent.org/database/system-models-in-ecoinvent-3/cut-off-system-model/allocation-cut-off-by-classification.html). The ecoinvent database mostly relies on “Allocation – market values” apart for few exceptions particularly in the energy sector. ecoinvent energy data is replaced with EF3.0 core data as per the EF guidelines version 2.0.
OR
- EF compliant data

## Modelling constants
All modelling constants follow the requirements listed in the Tender Specifications 070201/2020/SER/ENV.B1. Completeness: There are no intentional cut-offs in the inventory no matter how small their contribution to all the EF impact categories is. Eventual cut-offs are in compliance with the Guide for EF compliant data sets (JRC 2020), i.e. only if below the 3% cut-off rule. Water use: water use is modelled at country level using separate flows for water withdrawal, water release and water evaporation. Handling multi-functional processes: the following PEF multi- functionality decision hierarchy is applied for resolving all multi- functionality problems: (1) subdivision or system expansion; (2) allocation based on a relevant underlying physical relationship (substitution may apply here); (3) allocation based on some other relationship. Direct land use change: GHG emissions from direct LUC allocated to good/service for 20 years after the LUC occurs, with IPCC default values. Carbon storage and delayed emissions: credits associated with temporary (carbon) storage or delayed emissions up to 300 years are not be considered. Emissions off-setting: are not included. Capital goods (including infrastructures) and their End of life: they are included. System boundaries: system boundaries include all processes linked to the product supply chain (e.g. maintenance). Time period: emissions and removals are modelled as if released or removed at the beginning of the assessment method. Fossil and biogenic carbon emissions and removals: removals and emissions are modelled as follows: All GHG emissions from fossil fuels (including peat and limestone) are modelled consistently with the most updated ILCD list of elementary flows. The non-fossil (biogenic) carbon flows are modelled consistently with the most updated ILCD list of elementary flows.

## Cut-off and completeness
There are no intentional cut-offs in the inventory no matter how small their contribution to all the EF impact categories is. Eventual cut-offs are in compliance with the Guide for EF compliant data sets (JRC 2020), i.e. only if below the 3% cut-off rule. The dataset dry mass and water balance has been checked to ensure the inventory is complete. Capital goods (e.g. infrastructure) and their end-of-life are included.

## Data selection and combination
These datasets include, in both their foreground and background data, links to EF3.0 compliant data.
The relevant background data on energy, transport, and End of Life are from the LCDN data node (http://lcdn.thinkstep.com/Node/).
All other background data in the supply of this product for which no EF3.0 process was available are from ecoinvent v3.7 database (www.ecoinvent.org) or other data sources.

## Data treatment and extrapolations
Several data sources have been used to model the inventory.

## Review details
Internal reviews have been asked to review the plausibility of the unit process, LCIA scores, and DQRs. Internal reviewers have also been asked to review the data for EF compliancy. The consortium is therefore responsible for aspects such as compliancy with the ILCD format, including validation in Look@LCI, and nomenclature.
Internal reviwers have been asked to judge based on the process name, that the unit process models in a complete and representative way the process in the requested location. The review encompassed the plausability of:
- exchanges with nature (elementary flows) as well as exchanges such as product and waste flows.
- meta information (general comment, technology comment, system boundaries, allocation, cut-off rules, etc.). Reviewers were asked to judge if the provided information is enough to understand the content of the process.
- LCIA scores
- DQRs including precision, technology, time and geography. As well as the overall DQR.
External reviewers have been asked to provide their expertise in the field of interest. External reviewers have been asked to review the unit process, including eventual methodological choices, the LCIA scores (provided with contribution scores as well), and DQRs. External reviewers have been provided all the information in a tool developed by the consortium for the purpose of this project.
External reviewers have been asked to judge based on the process name, that the unit process models in a complete and representative way the process in the requested location. The review encompassed:
- Plausability and completeness of exchanges with nature (elementary flows) as well as exchanges such as product and waste flows.
- Review of meta information (general comment, technology comment, system boundaries, allocation, cut-off rules, etc.). Reviewers were asked to judge if the provided information is enough to understand the content of the process.
- Review of properties (biogenic carbon and water content).
- Review of allocation keys.
- Plausability of LCIA scores calculated by the consortium.
- Plausability of DQRs including precision, technology, time and geography. As well as the overall DQR.

## Data sources
- Background Data for Representative products and organisations. EF 3.0 compliant (data stock)
- Europian Union (2019) Review study on household tumble driers Final Report, https://www.applia-europe.eu/images/Library/Review_study_on_tumble_dryers_06-2019.pdf, Europian Union
- Lebon (2021) Nonwoven Oven Machine, Catalog and Company Messages, Qingdao Lebon Industry Co., Ltd., China.
- Bosch (2021) Tumble Dryer WTR85V00SG, https://media3.bosch-home.com/Documents/9001388135_A.pdf, Bosch Home Appliances, Munich, Germany
- Capital Repairs (2021) Why Your Appliances Should Really Be Lasting Longer, https://capitalrepairs.co.uk/news/why-your-appliances-should-really-be-lasting-longer/#:~:text=Tumble%20Dryers%20Should%20Last%20for,caused%20by%20a%20tripped%20thermostat, Capital Repairs, United Kingdom
- Tri-Sis Inc (2021) Absorbent vs Adsorbent, http://tri-sis.ca/absorbent.html, Tri-Sis Inc, Ontario, Canada

## Intended applications
Implementation of regular Product Environmental Footprint (PEF) studies and Organisation Environmental Footprint (OEF) studies exclusively under the specified Product groups and sectors as defined in the Product Environmental Footprint Category Rules (PEFCR) and Organisation Environmental Footprint Sectorial Rules (OEFSR) listed in http://ec.europa.eu/environment/eussd/smgp/PEFCR_OEFSR.htm
