# spray coating; technology mix; production mix, at plant; 1 kg

Dataset: ILCD process, Partly terminated system
Geography: EU+EFTA+UK
Reference year: 2021
Valid until: 2024
Classification: Systems / Textiles, furnitures and other interiors
LCI method principle: Attributional
LCI method approaches: Allocation - market value
Completeness: All relevant flows quantified
Project: Provision of process-based 3.0 Environmental Footprint-compliant life cycle inventory datasets - Apparel 2 - contract number 070201/2020/840292/SER/ENV.B.1
Generated by: Life Cycle Indonesia
Owner: PRé Sustainability B.V.
Compliance: ILCD Data Network - Entry-level; Suggestions for updating the PEF method 2019; ISO 14040 Environmental Management – Life Cycle Assessment – Principles and Framework, 2006; ISO 14044:2006. Environmental Management – Life Cycle Assessment – Requirements and guidelines.; Environmental Footprint 3.1
Review: Dependent internal review by Avraam Symeonidis, Emilia Moreno Ruiz; Independent review panel by Madhuri Nigam
Data quality: Overall quality: Good; Time representativeness: Very good; Geographical representativeness: Good; Technological representativeness: Good; Precision: Good; Methodological appropriateness and consistency: Not applicable
Amounts: no units in this file; such an amount is in the reference unit of its flow, which a separate flow dataset defines
copyright: true
licenseType: Free of charge for some user types or use types
accessRestrictions: Free of charge for all final users implementing a regular Product Environmental Footprint (PEF) studies and Organisation Environmental Footprint (OEF) studies exclusively under the specified Product groups and sectors as defined in the Product Environmental Footprint Category Rules (PEFCR) and Organisation Environmental Footprint Sectorial Rules (OEFSR) listed in http://ec.europa.eu/environment/eussd/smgp/PEFCR_OEFSR.htm and in accordance with the terms and conditions of the EULA (available at https://ecoinvent.lca-data.com/) exclusively until 31st December 2024. Any use of this dataset or any derivative data not within the specific context of one of the PEF/OEF projects or after the end of 2024 is not permitted.

## General comment
Notice: this data set supersedes the EF3.0-compliant version (see link under "preceding data set version" below calculated with the EF3.0). The life cycle inventory is not changed from the original EF3.0 data set. The LCIA results are calculated based on the EF3.1 methods which provide updated characterisation factors in the following impact categories: Climate Change, Ecotoxicity freshwater, Photochemical Ozone Formation, Acidification, Human Toxicity non-cancer, and Human Toxicity cancer. The review report and the data quality ratings refer to the original results. The data set has been updated by the European Commission on the basis of the original EF3.0 data set delivered by the data provider.Spray coating in carpet manufacturing is usually used to apply finishes, one of them is water and soil repellent. The repellent finish may be applied to the secondary backing by various means, including foam, spray, padding, or dipping methods. There are several ways to applied chemicals to the secondary backing. It can be applied before contacting the primary and secondary backing or onto the underside of a finished carpet having a secondary backing. The repellent finishes are selected from fluorochemicals, silicone-based compositions, wax emulsions, naturally-occurring oils, and hydrophobic acrylate resins. The repellent finish may typically contain about 0.5 to about 40% by weight active ingredient.

This dataset is a service process that does not include the raw material input (carpet). A user employing this service within their models should add this spray coating dataset along with 1 kg of carpet dataset. Around 0.06 kg of chemical finishes/active ingredients of chemicals (e.g. silicone), 4E-6 kg of lubricating oil (approximated amount) for regular maintenance of the machine, and 4E-6 kg of waste (resulting from lubricating oil usage, approximated amount) are already included in the model. The lubricating oil waste is incinerated in the model. Additionally, a user is responsible for including transportation of all extra input and output materials that need to be modelled alongside this service.

William Warfel Heim, Joyce Monson Materniak, James Kirk Woodstock Hendrix, Peter Michael Ooltewah, Murphym Neil Allen Signal Mountain Panzier, Yashavant Vinavak Hockessin Vinod (2021). Method for manufacturing a carpet having a secondary backing substantially impervious to liquids and the resultant carpet, https://patentimages.storage.googleapis.com/14/67/5c/06f1d93fb7803d/EP0662541B1.pdf, EUROPEAN PATENT SPECIFICATION, London

## Technology and included processes
In this model, silicone is used as the repellent active ingredient and a hot melt spray coating machine is used as a proxy. The drying process following the spray coating application is not included in the model. The silicone, electricity consumption and infrastructure are included in the model. There is no direct emission to soil and air as the energy is used solely from the electricity. While hazardous waste comes from the waste lube oil. The consumption of lubricating oil using a thermal bonding machine as a proxy.

## Parameters
- kg_0: 0.0601279
  Mass in kg, for silicone, fossil fuel-based // silicone production // glo; Articulated lorry transport, Euro 4, Total weight >32 t; EU+EFTA+UK
- km_0: 130
  Distance in km, for silicone, fossil fuel-based // silicone production // glo; Articulated lorry transport, Euro 4, Total weight >32 t; EU+EFTA+UK
- kg_km_0: 7.81663; = kg_0*km_0
  Transport amount in km*km, for silicone, fossil fuel-based // silicone production // glo; Articulated lorry transport, Euro 4, Total weight >32 t; EU+EFTA+UK
- kg_1: 4.02781e-6
  Mass in kg, for lubricating oil // lubricants at refinery // eu+efta+uk; Articulated lorry transport, Euro 4, Total weight >32 t; EU+EFTA+UK
- km_1: 130
  Distance in km, for lubricating oil // lubricants at refinery // eu+efta+uk; Articulated lorry transport, Euro 4, Total weight >32 t; EU+EFTA+UK
- kg_km_1: 0.000523615; = kg_1*km_1
  Transport amount in km*km, for lubricating oil // lubricants at refinery // eu+efta+uk; Articulated lorry transport, Euro 4, Total weight >32 t; EU+EFTA+UK
- kg_2: 0.0601279
  Mass in kg, for silicone, fossil fuel-based // silicone production // glo; Barge; EU+EFTA+UK
- km_2: 270
  Distance in km, for silicone, fossil fuel-based // silicone production // glo; Barge; EU+EFTA+UK
- kg_km_2: 16.2345; = kg_2*km_2
  Transport amount in km*km, for silicone, fossil fuel-based // silicone production // glo; Barge; EU+EFTA+UK
- kg_3: 4.02781e-6
  Mass in kg, for lubricating oil // lubricants at refinery // eu+efta+uk; Barge; EU+EFTA+UK
- km_3: 270
  Distance in km, for lubricating oil // lubricants at refinery // eu+efta+uk; Barge; EU+EFTA+UK
- kg_km_3: 0.00108751; = kg_3*km_3
  Transport amount in km*km, for lubricating oil // lubricants at refinery // eu+efta+uk; Barge; EU+EFTA+UK
- kg_4: 0.0601279
  Mass in kg, for silicone, fossil fuel-based // silicone production // glo; Freight train, average; EU+EFTA+UK
- km_4: 240
  Distance in km, for silicone, fossil fuel-based // silicone production // glo; Freight train, average; EU+EFTA+UK
- kg_km_4: 14.4307; = kg_4*km_4
  Transport amount in km*km, for silicone, fossil fuel-based // silicone production // glo; Freight train, average; EU+EFTA+UK
- kg_5: 4.02781e-6
  Mass in kg, for lubricating oil // lubricants at refinery // eu+efta+uk; Freight train, average; EU+EFTA+UK
- km_5: 240
  Distance in km, for lubricating oil // lubricants at refinery // eu+efta+uk; Freight train, average; EU+EFTA+UK
- kg_km_5: 0.000966673; = kg_5*km_5
  Transport amount in km*km, for lubricating oil // lubricants at refinery // eu+efta+uk; Freight train, average; EU+EFTA+UK

## Reference product
- spray coating // spray coating // eu+efta+uk: 1

## Inputs
- Electricity from Electricity grid mix 1kV-60kV - EU+EFTA+UK: 0.0695687
- Transport of silicone, fossil fuel-based // silicone production // glo by Articulated lorry transport, Euro 4, Total weight >32 t - EU+EFTA+UK: 7.81663; = kg_km_0
- Transport of lubricating oil // lubricants at refinery // eu+efta+uk by Articulated lorry transport, Euro 4, Total weight >32 t - EU+EFTA+UK: 0.000523615; = kg_km_1
- Transport of silicone, fossil fuel-based // silicone production // glo by Barge - EU+EFTA+UK: 16.2345; = kg_km_2
- Transport of lubricating oil // lubricants at refinery // eu+efta+uk by Barge - EU+EFTA+UK: 0.00108751; = kg_km_3
- Transport of silicone, fossil fuel-based // silicone production // glo by Freight train, average - EU+EFTA+UK: 14.4307; = kg_km_4
- Transport of lubricating oil // lubricants at refinery // eu+efta+uk by Freight train, average - EU+EFTA+UK: 0.000966673; = kg_km_5
- spray coating // spray coating // eu+efta+uk, blackbox: 1
- spray coating // spray coating // eu+efta+uk, elementary: 1

## Impact indicators
- Eutrophication marine: 0.00112774
- Ecotoxicity, freshwater: 28.548
- Land use: 3.73135
- Water use: 0.389828
- Resource use, minerals and metals: 3.17622e-6
- Resource use, fossils: 7.19331
- Climate change: 0.887662
- Ozone depletion: 6.89668e-5
- Human toxicity, cancer: 8.26342e-10
- Human toxicity, non-cancer: 1.0109e-8
- EF-particulate Matter: 1.21602e-7
- Ionising radiation, human health: 0.0340146
- Photochemical ozone formation - human health: 0.00365049
- Acidification: 0.00610614
- Eutrophication, terrestrial: 0.0112376
- Eutrophication, freshwater: 2.11534e-5

## Deviations from the LCI method principle
The background data uses:
- the \xe2\x80\x9cRecycled content cut-off\xe2\x80\x9d approach to allocate end-of-life by-products and secondary materials. This allocation is explained in the description of the recycled content system model (http://www.ecoinvent.org/database/system-models-in-ecoinvent-3/cut-off-system-model/allocation-cut-off-by-classification.html).
OR
- EF compliant data

## Deviations from the LCI method approaches
Background data:
- the \xe2\x80\x9cRecycled content cut-off\xe2\x80\x9d approach to allocate end-of-life by-products and secondary materials. This allocation is explained in the description of the recycled content system model (http://www.ecoinvent.org/database/system-models-in-ecoinvent-3/cut-off-system-model/allocation-cut-off-by-classification.html). The ecoinvent database mostly relies on “Allocation – market values” apart for few exceptions particularly in the energy sector. ecoinvent energy data is replaced with EF3.0 core data as per the EF guidelines version 2.0.
OR
- EF compliant data

## Modelling constants
All modelling constants follow the requirements listed in the Tender Specifications 070201/2020/SER/ENV.B1. Completeness: There are no intentional cut-offs in the inventory no matter how small their contribution to all the EF impact categories is. Eventual cut-offs are in compliance with the Guide for EF compliant data sets (JRC 2020), i.e. only if below the 3% cut-off rule. Water use: water use is modelled at country level using separate flows for water withdrawal, water release and water evaporation. Handling multi-functional processes: the following PEF multi- functionality decision hierarchy is applied for resolving all multi- functionality problems: (1) subdivision or system expansion; (2) allocation based on a relevant underlying physical relationship (substitution may apply here); (3) allocation based on some other relationship. Direct land use change: GHG emissions from direct LUC allocated to good/service for 20 years after the LUC occurs, with IPCC default values. Carbon storage and delayed emissions: credits associated with temporary (carbon) storage or delayed emissions up to 300 years are not be considered. Emissions off-setting: are not included. Capital goods (including infrastructures) and their End of life: they are included. System boundaries: system boundaries include all processes linked to the product supply chain (e.g. maintenance). Time period: emissions and removals are modelled as if released or removed at the beginning of the assessment method. Fossil and biogenic carbon emissions and removals: removals and emissions are modelled as follows: All GHG emissions from fossil fuels (including peat and limestone) are modelled consistently with the most updated ILCD list of elementary flows. The non-fossil (biogenic) carbon flows are modelled consistently with the most updated ILCD list of elementary flows.

## Cut-off and completeness
There are no intentional cut-offs in the inventory no matter how small their contribution to all the EF impact categories is. Eventual cut-offs are in compliance with the Guide for EF compliant data sets (JRC 2020), i.e. only if below the 3% cut-off rule. The dataset dry mass and water balance has been checked to ensure the inventory is complete. Capital goods (e.g. infrastructure) and their end-of-life are included.

## Data selection and combination
These datasets include, in both their foreground and background data, links to EF3.0 compliant data.
The relevant background data on energy, transport, and End of Life are from the LCDN data node (http://lcdn.thinkstep.com/Node/).
All other background data in the supply of this product for which no EF3.0 process was available are from ecoinvent v3.7 database (www.ecoinvent.org) or other data sources.

## Data treatment and extrapolations
Several data sources have been used to model the inventory.

## Review details
Internal reviews have been asked to review the plausibility of the unit process, LCIA scores, and DQRs. Internal reviewers have also been asked to review the data for EF compliancy. The consortium is therefore responsible for aspects such as compliancy with the ILCD format, including validation in Look@LCI, and nomenclature.
Internal reviwers have been asked to judge based on the process name, that the unit process models in a complete and representative way the process in the requested location. The review encompassed the plausability of:
- exchanges with nature (elementary flows) as well as exchanges such as product and waste flows.
- meta information (general comment, technology comment, system boundaries, allocation, cut-off rules, etc.). Reviewers were asked to judge if the provided information is enough to understand the content of the process.
- LCIA scores
- DQRs including precision, technology, time and geography. As well as the overall DQR.
External reviewers have been asked to provide their expertise in the field of interest. External reviewers have been asked to review the unit process, including eventual methodological choices, the LCIA scores (provided with contribution scores as well), and DQRs. External reviewers have been provided all the information in a tool developed by the consortium for the purpose of this project.
External reviewers have been asked to judge based on the process name, that the unit process models in a complete and representative way the process in the requested location. The review encompassed:
- Plausability and completeness of exchanges with nature (elementary flows) as well as exchanges such as product and waste flows.
- Review of meta information (general comment, technology comment, system boundaries, allocation, cut-off rules, etc.). Reviewers were asked to judge if the provided information is enough to understand the content of the process.
- Review of properties (biogenic carbon and water content).
- Review of allocation keys.
- Plausability of LCIA scores calculated by the consortium.
- Plausability of DQRs including precision, technology, time and geography. As well as the overall DQR.

## Data sources
- Background Data for Representative products and organisations. EF 3.0 compliant (data stock)
- San Ren Xing (2021) Adhesive tape hot melt adhesive coating machine, http://www.qdsrxjx.com/en/ProductList.asp?SortID=42, Qingdao SanRenXing Machinery CO,.LTD, Qingdao, China
- Flexituff (2021) Non Woven Floor Covering Carpets, http://flexituff.com/nonwoven-retail/, Flexituff Ventures International Limited, Madhya Pradesh, India
- William Warfel Heim, Joyce Monson Materniak, James Kirk Woodstock Hendrix, Peter Michael Ooltewah, Murphym Neil Allen Signal Mountain Panzier, Yashavant Vinavak Hockessin Vinod (2021). Method for manufacturing a carpet having a secondary backing substantially impervious to liquids and the resultant carpet, https://patentimages.storage.googleapis.com/14/67/5c/06f1d93fb7803d/EP0662541B1.pdf, EUROPEAN PATENT SPECIFICATION, London

## Intended applications
Implementation of regular Product Environmental Footprint (PEF) studies and Organisation Environmental Footprint (OEF) studies exclusively under the specified Product groups and sectors as defined in the Product Environmental Footprint Category Rules (PEFCR) and Organisation Environmental Footprint Sectorial Rules (OEFSR) listed in http://ec.europa.eu/environment/eussd/smgp/PEFCR_OEFSR.htm
