# bonding, mechanical, spun-bond (hydroentanglement), non-woven fabric, elementary; technology mix; production mix, at plant; service (raw materials excluded)

Dataset: ILCD process, Unit process, single operation
Geography: GLO
Reference year: 2021
Valid until: 2024
Classification: Other Services / Other services
LCI method principle: Attributional
LCI method approaches: Allocation - market value
Completeness: All relevant flows quantified
Project: Provision of process-based 3.0 Environmental Footprint-compliant life cycle inventory datasets - Apparel 1 - contract number 070201/2020/840291/SER/ENV.B.1
Generated by: Life Cycle Indonesia
Owner: PRé Sustainability B.V.
Compliance: Environmental Footprint non-primary supporting data set; Environmental Footprint 3.1
Amounts: no units in this file; such an amount is in the reference unit of its flow, which a separate flow dataset defines
copyright: true
licenseType: Free of charge for some user types or use types
accessRestrictions: Free of charge for all final users implementing a regular Product Environmental Footprint (PEF) studies and Organisation Environmental Footprint (OEF) studies exclusively under the specified Product groups and sectors as defined in the Product Environmental Footprint Category Rules (PEFCR) and Organisation Environmental Footprint Sectorial Rules (OEFSR) listed in http://ec.europa.eu/environment/eussd/smgp/PEFCR_OEFSR.htm and in accordance with the terms and conditions of the EULA (available at https://ecoinvent.lca-data.com/) exclusively until 31st December 2024. Any use of this dataset or any derivative data not within the specific context of one of the PEF/OEF projects or after the end of 2024 is not permitted.

## General comment
Notice: this data set supersedes the EF3.0-compliant version (see link under "preceding data set version" below calculated with the EF3.0). The life cycle inventory is not changed from the original EF3.0 data set. The LCIA results are calculated based on the EF3.1 methods which provide updated characterisation factors in the following impact categories: Climate Change, Ecotoxicity freshwater, Photochemical Ozone Formation, Acidification, Human Toxicity non-cancer, and Human Toxicity cancer. The review report and the data quality ratings refer to the original results. The data set has been updated by the European Commission on the basis of the original EF3.0 data set delivered by the data provider.This sub-process has limited documentation only. For all detailed documentation of the full model to which this data set belongs (such as DQRs, review reports and other technical documentation), please see this process: bonding, mechanical, spun-bond (hydroentanglement), non-woven fabric - GLO []

## Technology and included processes
Hydroentanglement is a mechanical process, which is employed in order to interlock the fibres in a web structure, by the use of fine and highly pressurised water jets. High pressure of the water jets pushes the fibres from the top of the web into the interior of the web structure, which forms wires and results in the rearrangement and intermingling of the fibres. It is basically an energy transfer process that forces the fibres to interlock and give strength to the resultant fabric (Cheema, 2016).

A curtain of multiple high-pressure columnar water jets is produced by pumping water through capillary cone-shaped nozzles in a jet strip clamped into an injector (or manifold). These high-velocity jets are directed at a pre-formed web (the target) supported on a moving conveyor or ‘wire’, which may be a flat bed or cylindrical surface. Fibre entanglements are introduced by the combined effects of the incident water jets and the turbulent water created in the web which intertwines neighbouring fibres. The conveyor sleeve being permeable enables most of the de-energised water to be drawn into the vacuum box for recycling and reuse. Some of the remaining process water continues with the web, some drains from the side of the support surface and some is atomised depending on the water pressure. Normally, multiple injectors are used in sequence to produce a fully bonded fabric. Immediately after the fabric is hydroentangled, a proportion of the water held interstitially within the hydroentangled fabric is mechanically removed by suction, which for synthetic fibres is quite effective in reducing the moisture content to well below 100%. For cellulosics and other hygroscopic fibres, the water content is much higher even after mechanical extraction, which places a high demand on the subsequent drying process. Drum drying, can drying and through-air flat conveyor drying are all found in operation although through-air drum drying is the most common solution (Russel, 2007).

At the end of the production line, the final hydroentangled fabrics receive some other chemical or physical treatment to provide special characteristics. The finisihing process of final hydroentangled fabrics are flame retardant, rewet agents, hydrophobic agents, coloration, and printing (Khartik, 2016).

The model represents the process of bonding, hence the input raw materials are not included in the model. The user will use this dataset along with the input raw materials. Other supporting materials entering the process (e.g. make up water) are included as well as energy uses (e.g. electricity and natural gas), infrastructure and waste. There is no direct emission to air and soil, while the emissions to water are BOD, COD, and TSS in this process. In the model, the wastewater treatment process to recycle the water (closed-loop system) and the finishing process is not included in the scope of this dataset.

References:
Cheema, Muhammad Shahbaz. 2016. "DEVELOPMENT OF HYDROENTANGLED NONWOVEN STRUCTURES FOR FASHION GARMENTS".Thesis. Institute of Materials Research and Innovation (IMRI), University of Bolton, United Kingdom. pp 43
Russel, S.J. 2007. Handbook of Nonwovens. England: Woodhead Publishing Limited. pp 288-293
Khartik, T., dkk. 2016. Non-woven - Process, Structure, Properties and Applications. New Delhi: Woodhead Publishing India. pp 130-131

## Reference product
- non-woven fabric // bonding, mechanical, spun-bond (hydroentanglement), non-woven fabric // glo, elementary: 1

## Inputs
- freshwater, Renewable material resources from water: 5.81129e-6
- freshwater, Renewable material resources from water [AR]: 9.43478e-6
- freshwater, Renewable material resources from water [AT]: 4.59323e-6
- freshwater, Renewable material resources from water [AU]: 1.16502e-5
- freshwater, Renewable material resources from water [BA]: 4.44423e-7
- freshwater, Renewable material resources from water [BD]: 5.6326e-6
- freshwater, Renewable material resources from water [BE]: 5.52867e-6
- freshwater, Renewable material resources from water [BG]: 1.41572e-6
- freshwater, Renewable material resources from water [BR]: 3.29086e-5
- freshwater, Renewable material resources from water [CA]: 1.72949e-5
- freshwater, Renewable material resources from water [CH]: 5.47819e-6
- freshwater, Renewable material resources from water [CI]: 8.95991e-7
- freshwater, Renewable material resources from water [CL]: 4.23302e-6
- freshwater, Renewable material resources from water [CN]: 0.000181161
- freshwater, Renewable material resources from water [CO]: 6.62313e-6
- freshwater, Renewable material resources from water [CZ]: 3.81278e-6
- freshwater, Renewable material resources from water [DE]: 4.14952e-5
- freshwater, Renewable material resources from water [DK]: 3.00888e-6
- freshwater, Renewable material resources from water [EE]: 4.10866e-7
- freshwater, Renewable material resources from water [ES]: 1.78068e-5
- freshwater, Renewable material resources from water [FI]: 2.56651e-6
- freshwater, Renewable material resources from water [FR]: 2.92707e-5
- freshwater, Renewable material resources from water [GB]: 2.90879e-5
- freshwater, Renewable material resources from water [GR]: 3.30894e-6
- freshwater, Renewable material resources from water [HU]: 2.7891e-6
- freshwater, Renewable material resources from water [ID]: 2.78349e-5
- freshwater, Renewable material resources from water [IE]: 3.00441e-6
- freshwater, Renewable material resources from water [IN]: 7.42984e-5
- freshwater, Renewable material resources from water [IS]: 1.7144e-7
- freshwater, Renewable material resources from water [IT]: 2.50434e-5
- freshwater, Renewable material resources from water [JP]: 5.37635e-5
- freshwater, Renewable material resources from water [KR]: 2.00227e-5
- freshwater, Renewable material resources from water [KZ]: 4.33373e-6
- freshwater, Renewable material resources from water [LK]: 2.46182e-6
- freshwater, Renewable material resources from water [LT]: 8.77271e-7
- freshwater, Renewable material resources from water [LU]: 6.09004e-7
- freshwater, Renewable material resources from water [LV]: 5.17294e-7
- freshwater, Renewable material resources from water [MK]: 3.04541e-7
- freshwater, Renewable material resources from water [MX]: 2.34436e-5
- freshwater, Renewable material resources from water [MY]: 7.82954e-6
- freshwater, Renewable material resources from water [NG]: 9.85417e-6
- freshwater, Renewable material resources from water [NL]: 9.28322e-6
- freshwater, Renewable material resources from water [NO]: 3.51398e-6
- freshwater, Renewable material resources from water [NZ]: 1.82701e-6
- freshwater, Renewable material resources from water [PH]: 7.58323e-6
- freshwater, Renewable material resources from water [PK]: 9.09412e-6
- freshwater, Renewable material resources from water [PL]: 1.06839e-5
- freshwater, Renewable material resources from water [PT]: 3.37117e-6
- freshwater, Renewable material resources from water [RO]: 4.68026e-6
- freshwater, Renewable material resources from water [RS]: 1.16142e-6
- freshwater, Renewable material resources from water [RU]: 3.87489e-5
- freshwater, Renewable material resources from water [SE]: 5.07063e-6
- freshwater, Renewable material resources from water [SG]: 5.0339e-6
- freshwater, Renewable material resources from water [SI]: 7.18074e-7
- freshwater, Renewable material resources from water [SK]: 1.68543e-6
- freshwater, Renewable material resources from water [SL]: 1.15407e-7
- freshwater, Renewable material resources from water [TH]: 1.15628e-5
- freshwater, Renewable material resources from water [TR]: 1.95815e-5
- freshwater, Renewable material resources from water [UA]: 4.94169e-6
- freshwater, Renewable material resources from water [US]: 0.000190753
- freshwater, Renewable material resources from water [UZ]: 2.017e-6
- freshwater, Renewable material resources from water [VE]: 5.53307e-6
- freshwater, Renewable material resources from water [VN]: 5.73082e-6
- freshwater, Renewable material resources from water [ZA]: 7.37705e-6
- freshwater, Renewable material resources from water [AE]: 6.80549e-6
- freshwater, Renewable material resources from water [AF]: 6.98866e-7
- freshwater, Renewable material resources from water [AG]: 2.04087e-8
- freshwater, Renewable material resources from water [AL]: 3.56496e-7
- freshwater, Renewable material resources from water [AM]: 3.15135e-7
- freshwater, Renewable material resources from water [AO]: 2.11695e-6
- freshwater, Renewable material resources from water [AW]: 4.09814e-8
- freshwater, Renewable material resources from water [AZ]: 1.5956e-6
- freshwater, Renewable material resources from water [BB]: 4.96407e-8
- freshwater, Renewable material resources from water [BF]: 3.36288e-7
- freshwater, Renewable material resources from water [BH]: 7.16044e-7
- freshwater, Renewable material resources from water [BI]: 8.0022e-8
- freshwater, Renewable material resources from water [BJ]: 3.0983e-7
- freshwater, Renewable material resources from water [BN]: 3.30302e-7
- freshwater, Renewable material resources from water [BO]: 7.94992e-7
- freshwater, Renewable material resources from water [BS]: 1.35673e-7
- freshwater, Renewable material resources from water [BT]: 6.94897e-8
- freshwater, Renewable material resources from water [BW]: 3.54383e-7
- freshwater, Renewable material resources from water [BY]: 1.83828e-6
- freshwater, Renewable material resources from water [BZ]: 2.82287e-8
- freshwater, Renewable material resources from water [CD]: 6.75267e-7
- freshwater, Renewable material resources from water [CF]: 4.43331e-8
- freshwater, Renewable material resources from water [CG]: 2.61621e-7
- freshwater, Renewable material resources from water [CM]: 7.76595e-7
- freshwater, Renewable material resources from water [CR]: 8.27205e-7
- freshwater, Renewable material resources from water [CV]: 3.45996e-8
- freshwater, Renewable material resources from water [CY]: 3.18053e-7
- freshwater, Renewable material resources from water [DJ]: 4.45056e-8
- freshwater, Renewable material resources from water [DM]: 8.43762e-9
- freshwater, Renewable material resources from water [DO]: 1.54391e-6
- freshwater, Renewable material resources from water [DZ]: 5.36797e-6
- freshwater, Renewable material resources from water [EC]: 1.87649e-6
- freshwater, Renewable material resources from water [EG]: 1.06285e-5
- freshwater, Renewable material resources from water [ER]: 5.64502e-8
- freshwater, Renewable material resources from water [ET]: 1.62219e-6
- freshwater, Renewable material resources from water [FJ]: 1.02072e-7
- freshwater, Renewable material resources from water [GA]: 3.05463e-7
- freshwater, Renewable material resources from water [GD]: 1.58296e-8
- freshwater, Renewable material resources from water [GE]: 4.46548e-7
- freshwater, Renewable material resources from water [GH]: 1.32611e-6
- freshwater, Renewable material resources from water [GM]: 4.79638e-8
- freshwater, Renewable material resources from water [GN]: 2.38831e-7
- freshwater, Renewable material resources from water [GQ]: 3.5534e-7
- freshwater, Renewable material resources from water [GT]: 1.28485e-6
- freshwater, Renewable material resources from water [GW]: 2.88803e-8
- freshwater, Renewable material resources from water [GY]: 9.10591e-8
- freshwater, Renewable material resources from water [HN]: 4.48525e-7
- freshwater, Renewable material resources from water [HR]: 1.06393e-6
- freshwater, Renewable material resources from water [HT]: 3.32564e-7
- freshwater, Renewable material resources from water [IL]: 3.08155e-6
- freshwater, Renewable material resources from water [IQ]: 4.63927e-6
- freshwater, Renewable material resources from water [IR]: 1.3114e-5
- freshwater, Renewable material resources from water [JM]: 2.75242e-7
- freshwater, Renewable material resources from water [JO]: 9.0751e-7
- freshwater, Renewable material resources from water [KE]: 1.58558e-6
- freshwater, Renewable material resources from water [KG]: 2.63335e-7
- freshwater, Renewable material resources from water [KH]: 5.35783e-7
- freshwater, Renewable material resources from water [KM]: 2.20996e-8
- freshwater, Renewable material resources from water [KN]: 1.31695e-8
- freshwater, Renewable material resources from water [KW]: 2.52304e-6
- freshwater, Renewable material resources from water [LA]: 4.09757e-7
- freshwater, Renewable material resources from water [LB]: 9.99371e-7
- freshwater, Renewable material resources from water [LC]: 2.68634e-8
- freshwater, Renewable material resources from water [LR]: 6.1103e-8
- freshwater, Renewable material resources from water [LS]: 5.93354e-8
- freshwater, Renewable material resources from water [LY]: 1.26155e-6
- freshwater, Renewable material resources from water [MA]: 2.61536e-6
- freshwater, Renewable material resources from water [MD]: 2.7371e-7
- freshwater, Renewable material resources from water [ME]: 1.10266e-7
- freshwater, Renewable material resources from water [MG]: 4.042e-7
- freshwater, Renewable material resources from water [ML]: 3.66973e-7
- freshwater, Renewable material resources from water [MM]: 2.33446e-6
- freshwater, Renewable material resources from water [MN]: 3.26499e-7
- freshwater, Renewable material resources from water [MR]: 1.92507e-7
- freshwater, Renewable material resources from water [MT]: 1.68468e-7
- freshwater, Renewable material resources from water [MU]: 2.57034e-7
- freshwater, Renewable material resources from water [MW]: 1.85703e-7
- freshwater, Renewable material resources from water [MZ]: 3.32002e-7
- freshwater, Renewable material resources from water [NA]: 2.40103e-7
- freshwater, Renewable material resources from water [NE]: 2.3738e-7
- freshwater, Renewable material resources from water [NI]: 3.31673e-7
- freshwater, Renewable material resources from water [NP]: 7.36634e-7
- freshwater, Renewable material resources from water [OM]: 1.5655e-6
- freshwater, Renewable material resources from water [PA]: 9.72726e-7
- freshwater, Renewable material resources from water [PE]: 3.74075e-6
- freshwater, Renewable material resources from water [PG]: 3.15066e-7
- freshwater, Renewable material resources from water [PR]: 1.28704e-6
- freshwater, Renewable material resources from water [PS]: 2.43576e-7
- freshwater, Renewable material resources from water [PY]: 8.10053e-7
- freshwater, Renewable material resources from water [QA]: 2.93116e-6
- freshwater, Renewable material resources from water [RW]: 2.04333e-7
- freshwater, Renewable material resources from water [SA]: 1.72823e-5
- freshwater, Renewable material resources from water [SB]: 1.5655e-8
- freshwater, Renewable material resources from water [SD]: 1.81325e-6
- freshwater, Renewable material resources from water [SM]: 2.09768e-8
- freshwater, Renewable material resources from water [SN]: 4.51849e-7
- freshwater, Renewable material resources from water [SR]: 9.41066e-8
- freshwater, Renewable material resources from water [ST]: 7.44266e-9
- freshwater, Renewable material resources from water [SV]: 5.01924e-7
- freshwater, Renewable material resources from water [SZ]: 1.01292e-7
- freshwater, Renewable material resources from water [TC]: 9.04993e-9
- freshwater, Renewable material resources from water [TD]: 2.51456e-7
- freshwater, Renewable material resources from water [TG]: 1.04166e-7
- freshwater, Renewable material resources from water [TJ]: 2.60977e-7
- freshwater, Renewable material resources from water [TL]: 3.34697e-8
- freshwater, Renewable material resources from water [TM]: 7.56927e-7
- freshwater, Renewable material resources from water [TN]: 1.25792e-6
- freshwater, Renewable material resources from water [TO]: 6.27502e-9
- freshwater, Renewable material resources from water [TT]: 4.31286e-7
- freshwater, Renewable material resources from water [TZ]: 1.22147e-6
- freshwater, Renewable material resources from water [UG]: 8.46255e-7
- freshwater, Renewable material resources from water [UY]: 7.2187e-7
- freshwater, Renewable material resources from water [VC]: 1.3569e-8
- freshwater, Renewable material resources from water [VU]: 8.61944e-9
- freshwater, Renewable material resources from water [WS]: 1.22614e-8
- freshwater, Renewable material resources from water [YE]: 1.00906e-6
- freshwater, Renewable material resources from water [ZM]: 5.72236e-7
- freshwater, Renewable material resources from water [ZW]: 3.71699e-7

## Outputs
- biological oxygen demand, Emissions to water, unspecified: 9.28e-5
- chemical oxygen demand, Emissions to water, unspecified: 6.96e-5
- Suspended solids, unspecified, Emissions to water, unspecified: 9.28e-5

## Impact indicators
- Water use: 0.0319712
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
## Deviations from the LCI method principle
The background data uses:
- the \xe2\x80\x9cRecycled content cut-off\xe2\x80\x9d approach to allocate end-of-life by-products and secondary materials. This allocation is explained in the description of the recycled content system model (http://www.ecoinvent.org/database/system-models-in-ecoinvent-3/cut-off-system-model/allocation-cut-off-by-classification.html).
OR
- EF compliant data

## Deviations from the LCI method approaches
Background data:
- the \xe2\x80\x9cRecycled content cut-off\xe2\x80\x9d approach to allocate end-of-life by-products and secondary materials. This allocation is explained in the description of the recycled content system model (http://www.ecoinvent.org/database/system-models-in-ecoinvent-3/cut-off-system-model/allocation-cut-off-by-classification.html). The ecoinvent database mostly relies on “Allocation – market values” apart for few exceptions particularly in the energy sector. ecoinvent energy data is replaced with EF3.0 core data as per the EF guidelines version 2.0.
OR
- EF compliant data

## Modelling constants
All modelling constants follow the requirements listed in the Tender Specifications 070201/2020/SER/ENV.B1. Completeness: There are no intentional cut-offs in the inventory no matter how small their contribution to all the EF impact categories is. Eventual cut-offs are in compliance with the Guide for EF compliant data sets (JRC 2020), i.e. only if below the 3% cut-off rule. Water use: water use is modelled at country level using separate flows for water withdrawal, water release and water evaporation. Handling multi-functional processes: the following PEF multi- functionality decision hierarchy is applied for resolving all multi- functionality problems: (1) subdivision or system expansion; (2) allocation based on a relevant underlying physical relationship (substitution may apply here); (3) allocation based on some other relationship. Direct land use change: GHG emissions from direct LUC allocated to good/service for 20 years after the LUC occurs, with IPCC default values. Carbon storage and delayed emissions: credits associated with temporary (carbon) storage or delayed emissions up to 300 years are not be considered. Emissions off-setting: are not included. Capital goods (including infrastructures) and their End of life: they are included. System boundaries: system boundaries include all processes linked to the product supply chain (e.g. maintenance). Time period: emissions and removals are modelled as if released or removed at the beginning of the assessment method. Fossil and biogenic carbon emissions and removals: removals and emissions are modelled as follows: All GHG emissions from fossil fuels (including peat and limestone) are modelled consistently with the most updated ILCD list of elementary flows. The non-fossil (biogenic) carbon flows are modelled consistently with the most updated ILCD list of elementary flows.

## Cut-off and completeness
There are no intentional cut-offs in the inventory no matter how small their contribution to all the EF impact categories is. Eventual cut-offs are in compliance with the Guide for EF compliant data sets (JRC 2020), i.e. only if below the 3% cut-off rule. The dataset dry mass and water balance has been checked to ensure the inventory is complete. Capital goods (e.g. infrastructure) and their end-of-life are included.

## Data selection and combination
These datasets include, in both their foreground and background data, links to EF3.0 compliant data.
The relevant background data on energy, transport, and End of Life are from the LCDN data node (http://lcdn.thinkstep.com/Node/).
All other background data in the supply of this product for which no EF3.0 process was available are from ecoinvent v3.7 database (www.ecoinvent.org) or other data sources.

## Data treatment and extrapolations
Several data sources have been used to model the inventory.

## Use advice
This data set is a supporting sub-data set and must be used exclusively as sub-data set of its corresponding level-1 partly disaggregated data set (see “General comment” field for exact name and UUID).

## Data sources
- Background Data for Representative products and organisations. EF 3.0 compliant (data stock)
- Riway (2021), Spunlace Nonwoven Machine, E-mail Company, Ningbo Riway Nonwovens Tech Co., LTD, China
- UN Data (2018) Statistics Data for Lubricants Productions, http://data.un.org/Data.aspx?q=Lubricants&d=EDATA&f=cmID%3aLU, United Nations Statistics Division, Global

## Intended applications
Implementation of regular Product Environmental Footprint (PEF) studies and Organisation Environmental Footprint (OEF) studies exclusively under the specified Product groups and sectors as defined in the Product Environmental Footprint Category Rules (PEFCR) and Organisation Environmental Footprint Sectorial Rules (OEFSR) listed in http://ec.europa.eu/environment/eussd/smgp/PEFCR_OEFSR.htm
