# coconut fibre, elementary; virgin; production mix, at plant; 1kg of fiber

Dataset: ILCD process, Unit process, single operation
Geography: GLO
Reference year: 2019
Valid until: 2024
Classification: Other Services / Other services
LCI method principle: Attributional
LCI method approaches: Allocation - market value
Completeness: All relevant flows quantified
Project: Provision of process-based 3.0 Environmental Footprint-compliant life cycle inventory datasets - Renewable materials - contract number 070201/2020/840085/SER/ENV.B.1
Generated by: Blonk Sustainability Tools
Owner: Blonk Sustainability Tools
Compliance: Environmental Footprint non-primary supporting data set; Environmental Footprint 3.1
Amounts: no units in this file; such an amount is in the reference unit of its flow, which a separate flow dataset defines
copyright: true
licenseType: Free of charge for some user types or use types
accessRestrictions: Free of charge for all final users implementing a regular Product Environmental Footprint (PEF) studies and Organisation Environmental Footprint (OEF) studies exclusively under the specified Product groups and sectors as defined in the Product Environmental Footprint Category Rules (PEFCR) and Organisation Environmental Footprint Sectorial Rules (OEFSR) listed in http://ec.europa.eu/environment/eussd/smgp/PEFCR_OEFSR.htm and in accordance with the terms and conditions of the EULA (available at https://ecoinvent.lca-data.com/) exclusively until 31st December 2024. Any use of this dataset or any derivative data not within the specific context of one of the PEF/OEF projects or after the end of 2024 is not permitted.

## General comment
Notice: this data set supersedes the EF3.0-compliant version (see link under "preceding data set version" below calculated with the EF3.0). The life cycle inventory is not changed from the original EF3.0 data set. The LCIA results are calculated based on the EF3.1 methods which provide updated characterisation factors in the following impact categories: Climate Change, Ecotoxicity freshwater, Photochemical Ozone Formation, Acidification, Human Toxicity non-cancer, and Human Toxicity cancer. The review report and the data quality ratings refer to the original results. The data set has been updated by the European Commission on the basis of the original EF3.0 data set delivered by the data provider.This sub-process has limited documentation only. For all detailed documentation of the full model to which this data set belongs (such as DQRs, review reports and other technical documentation), please see this process: coconut fibre - GLO []

## Technology and included processes
Coconut coir can be treated in fibre mills where fibre and pith are separated. The amount of coir (kg), its moisture content and the origin of the coir entering the fibre mill should be recorded.Once extracted, fibre can be further processed to make it suitable as growing media, which includes activities such as cleaning and buffering or further drying and pressing for transport.

## Reference product
- coconut fibre, virgin // coconut fibre // glo, elementary: 1

## Inputs
- water, Renewable material resources from water [AE]: 3.52243e-5
- water, Renewable material resources from water [AF]: 3.61724e-6
- water, Renewable material resources from water [AG]: 1.05633e-7
- water, Renewable material resources from water [AL]: 1.84518e-6
- water, Renewable material resources from water [AM]: 1.6311e-6
- water, Renewable material resources from water [AO]: 1.09571e-5
- water, Renewable material resources from water [AR]: 4.88332e-5
- water, Renewable material resources from water [AT]: 2.37739e-5
- water, Renewable material resources from water [AU]: 6.03e-5
- water, Renewable material resources from water [AW]: 2.12114e-7
- water, Renewable material resources from water [AZ]: 8.25862e-6
- water, Renewable material resources from water [BA]: 2.30028e-6
- water, Renewable material resources from water [BB]: 2.56934e-7
- water, Renewable material resources from water [BD]: 2.91536e-5
- water, Renewable material resources from water [BE]: 2.86156e-5
- water, Renewable material resources from water [BF]: 1.74058e-6
- water, Renewable material resources from water [BG]: 7.32756e-6
- water, Renewable material resources from water [BH]: 3.70615e-6
- water, Renewable material resources from water [BI]: 4.14183e-7
- water, Renewable material resources from water [BJ]: 1.60364e-6
- water, Renewable material resources from water [BN]: 1.7096e-6
- water, Renewable material resources from water [BO]: 4.11477e-6
- water, Renewable material resources from water [BR]: 0.00017033
- water, Renewable material resources from water [BS]: 7.02224e-7
- water, Renewable material resources from water [BT]: 3.5967e-7
- water, Renewable material resources from water [BW]: 1.83424e-6
- water, Renewable material resources from water [BY]: 9.51471e-6
- water, Renewable material resources from water [BZ]: 1.46108e-7
- water, Renewable material resources from water [CA]: 8.95162e-5
- water, Renewable material resources from water [CD]: 3.49509e-6
- water, Renewable material resources from water [CF]: 2.29462e-7
- water, Renewable material resources from water [CG]: 1.35412e-6
- water, Renewable material resources from water [CH]: 2.83544e-5
- water, Renewable material resources from water [CI]: 4.63753e-6
- water, Renewable material resources from water [CL]: 2.19095e-5
- water, Renewable material resources from water [CM]: 4.01955e-6
- water, Renewable material resources from water [CN]: 0.000937667
- water, Renewable material resources from water [CO]: 3.42805e-5
- water, Renewable material resources from water [CR]: 4.28151e-6
- water, Renewable material resources from water [CV]: 1.79083e-7
- water, Renewable material resources from water [CY]: 1.6462e-6
- water, Renewable material resources from water [CZ]: 1.97345e-5
- water, Renewable material resources from water [DE]: 0.000214774
- water, Renewable material resources from water [DJ]: 2.30355e-7
- water, Renewable material resources from water [DK]: 1.55736e-5
- water, Renewable material resources from water [DM]: 4.3672e-8
- water, Renewable material resources from water [DO]: 7.99108e-6
- water, Renewable material resources from water [DZ]: 2.77839e-5
- water, Renewable material resources from water [EC]: 9.71245e-6
- water, Renewable material resources from water [EE]: 2.12659e-6
- water, Renewable material resources from water [EG]: 5.50117e-5
- water, Renewable material resources from water [ER]: 2.92179e-7
- water, Renewable material resources from water [ES]: 9.21655e-5
- water, Renewable material resources from water [ET]: 8.39623e-6
- water, Renewable material resources from water [FI]: 1.32839e-5
- water, Renewable material resources from water [FJ]: 5.28313e-7
- water, Renewable material resources from water [FR]: 0.000151501
- water, Renewable material resources from water [GA]: 1.58104e-6
- water, Renewable material resources from water [GB]: 0.000150555
- water, Renewable material resources from water [GD]: 8.1932e-8
- water, Renewable material resources from water [GE]: 2.31127e-6
- water, Renewable material resources from water [GH]: 6.86376e-6
- water, Renewable material resources from water: 3.00785e-5
- water, Renewable material resources from water [GM]: 2.48254e-7
- water, Renewable material resources from water [GN]: 1.23616e-6
- water, Renewable material resources from water [GQ]: 1.83919e-6
- water, Renewable material resources from water [GR]: 1.71266e-5
- water, Renewable material resources from water [GT]: 6.65022e-6
- water, Renewable material resources from water [GW]: 1.49481e-7
- water, Renewable material resources from water [GY]: 4.7131e-7
- water, Renewable material resources from water [HN]: 2.32151e-6
- water, Renewable material resources from water [HR]: 5.50678e-6
- water, Renewable material resources from water [HT]: 1.72131e-6
- water, Renewable material resources from water [HU]: 1.4436e-5
- water, Renewable material resources from water [ID]: 0.00014407
- water, Renewable material resources from water [IE]: 1.55504e-5
- water, Renewable material resources from water [IL]: 1.59497e-5
- water, Renewable material resources from water [IN]: 0.000384558
- water, Renewable material resources from water [IQ]: 2.40122e-5
- water, Renewable material resources from water [IR]: 6.78764e-5
- water, Renewable material resources from water [IS]: 8.87352e-7
- water, Renewable material resources from water [IT]: 0.000129621
- water, Renewable material resources from water [JM]: 1.42461e-6
- water, Renewable material resources from water [JO]: 4.69715e-6
- water, Renewable material resources from water [JP]: 0.000278273
- water, Renewable material resources from water [KE]: 8.20674e-6
- water, Renewable material resources from water [KG]: 1.36299e-6
- water, Renewable material resources from water [KH]: 2.77314e-6
- water, Renewable material resources from water [KM]: 1.14384e-7
- water, Renewable material resources from water [KN]: 6.81635e-8
- water, Renewable material resources from water [KR]: 0.000103635
- water, Renewable material resources from water [KW]: 1.30589e-5
- water, Renewable material resources from water [KZ]: 2.24308e-5
- water, Renewable material resources from water [LA]: 2.12085e-6
- water, Renewable material resources from water [LB]: 5.17261e-6
- water, Renewable material resources from water [LC]: 1.39041e-7
- water, Renewable material resources from water [LK]: 1.2742e-5
- water, Renewable material resources from water [LR]: 3.16261e-7
- water, Renewable material resources from water [LS]: 3.07112e-7
- water, Renewable material resources from water [LT]: 4.54064e-6
- water, Renewable material resources from water [LU]: 3.15212e-6
- water, Renewable material resources from water [LV]: 2.67745e-6
- water, Renewable material resources from water [LY]: 6.5296e-6
- water, Renewable material resources from water [MA]: 1.35367e-5
- water, Renewable material resources from water [MD]: 1.41669e-6
- water, Renewable material resources from water [ME]: 5.70721e-7
- water, Renewable material resources from water [MG]: 2.09209e-6
- water, Renewable material resources from water [MK]: 1.57627e-6
- water, Renewable material resources from water [ML]: 1.8994e-6
- water, Renewable material resources from water [MM]: 1.20829e-5
- water, Renewable material resources from water [MN]: 1.68992e-6
- water, Renewable material resources from water [MR]: 9.96389e-7
- water, Renewable material resources from water [MT]: 8.71968e-7
- water, Renewable material resources from water [MU]: 1.33037e-6
- water, Renewable material resources from water [MW]: 9.61176e-7
- water, Renewable material resources from water [MX]: 0.000121341
- water, Renewable material resources from water [MY]: 4.05247e-5
- water, Renewable material resources from water [MZ]: 1.7184e-6
- water, Renewable material resources from water [NA]: 1.24274e-6
- water, Renewable material resources from water [NE]: 1.22865e-6
- water, Renewable material resources from water [NG]: 5.10039e-5
- water, Renewable material resources from water [NI]: 1.7167e-6
- water, Renewable material resources from water [NL]: 4.80487e-5
- water, Renewable material resources from water [NO]: 1.81879e-5
- water, Renewable material resources from water [NP]: 3.81272e-6
- water, Renewable material resources from water [NZ]: 9.45636e-6
- water, Renewable material resources from water [OM]: 8.10281e-6
- water, Renewable material resources from water [PA]: 5.0347e-6
- water, Renewable material resources from water [PE]: 1.93617e-5
- water, Renewable material resources from water [PG]: 1.63074e-6
- water, Renewable material resources from water [PH]: 3.92498e-5
- water, Renewable material resources from water [PK]: 4.707e-5
- water, Renewable material resources from water [PL]: 5.52987e-5
- water, Renewable material resources from water [PR]: 6.66155e-6
- water, Renewable material resources from water [PS]: 1.26072e-6
- water, Renewable material resources from water [PT]: 1.74487e-5
- water, Renewable material resources from water [PY]: 4.19273e-6
- water, Renewable material resources from water [QA]: 1.51713e-5
- water, Renewable material resources from water [RO]: 2.42244e-5
- water, Renewable material resources from water [RS]: 6.01138e-6
- water, Renewable material resources from water [RU]: 0.000200559
- water, Renewable material resources from water [RW]: 1.0576e-6
- water, Renewable material resources from water [SA]: 8.94511e-5
- water, Renewable material resources from water [SB]: 8.10284e-8
- water, Renewable material resources from water [SD]: 9.38514e-6
- water, Renewable material resources from water [SE]: 2.62449e-5
- water, Renewable material resources from water [SG]: 2.60548e-5
- water, Renewable material resources from water [SI]: 3.71665e-6
- water, Renewable material resources from water [SK]: 8.72354e-6
- water, Renewable material resources from water [SL]: 5.97334e-7
- water, Renewable material resources from water [SM]: 1.08573e-7
- water, Renewable material resources from water [SN]: 2.33871e-6
- water, Renewable material resources from water [SR]: 4.87083e-7
- water, Renewable material resources from water [ST]: 3.85222e-8
- water, Renewable material resources from water [SV]: 2.59789e-6
- water, Renewable material resources from water [SZ]: 5.24272e-7
- water, Renewable material resources from water [TC]: 4.68412e-8
- water, Renewable material resources from water [TD]: 1.3015e-6
- water, Renewable material resources from water [TG]: 5.39147e-7
- water, Renewable material resources from water [TH]: 5.98474e-5
- water, Renewable material resources from water [TJ]: 1.35078e-6
- water, Renewable material resources from water [TL]: 1.73234e-7
- water, Renewable material resources from water [TM]: 3.91776e-6
- water, Renewable material resources from water [TN]: 6.51084e-6
- water, Renewable material resources from water [TO]: 3.24787e-8
- water, Renewable material resources from water [TR]: 0.000101351
- water, Renewable material resources from water [TT]: 2.23228e-6
- water, Renewable material resources from water [TZ]: 6.32219e-6
- water, Renewable material resources from water [UA]: 2.55775e-5
- water, Renewable material resources from water [UG]: 4.3801e-6
- water, Renewable material resources from water [US]: 0.000987312
- water, Renewable material resources from water [UY]: 3.7363e-6
- water, Renewable material resources from water [UZ]: 1.04397e-5
- water, Renewable material resources from water [VC]: 7.02316e-8
- water, Renewable material resources from water [VE]: 2.86384e-5
- water, Renewable material resources from water [VN]: 2.9662e-5
- water, Renewable material resources from water [VU]: 4.46131e-8
- water, Renewable material resources from water [WS]: 6.34635e-8
- water, Renewable material resources from water [YE]: 5.22277e-6
- water, Renewable material resources from water [ZA]: 3.81826e-5
- water, Renewable material resources from water [ZM]: 2.96182e-6
- water, Renewable material resources from water [ZW]: 1.92386e-6

## Outputs
- methane (biogenic), Emissions to air, unspecified: 8.45233e-5
- biological oxygen demand, Emissions to water, unspecified: 0.025357
- chemical oxygen demand, Emissions to water, unspecified: 0.0316962

## Impact indicators
- Ecotoxicity, freshwater: 2.70255e-5
- Water use: 0.165479
- Climate change: 0.00228213
- Human toxicity, non-cancer: 4.10344e-12
- Photochemical ozone formation - human health: 8.53685e-7
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
## Deviations from the LCI method principle
The background data uses:
- theRecycled content cut-off approach to allocate end-of-life by-products and secondary materials. This allocation is explained in the description of the recycled content system model (http://www.ecoinvent.org/database/system-models-in-ecoinvent-3/cut-off-system-model/allocation-cut-off-by-classification.html).
OR
- EF compliant data

## Deviations from the LCI method approaches
Background data:
- the \xe2\x80\x9cRecycled content cut-off\xe2\x80\x9d approach to allocate end-of-life by-products and secondary materials. This allocation is explained in the description of the recycled content system model (http://www.ecoinvent.org/database/system-models-in-ecoinvent-3/cut-off-system-model/allocation-cut-off-by-classification.html). The ecoinvent database mostly relies on “Allocation – market values” apart for few exceptions particularly in the energy sector. ecoinvent energy data is replaced with EF3.0 core data as per the EF guidelines version 2.0.
OR
- EF compliant data

## Modelling constants
All modelling constants follow the requirements listed in the Tender Specifications 070201/2020/SER/ENV.B1. Completeness: There are no intentional cut-offs in the inventory no matter how small their contribution to all the EF impact categories is. Eventual cut-offs are in compliance with the Guide for EF compliant data sets (JRC 2020), i.e. only if below the 3% cut-off rule. Water use: water use is modelled at country level using separate flows for water withdrawal, water release and water evaporation. Handling multi-functional processes: the following PEF multi- functionality decision hierarchy is applied for resolving all multi- functionality problems: (1) subdivision or system expansion; (2) allocation based on a relevant underlying physical relationship (substitution may apply here); (3) allocation based on some other relationship. Direct land use change: GHG emissions from direct LUC allocated to good/service for 20 years after the LUC occurs, with IPCC default values. Carbon storage and delayed emissions: credits associated with temporary (carbon) storage or delayed emissions up to 300 years are not be considered. Emissions off-setting: are not included. Capital goods (including infrastructures) and their End of life: they are included. System boundaries: system boundaries include all processes linked to the product supply chain (e.g. maintenance). Time period: emissions and removals are modelled as if released or removed at the beginning of the assessment method. Fossil and biogenic carbon emissions and removals: removals and emissions are modelled as follows: All GHG emissions from fossil fuels (including peat and limestone) are modelled consistently with the most updated ILCD list of elementary flows. The non-fossil (biogenic) carbon flows are modelled consistently with the most updated ILCD list of elementary flows.

## Cut-off and completeness
There are no intentional cut-offs in the inventory no matter how small their contribution to all the EF impact categories is. Eventual cut-offs are in compliance with the Guide for EF compliant data sets (JRC 2020), i.e. only if below the 3% cut-off rule. The dataset dry mass and water balance has been checked to ensure the inventory is complete. Capital goods (e.g. infrastructure) and their end-of-life are included.

## Data selection and combination
These datasets include, in both their foreground and background data, links to EF3.0 compliant data.
The relevant background data on energy, transport, and End of Life are from the LCDN data node (http://lcdn.thinkstep.com/Node/).
All other background data in the supply of this product for which no EF3.0 process was available are from ecoinvent v3.7 database (www.ecoinvent.org) or other data sources.

## Data treatment and extrapolations
Several data sources have been used to model the inventory.

## Use advice
This data set is a supporting sub-data set and must be used exclusively as sub-data set of its corresponding level-1 partly disaggregated data set (see “General comment” field for exact name and UUID).

## Data sources
- Background Data for Representative products and organisations. EF 3.0 compliant (data stock)
- Epagma., (2012). Comparative life cycle assessment of horticultural growing media based on peat and other growing media constituents volume 41.
- Blonk Consultants., (2019). Agrifootprint database v5.0

## Intended applications
Implementation of regular Product Environmental Footprint (PEF) studies and Organisation Environmental Footprint (OEF) studies exclusively under the specified Product groups and sectors as defined in the Product Environmental Footprint Category Rules (PEFCR) and Organisation Environmental Footprint Sectorial Rules (OEFSR) listed in http://ec.europa.eu/environment/eussd/smgp/PEFCR_OEFSR.htm
