# sizing, natural fibers; single-end sizing; production mix, at plant; service (raw materials excluded)

Dataset: ILCD process, Partly terminated system
Geography: GLO
Reference year: 2021
Valid until: 2024
Classification: Systems / Textiles, furnitures and other interiors
LCI method principle: Attributional
LCI method approaches: Allocation - market value
Completeness: All relevant flows quantified
Project: Provision of process-based 3.0 Environmental Footprint-compliant life cycle inventory datasets - Apparel 1 - contract number 070201/2020/840291/SER/ENV.B.1
Generated by: Life Cycle Indonesia
Owner: PRé Sustainability B.V.
Compliance: ILCD Data Network - Entry-level; Suggestions for updating the PEF method 2019; ISO 14040 Environmental Management – Life Cycle Assessment – Principles and Framework, 2006; ISO 14044:2006. Environmental Management – Life Cycle Assessment – Requirements and guidelines.; Environmental Footprint 3.1
Review: Dependent internal review by Avraam Symeonidis, Emilia Moreno Ruiz; Independent review panel by Fábio Valebona
Data quality: Overall quality: Good; Time representativeness: Very good; Geographical representativeness: Fair; Technological representativeness: Very good; Precision: Good; Methodological appropriateness and consistency: Not applicable
Amounts: no units in this file; such an amount is in the reference unit of its flow, which a separate flow dataset defines
copyright: true
licenseType: Free of charge for some user types or use types
accessRestrictions: Free of charge for all final users implementing a regular Product Environmental Footprint (PEF) studies and Organisation Environmental Footprint (OEF) studies exclusively under the specified Product groups and sectors as defined in the Product Environmental Footprint Category Rules (PEFCR) and Organisation Environmental Footprint Sectorial Rules (OEFSR) listed in http://ec.europa.eu/environment/eussd/smgp/PEFCR_OEFSR.htm and in accordance with the terms and conditions of the EULA (available at https://ecoinvent.lca-data.com/) exclusively until 31st December 2024. Any use of this dataset or any derivative data not within the specific context of one of the PEF/OEF projects or after the end of 2024 is not permitted.

## General comment
Notice: this data set supersedes the EF3.0-compliant version (see link under "preceding data set version" below calculated with the EF3.0). The life cycle inventory is not changed from the original EF3.0 data set. The LCIA results are calculated based on the EF3.1 methods which provide updated characterisation factors in the following impact categories: Climate Change, Ecotoxicity freshwater, Photochemical Ozone Formation, Acidification, Human Toxicity non-cancer, and Human Toxicity cancer. The review report and the data quality ratings refer to the original results. The data set has been updated by the European Commission on the basis of the original EF3.0 data set delivered by the data provider.Sizing is one of the textiles pre-treatment processes. The main purpose is to produce warp yarns that will weave satisfactorily without suffering any consequential damage due to abrasion with the moving parts of the loom. Sometimes, sizing is required to impart special properties to the fabric, such as weight, feel, softness, and handle. Natural starch and its derivatives is mostly used as sizing agents.Starches have been chemically modified to improve their characteristics. Along with starch, other ingredients such as lubricants, binders, humectants, wetting agents, and defoamers might be added to the size fomulations.
The primary size materials that act as film formers are starch (modified and unmodified), polyvinyl alcohol, carboxymethyl cellulose, and acrylic (Goswami, et al., 2004).

There are several sizing machine, conventional, predryer type or single-end sizing machine. Each machines has different application procedures and constraints. Size yarn would have an increase in strength, it is normally expected to be about 10 to 15% with respect to the strength of the unsized yarn (Goswami, et al., 2004).

Goswami, Bhuvenesh C., Anandjiwala, Rajesh D., and Hall, David M. 2004. Textile Sizing. New York: Marcel Dekker, Inc.

## Technology and included processes
Single-end sizing systems are widely used for sizing a wide variety of multifilament yarns, such as zero twist flat, textured, and low twisted fine denier yarns. Modern single-end sizing machines operate at extremely high speeds of up to 500 m/min. The sizing system is very versatile and it has simplified the yarn passage to produce high quality sizing beams (Goswami, et al., 2004). Hence, this inventory is modelled using single-end sizing machines properties.

There is a wide variety of sizing materials, with diference ingredients and fomulations. The inventory is modelled with available industrial formulations for 100% cotton yarn with differents type of weave (Majumder, et al., 2013). The amount of size required differs for different type of yarns and techonolgies, ranging from 4 - 15%, but there are several cases in industries that the amount exceed these numbers (Goswami, et al., 2004).

The activity starts when the raw materials (yarn) enter the process. Materials entering the process are included as well as energy uses and infrastructure. There is no direct emission to soil or water. It is assumed that all the water in sizing liquor evaporate during drying while the chemical agents of the sizing materials generated as part of the final product. Hence, there is no waste or emission resulted from the usage of sizing liquor. In the model, the finishng process is not included in the scope of this dataset and enegy sources of machines used solely from electricity.

Goswami, Bhuvenesh C., Anandjiwala, Rajesh D., and Hall, David M. 2004. Textile Sizing. New York: Marcel Dekker, Inc.
Majumder, Subrata, et al. 2013. Report on Industrial Attachment Talha Fabrics, Ltd. Dhaka: Daffodil International University.

## Parameters
- kg_0: 1.3776e-6
  Mass in kg, for lubricating oil // lubricants at refinery // eu+efta+uk; Articulated lorry transport, Euro 4, Total weight >32 t; EU+EFTA+UK
- km_0: 1001.74
  Distance in km, for lubricating oil // lubricants at refinery // eu+efta+uk; Articulated lorry transport, Euro 4, Total weight >32 t; EU+EFTA+UK
- kg_km_0: 0.00138; = kg_0*km_0
  Transport amount in km*km, for lubricating oil // lubricants at refinery // eu+efta+uk; Articulated lorry transport, Euro 4, Total weight >32 t; EU+EFTA+UK
- kg_1: 2.51562e-7
  Mass in kg, for lubricating oil // lubricants at refinery // rsa; Articulated lorry transport, Euro 4, Total weight >32 t; EU+EFTA+UK
- km_1: 1000
  Distance in km, for lubricating oil // lubricants at refinery // rsa; Articulated lorry transport, Euro 4, Total weight >32 t; EU+EFTA+UK
- kg_km_1: 0.000251562; = kg_1*km_1
  Transport amount in km*km, for lubricating oil // lubricants at refinery // rsa; Articulated lorry transport, Euro 4, Total weight >32 t; EU+EFTA+UK
- kg_2: 1.03205e-7
  Mass in kg, for lubricating oil // lubricants at refinery // raf; Articulated lorry transport, Euro 4, Total weight >32 t; EU+EFTA+UK
- km_2: 1000
  Distance in km, for lubricating oil // lubricants at refinery // raf; Articulated lorry transport, Euro 4, Total weight >32 t; EU+EFTA+UK
- kg_km_2: 0.000103205; = kg_2*km_2
  Transport amount in km*km, for lubricating oil // lubricants at refinery // raf; Articulated lorry transport, Euro 4, Total weight >32 t; EU+EFTA+UK
- kg_3: 2.70452e-6
  Mass in kg, for lubricating oil // lubricants at refinery // ras w/o cn; Articulated lorry transport, Euro 4, Total weight >32 t; EU+EFTA+UK
- km_3: 1000
  Distance in km, for lubricating oil // lubricants at refinery // ras w/o cn; Articulated lorry transport, Euro 4, Total weight >32 t; EU+EFTA+UK
- kg_km_3: 0.00270452; = kg_3*km_3
  Transport amount in km*km, for lubricating oil // lubricants at refinery // ras w/o cn; Articulated lorry transport, Euro 4, Total weight >32 t; EU+EFTA+UK
- kg_4: 2.23642e-6
  Mass in kg, for lubricating oil // lubricants at refinery // ru; Articulated lorry transport, Euro 4, Total weight >32 t; EU+EFTA+UK
- km_4: 1000
  Distance in km, for lubricating oil // lubricants at refinery // ru; Articulated lorry transport, Euro 4, Total weight >32 t; EU+EFTA+UK
- kg_km_4: 0.00223642; = kg_4*km_4
  Transport amount in km*km, for lubricating oil // lubricants at refinery // ru; Articulated lorry transport, Euro 4, Total weight >32 t; EU+EFTA+UK
- kg_5: 2.1111e-6
  Mass in kg, for lubricating oil // lubricants at refinery // rna; Articulated lorry transport, Euro 4, Total weight >32 t; EU+EFTA+UK
- km_5: 1000
  Distance in km, for lubricating oil // lubricants at refinery // rna; Articulated lorry transport, Euro 4, Total weight >32 t; EU+EFTA+UK
- kg_km_5: 0.0021111; = kg_5*km_5
  Transport amount in km*km, for lubricating oil // lubricants at refinery // rna; Articulated lorry transport, Euro 4, Total weight >32 t; EU+EFTA+UK
- kg_6: 4.29407e-7
  Mass in kg, for lubricating oil // lubricants at refinery // cn; Articulated lorry transport, Euro 4, Total weight >32 t; EU+EFTA+UK
- km_6: 1000
  Distance in km, for lubricating oil // lubricants at refinery // cn; Articulated lorry transport, Euro 4, Total weight >32 t; EU+EFTA+UK
- kg_km_6: 0.000429407; = kg_6*km_6
  Transport amount in km*km, for lubricating oil // lubricants at refinery // cn; Articulated lorry transport, Euro 4, Total weight >32 t; EU+EFTA+UK
- kg_7: 0.012522
  Mass in kg, for carboxymethyl cellulose // carboxymethyl cellulose production // glo; Articulated lorry transport, Euro 4, Total weight >32 t; EU+EFTA+UK
- km_7: 1000
  Distance in km, for carboxymethyl cellulose // carboxymethyl cellulose production // glo; Articulated lorry transport, Euro 4, Total weight >32 t; EU+EFTA+UK
- kg_km_7: 12.522; = kg_7*km_7
  Transport amount in km*km, for carboxymethyl cellulose // carboxymethyl cellulose production // glo; Articulated lorry transport, Euro 4, Total weight >32 t; EU+EFTA+UK
- kg_8: 0.00207371
  Mass in kg, for polyvinyl alcohol granulate (pval) mix // polyvinyl alcohol granulate (pval) mix production // glo; Articulated lorry transport, Euro 4, Total weight >32 t; EU+EFTA+UK
- km_8: 1000
  Distance in km, for polyvinyl alcohol granulate (pval) mix // polyvinyl alcohol granulate (pval) mix production // glo; Articulated lorry transport, Euro 4, Total weight >32 t; EU+EFTA+UK
- kg_km_8: 2.07371; = kg_8*km_8
  Transport amount in km*km, for polyvinyl alcohol granulate (pval) mix // polyvinyl alcohol granulate (pval) mix production // glo; Articulated lorry transport, Euro 4, Total weight >32 t; EU+EFTA+UK
- kg_9: 0.00078761
  Mass in kg, for wax // wax production // eu+efta+uk; Articulated lorry transport, Euro 4, Total weight >32 t; EU+EFTA+UK
- km_9: 1000
  Distance in km, for wax // wax production // eu+efta+uk; Articulated lorry transport, Euro 4, Total weight >32 t; EU+EFTA+UK
- kg_km_9: 0.78761; = kg_9*km_9
  Transport amount in km*km, for wax // wax production // eu+efta+uk; Articulated lorry transport, Euro 4, Total weight >32 t; EU+EFTA+UK
- kg_10: 0.00233292
  Mass in kg, for acrylic binder // acrylic binder production // eu+efta+uk; Articulated lorry transport, Euro 4, Total weight >32 t; EU+EFTA+UK
- km_10: 1000
  Distance in km, for acrylic binder // acrylic binder production // eu+efta+uk; Articulated lorry transport, Euro 4, Total weight >32 t; EU+EFTA+UK
- kg_km_10: 2.33292; = kg_10*km_10
  Transport amount in km*km, for acrylic binder // acrylic binder production // eu+efta+uk; Articulated lorry transport, Euro 4, Total weight >32 t; EU+EFTA+UK
- kg_11: 2.51562e-7
  Mass in kg, for lubricating oil // lubricants at refinery // rsa; Transoceanic ship, containers; GLO
- km_11: 18000
  Distance in km, for lubricating oil // lubricants at refinery // rsa; Transoceanic ship, containers; GLO
- kg_km_11: 0.00452812; = kg_11*km_11
  Transport amount in km*km, for lubricating oil // lubricants at refinery // rsa; Transoceanic ship, containers; GLO
- kg_12: 1.03205e-7
  Mass in kg, for lubricating oil // lubricants at refinery // raf; Transoceanic ship, containers; GLO
- km_12: 18000
  Distance in km, for lubricating oil // lubricants at refinery // raf; Transoceanic ship, containers; GLO
- kg_km_12: 0.00185769; = kg_12*km_12
  Transport amount in km*km, for lubricating oil // lubricants at refinery // raf; Transoceanic ship, containers; GLO
- kg_13: 2.70452e-6
  Mass in kg, for lubricating oil // lubricants at refinery // ras w/o cn; Transoceanic ship, containers; GLO
- km_13: 18000
  Distance in km, for lubricating oil // lubricants at refinery // ras w/o cn; Transoceanic ship, containers; GLO
- kg_km_13: 0.0486814; = kg_13*km_13
  Transport amount in km*km, for lubricating oil // lubricants at refinery // ras w/o cn; Transoceanic ship, containers; GLO
- kg_14: 2.23642e-6
  Mass in kg, for lubricating oil // lubricants at refinery // ru; Transoceanic ship, containers; GLO
- km_14: 18000
  Distance in km, for lubricating oil // lubricants at refinery // ru; Transoceanic ship, containers; GLO
- kg_km_14: 0.0402555; = kg_14*km_14
  Transport amount in km*km, for lubricating oil // lubricants at refinery // ru; Transoceanic ship, containers; GLO
- kg_15: 2.1111e-6
  Mass in kg, for lubricating oil // lubricants at refinery // rna; Transoceanic ship, containers; GLO
- km_15: 18000
  Distance in km, for lubricating oil // lubricants at refinery // rna; Transoceanic ship, containers; GLO
- kg_km_15: 0.0379997; = kg_15*km_15
  Transport amount in km*km, for lubricating oil // lubricants at refinery // rna; Transoceanic ship, containers; GLO
- kg_16: 4.29407e-7
  Mass in kg, for lubricating oil // lubricants at refinery // cn; Transoceanic ship, containers; GLO
- km_16: 18000
  Distance in km, for lubricating oil // lubricants at refinery // cn; Transoceanic ship, containers; GLO
- kg_km_16: 0.00772932; = kg_16*km_16
  Transport amount in km*km, for lubricating oil // lubricants at refinery // cn; Transoceanic ship, containers; GLO
- kg_17: 0.012522
  Mass in kg, for carboxymethyl cellulose // carboxymethyl cellulose production // glo; Transoceanic ship, containers; GLO
- km_17: 18000
  Distance in km, for carboxymethyl cellulose // carboxymethyl cellulose production // glo; Transoceanic ship, containers; GLO
- kg_km_17: 225.396; = kg_17*km_17
  Transport amount in km*km, for carboxymethyl cellulose // carboxymethyl cellulose production // glo; Transoceanic ship, containers; GLO
- kg_18: 0.00207371
  Mass in kg, for polyvinyl alcohol granulate (pval) mix // polyvinyl alcohol granulate (pval) mix production // glo; Transoceanic ship, containers; GLO
- km_18: 18000
  Distance in km, for polyvinyl alcohol granulate (pval) mix // polyvinyl alcohol granulate (pval) mix production // glo; Transoceanic ship, containers; GLO
- kg_km_18: 37.3267; = kg_18*km_18
  Transport amount in km*km, for polyvinyl alcohol granulate (pval) mix // polyvinyl alcohol granulate (pval) mix production // glo; Transoceanic ship, containers; GLO
- kg_19: 0.00078761
  Mass in kg, for wax // wax production // eu+efta+uk; Transoceanic ship, containers; GLO
- km_19: 18000
  Distance in km, for wax // wax production // eu+efta+uk; Transoceanic ship, containers; GLO
- kg_km_19: 14.177; = kg_19*km_19
  Transport amount in km*km, for wax // wax production // eu+efta+uk; Transoceanic ship, containers; GLO
- kg_20: 0.00233292
  Mass in kg, for acrylic binder // acrylic binder production // eu+efta+uk; Transoceanic ship, containers; GLO
- km_20: 18000
  Distance in km, for acrylic binder // acrylic binder production // eu+efta+uk; Transoceanic ship, containers; GLO
- kg_km_20: 41.9926; = kg_20*km_20
  Transport amount in km*km, for acrylic binder // acrylic binder production // eu+efta+uk; Transoceanic ship, containers; GLO
- kg_21: 1.3776e-6
  Mass in kg, for lubricating oil // lubricants at refinery // eu+efta+uk; Transoceanic ship, containers; GLO
- km_21: 18002.3
  Distance in km, for lubricating oil // lubricants at refinery // eu+efta+uk; Transoceanic ship, containers; GLO
- kg_km_21: 0.0248; = kg_21*km_21
  Transport amount in km*km, for lubricating oil // lubricants at refinery // eu+efta+uk; Transoceanic ship, containers; GLO

## Reference product
- sizing, natural fibers // sizing, natural fibers // glo: 1

## Inputs
- Electricity from Electricity grid mix 1kV-60kV - AU: 0.0111
- Electricity from Electricity grid mix 1kV-60kV - EU+EFTA+UK: 0.163
- Electricity from Electricity grid mix 1kV-60kV - NZ: 0.0021
- Electricity from Electricity grid mix 1kV-60kV - RAF: 0.0356
- Electricity from Electricity grid mix 1kV-60kV - RAS w/o CN: 0.5123
- Electricity from Electricity grid mix 1kV-60kV - RNA: 0.2386
- Electricity from Electricity grid mix 1kV-60kV - RSA: 0.081
- Electricity from Electricity grid mix 1kV-60kV - RU: 0.0477
- Transport of lubricating oil // lubricants at refinery // eu+efta+uk by Articulated lorry transport, Euro 4, Total weight >32 t - EU+EFTA+UK: 0.00138; = kg_km_0
- Transport of lubricating oil // lubricants at refinery // rsa by Articulated lorry transport, Euro 4, Total weight >32 t - EU+EFTA+UK: 0.000251562; = kg_km_1
- Transport of lubricating oil // lubricants at refinery // raf by Articulated lorry transport, Euro 4, Total weight >32 t - EU+EFTA+UK: 0.000103205; = kg_km_2
- Transport of lubricating oil // lubricants at refinery // ras w/o cn by Articulated lorry transport, Euro 4, Total weight >32 t - EU+EFTA+UK: 0.00270452; = kg_km_3
- Transport of lubricating oil // lubricants at refinery // ru by Articulated lorry transport, Euro 4, Total weight >32 t - EU+EFTA+UK: 0.00223642; = kg_km_4
- Transport of lubricating oil // lubricants at refinery // rna by Articulated lorry transport, Euro 4, Total weight >32 t - EU+EFTA+UK: 0.0021111; = kg_km_5
- Transport of lubricating oil // lubricants at refinery // cn by Articulated lorry transport, Euro 4, Total weight >32 t - EU+EFTA+UK: 0.000429407; = kg_km_6
- Transport of carboxymethyl cellulose // carboxymethyl cellulose production // glo by Articulated lorry transport, Euro 4, Total weight >32 t - EU+EFTA+UK: 12.522; = kg_km_7
- Transport of polyvinyl alcohol granulate (pval) mix // polyvinyl alcohol granulate (pval) mix production // glo by Articulated lorry transport, Euro 4, Total weight >32 t - EU+EFTA+UK: 2.07371; = kg_km_8
- Transport of wax // wax production // eu+efta+uk by Articulated lorry transport, Euro 4, Total weight >32 t - EU+EFTA+UK: 0.78761; = kg_km_9
- Transport of acrylic binder // acrylic binder production // eu+efta+uk by Articulated lorry transport, Euro 4, Total weight >32 t - EU+EFTA+UK: 2.33292; = kg_km_10
- Transport of lubricating oil // lubricants at refinery // rsa by Transoceanic ship, containers - GLO: 0.00452812; = kg_km_11
- Transport of lubricating oil // lubricants at refinery // raf by Transoceanic ship, containers - GLO: 0.00185769; = kg_km_12
- Transport of lubricating oil // lubricants at refinery // ras w/o cn by Transoceanic ship, containers - GLO: 0.0486814; = kg_km_13
- Transport of lubricating oil // lubricants at refinery // ru by Transoceanic ship, containers - GLO: 0.0402555; = kg_km_14
- Transport of lubricating oil // lubricants at refinery // rna by Transoceanic ship, containers - GLO: 0.0379997; = kg_km_15
- Transport of lubricating oil // lubricants at refinery // cn by Transoceanic ship, containers - GLO: 0.00772932; = kg_km_16
- Transport of carboxymethyl cellulose // carboxymethyl cellulose production // glo by Transoceanic ship, containers - GLO: 225.396; = kg_km_17
- Transport of polyvinyl alcohol granulate (pval) mix // polyvinyl alcohol granulate (pval) mix production // glo by Transoceanic ship, containers - GLO: 37.3267; = kg_km_18
- Transport of wax // wax production // eu+efta+uk by Transoceanic ship, containers - GLO: 14.177; = kg_km_19
- Transport of acrylic binder // acrylic binder production // eu+efta+uk by Transoceanic ship, containers - GLO: 41.9926; = kg_km_20
- Transport of lubricating oil // lubricants at refinery // eu+efta+uk by Transoceanic ship, containers - GLO: 0.0248; = kg_km_21
- sizing, natural fibers // sizing, natural fibers // glo, blackbox: 1
- sizing, natural fibers // sizing, natural fibers // glo, elementary: 1

## Impact indicators
- Eutrophication marine: 0.000468452
- Ecotoxicity, freshwater: 2.27979
- Land use: 1.38612
- Water use: 0.117406
- Resource use, minerals and metals: 3.08367e-7
- Resource use, fossils: 9.61138
- Climate change: 0.607254
- Ozone depletion: 6.34572e-9
- Human toxicity, cancer: 9.38886e-10
- Human toxicity, non-cancer: 1.53384e-9
- EF-particulate Matter: 3.54993e-8
- Ionising radiation, human health: 0.0188893
- Photochemical ozone formation - human health: 0.00140357
- Acidification: 0.00236987
- Eutrophication, terrestrial: 0.00513279
- Eutrophication, freshwater: 3.92914e-6

## Deviations from the LCI method principle
The background data uses:
- the \xe2\x80\x9cRecycled content cut-off\xe2\x80\x9d approach to allocate end-of-life by-products and secondary materials. This allocation is explained in the description of the recycled content system model (http://www.ecoinvent.org/database/system-models-in-ecoinvent-3/cut-off-system-model/allocation-cut-off-by-classification.html).
OR
- EF compliant data

## Deviations from the LCI method approaches
Background data:
- the \xe2\x80\x9cRecycled content cut-off\xe2\x80\x9d approach to allocate end-of-life by-products and secondary materials. This allocation is explained in the description of the recycled content system model (http://www.ecoinvent.org/database/system-models-in-ecoinvent-3/cut-off-system-model/allocation-cut-off-by-classification.html). The ecoinvent database mostly relies on “Allocation – market values” apart for few exceptions particularly in the energy sector. ecoinvent energy data is replaced with EF3.0 core data as per the EF guidelines version 2.0.
OR
- EF compliant data

## Modelling constants
All modelling constants follow the requirements listed in the Tender Specifications 070201/2020/SER/ENV.B1. Completeness: There are no intentional cut-offs in the inventory no matter how small their contribution to all the EF impact categories is. Eventual cut-offs are in compliance with the Guide for EF compliant data sets (JRC 2020), i.e. only if below the 3% cut-off rule. Water use: water use is modelled at country level using separate flows for water withdrawal, water release and water evaporation. Handling multi-functional processes: the following PEF multi- functionality decision hierarchy is applied for resolving all multi- functionality problems: (1) subdivision or system expansion; (2) allocation based on a relevant underlying physical relationship (substitution may apply here); (3) allocation based on some other relationship. Direct land use change: GHG emissions from direct LUC allocated to good/service for 20 years after the LUC occurs, with IPCC default values. Carbon storage and delayed emissions: credits associated with temporary (carbon) storage or delayed emissions up to 300 years are not be considered. Emissions off-setting: are not included. Capital goods (including infrastructures) and their End of life: they are included. System boundaries: system boundaries include all processes linked to the product supply chain (e.g. maintenance). Time period: emissions and removals are modelled as if released or removed at the beginning of the assessment method. Fossil and biogenic carbon emissions and removals: removals and emissions are modelled as follows: All GHG emissions from fossil fuels (including peat and limestone) are modelled consistently with the most updated ILCD list of elementary flows. The non-fossil (biogenic) carbon flows are modelled consistently with the most updated ILCD list of elementary flows.

## Cut-off and completeness
There are no intentional cut-offs in the inventory no matter how small their contribution to all the EF impact categories is. Eventual cut-offs are in compliance with the Guide for EF compliant data sets (JRC 2020), i.e. only if below the 3% cut-off rule. The dataset dry mass and water balance has been checked to ensure the inventory is complete. Capital goods (e.g. infrastructure) and their end-of-life are included.

## Data selection and combination
These datasets include, in both their foreground and background data, links to EF3.0 compliant data.
The relevant background data on energy, transport, and End of Life are from the LCDN data node (http://lcdn.thinkstep.com/Node/).
All other background data in the supply of this product for which no EF3.0 process was available are from ecoinvent v3.7 database (www.ecoinvent.org) or other data sources.

## Data treatment and extrapolations
Several data sources have been used to model the inventory.

## Review details
Internal reviews have been asked to review the plausibility of the unit process, LCIA scores, and DQRs. Internal reviewers have also been asked to review the data for EF compliancy. The consortium is therefore responsible for aspects such as compliancy with the ILCD format, including validation in Look@LCI, and nomenclature.
Internal reviwers have been asked to judge based on the process name, that the unit process models in a complete and representative way the process in the requested location. The review encompassed the plausability of:
- exchanges with nature (elementary flows) as well as exchanges such as product and waste flows.
- meta information (general comment, technology comment, system boundaries, allocation, cut-off rules, etc.). Reviewers were asked to judge if the provided information is enough to understand the content of the process.
- LCIA scores
- DQRs including precision, technology, time and geography. As well as the overall DQR.
External reviewers have been asked to provide their expertise in the field of interest. External reviewers have been asked to review the unit process, including eventual methodological choices, the LCIA scores (provided with contribution scores as well), and DQRs. External reviewers have been provided all the information in a tool developed by the consortium for the purpose of this project.
External reviewers have been asked to judge based on the process name, that the unit process models in a complete and representative way the process in the requested location. The review encompassed:
- Plausability and completeness of exchanges with nature (elementary flows) as well as exchanges such as product and waste flows.
- Review of meta information (general comment, technology comment, system boundaries, allocation, cut-off rules, etc.). Reviewers were asked to judge if the provided information is enough to understand the content of the process.
- Review of properties (biogenic carbon and water content).
- Review of allocation keys.
- Plausability of LCIA scores calculated by the consortium.
- Plausability of DQRs including precision, technology, time and geography. As well as the overall DQR.

## Data sources
- Background Data for Representative products and organisations. EF 3.0 compliant (data stock)
- UN Data (2018) Statistics Data for Lubricants Productions, http://data.un.org/Data.aspx?q=Lubricants&d=EDATA&f=cmID%3aLU, United Nations Statistics Division, Global.
- Subrata Majumder, Sajib Kumar Das, Manjur Ahmed Majumder, Md. Mahbubul Haque, (2013). Report on Industrial Attachment Talha Fabrics, LTD. Daffodil International University, Dhaka, Bangladesh
- T-Tech Japan (2021) Single-End-Sizing System, http://www.t-techjapan.co.jp/en/catalog/index.html, T-Tech Japan Corp., Ishikawa, Japan
- Izumi International (2021). Single End Sizing Machine KS7, https://www.izumiinternational.com/media/wysiwyg/brochure/KS7-SingleEndSizing-(BroF).pdf, Izumi International, Inc., Global
- Lebon (2021) Nonwoven Oven Machine, Catalog and Company Messages, Qingdao Lebon Industry Co., Ltd., China

## Intended applications
Implementation of regular Product Environmental Footprint (PEF) studies and Organisation Environmental Footprint (OEF) studies exclusively under the specified Product groups and sectors as defined in the Product Environmental Footprint Category Rules (PEFCR) and Organisation Environmental Footprint Sectorial Rules (OEFSR) listed in http://ec.europa.eu/environment/eussd/smgp/PEFCR_OEFSR.htm
