# recovered fibre for packaging grades - corrugated grades and cartonboard grades; technology mix; production mix, at plant; Erec/ErecEoL, dry mass

Dataset: ILCD process, Partly terminated system
Geography: EU+EFTA+UK
Reference year: 2021
Valid until: 2024
Classification: Materials production / Paper and cardboards
LCI method principle: Attributional
LCI method approaches: Allocation - market value
Completeness: All relevant flows quantified
Project: Provision of process-based 3.0 Environmental Footprint-compliant life cycle inventory datasets - Renewable materials - contract number 070201/2020/840085/SER/ENV.B.1
Generated by: RISE
Owner: CEPI
Compliance: ILCD Data Network - Entry-level; Suggestions for updating the PEF method 2019; ISO 14040 Environmental Management – Life Cycle Assessment – Principles and Framework, 2006; ISO 14044:2006. Environmental Management – Life Cycle Assessment – Requirements and guidelines.; Environmental Footprint 3.1
Review: Dependent internal review by Emilia Moreno Ruiz, Katarzyna Cenian; Independent review panel by Laura Batlle Bayer
Data quality: Overall quality: Very good; Time representativeness: Very good; Geographical representativeness: Very good; Technological representativeness: Very good; Precision: Good; Methodological appropriateness and consistency: Not applicable
Amounts: no units in this file; such an amount is in the reference unit of its flow, which a separate flow dataset defines
copyright: true
licenseType: Free of charge for some user types or use types
accessRestrictions: Free of charge for all final users implementing a regular Product Environmental Footprint (PEF) studies and Organisation Environmental Footprint (OEF) studies exclusively under the specified Product groups and sectors as defined in the Product Environmental Footprint Category Rules (PEFCR) and Organisation Environmental Footprint Sectorial Rules (OEFSR) listed in http://ec.europa.eu/environment/eussd/smgp/PEFCR_OEFSR.htm and in accordance with the terms and conditions of the EULA (available at https://ecoinvent.lca-data.com/) exclusively until 31st December 2024. Any use of this dataset or any derivative data not within the specific context of one of the PEF/OEF projects or after the end of 2024 is not permitted.

## General comment
Notice: this data set supersedes the EF3.0-compliant version (see link under "preceding data set version" below calculated with the EF3.0). The life cycle inventory is not changed from the original EF3.0 data set. The LCIA results are calculated based on the EF3.1 methods which provide updated characterisation factors in the following impact categories: Climate Change, Ecotoxicity freshwater, Photochemical Ozone Formation, Acidification, Human Toxicity non-cancer, and Human Toxicity cancer. The review report and the data quality ratings refer to the original results. The data set has been updated by the European Commission on the basis of the original EF3.0 data set delivered by the data provider.The inventory refers to 1 kg (dry mass) of fibre. Wet pulp ready to feed onto the paper machine consists of roughly 99% water and 1% fibre

## Technology and included processes
This dataset was established to compare the production of virgin pulp with the production of pulp from recovered fibres. Production takes place as integrated production of recovered pulp and paper. This dataset represents inputs to and outputs from the theoretical recovered pulp production process covering the pulp production phase, plus the share of the integrated mill services (power plant, wastewater treatment) allocated to recovered pulp production.

The dataset represents the recycling process, the dataset can therefore be used to model the CFF formula (Erecycled/ErecyclingEoL) as the data does not include any burdens/credits for the material being recycled but represents the recycling process itself.

## Parameters
- kg_0: 1.1
  Mass in kg, for waste paper, sorted // sorting waste paper, unsorted // eu+efta+uk; Freight train, average; EU+EFTA+UK
- km_0: 240
  Distance in km, for waste paper, sorted // sorting waste paper, unsorted // eu+efta+uk; Freight train, average; EU+EFTA+UK
- kg_km_0: 264; = kg_0*km_0
  Transport amount in km*km, for waste paper, sorted // sorting waste paper, unsorted // eu+efta+uk; Freight train, average; EU+EFTA+UK
- kg_1: 1.1
  Mass in kg, for waste paper, sorted // sorting waste paper, unsorted // eu+efta+uk; Barge; EU+EFTA+UK
- km_1: 270
  Distance in km, for waste paper, sorted // sorting waste paper, unsorted // eu+efta+uk; Barge; EU+EFTA+UK
- kg_km_1: 297; = kg_1*km_1
  Transport amount in km*km, for waste paper, sorted // sorting waste paper, unsorted // eu+efta+uk; Barge; EU+EFTA+UK
- kg_2: 1.1
  Mass in kg, for waste paper, sorted // sorting waste paper, unsorted // eu+efta+uk; Articulated lorry transport, Euro 4, Total weight >32 t; EU+EFTA+UK
- km_2: 130
  Distance in km, for waste paper, sorted // sorting waste paper, unsorted // eu+efta+uk; Articulated lorry transport, Euro 4, Total weight >32 t; EU+EFTA+UK
- kg_km_2: 143; = kg_2*km_2
  Transport amount in km*km, for waste paper, sorted // sorting waste paper, unsorted // eu+efta+uk; Articulated lorry transport, Euro 4, Total weight >32 t; EU+EFTA+UK
- kg_3: 3.67082e-6
  Mass in kg, for heavy fuel oil (1.0 wt.% s) // heavy fuel oil at refinery // eu+efta+uk; Freight train, average; EU+EFTA+UK
- km_3: 240.001
  Distance in km, for heavy fuel oil (1.0 wt.% s) // heavy fuel oil at refinery // eu+efta+uk; Freight train, average; EU+EFTA+UK
- kg_km_3: 0.000881; = kg_3*km_3
  Transport amount in km*km, for heavy fuel oil (1.0 wt.% s) // heavy fuel oil at refinery // eu+efta+uk; Freight train, average; EU+EFTA+UK
- kg_4: 3.67082e-6
  Mass in kg, for heavy fuel oil (1.0 wt.% s) // heavy fuel oil at refinery // eu+efta+uk; Barge; EU+EFTA+UK
- km_4: 269.967
  Distance in km, for heavy fuel oil (1.0 wt.% s) // heavy fuel oil at refinery // eu+efta+uk; Barge; EU+EFTA+UK
- kg_km_4: 0.000991; = kg_4*km_4
  Transport amount in km*km, for heavy fuel oil (1.0 wt.% s) // heavy fuel oil at refinery // eu+efta+uk; Barge; EU+EFTA+UK
- kg_5: 3.67082e-6
  Mass in kg, for heavy fuel oil (1.0 wt.% s) // heavy fuel oil at refinery // eu+efta+uk; Articulated lorry transport, Euro 4, Total weight >32 t; EU+EFTA+UK
- km_5: 129.944
  Distance in km, for heavy fuel oil (1.0 wt.% s) // heavy fuel oil at refinery // eu+efta+uk; Articulated lorry transport, Euro 4, Total weight >32 t; EU+EFTA+UK
- kg_km_5: 0.000477; = kg_5*km_5
  Transport amount in km*km, for heavy fuel oil (1.0 wt.% s) // heavy fuel oil at refinery // eu+efta+uk; Articulated lorry transport, Euro 4, Total weight >32 t; EU+EFTA+UK
- kg_6: 2.24558e-5
  Mass in kg, for light fuel oil // light fuel oil at refinery // eu+efta+uk; Freight train, average; EU+EFTA+UK
- km_6: 240.472
  Distance in km, for light fuel oil // light fuel oil at refinery // eu+efta+uk; Freight train, average; EU+EFTA+UK
- kg_km_6: 0.0054; = kg_6*km_6
  Transport amount in km*km, for light fuel oil // light fuel oil at refinery // eu+efta+uk; Freight train, average; EU+EFTA+UK
- kg_7: 2.24558e-5
  Mass in kg, for light fuel oil // light fuel oil at refinery // eu+efta+uk; Barge; EU+EFTA+UK
- km_7: 270.754
  Distance in km, for light fuel oil // light fuel oil at refinery // eu+efta+uk; Barge; EU+EFTA+UK
- kg_km_7: 0.00608; = kg_7*km_7
  Transport amount in km*km, for light fuel oil // light fuel oil at refinery // eu+efta+uk; Barge; EU+EFTA+UK
- kg_8: 2.24558e-5
  Mass in kg, for light fuel oil // light fuel oil at refinery // eu+efta+uk; Articulated lorry transport, Euro 4, Total weight >32 t; EU+EFTA+UK
- km_8: 130.479
  Distance in km, for light fuel oil // light fuel oil at refinery // eu+efta+uk; Articulated lorry transport, Euro 4, Total weight >32 t; EU+EFTA+UK
- kg_km_8: 0.00293; = kg_8*km_8
  Transport amount in km*km, for light fuel oil // light fuel oil at refinery // eu+efta+uk; Articulated lorry transport, Euro 4, Total weight >32 t; EU+EFTA+UK
- kg_9: 1.89896e-6
  Mass in kg, for diesel // diesel mix at refinery // eu+efta+uk; Freight train, average; EU+EFTA+UK
- km_9: 240.131
  Distance in km, for diesel // diesel mix at refinery // eu+efta+uk; Freight train, average; EU+EFTA+UK
- kg_km_9: 0.000456; = kg_9*km_9
  Transport amount in km*km, for diesel // diesel mix at refinery // eu+efta+uk; Freight train, average; EU+EFTA+UK
- kg_10: 1.89896e-6
  Mass in kg, for diesel // diesel mix at refinery // eu+efta+uk; Barge; EU+EFTA+UK
- km_10: 270.148
  Distance in km, for diesel // diesel mix at refinery // eu+efta+uk; Barge; EU+EFTA+UK
- kg_km_10: 0.000513; = kg_10*km_10
  Transport amount in km*km, for diesel // diesel mix at refinery // eu+efta+uk; Barge; EU+EFTA+UK
- kg_11: 1.89896e-6
  Mass in kg, for diesel // diesel mix at refinery // eu+efta+uk; Articulated lorry transport, Euro 4, Total weight >32 t; EU+EFTA+UK
- km_11: 130.071
  Distance in km, for diesel // diesel mix at refinery // eu+efta+uk; Articulated lorry transport, Euro 4, Total weight >32 t; EU+EFTA+UK
- kg_km_11: 0.000247; = kg_11*km_11
  Transport amount in km*km, for diesel // diesel mix at refinery // eu+efta+uk; Articulated lorry transport, Euro 4, Total weight >32 t; EU+EFTA+UK
- kg_12: 0.00203619
  Mass in kg, for hard coal, at consumer eu+efta // hard coal mix // eu+efta+uk; Freight train, average; EU+EFTA+UK
- km_12: 240.155
  Distance in km, for hard coal, at consumer eu+efta // hard coal mix // eu+efta+uk; Freight train, average; EU+EFTA+UK
- kg_km_12: 0.489; = kg_12*km_12
  Transport amount in km*km, for hard coal, at consumer eu+efta // hard coal mix // eu+efta+uk; Freight train, average; EU+EFTA+UK
- kg_13: 0.00203619
  Mass in kg, for hard coal, at consumer eu+efta // hard coal mix // eu+efta+uk; Barge; EU+EFTA+UK
- km_13: 270.113
  Distance in km, for hard coal, at consumer eu+efta // hard coal mix // eu+efta+uk; Barge; EU+EFTA+UK
- kg_km_13: 0.55; = kg_13*km_13
  Transport amount in km*km, for hard coal, at consumer eu+efta // hard coal mix // eu+efta+uk; Barge; EU+EFTA+UK
- kg_14: 0.00203619
  Mass in kg, for hard coal, at consumer eu+efta // hard coal mix // eu+efta+uk; Articulated lorry transport, Euro 4, Total weight >32 t; EU+EFTA+UK
- km_14: 130.145
  Distance in km, for hard coal, at consumer eu+efta // hard coal mix // eu+efta+uk; Articulated lorry transport, Euro 4, Total weight >32 t; EU+EFTA+UK
- kg_km_14: 0.265; = kg_14*km_14
  Transport amount in km*km, for hard coal, at consumer eu+efta // hard coal mix // eu+efta+uk; Articulated lorry transport, Euro 4, Total weight >32 t; EU+EFTA+UK
- kg_15: 0.000878627
  Mass in kg, for lignite eu+efta // lignite mix // eu+efta+uk; Freight train, average; EU+EFTA+UK
- km_15: 240.148
  Distance in km, for lignite eu+efta // lignite mix // eu+efta+uk; Freight train, average; EU+EFTA+UK
- kg_km_15: 0.211; = kg_15*km_15
  Transport amount in km*km, for lignite eu+efta // lignite mix // eu+efta+uk; Freight train, average; EU+EFTA+UK
- kg_16: 0.000878627
  Mass in kg, for lignite eu+efta // lignite mix // eu+efta+uk; Barge; EU+EFTA+UK
- km_16: 269.739
  Distance in km, for lignite eu+efta // lignite mix // eu+efta+uk; Barge; EU+EFTA+UK
- kg_km_16: 0.237; = kg_16*km_16
  Transport amount in km*km, for lignite eu+efta // lignite mix // eu+efta+uk; Barge; EU+EFTA+UK
- kg_17: 0.000878627
  Mass in kg, for lignite eu+efta // lignite mix // eu+efta+uk; Articulated lorry transport, Euro 4, Total weight >32 t; EU+EFTA+UK
- km_17: 129.748
  Distance in km, for lignite eu+efta // lignite mix // eu+efta+uk; Articulated lorry transport, Euro 4, Total weight >32 t; EU+EFTA+UK
- kg_km_17: 0.114; = kg_17*km_17
  Transport amount in km*km, for lignite eu+efta // lignite mix // eu+efta+uk; Articulated lorry transport, Euro 4, Total weight >32 t; EU+EFTA+UK
- kg_18: 8.66597e-5
  Mass in kg, for wood chips, softwood // wood chips, softwood // eu+efta+uk; Freight train, average; EU+EFTA+UK
- km_18: 240.019
  Distance in km, for wood chips, softwood // wood chips, softwood // eu+efta+uk; Freight train, average; EU+EFTA+UK
- kg_km_18: 0.0208; = kg_18*km_18
  Transport amount in km*km, for wood chips, softwood // wood chips, softwood // eu+efta+uk; Freight train, average; EU+EFTA+UK
- kg_19: 8.66597e-5
  Mass in kg, for wood chips, softwood // wood chips, softwood // eu+efta+uk; Barge; EU+EFTA+UK
- km_19: 270.022
  Distance in km, for wood chips, softwood // wood chips, softwood // eu+efta+uk; Barge; EU+EFTA+UK
- kg_km_19: 0.0234; = kg_19*km_19
  Transport amount in km*km, for wood chips, softwood // wood chips, softwood // eu+efta+uk; Barge; EU+EFTA+UK
- kg_20: 8.66597e-5
  Mass in kg, for wood chips, softwood // wood chips, softwood // eu+efta+uk; Articulated lorry transport, Euro 4, Total weight >32 t; EU+EFTA+UK
- km_20: 130.395
  Distance in km, for wood chips, softwood // wood chips, softwood // eu+efta+uk; Articulated lorry transport, Euro 4, Total weight >32 t; EU+EFTA+UK
- kg_km_20: 0.0113; = kg_20*km_20
  Transport amount in km*km, for wood chips, softwood // wood chips, softwood // eu+efta+uk; Articulated lorry transport, Euro 4, Total weight >32 t; EU+EFTA+UK
- kg_21: 8.66597e-5
  Mass in kg, for wood chips, hardwood // wood chips, hardwood // eu+efta+uk; Freight train, average; EU+EFTA+UK
- km_21: 240.019
  Distance in km, for wood chips, hardwood // wood chips, hardwood // eu+efta+uk; Freight train, average; EU+EFTA+UK
- kg_km_21: 0.0208; = kg_21*km_21
  Transport amount in km*km, for wood chips, hardwood // wood chips, hardwood // eu+efta+uk; Freight train, average; EU+EFTA+UK
- kg_22: 8.66597e-5
  Mass in kg, for wood chips, hardwood // wood chips, hardwood // eu+efta+uk; Barge; EU+EFTA+UK
- km_22: 270.022
  Distance in km, for wood chips, hardwood // wood chips, hardwood // eu+efta+uk; Barge; EU+EFTA+UK
- kg_km_22: 0.0234; = kg_22*km_22
  Transport amount in km*km, for wood chips, hardwood // wood chips, hardwood // eu+efta+uk; Barge; EU+EFTA+UK
- kg_23: 8.66597e-5
  Mass in kg, for wood chips, hardwood // wood chips, hardwood // eu+efta+uk; Articulated lorry transport, Euro 4, Total weight >32 t; EU+EFTA+UK
- km_23: 130.395
  Distance in km, for wood chips, hardwood // wood chips, hardwood // eu+efta+uk; Articulated lorry transport, Euro 4, Total weight >32 t; EU+EFTA+UK
- kg_km_23: 0.0113; = kg_23*km_23
  Transport amount in km*km, for wood chips, hardwood // wood chips, hardwood // eu+efta+uk; Articulated lorry transport, Euro 4, Total weight >32 t; EU+EFTA+UK
- kg_24: 1
  Mass in kg, for chemical, inorganic // market for chemicals, inorganic // glo; Freight train, average; EU+EFTA+UK
- km_24: 1
  Distance in km, for chemical, inorganic // market for chemicals, inorganic // glo; Freight train, average; EU+EFTA+UK
- kg_km_24: 0.035; = kg_24*km_24
  Transport amount in km*km, for chemical, inorganic // market for chemicals, inorganic // glo; Freight train, average; EU+EFTA+UK
- kg_25: 1
  Mass in kg, for chemical, inorganic // market for chemicals, inorganic // glo; Barge; EU+EFTA+UK
- km_25: 1
  Distance in km, for chemical, inorganic // market for chemicals, inorganic // glo; Barge; EU+EFTA+UK
- kg_km_25: 0.0394; = kg_25*km_25
  Transport amount in km*km, for chemical, inorganic // market for chemicals, inorganic // glo; Barge; EU+EFTA+UK
- kg_26: 1
  Mass in kg, for chemical, inorganic // market for chemicals, inorganic // glo; Articulated lorry transport, Euro 4, Total weight >32 t; EU+EFTA+UK
- km_26: 1
  Distance in km, for chemical, inorganic // market for chemicals, inorganic // glo; Articulated lorry transport, Euro 4, Total weight >32 t; EU+EFTA+UK
- kg_km_26: 0.019; = kg_26*km_26
  Transport amount in km*km, for chemical, inorganic // market for chemicals, inorganic // glo; Articulated lorry transport, Euro 4, Total weight >32 t; EU+EFTA+UK
- kg_27: 1.27e-5
  Mass in kg, for hydrogen peroxide, 100% // hydrogen peroxide, 100% production // eu+efta+uk; Freight train, average; EU+EFTA+UK
- km_27: 240.157
  Distance in km, for hydrogen peroxide, 100% // hydrogen peroxide, 100% production // eu+efta+uk; Freight train, average; EU+EFTA+UK
- kg_km_27: 0.00305; = kg_27*km_27
  Transport amount in km*km, for hydrogen peroxide, 100% // hydrogen peroxide, 100% production // eu+efta+uk; Freight train, average; EU+EFTA+UK
- kg_28: 1.27e-5
  Mass in kg, for hydrogen peroxide, 100% // hydrogen peroxide, 100% production // eu+efta+uk; Barge; EU+EFTA+UK
- km_28: 270.079
  Distance in km, for hydrogen peroxide, 100% // hydrogen peroxide, 100% production // eu+efta+uk; Barge; EU+EFTA+UK
- kg_km_28: 0.00343; = kg_28*km_28
  Transport amount in km*km, for hydrogen peroxide, 100% // hydrogen peroxide, 100% production // eu+efta+uk; Barge; EU+EFTA+UK
- kg_29: 1.27e-5
  Mass in kg, for hydrogen peroxide, 100% // hydrogen peroxide, 100% production // eu+efta+uk; Articulated lorry transport, Euro 4, Total weight >32 t; EU+EFTA+UK
- km_29: 129.921
  Distance in km, for hydrogen peroxide, 100% // hydrogen peroxide, 100% production // eu+efta+uk; Articulated lorry transport, Euro 4, Total weight >32 t; EU+EFTA+UK
- kg_km_29: 0.00165; = kg_29*km_29
  Transport amount in km*km, for hydrogen peroxide, 100% // hydrogen peroxide, 100% production // eu+efta+uk; Articulated lorry transport, Euro 4, Total weight >32 t; EU+EFTA+UK
- kg_30: 0.0122283
  Mass in kg, for maize starch, from wet milling (starch drying), at plant // glo; Freight train, average; EU+EFTA+UK
- km_30: 239.609
  Distance in km, for maize starch, from wet milling (starch drying), at plant // glo; Freight train, average; EU+EFTA+UK
- kg_km_30: 2.93; = kg_30*km_30
  Transport amount in km*km, for maize starch, from wet milling (starch drying), at plant // glo; Freight train, average; EU+EFTA+UK
- kg_31: 0.0122283
  Mass in kg, for maize starch, from wet milling (starch drying), at plant // glo; Barge; EU+EFTA+UK
- km_31: 269.867
  Distance in km, for maize starch, from wet milling (starch drying), at plant // glo; Barge; EU+EFTA+UK
- kg_km_31: 3.3; = kg_31*km_31
  Transport amount in km*km, for maize starch, from wet milling (starch drying), at plant // glo; Barge; EU+EFTA+UK
- kg_32: 0.0122283
  Mass in kg, for maize starch, from wet milling (starch drying), at plant // glo; Articulated lorry transport, Euro 4, Total weight >32 t; EU+EFTA+UK
- km_32: 130.027
  Distance in km, for maize starch, from wet milling (starch drying), at plant // glo; Articulated lorry transport, Euro 4, Total weight >32 t; EU+EFTA+UK
- kg_km_32: 1.59; = kg_32*km_32
  Transport amount in km*km, for maize starch, from wet milling (starch drying), at plant // glo; Articulated lorry transport, Euro 4, Total weight >32 t; EU+EFTA+UK
- kg_33: 0.0213068
  Mass in kg, for wheat starch, from wet milling, at plant // rer; Freight train, average; EU+EFTA+UK
- km_33: 239.829
  Distance in km, for wheat starch, from wet milling, at plant // rer; Freight train, average; EU+EFTA+UK
- kg_km_33: 5.11; = kg_33*km_33
  Transport amount in km*km, for wheat starch, from wet milling, at plant // rer; Freight train, average; EU+EFTA+UK
- kg_34: 0.0213068
  Mass in kg, for wheat starch, from wet milling, at plant // rer; Barge; EU+EFTA+UK
- km_34: 269.867
  Distance in km, for wheat starch, from wet milling, at plant // rer; Barge; EU+EFTA+UK
- kg_km_34: 5.75; = kg_34*km_34
  Transport amount in km*km, for wheat starch, from wet milling, at plant // rer; Barge; EU+EFTA+UK
- kg_35: 0.0213068
  Mass in kg, for wheat starch, from wet milling, at plant // rer; Articulated lorry transport, Euro 4, Total weight >32 t; EU+EFTA+UK
- km_35: 130.005
  Distance in km, for wheat starch, from wet milling, at plant // rer; Articulated lorry transport, Euro 4, Total weight >32 t; EU+EFTA+UK
- kg_km_35: 2.77; = kg_35*km_35
  Transport amount in km*km, for wheat starch, from wet milling, at plant // rer; Articulated lorry transport, Euro 4, Total weight >32 t; EU+EFTA+UK
- kg_36: 0.00947333
  Mass in kg, for biodegradable waste to landfill // landfill of biodegradable waste // eu+efta+uk; Articulated lorry transport, Euro 4, Total weight >32 t; EU+EFTA+UK
- km_36: 77
  Distance in km, for biodegradable waste to landfill // landfill of biodegradable waste // eu+efta+uk; Articulated lorry transport, Euro 4, Total weight >32 t; EU+EFTA+UK
- kg_km_36: 0.729447; = kg_36*km_36
  Transport amount in km*km, for biodegradable waste to landfill // landfill of biodegradable waste // eu+efta+uk; Articulated lorry transport, Euro 4, Total weight >32 t; EU+EFTA+UK
- kg_37: 0.00947333
  Mass in kg, for biowaste // enclosed composting // eu+efta+uk; Articulated lorry transport, Euro 4, Total weight >32 t; EU+EFTA+UK
- km_37: 77
  Distance in km, for biowaste // enclosed composting // eu+efta+uk; Articulated lorry transport, Euro 4, Total weight >32 t; EU+EFTA+UK
- kg_km_37: 0.729447; = kg_37*km_37
  Transport amount in km*km, for biowaste // enclosed composting // eu+efta+uk; Articulated lorry transport, Euro 4, Total weight >32 t; EU+EFTA+UK
- kg_38: 0.00578994
  Mass in kg, for waste (unspecified) // landfill of plastic waste // eu+efta+uk; Articulated lorry transport, Euro 4, Total weight >32 t; EU+EFTA+UK
- km_38: 77
  Distance in km, for waste (unspecified) // landfill of plastic waste // eu+efta+uk; Articulated lorry transport, Euro 4, Total weight >32 t; EU+EFTA+UK
- kg_km_38: 0.445826; = kg_38*km_38
  Transport amount in km*km, for waste (unspecified) // landfill of plastic waste // eu+efta+uk; Articulated lorry transport, Euro 4, Total weight >32 t; EU+EFTA+UK
- kg_39: 0.0115799
  Mass in kg, for waste (unspecified) // landfill of inert material (other materials) // eu+efta+uk; Articulated lorry transport, Euro 4, Total weight >32 t; EU+EFTA+UK
- km_39: 77
  Distance in km, for waste (unspecified) // landfill of inert material (other materials) // eu+efta+uk; Articulated lorry transport, Euro 4, Total weight >32 t; EU+EFTA+UK
- kg_km_39: 0.891651; = kg_39*km_39
  Transport amount in km*km, for waste (unspecified) // landfill of inert material (other materials) // eu+efta+uk; Articulated lorry transport, Euro 4, Total weight >32 t; EU+EFTA+UK

## Reference product
- recovered fibre for packaging grades - corrugated grades and cartonboard grades // recovered fibre for packaging grades - corrugated grades and cartonboard grades // eu+efta+uk: 1

## Inputs
- Electricity from Electricity grid mix 1kV-60kV - EU+EFTA+UK: 0.13392
- Transport of waste paper, sorted // sorting waste paper, unsorted // eu+efta+uk by Freight train, average - EU+EFTA+UK: 264; = kg_km_0
- Transport of waste paper, sorted // sorting waste paper, unsorted // eu+efta+uk by Barge - EU+EFTA+UK: 297; = kg_km_1
- Transport of waste paper, sorted // sorting waste paper, unsorted // eu+efta+uk by Articulated lorry transport, Euro 4, Total weight >32 t - EU+EFTA+UK: 143; = kg_km_2
- Transport of heavy fuel oil (1.0 wt.% s) // heavy fuel oil at refinery // eu+efta+uk by Freight train, average - EU+EFTA+UK: 0.000881; = kg_km_3
- Transport of heavy fuel oil (1.0 wt.% s) // heavy fuel oil at refinery // eu+efta+uk by Barge - EU+EFTA+UK: 0.000991; = kg_km_4
- Transport of heavy fuel oil (1.0 wt.% s) // heavy fuel oil at refinery // eu+efta+uk by Articulated lorry transport, Euro 4, Total weight >32 t - EU+EFTA+UK: 0.000477; = kg_km_5
- Transport of light fuel oil // light fuel oil at refinery // eu+efta+uk by Freight train, average - EU+EFTA+UK: 0.0054; = kg_km_6
- Transport of light fuel oil // light fuel oil at refinery // eu+efta+uk by Barge - EU+EFTA+UK: 0.00608; = kg_km_7
- Transport of light fuel oil // light fuel oil at refinery // eu+efta+uk by Articulated lorry transport, Euro 4, Total weight >32 t - EU+EFTA+UK: 0.00293; = kg_km_8
- Transport of diesel // diesel mix at refinery // eu+efta+uk by Freight train, average - EU+EFTA+UK: 0.000456; = kg_km_9
- Transport of diesel // diesel mix at refinery // eu+efta+uk by Barge - EU+EFTA+UK: 0.000513; = kg_km_10
- Transport of diesel // diesel mix at refinery // eu+efta+uk by Articulated lorry transport, Euro 4, Total weight >32 t - EU+EFTA+UK: 0.000247; = kg_km_11
- Transport of hard coal, at consumer eu+efta // hard coal mix // eu+efta+uk by Freight train, average - EU+EFTA+UK: 0.489; = kg_km_12
- Transport of hard coal, at consumer eu+efta // hard coal mix // eu+efta+uk by Barge - EU+EFTA+UK: 0.55; = kg_km_13
- Transport of hard coal, at consumer eu+efta // hard coal mix // eu+efta+uk by Articulated lorry transport, Euro 4, Total weight >32 t - EU+EFTA+UK: 0.265; = kg_km_14
- Transport of lignite eu+efta // lignite mix // eu+efta+uk by Freight train, average - EU+EFTA+UK: 0.211; = kg_km_15
- Transport of lignite eu+efta // lignite mix // eu+efta+uk by Barge - EU+EFTA+UK: 0.237; = kg_km_16
- Transport of lignite eu+efta // lignite mix // eu+efta+uk by Articulated lorry transport, Euro 4, Total weight >32 t - EU+EFTA+UK: 0.114; = kg_km_17
- Transport of wood chips, softwood // wood chips, softwood // eu+efta+uk by Freight train, average - EU+EFTA+UK: 0.0208; = kg_km_18
- Transport of wood chips, softwood // wood chips, softwood // eu+efta+uk by Barge - EU+EFTA+UK: 0.0234; = kg_km_19
- Transport of wood chips, softwood // wood chips, softwood // eu+efta+uk by Articulated lorry transport, Euro 4, Total weight >32 t - EU+EFTA+UK: 0.0113; = kg_km_20
- Transport of wood chips, hardwood // wood chips, hardwood // eu+efta+uk by Freight train, average - EU+EFTA+UK: 0.0208; = kg_km_21
- Transport of wood chips, hardwood // wood chips, hardwood // eu+efta+uk by Barge - EU+EFTA+UK: 0.0234; = kg_km_22
- Transport of wood chips, hardwood // wood chips, hardwood // eu+efta+uk by Articulated lorry transport, Euro 4, Total weight >32 t - EU+EFTA+UK: 0.0113; = kg_km_23
- Transport of chemical, inorganic // market for chemicals, inorganic // glo by Freight train, average - EU+EFTA+UK: 0.035; = kg_km_24
- Transport of chemical, inorganic // market for chemicals, inorganic // glo by Barge - EU+EFTA+UK: 0.0394; = kg_km_25
- Transport of chemical, inorganic // market for chemicals, inorganic // glo by Articulated lorry transport, Euro 4, Total weight >32 t - EU+EFTA+UK: 0.019; = kg_km_26
- Transport of hydrogen peroxide, 100% // hydrogen peroxide, 100% production // eu+efta+uk by Freight train, average - EU+EFTA+UK: 0.00305; = kg_km_27
- Transport of hydrogen peroxide, 100% // hydrogen peroxide, 100% production // eu+efta+uk by Barge - EU+EFTA+UK: 0.00343; = kg_km_28
- Transport of hydrogen peroxide, 100% // hydrogen peroxide, 100% production // eu+efta+uk by Articulated lorry transport, Euro 4, Total weight >32 t - EU+EFTA+UK: 0.00165; = kg_km_29
- Transport of maize starch, from wet milling (starch drying), at plant // glo by Freight train, average - EU+EFTA+UK: 2.93; = kg_km_30
- Transport of maize starch, from wet milling (starch drying), at plant // glo by Barge - EU+EFTA+UK: 3.3; = kg_km_31
- Transport of maize starch, from wet milling (starch drying), at plant // glo by Articulated lorry transport, Euro 4, Total weight >32 t - EU+EFTA+UK: 1.59; = kg_km_32
- Transport of wheat starch, from wet milling, at plant // rer by Freight train, average - EU+EFTA+UK: 5.11; = kg_km_33
- Transport of wheat starch, from wet milling, at plant // rer by Barge - EU+EFTA+UK: 5.75; = kg_km_34
- Transport of wheat starch, from wet milling, at plant // rer by Articulated lorry transport, Euro 4, Total weight >32 t - EU+EFTA+UK: 2.77; = kg_km_35
- Transport of biodegradable waste to landfill // landfill of biodegradable waste // eu+efta+uk by Articulated lorry transport, Euro 4, Total weight >32 t - EU+EFTA+UK: 0.729447; = kg_km_36
- Transport of biowaste // enclosed composting // eu+efta+uk by Articulated lorry transport, Euro 4, Total weight >32 t - EU+EFTA+UK: 0.729447; = kg_km_37
- Transport of waste (unspecified) // landfill of plastic waste // eu+efta+uk by Articulated lorry transport, Euro 4, Total weight >32 t - EU+EFTA+UK: 0.445826; = kg_km_38
- Transport of waste (unspecified) // landfill of inert material (other materials) // eu+efta+uk by Articulated lorry transport, Euro 4, Total weight >32 t - EU+EFTA+UK: 0.891651; = kg_km_39
- recovered fibre for packaging grades - corrugated grades and cartonboard grades // recovered fibre for packaging grades - corrugated grades and cartonboard grades // eu+efta+uk, blackbox: 1
- recovered fibre for packaging grades - corrugated grades and cartonboard grades // recovered fibre for packaging grades - corrugated grades and cartonboard grades // eu+efta+uk, elementary: 1

## Impact indicators
- Eutrophication marine: 0.000459324
- Ecotoxicity, freshwater: 6.34759
- Land use: 3.89847
- Water use: 0.0693433
- Resource use, minerals and metals: 4.68993e-7
- Resource use, fossils: 1.30199
- Climate change: 0.173652
- Ozone depletion: 2.11697e-10
- Human toxicity, cancer: 8.62113e-11
- Human toxicity, non-cancer: 1.57516e-9
- EF-particulate Matter: 6.96125e-9
- Ionising radiation, human health: 0.00739758
- Photochemical ozone formation - human health: 0.000424907
- Acidification: 0.000569096
- Eutrophication, terrestrial: 0.00240233
- Eutrophication, freshwater: 1.05462e-5

## Deviations from the LCI method principle
The background data use the \xe2\x80\x9cRecycled content cut-off\xe2\x80\x9d approach to allocate end-of-life by-products and secondary materials. This allocation is explained in the description of the recycled content system model (http://www.ecoinvent.org/database/system-models-in-ecoinvent-3/cut-off-system-model/allocation-cut-off-by-classification.html).

## Deviations from the LCI method approaches
Background data:
- the \xe2\x80\x9cRecycled content cut-off\xe2\x80\x9d approach to allocate end-of-life by-products and secondary materials. This allocation is explained in the description of the recycled content system model (http://www.ecoinvent.org/database/system-models-in-ecoinvent-3/cut-off-system-model/allocation-cut-off-by-classification.html). The ecoinvent database mostly relies on “Allocation – market values” apart for few exceptions particularly in the energy sector. ecoinvent energy data is replaced with EF3.0 core data as per the EF guidelines version 2.0.
OR
- EF compliant data

## Modelling constants
All modelling constants follow the requirements listed in the Tender Specifications ENV.B.1/SER/2016/0038vl. Completeness: All known environmental flows are included. All known resource uses and emissions are listed in the inventory. Water use: water use is modelled at country level using separate flows for water withdrawal, water release and water evaporation. Cut-off: All known environmental flows are included. All known resource uses and emissions are listed in the inventory. Handling multi-functional processes: the following PEF multi- functionality decision hierarchy is applied for resolving all multi- functionality problems: (1) subdivision or system expansion; (2) allocation based on a relevant underlying physical relationship (substitution may apply here); (3) allocation based on some other relationship. Direct land use change: GHG emissions from direct LUC allocated to good/service for 20 years after the LUC occurs, with IPCC default values. Carbon storage and delayed emissions: credits associated with temporary (carbon) storage or delayed emissions up to 300 years are not be considered. Emissions off-setting: are not included. Capital goods (including infrastructures) and their End of life: they are included. System boundaries: system boundaries include all processes linked to the product supply chain (e.g. maintenance). Time period: emissions and removals are modelled as if released or removed at the beginning of the assessment method. Fossil and biogenic carbon emissions and removals: removals and emissions are modelled as follows: All GHG emissions from fossil fuels (including peat and limestone) are modelled consistently with the most updated ILCD list of elementary flows. The non-fossil (biogenic) carbon flows are modelled consistently with the most updated ILCD list of elementary flows.

## Cut-off and completeness
All known environmental flows are included. All known resource uses and emissions are listed in the inventory. The dataset dry mass balance has been checked to ensure the inventory is complete. Capital goods (e.g. infrastructure) and their end-of-life are included.

## Data selection and combination
These datasets include, in both their foreground and background data, links to EF3.0 compliant data.
The relevant background data on energy, transport, and End of Life are from the LCDN data node (http://lcdn.thinkstep.com/Node/).
All other background data in the supply of this product for which no EF3.0 process was available are from ecoinvent v3.7 database (www.ecoinvent.org) or other data sources.

## Data treatment and extrapolations
Several data sources have been used to model the inventory.

## Review details
Internal reviews have been asked to review the plausibility of the unit process, LCIA scores, and DQRs. Internal reviewers have also been asked to review the data for EF compliancy. The consortium is therefore responsible for aspects such as compliancy with the ILCD format, including validation in Look@LCI, and nomenclature.
Internal reviwers have been asked to judge based on the process name, that the unit process models in a complete and representative way the process in the requested location. The review encompassed the plausability of:
- exchanges with nature (elementary flows) as well as exchanges such as product and waste flows.
- meta information (general comment, technology comment, system boundaries, allocation, cut-off rules, etc.). Reviewers were asked to judge if the provided information is enough to understand the content of the process.
- LCIA scores
- DQRs including precision, technology, time and geography. As well as the overall DQR.
External reviewers have been asked to provide their expertise in the field of interest. External reviewers have been asked to review the unit process, including eventual methodological choices, the LCIA scores (provided with contribution scores as well), and DQRs. External reviewers have been provided all the information in a tool developed by the consortium for the purpose of this project.
External reviewers have been asked to judge based on the process name, that the unit process models in a complete and representative way the process in the requested location. The review encompassed:
- Plausability and completeness of exchanges with nature (elementary flows) as well as exchanges such as product and waste flows.
- Review of meta information (general comment, technology comment, system boundaries, allocation, cut-off rules, etc.). Reviewers were asked to judge if the provided information is enough to understand the content of the process.
- Review of properties (biogenic carbon and water content).
- Review of allocation keys.
- Plausability of LCIA scores calculated by the consortium.
- Plausability of DQRs including precision, technology, time and geography. As well as the overall DQR.

## Data sources
- Background Data for Representative products and organisations. EF 3.0 compliant (data stock)
- RISE Research Institutes of Sweden
- Personal communication with industry reference groups (2021)

## Intended applications
Implementation of regular Product Environmental Footprint (PEF) studies and Organisation Environmental Footprint (OEF) studies exclusively under the specified Product groups and sectors as defined in the Product Environmental Footprint Category Rules (PEFCR) and Organisation Environmental Footprint Sectorial Rules (OEFSR) listed in http://ec.europa.eu/environment/eussd/smgp/PEFCR_OEFSR.htm
