# bamboo fibre, elementary; technology mix; production mix, at farm

Dataset: ILCD process, Unit process, single operation
Geography: EU+EFTA+UK
Reference year: 2016
Valid until: 2024
Classification: Other Services / Other services
LCI method principle: Attributional
LCI method approaches: Allocation - market value
Completeness: All relevant flows quantified
Project: Provision of process-based 3.0 Environmental Footprint-compliant life cycle inventory datasets - Renewable materials - contract number 070201/2020/840085/SER/ENV.B.1
Generated by: Blonk Sustainability Tools
Owner: Blonk Sustainability Tools
Compliance: Environmental Footprint non-primary supporting data set; Environmental Footprint 3.1
Amounts: no units in this file; such an amount is in the reference unit of its flow, which a separate flow dataset defines
copyright: true
licenseType: Free of charge for some user types or use types
accessRestrictions: Free of charge for all final users implementing a regular Product Environmental Footprint (PEF) studies and Organisation Environmental Footprint (OEF) studies exclusively under the specified Product groups and sectors as defined in the Product Environmental Footprint Category Rules (PEFCR) and Organisation Environmental Footprint Sectorial Rules (OEFSR) listed in http://ec.europa.eu/environment/eussd/smgp/PEFCR_OEFSR.htm and in accordance with the terms and conditions of the EULA (available at https://ecoinvent.lca-data.com/) exclusively until 31st December 2024. Any use of this dataset or any derivative data not within the specific context of one of the PEF/OEF projects or after the end of 2024 is not permitted.

## General comment
Notice: this data set supersedes the EF3.0-compliant version (see link under "preceding data set version" below calculated with the EF3.0). The life cycle inventory is not changed from the original EF3.0 data set. The LCIA results are calculated based on the EF3.1 methods which provide updated characterisation factors in the following impact categories: Climate Change, Ecotoxicity freshwater, Photochemical Ozone Formation, Acidification, Human Toxicity non-cancer, and Human Toxicity cancer. The review report and the data quality ratings refer to the original results. The data set has been updated by the European Commission on the basis of the original EF3.0 data set delivered by the data provider.This sub-process has limited documentation only. For all detailed documentation of the full model to which this data set belongs (such as DQRs, review reports and other technical documentation), please see this process: bamboo fibre - EU+EFTA+UK []

## Technology and included processes
This process takes into account only the cultivation and the processing of bamboo using Alkali extraction process based on a viscose fibre processing proxy. No bamboo is cultivated in EU+EFTA+UK region. Therefore, this model is for bamboo produced globally (India, Brazil and China with respective percentages of 59, 18 and 23%). The processing takes place in Europe. No transport of bamboo was taken into account.

## Reference product
- bamboo fibre // bamboo fibre // eu+efta+uk, elementary: 1

## Inputs
- river water, Renewable material resources from water [AL]: 0.000230585
- river water, Renewable material resources from water [AT]: 0.00297095
- river water, Renewable material resources from water [BA]: 0.000287457
- river water, Renewable material resources from water [BE]: 0.003576
- river water, Renewable material resources from water [BG]: 0.000915699
- river water, Renewable material resources from water [BY]: 0.00118902
- river water, Renewable material resources from water [CH]: 0.00354335
- river water, Renewable material resources from water [CZ]: 0.00246615
- river water, Renewable material resources from water [DE]: 0.0268395
- river water, Renewable material resources from water [DK]: 0.00194617
- river water, Renewable material resources from water [EE]: 0.000265752
- river water, Renewable material resources from water [ES]: 0.0115176
- river water, Renewable material resources from water [FI]: 0.00166004
- river water, Renewable material resources from water [FR]: 0.0189326
- river water, Renewable material resources from water [GB]: 0.0188144
- river water, Renewable material resources from water: 0.000116863
- river water, Renewable material resources from water [GR]: 0.00214025
- river water, Renewable material resources from water [HR]: 0.000688163
- river water, Renewable material resources from water [HU]: 0.00180402
- river water, Renewable material resources from water [IE]: 0.00194328
- river water, Renewable material resources from water [IS]: 0.000110889
- river water, Renewable material resources from water [IT]: 0.0161983
- river water, Renewable material resources from water [LT]: 0.000567427
- river water, Renewable material resources from water [LU]: 0.00039391
- river water, Renewable material resources from water [LV]: 0.000334591
- river water, Renewable material resources from water [MD]: 0.000177038
- river water, Renewable material resources from water [ME]: 7.1321e-5
- river water, Renewable material resources from water [MK]: 0.00019698
- river water, Renewable material resources from water [MT]: 0.000108967
- river water, Renewable material resources from water [NL]: 0.00600448
- river water, Renewable material resources from water [NO]: 0.00227288
- river water, Renewable material resources from water [PL]: 0.00691048
- river water, Renewable material resources from water [PT]: 0.0021805
- river water, Renewable material resources from water [RO]: 0.00302724
- river water, Renewable material resources from water [RS]: 0.000751221
- river water, Renewable material resources from water [SE]: 0.00327973
- river water, Renewable material resources from water [SI]: 0.000464457
- river water, Renewable material resources from water [SK]: 0.00109015
- river water, Renewable material resources from water [SM]: 1.3568e-5
- river water, Renewable material resources from water [UA]: 0.00319633

## Outputs
- Water, Emissions to air, unspecified: 0.0305856
- Water, Emissions to water, unspecified [AL]: 0.000183315
- Water, Emissions to water, unspecified [AT]: 0.0023619
- Water, Emissions to water, unspecified [BA]: 0.000228529
- Water, Emissions to water, unspecified [BE]: 0.00284292
- Water, Emissions to water, unspecified [BG]: 0.000727981
- Water, Emissions to water, unspecified [BY]: 0.000945271
- Water, Emissions to water, unspecified [CH]: 0.00281696
- Water, Emissions to water, unspecified [CZ]: 0.00196059
- Water, Emissions to water, unspecified [DE]: 0.0213374
- Water, Emissions to water, unspecified [DK]: 0.00154721
- Water, Emissions to water, unspecified [EE]: 0.000211273
- Water, Emissions to water, unspecified [ES]: 0.00915649
- Water, Emissions to water, unspecified [FI]: 0.00131974
- Water, Emissions to water, unspecified [FR]: 0.0150514
- Water, Emissions to water, unspecified [GB]: 0.0149574
- Water, Emissions to water, unspecified: 9.29062e-5
- Water, Emissions to water, unspecified [GR]: 0.0017015
- Water, Emissions to water, unspecified [HR]: 0.00054709
- Water, Emissions to water, unspecified [HU]: 0.00143419
- Water, Emissions to water, unspecified [IE]: 0.00154491
- Water, Emissions to water, unspecified [IS]: 8.8157e-5
- Water, Emissions to water, unspecified [IT]: 0.0128777
- Water, Emissions to water, unspecified [LT]: 0.000451105
- Water, Emissions to water, unspecified [LU]: 0.000313158
- Water, Emissions to water, unspecified [LV]: 0.000266
- Water, Emissions to water, unspecified [MD]: 0.000140745
- Water, Emissions to water, unspecified [ME]: 5.67002e-5
- Water, Emissions to water, unspecified [MK]: 0.000156599
- Water, Emissions to water, unspecified [MT]: 8.66286e-5
- Water, Emissions to water, unspecified [NL]: 0.00477356
- Water, Emissions to water, unspecified [NO]: 0.00180694
- Water, Emissions to water, unspecified [PL]: 0.00549383
- Water, Emissions to water, unspecified [PT]: 0.0017335
- Water, Emissions to water, unspecified [RO]: 0.00240665
- Water, Emissions to water, unspecified [RS]: 0.00059722
- Water, Emissions to water, unspecified [SE]: 0.00260739
- Water, Emissions to water, unspecified [SI]: 0.000369244
- Water, Emissions to water, unspecified [SK]: 0.00086667
- Water, Emissions to water, unspecified [SM]: 1.07866e-5
- Water, Emissions to water, unspecified [UA]: 0.00254108

## Impact indicators
- Water use: 0.484519
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
## Deviations from the LCI method principle
The background data uses: the Recycled content cut-off approach to allocate end-of-life by-products and secondary materials. This allocation is explained in the description of the recycled content system model (http://www.ecoinvent.org/database/system-models-in-ecoinvent-3/cut-off-system-model/allocation-cut-off-by-classification.html) or EF compliant data

## Deviations from the LCI method approaches
Background data:
- the Recycled content cut-off approach to allocate end-of-life by-products and secondary materials. This allocation is explained in the description of the recycled content system model (http://www.ecoinvent.org/database/system-models-in-ecoinvent-3/cut-off-system-model/allocation-cut-off-by-classification.html). The ecoinvent database mostly relies on “Allocation – market values” apart for few exceptions particularly in the energy sector. ecoinvent energy data is replaced with EF3.0 core data as per the EF guidelines version 2.0.
OR
- EF compliant data

## Modelling constants
All modelling constants follow the requirements listed in the Tender Specifications 070201/2020/SER/ENV.B1. Completeness: There are no intentional cut-offs in the inventory no matter how small their contribution to all the EF impact categories is. Eventual cut-offs are in compliance with the Guide for EF compliant data sets (JRC 2020), i.e. only if below the 3% cut-off rule. Water use: water use is modelled at country level using separate flows for water withdrawal, water release and water evaporation. Handling multi-functional processes: the following PEF multi- functionality decision hierarchy is applied for resolving all multi- functionality problems: (1) subdivision or system expansion; (2) allocation based on a relevant underlying physical relationship (substitution may apply here); (3) allocation based on some other relationship. Direct land use change: GHG emissions from direct LUC allocated to good/service for 20 years after the LUC occurs, with IPCC default values. Carbon storage and delayed emissions: credits associated with temporary (carbon) storage or delayed emissions up to 300 years are not be considered. Emissions off-setting: are not included. Capital goods (including infrastructures) and their End of life: they are included. System boundaries: system boundaries include all processes linked to the product supply chain (e.g. maintenance). Time period: emissions and removals are modelled as if released or removed at the beginning of the assessment method. Fossil and biogenic carbon emissions and removals: removals and emissions are modelled as follows: All GHG emissions from fossil fuels (including peat and limestone) are modelled consistently with the most updated ILCD list of elementary flows. The non-fossil (biogenic) carbon flows are modelled consistently with the most updated ILCD list of elementary flows.

## Cut-off and completeness
There are no intentional cut-offs in the inventory no matter how small their contribution to all the EF impact categories is. Eventual cut-offs are in compliance with the Guide for EF compliant data sets (JRC 2020), i.e. only if below the 3% cut-off rule. The dataset dry mass and water balance has been checked to ensure the inventory is complete. Capital goods (e.g. infrastructure) and their end-of-life are included.

## Data selection and combination
These datasets include, in both their foreground and background data, links to EF3.0 compliant data.
The relevant background data on energy, transport, and End of Life are from the LCDN data node (http://lcdn.thinkstep.com/Node/).
All other background data in the supply of this product for which no EF3.0 process was available are from ecoinvent v3.7 database (www.ecoinvent.org) or other data sources.

## Data treatment and extrapolations
Several data sources have been used to model the inventory.

## Use advice
This data set is a supporting sub-data set and must be used exclusively as sub-data set of its corresponding level-1 partly disaggregated data set (see “General comment” field for exact name and UUID).

## Data sources
- Background Data for Representative products and organisations. EF 3.0 compliant (data stock)
- JaingHua X., XiaoSheng Y., (2001). Medium and large scale Bamboo. International network for bamboo and rattan.China
- Marinussen M., Kernebeek H ., van Broekema R., Groen E., Kool A., van Zeist WJ., Dolman M., Blonk, H., (2012). LCI data for the calculation tool Feedprint for greenhouse gas emissions of feed production and utilization: Cultivation oil seeds and oil fruits. Blonk Consultants and WUR Livestock Research.
- Mekonnen M., Hoekstra A. (2010). The green, blue and grey water footprint of crops and derived crop products - Volume 1: Main Report volume 1.(41)
- Blonk Consultants., (2019). Agrifootprint database v5.0
- Blonk Consultants. (2018). The Direct Land Use Change Assessment Tool v.2018
- IPCC., (2006). IPCC Guidelines for National Greenhouse Gas Inventories. http://www.ipcc-nggip.iges.or.jp/public/2006gl/index.html
- European Environment Agency., (2013). EMEP/EEA Air Pollutant Emission Inventory Guidebook 2013. 12. http://www.eea.europa.eu/publications/emep-eea-guidebook-2013
- PRé consultants., Radboud University Nijmegen., Leiden University ., RIVM., (2013). ReCiPe 1.08: Characterisation factors spreadsheet.
- Nemecek T., Schnetzer J., (2012). Methods of assessment of direct field emissions for LCIs of agricultural production systems.
- Banik RL., (2016). Introduction to South Asian Bamboos (pp. 3–14). https://doi.org/10.1007/978-981-10-0569-5_1
- Bonilla SH., Guarnetti RL., Almeida CM., Giannetti, BF., (2010). Sustainability assessment of a giant bamboo plantation in Brazil: exploring the influence of labour, time and space. Journal of Cleaner Production, 18(1), 83–91. https://doi.org/10.1016/j.jclepro.2009.07.012
- FEA., (2004) Fibre production. Lenzing AG, Austria.

## Intended applications
Implementation of regular Product Environmental Footprint (PEF) studies and Organisation Environmental Footprint (OEF) studies exclusively under the specified Product groups and sectors as defined in the Product Environmental Footprint Category Rules (PEFCR) and Organisation Environmental Footprint Sectorial Rules (OEFSR) listed in http://ec.europa.eu/environment/eussd/smgp/PEFCR_OEFSR.htm
