# wrapping with thread; wrapping, rotor spinning machine; technology mix; service

Dataset: ILCD process, Partly terminated system
Geography: EU+EFTA+UK
Reference year: 2021
Valid until: 2024
Classification: Systems / Textiles, furnitures and other interiors
LCI method principle: Attributional
LCI method approaches: Allocation - market value
Completeness: All relevant flows quantified
Project: Provision of process-based 3.0 Environmental Footprint-compliant life cycle inventory datasets - Apparel 2 - contract number 070201/2020/840292/SER/ENV.B.1
Generated by: Life Cycle Indonesia
Owner: PRé Sustainability B.V.
Compliance: ILCD Data Network - Entry-level; Suggestions for updating the PEF method 2019; ISO 14040 Environmental Management – Life Cycle Assessment – Principles and Framework, 2006; ISO 14044:2006. Environmental Management – Life Cycle Assessment – Requirements and guidelines.; Environmental Footprint 3.1
Review: Dependent internal review by Avraam Symeonidis, Emilia Moreno Ruiz; Independent review panel by Fábio Valebona
Data quality: Overall quality: Very good; Time representativeness: Very good; Geographical representativeness: Very good; Technological representativeness: Very good; Precision: Good; Methodological appropriateness and consistency: Not applicable
Amounts: no units in this file; such an amount is in the reference unit of its flow, which a separate flow dataset defines
copyright: true
licenseType: Free of charge for some user types or use types
accessRestrictions: Free of charge for all final users implementing a regular Product Environmental Footprint (PEF) studies and Organisation Environmental Footprint (OEF) studies exclusively under the specified Product groups and sectors as defined in the Product Environmental Footprint Category Rules (PEFCR) and Organisation Environmental Footprint Sectorial Rules (OEFSR) listed in http://ec.europa.eu/environment/eussd/smgp/PEFCR_OEFSR.htm and in accordance with the terms and conditions of the EULA (available at https://ecoinvent.lca-data.com/) exclusively until 31st December 2024. Any use of this dataset or any derivative data not within the specific context of one of the PEF/OEF projects or after the end of 2024 is not permitted.

## General comment
Notice: this data set supersedes the EF3.0-compliant version (see link under "preceding data set version" below calculated with the EF3.0). The life cycle inventory is not changed from the original EF3.0 data set. The LCIA results are calculated based on the EF3.1 methods which provide updated characterisation factors in the following impact categories: Climate Change, Ecotoxicity freshwater, Photochemical Ozone Formation, Acidification, Human Toxicity non-cancer, and Human Toxicity cancer. The review report and the data quality ratings refer to the original results. The data set has been updated by the European Commission on the basis of the original EF3.0 data set delivered by the data provider.Core-spinning is a process by which fibres are twisted around an existing yarn, either filament or staple spun yarn, to produce a sheath core structure in which the already formed yarn is the core. Core-spun yarns are two-component structure with Core and sheath. Generally continuous filament yarn is used as core and the staple fibres used as sheath covering. The core-spun yarn used to enhance functional properties of the fabrics such as strength, durability and stretch comfort.

The production of Core-spun yarns done successfully by many spinning systems. Each system has its own features .The conventional ring spinning is simple and economy but the core positioning in the centre is difficult and major strip back problem may arise during subsequent process and the core filaments get twisted. In Dref III the core positioning can be set accurately and used to produce the industrial and conductive yarns. Probable methods of core-spun yarn production are discussed below.
1. Conventional core spinning attachment with ring spinning systems
2. S.R.R.C Core wrap spinning method
3. A.R.S. Patterned Spinning system
4. Core-twin spinning system
5. Composite electrostatic spinning system
6. Rotor spinning system
7. Friction spinning system and
8. Air jet spinning system

A user employing this service within their models should use it along with 1 kg of yarn to produce 1 kg of wrapped yarn, 0.00002 kg of lubricating oil (approximated amount) might be needed for regular maintenance of the machine, and 0.00002 kg of waste (resulted from lubricating oil usage, approximated amount) shall also be added. A user is responsible for defining the nature of recycling and/or disposal of this waste. Additionally, a user is responsible for accounting transportation expenditures of all extra input and output materials that need to be modelled alongside this service.

Fibre2Fashion (2021) Production and Properties of Core Spun Yarns https://www.fibre2fashion.com/industry-article/1764/production-and-properties-of-core-spun-yarns

## Technology and included processes
The conventional method of spinning core yarns using a ring spinning frame is reported to produce uneven looping of the core yarn which influences detrimentally the yarn quality. This method is also claimed to be inefficient since in wrapping the core filament with the loosened fibrous material an additional twist is imparted to the core yarn. These problems are not apparent when the open-end rotor spinning procedure is applied to core yarn spinning.

The advantages of a rotor spinning machine are higher production, low hairiness, more even yarn with good bulkiness. The strength of the rotor yarn is less when compared with ring spun yarn but the coefficient of variation in strength is very less2. Three methods are followed in this regard to produce the core yarn in rotor spinning machine.

Twist efficiency and pre-tension of filament are the influencing factors in core spinning. In order to increase the contact area between yarn arm and doffing tube (for increasing the twist efficiency), a copper flange was soldered to the inner end of the doffing tube. The doffing tube was mounted on a ball bearing, rotated by a separate drive opposite to the rotation of the rotor with a speed ratio of 1:9. The rotating doffing tube inserts a false twist and pushes twist back to the peel-off point. The rotation of rotor wraps the yarn arm around the continuous filament core. A minimum pre-tension is necessary to avoid filament flung out in to the rotor-collecting surface. The core is not twisted during this process. It is economical to produce coarse core-spun yarns through rotor machine than the ring core-spun yarns.

The model represents the process itself, hence the input raw materials are not included in the model. The user will use this dataset along with the input raw materials. Energy uses and infrastructure are included in the model. There is no direct emission to soil and air since the emission comes from electricity usage, while the hazardous waste comes from waste lube oil. In the model, enegy sources of machine is used solely from electricity. The machine used in this model is the rotor spinning machine. The consumption of lubricating oil using a thermobonding oven as a proxy.

Fibre2Fashion (2021) Methods of Producing Core Spun Yarn in Rotor Spinning https://www.fibre2fashion.com/industry-article/4846/methods-of-producing-core-spun-yarn-in-rotor-spinning

Fibre2Fashion (2021) Production and Properties of Core Spun Yarns https://www.fibre2fashion.com/industry-article/1764/production-and-properties-of-core-spun-yarns

## Parameters
- kg_0: 2.32603e-5
  Mass in kg, for lubricating oil // lubricants at refinery // eu+efta+uk; Freight train, average; EU+EFTA+UK
- km_0: 239.98
  Distance in km, for lubricating oil // lubricants at refinery // eu+efta+uk; Freight train, average; EU+EFTA+UK
- kg_km_0: 0.005582; = kg_0*km_0
  Transport amount in km*km, for lubricating oil // lubricants at refinery // eu+efta+uk; Freight train, average; EU+EFTA+UK
- kg_1: 2.32603e-5
  Mass in kg, for lubricating oil // lubricants at refinery // eu+efta+uk; Barge; EU+EFTA+UK
- km_1: 269.988
  Distance in km, for lubricating oil // lubricants at refinery // eu+efta+uk; Barge; EU+EFTA+UK
- kg_km_1: 0.00628; = kg_1*km_1
  Transport amount in km*km, for lubricating oil // lubricants at refinery // eu+efta+uk; Barge; EU+EFTA+UK
- kg_2: 2.32603e-5
  Mass in kg, for lubricating oil // lubricants at refinery // eu+efta+uk; Articulated lorry transport, Euro 4, Total weight >32 t; EU+EFTA+UK
- km_2: 130.007
  Distance in km, for lubricating oil // lubricants at refinery // eu+efta+uk; Articulated lorry transport, Euro 4, Total weight >32 t; EU+EFTA+UK
- kg_km_2: 0.003024; = kg_2*km_2
  Transport amount in km*km, for lubricating oil // lubricants at refinery // eu+efta+uk; Articulated lorry transport, Euro 4, Total weight >32 t; EU+EFTA+UK

## Reference product
- wrapping with thread // wrapping with thread // eu+efta+uk: 1

## Inputs
- Electricity from Electricity grid mix 1kV-60kV - EU+EFTA+UK: 0.128217
- Transport of lubricating oil // lubricants at refinery // eu+efta+uk by Freight train, average - EU+EFTA+UK: 0.005582; = kg_km_0
- Transport of lubricating oil // lubricants at refinery // eu+efta+uk by Barge - EU+EFTA+UK: 0.00628; = kg_km_1
- Transport of lubricating oil // lubricants at refinery // eu+efta+uk by Articulated lorry transport, Euro 4, Total weight >32 t - EU+EFTA+UK: 0.003024; = kg_km_2
- wrapping with thread // wrapping with thread // eu+efta+uk, blackbox: 1
- wrapping with thread // wrapping with thread // eu+efta+uk, elementary: 1

## Impact indicators
- Eutrophication marine: 9.36659e-6
- Ecotoxicity, freshwater: 0.0731147
- Land use: 0.0658944
- Water use: 0.00516283
- Resource use, minerals and metals: 2.09292e-8
- Resource use, fossils: 0.26792
- Climate change: 0.0154405
- Ozone depletion: 7.91224e-12
- Human toxicity, cancer: 7.09908e-12
- Human toxicity, non-cancer: 5.87248e-11
- EF-particulate Matter: 5.6672e-10
- Ionising radiation, human health: 0.00635483
- Photochemical ozone formation - human health: 2.6825e-5
- Acidification: 4.9002e-5
- Eutrophication, terrestrial: 9.95367e-5
- Eutrophication, freshwater: 9.58389e-8

## Deviations from the LCI method principle
The background data uses:
- the \xe2\x80\x9cRecycled content cut-off\xe2\x80\x9d approach to allocate end-of-life by-products and secondary materials. This allocation is explained in the description of the recycled content system model (http://www.ecoinvent.org/database/system-models-in-ecoinvent-3/cut-off-system-model/allocation-cut-off-by-classification.html).
OR
- EF compliant data

## Deviations from the LCI method approaches
Background data:
- the \xe2\x80\x9cRecycled content cut-off\xe2\x80\x9d approach to allocate end-of-life by-products and secondary materials. This allocation is explained in the description of the recycled content system model (http://www.ecoinvent.org/database/system-models-in-ecoinvent-3/cut-off-system-model/allocation-cut-off-by-classification.html). The ecoinvent database mostly relies on “Allocation – market values” apart for few exceptions particularly in the energy sector. ecoinvent energy data is replaced with EF3.0 core data as per the EF guidelines version 2.0.
OR
- EF compliant data

## Modelling constants
All modelling constants follow the requirements listed in the Tender Specifications 070201/2020/SER/ENV.B1. Completeness: There are no intentional cut-offs in the inventory no matter how small their contribution to all the EF impact categories is. Eventual cut-offs are in compliance with the Guide for EF compliant data sets (JRC 2020), i.e. only if below the 3% cut-off rule. Water use: water use is modelled at country level using separate flows for water withdrawal, water release and water evaporation. Handling multi-functional processes: the following PEF multi- functionality decision hierarchy is applied for resolving all multi- functionality problems: (1) subdivision or system expansion; (2) allocation based on a relevant underlying physical relationship (substitution may apply here); (3) allocation based on some other relationship. Direct land use change: GHG emissions from direct LUC allocated to good/service for 20 years after the LUC occurs, with IPCC default values. Carbon storage and delayed emissions: credits associated with temporary (carbon) storage or delayed emissions up to 300 years are not be considered. Emissions off-setting: are not included. Capital goods (including infrastructures) and their End of life: they are included. System boundaries: system boundaries include all processes linked to the product supply chain (e.g. maintenance). Time period: emissions and removals are modelled as if released or removed at the beginning of the assessment method. Fossil and biogenic carbon emissions and removals: removals and emissions are modelled as follows: All GHG emissions from fossil fuels (including peat and limestone) are modelled consistently with the most updated ILCD list of elementary flows. The non-fossil (biogenic) carbon flows are modelled consistently with the most updated ILCD list of elementary flows.

## Cut-off and completeness
There are no intentional cut-offs in the inventory no matter how small their contribution to all the EF impact categories is. Eventual cut-offs are in compliance with the Guide for EF compliant data sets (JRC 2020), i.e. only if below the 3% cut-off rule. The dataset dry mass and water balance has been checked to ensure the inventory is complete. Capital goods (e.g. infrastructure) and their end-of-life are included.

## Data selection and combination
These datasets include, in both their foreground and background data, links to EF3.0 compliant data.
The relevant background data on energy, transport, and End of Life are from the LCDN data node (http://lcdn.thinkstep.com/Node/).
All other background data in the supply of this product for which no EF3.0 process was available are from ecoinvent v3.7 database (www.ecoinvent.org) or other data sources.

## Data treatment and extrapolations
Several data sources have been used to model the inventory.

## Review details
Internal reviews have been asked to review the plausibility of the unit process, LCIA scores, and DQRs. Internal reviewers have also been asked to review the data for EF compliancy. The consortium is therefore responsible for aspects such as compliancy with the ILCD format, including validation in Look@LCI, and nomenclature.
Internal reviwers have been asked to judge based on the process name, that the unit process models in a complete and representative way the process in the requested location. The review encompassed the plausability of:
- exchanges with nature (elementary flows) as well as exchanges such as product and waste flows.
- meta information (general comment, technology comment, system boundaries, allocation, cut-off rules, etc.). Reviewers were asked to judge if the provided information is enough to understand the content of the process.
- LCIA scores
- DQRs including precision, technology, time and geography. As well as the overall DQR.
External reviewers have been asked to provide their expertise in the field of interest. External reviewers have been asked to review the unit process, including eventual methodological choices, the LCIA scores (provided with contribution scores as well), and DQRs. External reviewers have been provided all the information in a tool developed by the consortium for the purpose of this project.
External reviewers have been asked to judge based on the process name, that the unit process models in a complete and representative way the process in the requested location. The review encompassed:
- Plausability and completeness of exchanges with nature (elementary flows) as well as exchanges such as product and waste flows.
- Review of meta information (general comment, technology comment, system boundaries, allocation, cut-off rules, etc.). Reviewers were asked to judge if the provided information is enough to understand the content of the process.
- Review of properties (biogenic carbon and water content).
- Review of allocation keys.
- Plausability of LCIA scores calculated by the consortium.
- Plausability of DQRs including precision, technology, time and geography. As well as the overall DQR.

## Data sources
- Background Data for Representative products and organisations. EF 3.0 compliant (data stock)
- UN Data (2018) Statistics Data for Lubricants Productions, http://data.un.org/Data.aspx?q=Lubricants&d=EDATA&f=cmID%3aLU, United Nations Statistics Division, Global.
- Lebon (2021) Nonwoven Oven Machine, Catalog and Company Messages, Qingdao Lebon Industry Co., Ltd., China
- Lebon Industry (2021) Rotor Spinning Machine http://www.lebonindustry.com/html_products/Rotor-spinning-machine-line-74.html, Qingdao Lebon Industry Co., Ltd., China

## Intended applications
Implementation of regular Product Environmental Footprint (PEF) studies and Organisation Environmental Footprint (OEF) studies exclusively under the specified Product groups and sectors as defined in the Product Environmental Footprint Category Rules (PEFCR) and Organisation Environmental Footprint Sectorial Rules (OEFSR) listed in http://ec.europa.eu/environment/eussd/smgp/PEFCR_OEFSR.htm
