# down; duck, RDS; production mix, at plant; renewable

Dataset: ILCD process, Partly terminated system
Geography: GLO
Reference year: 2008
Valid until: 2024
Classification: Systems / Textiles, furnitures and other interiors
LCI method principle: Attributional
LCI method approaches: Allocation - mass
Completeness: All relevant flows quantified
Project: Provision of process-based 3.0 Environmental Footprint-compliant life cycle inventory datasets - Renewable materials - contract number 070201/2020/840085/SER/ENV.B.1
Generated by: CADIS
Owner: Blonk Sustainability Tools
Compliance: ILCD Data Network - Entry-level; Suggestions for updating the PEF method 2019; ISO 14040 Environmental Management – Life Cycle Assessment – Principles and Framework, 2006; ISO 14044:2006. Environmental Management – Life Cycle Assessment – Requirements and guidelines.; Environmental Footprint 3.1
Review: Dependent internal review by Hans Blonk, Emilia Moreno Ruiz; Independent review panel by Laura Batlle Bayer
Data quality: Overall quality: Good; Time representativeness: Good; Geographical representativeness: Good; Technological representativeness: Very good; Precision: Good; Methodological appropriateness and consistency: Not applicable
Amounts: no units in this file; such an amount is in the reference unit of its flow, which a separate flow dataset defines
copyright: true
licenseType: Free of charge for some user types or use types
accessRestrictions: Free of charge for all final users implementing a regular Product Environmental Footprint (PEF) studies and Organisation Environmental Footprint (OEF) studies exclusively under the specified Product groups and sectors as defined in the Product Environmental Footprint Category Rules (PEFCR) and Organisation Environmental Footprint Sectorial Rules (OEFSR) listed in http://ec.europa.eu/environment/eussd/smgp/PEFCR_OEFSR.htm and in accordance with the terms and conditions of the EULA (available at https://ecoinvent.lca-data.com/) exclusively until 31st December 2024. Any use of this dataset or any derivative data not within the specific context of one of the PEF/OEF projects or after the end of 2024 is not permitted.

## General comment
Notice: this data set supersedes the EF3.0-compliant version (see link under "preceding data set version" below calculated with the EF3.0). The life cycle inventory is not changed from the original EF3.0 data set. The LCIA results are calculated based on the EF3.1 methods which provide updated characterisation factors in the following impact categories: Climate Change, Ecotoxicity freshwater, Photochemical Ozone Formation, Acidification, Human Toxicity non-cancer, and Human Toxicity cancer. The review report and the data quality ratings refer to the original results. The data set has been updated by the European Commission on the basis of the original EF3.0 data set delivered by the data provider.This dataset is modelled as a copy of conventional down. Possible differences due to the application of the best practices, particularly on improved animal welfare and improved farm management, are not captured at life cycle inventory level, leading to the same environmental impact as conventional down.

Down is the immediate layer of plumage, connected to the body of the duck, goose, or other animals; the outer layer of the plumage are feathers. Ducks are mainly used for their meat; they reach maturity for slaughter at 7 weeks, at an estimated weight of 3.3 kg, from which 1.52% is down (50 g). Since they only live 7 weeks, they are plucked only after slaughtering, so no intermediate plucked is considered. Once dead, ducks are scalded, so that it is easier to pluck them. 10% (mass) of the ducks die before reaching 7 weeks, hence this loss is considered. All parts of the animal are used for products or by-products, therefore there is no burden from waste, (Societat Orgánica, 2008).

## Technology and included processes
This dataset was modelled for 1 duck, then multiplied times 20 in order to obtain 1 kg of down. Mass allocation was used, therefore the result was multiplied times 0.0152, which is the fraction on the duck that corresponds to down (in weight); finally, as 10% of loss is considered, the result was divided by 0.9. Data for down processing (cleaning and drying) was modeled for 1 kg of down, (Societat Orgánica, 2008). This process represents cradle to gate (down processing) boundaries.

## Parameters
- kg_0: 2.74802
  Mass in kg, for animal meal, poultry, from dry rendering, at plant // rer; Articulated lorry transport, Total weight 14-20 t, mix Euro 0-5; ROW w/o EU+EFTA
- km_0: 3.07204
  Distance in km, for animal meal, poultry, from dry rendering, at plant // rer; Articulated lorry transport, Total weight 14-20 t, mix Euro 0-5; ROW w/o EU+EFTA
- kg_km_0: 8.44203; = kg_0*km_0
  Transport amount in km*km, for animal meal, poultry, from dry rendering, at plant // rer; Articulated lorry transport, Total weight 14-20 t, mix Euro 0-5; ROW w/o EU+EFTA
- kg_1: 0.00626947
  Mass in kg, for broiler // broiler // eu+efta+uk; Articulated lorry transport, Total weight 14-20 t, mix Euro 0-5; ROW w/o EU+EFTA
- km_1: 1357.69
  Distance in km, for broiler // broiler // eu+efta+uk; Articulated lorry transport, Total weight 14-20 t, mix Euro 0-5; ROW w/o EU+EFTA
- kg_km_1: 8.512; = kg_1*km_1
  Transport amount in km*km, for broiler // broiler // eu+efta+uk; Articulated lorry transport, Total weight 14-20 t, mix Euro 0-5; ROW w/o EU+EFTA
- kg_2: 0.221968
  Mass in kg, for maize, production mix, at farm // glo; Articulated lorry transport, Euro 4, Total weight >32 t; EU+EFTA+UK
- km_2: 1000
  Distance in km, for maize, production mix, at farm // glo; Articulated lorry transport, Euro 4, Total weight >32 t; EU+EFTA+UK
- kg_km_2: 221.968; = kg_2*km_2
  Transport amount in km*km, for maize, production mix, at farm // glo; Articulated lorry transport, Euro 4, Total weight >32 t; EU+EFTA+UK
- kg_3: 0.221968
  Mass in kg, for maize, production mix, at farm // glo; Transoceanic ship, containers; GLO
- km_3: 18000
  Distance in km, for maize, production mix, at farm // glo; Transoceanic ship, containers; GLO
- kg_km_3: 3995.43; = kg_3*km_3
  Transport amount in km*km, for maize, production mix, at farm // glo; Transoceanic ship, containers; GLO
- kg_4: 0.221968
  Mass in kg, for wheat grain, production mix, at farm // glo; Articulated lorry transport, Euro 4, Total weight >32 t; EU+EFTA+UK
- km_4: 1000
  Distance in km, for wheat grain, production mix, at farm // glo; Articulated lorry transport, Euro 4, Total weight >32 t; EU+EFTA+UK
- kg_km_4: 221.968; = kg_4*km_4
  Transport amount in km*km, for wheat grain, production mix, at farm // glo; Articulated lorry transport, Euro 4, Total weight >32 t; EU+EFTA+UK
- kg_5: 0.221968
  Mass in kg, for wheat grain, production mix, at farm // glo; Transoceanic ship, containers; GLO
- km_5: 18000
  Distance in km, for wheat grain, production mix, at farm // glo; Transoceanic ship, containers; GLO
- kg_km_5: 3995.43; = kg_5*km_5
  Transport amount in km*km, for wheat grain, production mix, at farm // glo; Transoceanic ship, containers; GLO
- kg_6: 0.000337778
  Mass in kg, for sodium hypochlorite // sodium hypochlorite production // eu+efta+uk; Articulated lorry transport, Total weight 14-20 t, mix Euro 0-5; ROW w/o EU+EFTA
- km_6: 1000
  Distance in km, for sodium hypochlorite // sodium hypochlorite production // eu+efta+uk; Articulated lorry transport, Total weight 14-20 t, mix Euro 0-5; ROW w/o EU+EFTA
- kg_km_6: 0.337778; = kg_6*km_6
  Transport amount in km*km, for sodium hypochlorite // sodium hypochlorite production // eu+efta+uk; Articulated lorry transport, Total weight 14-20 t, mix Euro 0-5; ROW w/o EU+EFTA
- kg_7: 0.1
  Mass in kg, for alkylbenzene sulfonate // alkylbenzene sulfonate production // eu+efta+uk; Articulated lorry transport, Euro 4, Total weight >32 t; EU+EFTA+UK
- km_7: 1000
  Distance in km, for alkylbenzene sulfonate // alkylbenzene sulfonate production // eu+efta+uk; Articulated lorry transport, Euro 4, Total weight >32 t; EU+EFTA+UK
- kg_km_7: 100; = kg_7*km_7
  Transport amount in km*km, for alkylbenzene sulfonate // alkylbenzene sulfonate production // eu+efta+uk; Articulated lorry transport, Euro 4, Total weight >32 t; EU+EFTA+UK
- kg_8: 0.1
  Mass in kg, for alkylbenzene sulfonate // alkylbenzene sulfonate production // eu+efta+uk; Transoceanic ship, containers; GLO
- km_8: 18000
  Distance in km, for alkylbenzene sulfonate // alkylbenzene sulfonate production // eu+efta+uk; Transoceanic ship, containers; GLO
- kg_km_8: 1800; = kg_8*km_8
  Transport amount in km*km, for alkylbenzene sulfonate // alkylbenzene sulfonate production // eu+efta+uk; Transoceanic ship, containers; GLO

## Reference product
- down, duck, rds // down // glo: 1

## Inputs
- Transport of animal meal, poultry, from dry rendering, at plant // rer by Articulated lorry transport, Total weight 14-20 t, mix Euro 0-5 - ROW w/o EU+EFTA: 8.44203; = kg_km_0
- Thermal energy (MJ) from Thermal energy from natural gas - ROW: 0.358403
- Electricity from Electricity grid mix 1kV-60kV - AU: 0.0235947
- Electricity from Electricity grid mix 1kV-60kV - NZ: 0.004456
- Electricity from Electricity grid mix 1kV-60kV - RU: 0.101637
- Electricity from Electricity grid mix 1kV-60kV - RAF: 0.0758818
- Electricity from Electricity grid mix 1kV-60kV - RAS w/o CN: 1.09131
- Electricity from Electricity grid mix 1kV-60kV - EU+EFTA+UK: 0.347309
- Electricity from Electricity grid mix 1kV-60kV - RSA: 0.17249
- Electricity from Electricity grid mix 1kV-60kV - RNA: 0.508255
- Transport of broiler // broiler // eu+efta+uk by Articulated lorry transport, Total weight 14-20 t, mix Euro 0-5 - ROW w/o EU+EFTA: 8.512; = kg_km_1
- Transport of maize, production mix, at farm // glo by Articulated lorry transport, Euro 4, Total weight >32 t - EU+EFTA+UK: 221.968; = kg_km_2
- Transport of maize, production mix, at farm // glo by Transoceanic ship, containers - GLO: 3995.43; = kg_km_3
- Transport of wheat grain, production mix, at farm // glo by Articulated lorry transport, Euro 4, Total weight >32 t - EU+EFTA+UK: 221.968; = kg_km_4
- Transport of wheat grain, production mix, at farm // glo by Transoceanic ship, containers - GLO: 3995.43; = kg_km_5
- Transport of sodium hypochlorite // sodium hypochlorite production // eu+efta+uk by Articulated lorry transport, Total weight 14-20 t, mix Euro 0-5 - ROW w/o EU+EFTA: 0.337778; = kg_km_6
- Thermal energy (MJ) from Thermal energy from LPG - ROW: 1.35787
- Transport of alkylbenzene sulfonate // alkylbenzene sulfonate production // eu+efta+uk by Articulated lorry transport, Euro 4, Total weight >32 t - EU+EFTA+UK: 100; = kg_km_7
- Transport of alkylbenzene sulfonate // alkylbenzene sulfonate production // eu+efta+uk by Transoceanic ship, containers - GLO: 1800; = kg_km_8
- down, duck, rds // down // glo, blackbox: 1
- down, duck, rds // down // glo, elementary: 1

## Impact indicators
- Eutrophication marine: 0.0270546
- Ecotoxicity, freshwater: 320.054
- Land use: 197.916
- Water use: 5.13835
- Resource use, minerals and metals: 1.36133e-6
- Resource use, fossils: 36.2036
- Climate change: 4.26975
- Ozone depletion: 1.3975e-8
- Human toxicity, cancer: 1.51829e-9
- Human toxicity, non-cancer: 6.40063e-8
- EF-particulate Matter: 8.14112e-7
- Ionising radiation, human health: 0.117348
- Photochemical ozone formation - human health: 0.0106693
- Acidification: 0.0987985
- Eutrophication, terrestrial: 0.328175
- Eutrophication, freshwater: 0.000323838

## Deviations from the LCI method principle
The background data use the \xe2\x80\x9cRecycled content cut-off\xe2\x80\x9d approach to allocate end-of-life by-products and secondary materials. This allocation is explained in the description of the recycled content system model (http://www.ecoinvent.org/database/system-models-in-ecoinvent-3/cut-off-system-model/allocation-cut-off-by-classification.html).

## Deviations from the LCI method approaches
Background data:
- the \xe2\x80\x9cRecycled content cut-off\xe2\x80\x9d approach to allocate end-of-life by-products and secondary materials. This allocation is explained in the description of the recycled content system model (http://www.ecoinvent.org/database/system-models-in-ecoinvent-3/cut-off-system-model/allocation-cut-off-by-classification.html). The ecoinvent database mostly relies on “Allocation – market values” apart for few exceptions particularly in the energy sector. ecoinvent energy data is replaced with EF3.0 core data as per the EF guidelines version 2.0.
OR
- EF compliant data

## Modelling constants
All modelling constants follow the requirements listed in the Tender Specifications ENV.B.1/SER/2016/0038vl. Completeness: All known environmental flows are included. All known resource uses and emissions are listed in the inventory. Water use: water use is modelled at country level using separate flows for water withdrawal, water release and water evaporation. Cut-off: All known environmental flows are included. All known resource uses and emissions are listed in the inventory. Handling multi-functional processes: the following PEF multi- functionality decision hierarchy is applied for resolving all multi- functionality problems: (1) subdivision or system expansion; (2) allocation based on a relevant underlying physical relationship (substitution may apply here); (3) allocation based on some other relationship. Direct land use change: GHG emissions from direct LUC allocated to good/service for 20 years after the LUC occurs, with IPCC default values. Carbon storage and delayed emissions: credits associated with temporary (carbon) storage or delayed emissions up to 300 years are not be considered. Emissions off-setting: are not included. Capital goods (including infrastructures) and their End of life: they are included. System boundaries: system boundaries include all processes linked to the product supply chain (e.g. maintenance). Time period: emissions and removals are modelled as if released or removed at the beginning of the assessment method. Fossil and biogenic carbon emissions and removals: removals and emissions are modelled as follows: All GHG emissions from fossil fuels (including peat and limestone) are modelled consistently with the most updated ILCD list of elementary flows. The non-fossil (biogenic) carbon flows are modelled consistently with the most updated ILCD list of elementary flows.

## Cut-off and completeness
All known environmental flows are included. All known resource uses and emissions are listed in the inventory. The dataset dry mass balance has been checked to ensure the inventory is complete. Capital goods (e.g. infrastructure) and their end-of-life are included.

## Data selection and combination
These datasets include, in both their foreground and background data, links to EF3.0 compliant data.
The relevant background data on energy, transport, and End of Life are from the LCDN data node (http://lcdn.thinkstep.com/Node/).
All other background data in the supply of this product for which no EF3.0 process was available are from ecoinvent v3.7 database (www.ecoinvent.org) or other data sources.

## Data treatment and extrapolations
Several data sources have been used to model the inventory.

## Review details
Internal reviews have been asked to review the plausibility of the unit process, LCIA scores, and DQRs. Internal reviewers have also been asked to review the data for EF compliancy. The consortium is therefore responsible for aspects such as compliancy with the ILCD format, including validation in Look@LCI, and nomenclature.
Internal reviwers have been asked to judge based on the process name, that the unit process models in a complete and representative way the process in the requested location. The review encompassed the plausability of:
- exchanges with nature (elementary flows) as well as exchanges such as product and waste flows.
- meta information (general comment, technology comment, system boundaries, allocation, cut-off rules, etc.). Reviewers were asked to judge if the provided information is enough to understand the content of the process.
- LCIA scores
- DQRs including precision, technology, time and geography. As well as the overall DQR.
External reviewers have been asked to provide their expertise in the field of interest. External reviewers have been asked to review the unit process, including eventual methodological choices, the LCIA scores (provided with contribution scores as well), and DQRs. External reviewers have been provided all the information in a tool developed by the consortium for the purpose of this project.
External reviewers have been asked to judge based on the process name, that the unit process models in a complete and representative way the process in the requested location. The review encompassed:
- Plausability and completeness of exchanges with nature (elementary flows) as well as exchanges such as product and waste flows.
- Review of meta information (general comment, technology comment, system boundaries, allocation, cut-off rules, etc.). Reviewers were asked to judge if the provided information is enough to understand the content of the process.
- Review of properties (biogenic carbon and water content).
- Review of allocation keys.
- Plausability of LCIA scores calculated by the consortium.
- Plausability of DQRs including precision, technology, time and geography. As well as the overall DQR.

## Data sources
- Background Data for Representative products and organisations. EF 3.0 compliant (data stock)
- Galeano A., Gómez G., Ortiz S., Rodríguez, A. (1998). Obtención y manejo del plumón y plumas finas en patos Pekin. Acta Agronómica.
- Yan X., (2004) The changing face of the world of duck production. Cherry Valley Farms Ltd, International Hatchery Practice.
- Castelló, J. (2013) Un “rara avis”; una explotación de patos para carne. Selecciones avícolas.
- Pingel, Heinz (2004) Duck and geese production around the world. World Poultry
- Buckland R., Guy G. (2002) Goose Production. FAO ANIMAL PRODUCTION AND HEALTH PAPER - 154
- Sánchez Tambi, M. R. (2017). Diseño de una máquina escaldadora para el procesamiento de pollos en la industria artesanal [Tesis de pregrado, Universidad Técnica del Norte]. Recuperado de http://repositorio.utn.edu.ec/handle/123456789/7540 procesamiento de pollos en la industria artesanal
- feather drying machine. https://spanish.alibaba.com/product-detail/100kg-feather-drying-machine-60797624807.html?spm=a2700.8699010.29.31.53128faeKgKi2o
- Chicken Plucking Machine 1500W/2200w 275R/MIN Poultry Plucker with 20 inch Stainless Steel Feather Plucking Machine. https://www.amazon.com.mx/Poultry-Plucking-Diameter-Stainless-Depilation/dp/B07SNT7VQ1?th=1
- Ecoinvent, 2021. Chicken for slaughtering, live weight {GLO}| chicken production | Cut-off, U. https://v371.ecoquery.ecoinvent.org/Details/PDF/3650B048-5910-4E11-8CAA-9F3E5B9354CD/290C1F85-4CC4-4FA1-B0C8-2CB7F4276DCE
- Agri-footprint, 2019. Hatching eggs, broiler parents >20 weeks, at farm/NL Mass

## Intended applications
Implementation of regular Product Environmental Footprint (PEF) studies and Organisation Environmental Footprint (OEF) studies exclusively under the specified Product groups and sectors as defined in the Product Environmental Footprint Category Rules (PEFCR) and Organisation Environmental Footprint Sectorial Rules (OEFSR) listed in http://ec.europa.eu/environment/eussd/smgp/PEFCR_OEFSR.htm
