# dyeing, solution (dope); Dyeing; production mix, at plant; textile service for 1 kg of fabric

Dataset: ILCD process, Partly terminated system
Geography: GLO
Reference year: 2014
Valid until: 2024
Classification: Systems / Textiles, furnitures and other interiors
LCI method principle: Attributional
LCI method approaches: Allocation - market value
Completeness: All relevant flows quantified
Project: Provision of process-based 3.0 Environmental Footprint-compliant life cycle inventory datasets - Apparel 1 - contract number 070201/2020/840291/SER/ENV.B.1
Generated by: CADIS
Owner: PRé Sustainability B.V.
Compliance: ILCD Data Network - Entry-level; Suggestions for updating the PEF method 2019; ISO 14040 Environmental Management – Life Cycle Assessment – Principles and Framework, 2006; ISO 14044:2006. Environmental Management – Life Cycle Assessment – Requirements and guidelines.; Environmental Footprint 3.1
Review: Dependent internal review by Avraam Symeonidis, Emilia Moreno Ruiz; Independent review panel by Fábio Valebona
Data quality: Overall quality: Good; Time representativeness: Very good; Geographical representativeness: Good; Technological representativeness: Very good; Precision: Good; Methodological appropriateness and consistency: Not applicable
Amounts: no units in this file; such an amount is in the reference unit of its flow, which a separate flow dataset defines
copyright: true
licenseType: Free of charge for some user types or use types
accessRestrictions: Free of charge for all final users implementing a regular Product Environmental Footprint (PEF) studies and Organisation Environmental Footprint (OEF) studies exclusively under the specified Product groups and sectors as defined in the Product Environmental Footprint Category Rules (PEFCR) and Organisation Environmental Footprint Sectorial Rules (OEFSR) listed in http://ec.europa.eu/environment/eussd/smgp/PEFCR_OEFSR.htm and in accordance with the terms and conditions of the EULA (available at https://ecoinvent.lca-data.com/) exclusively until 31st December 2024. Any use of this dataset or any derivative data not within the specific context of one of the PEF/OEF projects or after the end of 2024 is not permitted.

## General comment
Notice: this data set supersedes the EF3.0-compliant version (see link under "preceding data set version" below calculated with the EF3.0). The life cycle inventory is not changed from the original EF3.0 data set. The LCIA results are calculated based on the EF3.1 methods which provide updated characterisation factors in the following impact categories: Climate Change, Ecotoxicity freshwater, Photochemical Ozone Formation, Acidification, Human Toxicity non-cancer, and Human Toxicity cancer. The review report and the data quality ratings refer to the original results. The data set has been updated by the European Commission on the basis of the original EF3.0 data set delivered by the data provider.This activity is modeled as a service, so no input of raw material is considered. Users of this datasets should include in its modelling an input of 1 kg of PET (virgin or recycled, depending on the characteristics of the system under analysis). Energy consumption values per kg of yarn for spinning (0.95 kWh electricity, 1.175 MJ steam, 0.06 heat from heavy fuel oil) and texturizing (1.963 kWh) processes were obtained from Van der Velden et al. (2014) as an average from eight and eleven further references analyzed by the authors for each process, respectively. Average masterbatch use (3%) and composition (40% pigment-60%polymer) was obtained from Laurent (2015). The output of the process is dope-dyed texturized yarn readily available for weaving or knitting. The user may deduct energy for texturizing to obtain only dope-dyed yarn. Life expectancy of dyeing machine is assumed to be 25 years (UNFCCC, 2012) with an average production capacity of 110 kg/h and a machine weight of 13.75 tons (YEMachinery, 2021) and assuming machine operation of 12 hours per day, 25 days per month.
Land use from factory building was calculated based on (EUREKA, 2021) from a total area of 325 thousand square meters, divided into five sub-productive areas: knitting, dyeing, printing, and home textiles. The respective area (1/5) of total area (65,000 m2) is divided by the total production capacity of the building in 60 years (assumed life span of the building), with a daily production of 125 ton of dyeing (EUREKA, 2021).

## Technology and included processes
In dope dyeing method, pigment is extruded along with the melted polymer so that the resulting yarn is already colored. Through this process wet dyeing is avoided and water as well as energy consumption are reduced compared to a conventional process. This method is not widely used in the industry since It is easier to produce non-colored fibers in bulk and dye them later. In dope dyeing method (also known as solution dyeing) a pigment (masterbatch) is mixed in specific amounts with polyester pellets. The solution is melted and extruded in filaments which get spun together into yarn. After that texture can be added. Synthetic dyes are commonly used due to their stability and low prices.

## Parameters
- kg_0: 0.012
  Mass in kg, for blue pigment // blue pigment production // glo; Articulated lorry transport, Euro 4, Total weight >32 t; EU+EFTA+UK
- km_0: 1000
  Distance in km, for blue pigment // blue pigment production // glo; Articulated lorry transport, Euro 4, Total weight >32 t; EU+EFTA+UK
- kg_km_0: 12; = kg_0*km_0
  Transport amount in km*km, for blue pigment // blue pigment production // glo; Articulated lorry transport, Euro 4, Total weight >32 t; EU+EFTA+UK
- kg_1: 0.018
  Mass in kg, for polyethylene terephthalate, mix // polyethylene terephthalate (pet) production, blend of bio- based and fossil // glo; Articulated lorry transport, Euro 4, Total weight >32 t; EU+EFTA+UK
- km_1: 1000
  Distance in km, for polyethylene terephthalate, mix // polyethylene terephthalate (pet) production, blend of bio- based and fossil // glo; Articulated lorry transport, Euro 4, Total weight >32 t; EU+EFTA+UK
- kg_km_1: 18; = kg_1*km_1
  Transport amount in km*km, for polyethylene terephthalate, mix // polyethylene terephthalate (pet) production, blend of bio- based and fossil // glo; Articulated lorry transport, Euro 4, Total weight >32 t; EU+EFTA+UK
- kg_2: 0.012
  Mass in kg, for blue pigment // blue pigment production // glo; Transoceanic ship, containers; GLO
- km_2: 18000
  Distance in km, for blue pigment // blue pigment production // glo; Transoceanic ship, containers; GLO
- kg_km_2: 216; = kg_2*km_2
  Transport amount in km*km, for blue pigment // blue pigment production // glo; Transoceanic ship, containers; GLO
- kg_3: 0.018
  Mass in kg, for polyethylene terephthalate, mix // polyethylene terephthalate (pet) production, blend of bio- based and fossil // glo; Transoceanic ship, containers; GLO
- km_3: 18000
  Distance in km, for polyethylene terephthalate, mix // polyethylene terephthalate (pet) production, blend of bio- based and fossil // glo; Transoceanic ship, containers; GLO
- kg_km_3: 324; = kg_3*km_3
  Transport amount in km*km, for polyethylene terephthalate, mix // polyethylene terephthalate (pet) production, blend of bio- based and fossil // glo; Transoceanic ship, containers; GLO

## Reference product
- dyeing, solution (dope) // dyeing, solution (dope) // glo: 1

## Inputs
- Electricity from Electricity grid mix 1kV-60kV - AU: 0.1065
- Electricity from Electricity grid mix 1kV-60kV - EU+EFTA+UK: 1.5689
- Electricity from Electricity grid mix 1kV-60kV - NZ: 0.0203
- Electricity from Electricity grid mix 1kV-60kV - RAF: 0.3428
- Electricity from Electricity grid mix 1kV-60kV - RNA: 2.296
- Electricity from Electricity grid mix 1kV-60kV - RSA: 0.7791
- Electricity from Electricity grid mix 1kV-60kV - RU: 0.4591
- Thermal energy (MJ) from Thermal energy from heavy fuel oil (HFO) - ROW: 0.06
- Transport of blue pigment // blue pigment production // glo by Articulated lorry transport, Euro 4, Total weight >32 t - EU+EFTA+UK: 12; = kg_km_0
- Transport of polyethylene terephthalate, mix // polyethylene terephthalate (pet) production, blend of bio- based and fossil // glo by Articulated lorry transport, Euro 4, Total weight >32 t - EU+EFTA+UK: 18; = kg_km_1
- Transport of blue pigment // blue pigment production // glo by Transoceanic ship, containers - GLO: 216; = kg_km_2
- Transport of polyethylene terephthalate, mix // polyethylene terephthalate (pet) production, blend of bio- based and fossil // glo by Transoceanic ship, containers - GLO: 324; = kg_km_3
- Electricity from Electricity grid mix 1kV-60kV - CN: 2.35251
- Electricity from Electricity grid mix 1kV-60kV - RAS w/o CN: 2.57749
- dyeing, solution (dope) // dyeing, solution (dope) // glo, blackbox: 1
- dyeing, solution (dope) // dyeing, solution (dope) // glo, elementary: 1

## Impact indicators
- Eutrophication marine: 0.00204966
- Ecotoxicity, freshwater: 10.5517
- Land use: 3.1007
- Water use: 0.686754
- Resource use, minerals and metals: 1.58621e-6
- Resource use, fossils: 30.2066
- Climate change: 2.24652
- Ozone depletion: 6.0373e-10
- Human toxicity, cancer: 1.34198e-9
- Human toxicity, non-cancer: 1.25114e-8
- EF-particulate Matter: 5.08652e-7
- Ionising radiation, human health: 0.147511
- Photochemical ozone formation - human health: 0.00621935
- Acidification: 0.0142289
- Eutrophication, terrestrial: 0.0224922
- Eutrophication, freshwater: 6.53842e-6

## Deviations from the LCI method principle
The background data uses:
- the \xe2\x80\x9cRecycled content cut-off\xe2\x80\x9d approach to allocate end-of-life by-products and secondary materials. This allocation is explained in the description of the recycled content system model (http://www.ecoinvent.org/database/system-models-in-ecoinvent-3/cut-off-system-model/allocation-cut-off-by-classification.html).
OR
- EF compliant data

## Deviations from the LCI method approaches
Background data:
- the \xe2\x80\x9cRecycled content cut-off\xe2\x80\x9d approach to allocate end-of-life by-products and secondary materials. This allocation is explained in the description of the recycled content system model (http://www.ecoinvent.org/database/system-models-in-ecoinvent-3/cut-off-system-model/allocation-cut-off-by-classification.html). The ecoinvent database mostly relies on “Allocation – market values” apart for few exceptions particularly in the energy sector. ecoinvent energy data is replaced with EF3.0 core data as per the EF guidelines version 2.0.
OR
- EF compliant data

## Modelling constants
All modelling constants follow the requirements listed in the Tender Specifications 070201/2020/SER/ENV.B1. Completeness: There are no intentional cut-offs in the inventory no matter how small their contribution to all the EF impact categories is. Eventual cut-offs are in compliance with the Guide for EF compliant data sets (JRC 2020), i.e. only if below the 3% cut-off rule. Water use: water use is modelled at country level using separate flows for water withdrawal, water release and water evaporation. Handling multi-functional processes: the following PEF multi- functionality decision hierarchy is applied for resolving all multi- functionality problems: (1) subdivision or system expansion; (2) allocation based on a relevant underlying physical relationship (substitution may apply here); (3) allocation based on some other relationship. Direct land use change: GHG emissions from direct LUC allocated to good/service for 20 years after the LUC occurs, with IPCC default values. Carbon storage and delayed emissions: credits associated with temporary (carbon) storage or delayed emissions up to 300 years are not be considered. Emissions off-setting: are not included. Capital goods (including infrastructures) and their End of life: they are included. System boundaries: system boundaries include all processes linked to the product supply chain (e.g. maintenance). Time period: emissions and removals are modelled as if released or removed at the beginning of the assessment method. Fossil and biogenic carbon emissions and removals: removals and emissions are modelled as follows: All GHG emissions from fossil fuels (including peat and limestone) are modelled consistently with the most updated ILCD list of elementary flows. The non-fossil (biogenic) carbon flows are modelled consistently with the most updated ILCD list of elementary flows.

## Cut-off and completeness
There are no intentional cut-offs in the inventory no matter how small their contribution to all the EF impact categories is. Eventual cut-offs are in compliance with the Guide for EF compliant data sets (JRC 2020), i.e. only if below the 3% cut-off rule. The dataset dry mass and water balance has been checked to ensure the inventory is complete. Capital goods (e.g. infrastructure) and their end-of-life are included.

## Data selection and combination
These datasets include, in both their foreground and background data, links to EF3.0 compliant data.
The relevant background data on energy, transport, and End of Life are from the LCDN data node (http://lcdn.thinkstep.com/Node/).
All other background data in the supply of this product for which no EF3.0 process was available are from ecoinvent v3.7 database (www.ecoinvent.org) or other data sources.

## Data treatment and extrapolations
Several data sources have been used to model the inventory.

## Review details
Internal reviews have been asked to review the plausibility of the unit process, LCIA scores, and DQRs. Internal reviewers have also been asked to review the data for EF compliancy. The consortium is therefore responsible for aspects such as compliancy with the ILCD format, including validation in Look@LCI, and nomenclature.
Internal reviwers have been asked to judge based on the process name, that the unit process models in a complete and representative way the process in the requested location. The review encompassed the plausability of:
- exchanges with nature (elementary flows) as well as exchanges such as product and waste flows.
- meta information (general comment, technology comment, system boundaries, allocation, cut-off rules, etc.). Reviewers were asked to judge if the provided information is enough to understand the content of the process.
- LCIA scores
- DQRs including precision, technology, time and geography. As well as the overall DQR.
External reviewers have been asked to provide their expertise in the field of interest. External reviewers have been asked to review the unit process, including eventual methodological choices, the LCIA scores (provided with contribution scores as well), and DQRs. External reviewers have been provided all the information in a tool developed by the consortium for the purpose of this project.
External reviewers have been asked to judge based on the process name, that the unit process models in a complete and representative way the process in the requested location. The review encompassed:
- Plausability and completeness of exchanges with nature (elementary flows) as well as exchanges such as product and waste flows.
- Review of meta information (general comment, technology comment, system boundaries, allocation, cut-off rules, etc.). Reviewers were asked to judge if the provided information is enough to understand the content of the process.
- Review of properties (biogenic carbon and water content).
- Review of allocation keys.
- Plausability of LCIA scores calculated by the consortium.
- Plausability of DQRs including precision, technology, time and geography. As well as the overall DQR.

## Data sources
- Background Data for Representative products and organisations. EF 3.0 compliant (data stock)
- Laurent RA (2015) Review the Current Flame Retardant Systems for Polyamide 6, to Develop and Produce a Novel ‘Masterbatch’ suitable for melt spinning filaments; by means of TGA analysis and vertical flame tests in association with Americhem Europe. MSc Thesis. The University of Manchester. UK.
- Van der Velden N, Patel MK, Vogtlander JG (2014) LCA benchmarking study on textiles made of cotton, polyester, nylon, acryl, or elastane. Int J Life Cycle Assess (2014) 19:331–356 DOI 10.1007/s11367-013-0626-9
- UNFCCC (2012) COMPONENT PROJECT ACTIVITIES DESIGN DOCUMENT (CPA-DD). Accessed online August 8th 2021: http://gec.jp/gec/jp/Activities/cdm-fs/2012/2012_cdmfs01_jPear_bangladesh_cpa-dd.pdf
- YEMachinery (2021) PP Flat Yarn Extrusion Machine with Automatic Feeder. Accessed online August 10th, 2021: https://cnbagmakingmachine.en.made-in-china.com/product/OvlmXMjPXfYJ/China-PP-Flat-Yarn-Extrusion-Machine-with-Automatic-Feeder.html
- EUREKA (2021) Production activities in line with the “green factory” approach in the textile sector. Accessed online August 8th 2021: https://eureka-eurogia-green.eu/offering_expertise/production-activities-in-line-with-the-green-factory-approach-in-the-textile-sector-13-04-2021/

## Intended applications
Implementation of regular Product Environmental Footprint (PEF) studies and Organisation Environmental Footprint (OEF) studies exclusively under the specified Product groups and sectors as defined in the Product Environmental Footprint Category Rules (PEFCR) and Organisation Environmental Footprint Sectorial Rules (OEFSR) listed in http://ec.europa.eu/environment/eussd/smgp/PEFCR_OEFSR.htm
