# ramie fibre, elementary; technology mix; production mix, at farm; raw fiber

Dataset: ILCD process, Unit process, single operation
Geography: GLO
Reference year: 2018
Valid until: 2024
Classification: Other Services / Other services
LCI method principle: Attributional
LCI method approaches: Allocation - market value
Completeness: All relevant flows quantified
Project: Provision of process-based 3.0 Environmental Footprint-compliant life cycle inventory datasets - Renewable materials - contract number 070201/2020/840085/SER/ENV.B.1
Generated by: ecoinvent
Owner: ecoinvent
Compliance: Environmental Footprint non-primary supporting data set; Environmental Footprint 3.1
Amounts: no units in this file; such an amount is in the reference unit of its flow, which a separate flow dataset defines
copyright: true
licenseType: Free of charge for some user types or use types
accessRestrictions: Free of charge for all final users implementing a regular Product Environmental Footprint (PEF) studies and Organisation Environmental Footprint (OEF) studies exclusively under the specified Product groups and sectors as defined in the Product Environmental Footprint Category Rules (PEFCR) and Organisation Environmental Footprint Sectorial Rules (OEFSR) listed in http://ec.europa.eu/environment/eussd/smgp/PEFCR_OEFSR.htm and in accordance with the terms and conditions of the EULA (available at https://ecoinvent.lca-data.com/) exclusively until 31st December 2024. Any use of this dataset or any derivative data not within the specific context of one of the PEF/OEF projects or after the end of 2024 is not permitted.

## General comment
Notice: this data set supersedes the EF3.0-compliant version (see link under "preceding data set version" below calculated with the EF3.0). The life cycle inventory is not changed from the original EF3.0 data set. The LCIA results are calculated based on the EF3.1 methods which provide updated characterisation factors in the following impact categories: Climate Change, Ecotoxicity freshwater, Photochemical Ozone Formation, Acidification, Human Toxicity non-cancer, and Human Toxicity cancer. The review report and the data quality ratings refer to the original results. The data set has been updated by the European Commission on the basis of the original EF3.0 data set delivered by the data provider.This sub-process has limited documentation only. For all detailed documentation of the full model to which this data set belongs (such as DQRs, review reports and other technical documentation), please see this process: ramie fibre - GLO []

## Technology and included processes
Ramie fibre is produced from a perennial and herbaceous plant, called also ramie. The production process begins after the plant is harvested. Firstly, it is peeled to remove the bark from the stem and them it is degummed to remove any gummy matters such as pectin, hemicellulose and lignin. The fibre is chemically treated with chlorine, sulfuric acid and sodium hydroxide to dissolve the gummy matters and then it is washed with water. During the process, various by-products are generated. The by-products of bark (1.07152143 kg / kg fibre), leaves (5.23827143 kg / kg fibre) and stalk (3.92857857 kg / kg fibre) are considered residues, meaning that according to FAO, 2014 for the cut-off modelling approach applied, upstream emissions shall not be attributes to them. For the by-product of lignin (0.6667 kg /kg fibre), economic allocation is applied attributing an economic value of 0.45 Euros / kg lignin and 0.49 Euros / kg ramie fibre.

Reference

FAO, 2014. Environmental performance of animal feeds supply chain, Guidelines for quantification, Livestock Environmental Assessment and Performance Partnership (LEAP) Available at: https://www.fao.org/3/mj751e/mj751e.pdf

Dong, S., 2018. Life Cycle Assessment of Ramie Fiber Used for FRPs. Aerospace 2018, 5, 81; doi:10.3390/aerospace5030081. Available at: https://www.researchgate.net/publication/326819208_Life_Cycle_Assessment_of_Ramie_Fiber_Used_for_FRPs

## Reference product
- ramie fibre // ramie fibre // glo, elementary: 1

## Inputs
- water, Renewable material resources from water [AE]: 0.00267324
- water, Renewable material resources from water [AF]: 0.000274519
- water, Renewable material resources from water [AG]: 8.01667e-6
- water, Renewable material resources from water [AL]: 0.000140034
- water, Renewable material resources from water [AM]: 0.000123787
- water, Renewable material resources from water [AO]: 0.000831553
- water, Renewable material resources from water [AR]: 0.00370604
- water, Renewable material resources from water [AT]: 0.00180425
- water, Renewable material resources from water [AU]: 0.00457628
- water, Renewable material resources from water [AW]: 1.60978e-5
- water, Renewable material resources from water [AZ]: 0.000626762
- water, Renewable material resources from water [BA]: 0.000174572
- water, Renewable material resources from water [BB]: 1.94992e-5
- water, Renewable material resources from water [BD]: 0.00221252
- water, Renewable material resources from water [BE]: 0.0021717
- water, Renewable material resources from water [BF]: 0.000132096
- water, Renewable material resources from water [BG]: 0.000556102
- water, Renewable material resources from water [BH]: 0.000281267
- water, Renewable material resources from water [BI]: 3.14332e-5
- water, Renewable material resources from water [BJ]: 0.000121703
- water, Renewable material resources from water [BN]: 0.000129745
- water, Renewable material resources from water [BO]: 0.000312278
- water, Renewable material resources from water [BR]: 0.0129267
- water, Renewable material resources from water [BS]: 5.32931e-5
- water, Renewable material resources from water [BT]: 2.7296e-5
- water, Renewable material resources from water [BW]: 0.000139204
- water, Renewable material resources from water [BY]: 0.00072209
- water, Renewable material resources from water [BZ]: 1.10884e-5
- water, Renewable material resources from water [CA]: 0.00679356
- water, Renewable material resources from water [CD]: 0.000265249
- water, Renewable material resources from water [CF]: 1.74143e-5
- water, Renewable material resources from water [CG]: 0.000102766
- water, Renewable material resources from water [CH]: 0.00215187
- water, Renewable material resources from water [CI]: 0.000351951
- water, Renewable material resources from water [CL]: 0.00166276
- water, Renewable material resources from water [CM]: 0.000305052
- water, Renewable material resources from water [CN]: 0.0711613
- water, Renewable material resources from water [CO]: 0.00260161
- water, Renewable material resources from water [CR]: 0.000324932
- water, Renewable material resources from water [CV]: 1.35909e-5
- water, Renewable material resources from water [CY]: 0.000124933
- water, Renewable material resources from water [CZ]: 0.00149768
- water, Renewable material resources from water [DE]: 0.0162996
- water, Renewable material resources from water [DJ]: 1.74821e-5
- water, Renewable material resources from water [DK]: 0.00118191
- water, Renewable material resources from water [DM]: 3.31435e-6
- water, Renewable material resources from water [DO]: 0.000606458
- water, Renewable material resources from water [DZ]: 0.00210857
- water, Renewable material resources from water [EC]: 0.000737096
- water, Renewable material resources from water [EE]: 0.000161391
- water, Renewable material resources from water [EG]: 0.00417494
- water, Renewable material resources from water [ER]: 2.2174e-5
- water, Renewable material resources from water [ES]: 0.00699461
- water, Renewable material resources from water [ET]: 0.000637206
- water, Renewable material resources from water [FI]: 0.00100814
- water, Renewable material resources from water [FJ]: 4.00947e-5
- water, Renewable material resources from water [FR]: 0.0114977
- water, Renewable material resources from water [GA]: 0.000119988
- water, Renewable material resources from water [GB]: 0.0114259
- water, Renewable material resources from water [GD]: 6.21798e-6
- water, Renewable material resources from water [GE]: 0.000175407
- water, Renewable material resources from water [GH]: 0.000520904
- water, Renewable material resources from water: 0.00228271
- water, Renewable material resources from water [GM]: 1.88405e-5
- water, Renewable material resources from water [GN]: 9.38143e-5
- water, Renewable material resources from water [GQ]: 0.00013958
- water, Renewable material resources from water [GR]: 0.00129977
- water, Renewable material resources from water [GT]: 0.000504697
- water, Renewable material resources from water [GW]: 1.13444e-5
- water, Renewable material resources from water [GY]: 3.57686e-5
- water, Renewable material resources from water [HN]: 0.000176184
- water, Renewable material resources from water [HR]: 0.00041792
- water, Renewable material resources from water [HT]: 0.000130633
- water, Renewable material resources from water [HU]: 0.00109558
- water, Renewable material resources from water [ID]: 0.0109337
- water, Renewable material resources from water [IE]: 0.00118015
- water, Renewable material resources from water [IL]: 0.00121045
- water, Renewable material resources from water [IN]: 0.0291849
- water, Renewable material resources from water [IQ]: 0.00182233
- water, Renewable material resources from water [IR]: 0.00515127
- water, Renewable material resources from water [IS]: 6.73428e-5
- water, Renewable material resources from water [IT]: 0.0098372
- water, Renewable material resources from water [JM]: 0.000108117
- water, Renewable material resources from water [JO]: 0.000356476
- water, Renewable material resources from water [JP]: 0.0211186
- water, Renewable material resources from water [KE]: 0.000622825
- water, Renewable material resources from water [KG]: 0.00010344
- water, Renewable material resources from water [KH]: 0.000210459
- water, Renewable material resources from water [KM]: 8.68085e-6
- water, Renewable material resources from water [KN]: 5.17306e-6
- water, Renewable material resources from water [KR]: 0.00786505
- water, Renewable material resources from water [KW]: 0.000991064
- water, Renewable material resources from water [KZ]: 0.00170232
- water, Renewable material resources from water [LA]: 0.000160955
- water, Renewable material resources from water [LB]: 0.000392559
- water, Renewable material resources from water [LC]: 1.05521e-5
- water, Renewable material resources from water [LK]: 0.000967017
- water, Renewable material resources from water [LR]: 2.40016e-5
- water, Renewable material resources from water [LS]: 2.33073e-5
- water, Renewable material resources from water [LT]: 0.000344597
- water, Renewable material resources from water [LU]: 0.000239221
- water, Renewable material resources from water [LV]: 0.000203197
- water, Renewable material resources from water [LY]: 0.000495544
- water, Renewable material resources from water [MA]: 0.00102733
- water, Renewable material resources from water [MD]: 0.000107515
- water, Renewable material resources from water [ME]: 4.33131e-5
- water, Renewable material resources from water [MG]: 0.000158772
- water, Renewable material resources from water [MK]: 0.000119626
- water, Renewable material resources from water [ML]: 0.000144149
- water, Renewable material resources from water [MM]: 0.000916991
- water, Renewable material resources from water [MN]: 0.000128251
- water, Renewable material resources from water [MR]: 7.56178e-5
- water, Renewable material resources from water [MT]: 6.61753e-5
- water, Renewable material resources from water [MU]: 0.000100964
- water, Renewable material resources from water [MW]: 7.29455e-5
- water, Renewable material resources from water [MX]: 0.00920878
- water, Renewable material resources from water [MY]: 0.00307549
- water, Renewable material resources from water [MZ]: 0.000130413
- water, Renewable material resources from water [NA]: 9.43139e-5
- water, Renewable material resources from water [NE]: 9.32444e-5
- water, Renewable material resources from water [NG]: 0.00387078
- water, Renewable material resources from water [NI]: 0.000130283
- water, Renewable material resources from water [NL]: 0.00364651
- water, Renewable material resources from water [NO]: 0.00138031
- water, Renewable material resources from water [NP]: 0.000289355
- water, Renewable material resources from water [NZ]: 0.000717661
- water, Renewable material resources from water [OM]: 0.000614938
- water, Renewable material resources from water [PA]: 0.000382093
- water, Renewable material resources from water [PE]: 0.00146939
- water, Renewable material resources from water [PG]: 0.00012376
- water, Renewable material resources from water [PH]: 0.00297874
- water, Renewable material resources from water [PK]: 0.00357223
- water, Renewable material resources from water [PL]: 0.00419672
- water, Renewable material resources from water [PR]: 0.000505557
- water, Renewable material resources from water [PS]: 9.56781e-5
- water, Renewable material resources from water [PT]: 0.00132422
- water, Renewable material resources from water [PY]: 0.000318194
- water, Renewable material resources from water [QA]: 0.00115138
- water, Renewable material resources from water [RO]: 0.00183844
- water, Renewable material resources from water [RS]: 0.000456215
- water, Renewable material resources from water [RU]: 0.0152208
- water, Renewable material resources from water [RW]: 8.02634e-5
- water, Renewable material resources from water [SA]: 0.00678861
- water, Renewable material resources from water [SB]: 6.1494e-6
- water, Renewable material resources from water [SD]: 0.000712256
- water, Renewable material resources from water [SE]: 0.00199177
- water, Renewable material resources from water [SG]: 0.00197735
- water, Renewable material resources from water [SI]: 0.000282064
- water, Renewable material resources from water [SK]: 0.000662046
- water, Renewable material resources from water [SL]: 4.53328e-5
- water, Renewable material resources from water [SM]: 8.23981e-6
- water, Renewable material resources from water [SN]: 0.000177489
- water, Renewable material resources from water [SR]: 3.69657e-5
- water, Renewable material resources from water [ST]: 2.92352e-6
- water, Renewable material resources from water [SV]: 0.000197159
- water, Renewable material resources from water [SZ]: 3.9788e-5
- water, Renewable material resources from water [TC]: 3.55487e-6
- water, Renewable material resources from water [TD]: 9.87734e-5
- water, Renewable material resources from water [TG]: 4.09169e-5
- water, Renewable material resources from water [TH]: 0.00454193
- water, Renewable material resources from water [TJ]: 0.000102513
- water, Renewable material resources from water [TL]: 1.31471e-5
- water, Renewable material resources from water [TM]: 0.000297326
- water, Renewable material resources from water [TN]: 0.00049412
- water, Renewable material resources from water [TO]: 2.46487e-6
- water, Renewable material resources from water [TR]: 0.00769175
- water, Renewable material resources from water [TT]: 0.000169412
- water, Renewable material resources from water [TZ]: 0.000479803
- water, Renewable material resources from water [UA]: 0.00194113
- water, Renewable material resources from water [UG]: 0.000332414
- water, Renewable material resources from water [US]: 0.074929
- water, Renewable material resources from water [UY]: 0.000283555
- water, Renewable material resources from water [UZ]: 0.000792292
- water, Renewable material resources from water [VC]: 5.33001e-6
- water, Renewable material resources from water [VE]: 0.00217342
- water, Renewable material resources from water [VN]: 0.0022511
- water, Renewable material resources from water [VU]: 3.38577e-6
- water, Renewable material resources from water [WS]: 4.81636e-6
- water, Renewable material resources from water [YE]: 0.000396366
- water, Renewable material resources from water [ZA]: 0.00289775
- water, Renewable material resources from water [ZM]: 0.000224778
- water, Renewable material resources from water [ZW]: 0.000146006

## Outputs
- biological oxygen demand, Emissions to water, unspecified: 4.54637e-5
- chemical oxygen demand, Emissions to water, unspecified: 0.000136391

## Impact indicators
- Water use: 12.5585
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
## Deviations from the LCI method principle
The background data uses:
- the \xe2\x80\x9cRecycled content cut-off\xe2\x80\x9d approach to allocate end-of-life by-products and secondary materials. This allocation is explained in the description of the recycled content system model (http://www.ecoinvent.org/database/system-models-in-ecoinvent-3/cut-off-system-model/allocation-cut-off-by-classification.html).
OR
- EF compliant data

## Deviations from the LCI method approaches
Background data:
- the \xe2\x80\x9cRecycled content cut-off\xe2\x80\x9d approach to allocate end-of-life by-products and secondary materials. This allocation is explained in the description of the recycled content system model (http://www.ecoinvent.org/database/system-models-in-ecoinvent-3/cut-off-system-model/allocation-cut-off-by-classification.html). The ecoinvent database mostly relies on “Allocation – market values” apart for few exceptions particularly in the energy sector. ecoinvent energy data is replaced with EF3.0 core data as per the EF guidelines version 2.0.
OR
- EF compliant data

## Modelling constants
All modelling constants follow the requirements listed in the Tender Specifications 070201/2020/SER/ENV.B1. Completeness: There are no intentional cut-offs in the inventory no matter how small their contribution to all the EF impact categories is. Eventual cut-offs are in compliance with the Guide for EF compliant data sets (JRC 2020), i.e. only if below the 3% cut-off rule. Water use: water use is modelled at country level using separate flows for water withdrawal, water release and water evaporation. Handling multi-functional processes: the following PEF multi- functionality decision hierarchy is applied for resolving all multi- functionality problems: (1) subdivision or system expansion; (2) allocation based on a relevant underlying physical relationship (substitution may apply here); (3) allocation based on some other relationship. Direct land use change: GHG emissions from direct LUC allocated to good/service for 20 years after the LUC occurs, with IPCC default values. Carbon storage and delayed emissions: credits associated with temporary (carbon) storage or delayed emissions up to 300 years are not be considered. Emissions off-setting: are not included. Capital goods (including infrastructures) and their End of life: they are included. System boundaries: system boundaries include all processes linked to the product supply chain (e.g. maintenance). Time period: emissions and removals are modelled as if released or removed at the beginning of the assessment method. Fossil and biogenic carbon emissions and removals: removals and emissions are modelled as follows: All GHG emissions from fossil fuels (including peat and limestone) are modelled consistently with the most updated ILCD list of elementary flows. The non-fossil (biogenic) carbon flows are modelled consistently with the most updated ILCD list of elementary flows.

## Cut-off and completeness
There are no intentional cut-offs in the inventory no matter how small their contribution to all the EF impact categories is. Eventual cut-offs are in compliance with the Guide for EF compliant data sets (JRC 2020), i.e. only if below the 3% cut-off rule. The dataset dry mass and water balance has been checked to ensure the inventory is complete. Capital goods (e.g. infrastructure) and their end-of-life are included.

## Data selection and combination
These datasets include, in both their foreground and background data, links to EF3.0 compliant data.
The relevant background data on energy, transport, and End of Life are from the LCDN data node (http://lcdn.thinkstep.com/Node/).
All other background data in the supply of this product for which no EF3.0 process was available are from ecoinvent v3.7 database (www.ecoinvent.org) or other data sources.

## Data treatment and extrapolations
Several data sources have been used to model the inventory.

## Use advice
This data set is a supporting sub-data set and must be used exclusively as sub-data set of its corresponding level-1 partly disaggregated data set (see “General comment” field for exact name and UUID).

## Data sources
- Background Data for Representative products and organisations. EF 3.0 compliant (data stock)
- Dong, S., 2018. Life Cycle Assessment of Ramie Fiber Used for FRPs. Aerospace 2018, 5, 81; doi:10.3390/aerospace5030081. Available at: https://www.researchgate.net/publication/326819208_Life_Cycle_Assessment_of_Ramie_Fiber_Used_for_FRPs
- Pelkans L., 2021. IEA Bioenergy Countries` Report - update 2021, Implementation of bioenergy in the IEA Bioenergy member countries, IEA Bioenergy ExCo Available at: https://www.ieabioenergy.com/wp-content/uploads/2021/11/CountriesReport2021_final.pdf
- Xu, Y., 2014. Kinetics of pyrolysis of ramie fabric wastes from thermogravimetric data. Journal Thermal Analysis and Calorimetry (2015) 119:651–657 Available at: https://www.researchgate.net/publication/273193090_Kinetics_of_pyrolysis_of_ramie_fabric_wastes_from_thermogravimetric_data

## Intended applications
Implementation of regular Product Environmental Footprint (PEF) studies and Organisation Environmental Footprint (OEF) studies exclusively under the specified Product groups and sectors as defined in the Product Environmental Footprint Category Rules (PEFCR) and Organisation Environmental Footprint Sectorial Rules (OEFSR) listed in http://ec.europa.eu/environment/eussd/smgp/PEFCR_OEFSR.htm
