# bleaching, conventional; Pre-treatment; production mix, at plant; textile service

Dataset: ILCD process, Partly terminated system
Geography: GLO
Reference year: 2018
Valid until: 2024
Classification: Systems / Textiles, furnitures and other interiors
LCI method principle: Attributional
LCI method approaches: Allocation - market value
Completeness: All relevant flows quantified
Project: Provision of process-based 3.0 Environmental Footprint-compliant life cycle inventory datasets - Apparel 1 - contract number 070201/2020/840291/SER/ENV.B.1
Generated by: CADIS
Owner: PRé Sustainability B.V.
Compliance: ILCD Data Network - Entry-level; Suggestions for updating the PEF method 2019; ISO 14040 Environmental Management – Life Cycle Assessment – Principles and Framework, 2006; ISO 14044:2006. Environmental Management – Life Cycle Assessment – Requirements and guidelines.; Environmental Footprint 3.1
Review: Dependent internal review by Avraam Symeonidis, Emilia Moreno Ruiz; Independent review panel by Fábio Valebona
Data quality: Overall quality: Good; Time representativeness: Very good; Geographical representativeness: Good; Technological representativeness: Good; Precision: Good; Methodological appropriateness and consistency: Not applicable
Amounts: no units in this file; such an amount is in the reference unit of its flow, which a separate flow dataset defines
copyright: true
licenseType: Free of charge for some user types or use types
accessRestrictions: Free of charge for all final users implementing a regular Product Environmental Footprint (PEF) studies and Organisation Environmental Footprint (OEF) studies exclusively under the specified Product groups and sectors as defined in the Product Environmental Footprint Category Rules (PEFCR) and Organisation Environmental Footprint Sectorial Rules (OEFSR) listed in http://ec.europa.eu/environment/eussd/smgp/PEFCR_OEFSR.htm and in accordance with the terms and conditions of the EULA (available at https://ecoinvent.lca-data.com/) exclusively until 31st December 2024. Any use of this dataset or any derivative data not within the specific context of one of the PEF/OEF projects or after the end of 2024 is not permitted.

## General comment
Notice: this data set supersedes the EF3.0-compliant version (see link under "preceding data set version" below calculated with the EF3.0). The life cycle inventory is not changed from the original EF3.0 data set. The LCIA results are calculated based on the EF3.1 methods which provide updated characterisation factors in the following impact categories: Climate Change, Ecotoxicity freshwater, Photochemical Ozone Formation, Acidification, Human Toxicity non-cancer, and Human Toxicity cancer. The review report and the data quality ratings refer to the original results. The data set has been updated by the European Commission on the basis of the original EF3.0 data set delivered by the data provider.This inventory refers to 1 kg bleached textile. This dataset only covers all relevant input and output flows for bleaching of 1 kg fabric as a service to the batch dyeing activity. Life expectancy of pretreatment machine is assumed to be 25 years (UNFCCC, 2012) with an average production capacity of 42.5 m/min and a machine weight of 2 tons (QDTONGDA, 2021), assuming a fabric weight of 300 g/m and 10 h/d operating time.

## Technology and included processes
This activity is modeled as a service, so no input of textile is considered. Electricity consumption and chemicals used (hydrogen per oxide, sodium hydroxide, and inorganic chemicals) are considered as inputs. Wastewater discharges as output. A separate dataset is taking care of wasterwater treatment. This activity correspond to weighted average of data from mills in India and Bangladesh. Uncertainty has been adjusted accordingly

## Parameters
- kg_0: 0.00932121
  Mass in kg, for sodium hydroxide, without water, in 50% solution state; Transoceanic ship, containers; GLO
- km_0: 599
  Distance in km, for sodium hydroxide, without water, in 50% solution state; Transoceanic ship, containers; GLO
- kg_km_0: 5.5834; = kg_0*km_0
  Transport amount in km*km, for sodium hydroxide, without water, in 50% solution state; Transoceanic ship, containers; GLO
- kg_1: 0.00932121
  Mass in kg, for sodium hydroxide, without water, in 50% solution state; Freight train, diesel traction; EU+EFTA+UK
- km_1: 229.272
  Distance in km, for sodium hydroxide, without water, in 50% solution state; Freight train, diesel traction; EU+EFTA+UK
- kg_km_1: 2.13709; = kg_1*km_1
  Transport amount in km*km, for sodium hydroxide, without water, in 50% solution state; Freight train, diesel traction; EU+EFTA+UK
- kg_2: 0.00932121
  Mass in kg, for sodium hydroxide, without water, in 50% solution state; Freight train, electricity traction; EU+EFTA+UK
- km_2: 77.9889
  Distance in km, for sodium hydroxide, without water, in 50% solution state; Freight train, electricity traction; EU+EFTA+UK
- kg_km_2: 0.726951; = kg_2*km_2
  Transport amount in km*km, for sodium hydroxide, without water, in 50% solution state; Freight train, electricity traction; EU+EFTA+UK
- kg_3: 0.00932121
  Mass in kg, for sodium hydroxide, without water, in 50% solution state; Freight train, average; EU+EFTA+UK
- km_3: 1.8394
  Distance in km, for sodium hydroxide, without water, in 50% solution state; Freight train, average; EU+EFTA+UK
- kg_km_3: 0.0171455; = kg_3*km_3
  Transport amount in km*km, for sodium hydroxide, without water, in 50% solution state; Freight train, average; EU+EFTA+UK
- kg_4: 0.00932121
  Mass in kg, for sodium hydroxide, without water, in 50% solution state; Barge; EU+EFTA+UK
- km_4: 8.08691
  Distance in km, for sodium hydroxide, without water, in 50% solution state; Barge; EU+EFTA+UK
- kg_km_4: 0.0753798; = kg_4*km_4
  Transport amount in km*km, for sodium hydroxide, without water, in 50% solution state; Barge; EU+EFTA+UK
- kg_5: 0.00932121
  Mass in kg, for sodium hydroxide, without water, in 50% solution state; Barge; ROW w/o EU+EFTA
- km_5: 16.5131
  Distance in km, for sodium hydroxide, without water, in 50% solution state; Barge; ROW w/o EU+EFTA
- kg_km_5: 0.153922; = kg_5*km_5
  Transport amount in km*km, for sodium hydroxide, without water, in 50% solution state; Barge; ROW w/o EU+EFTA
- kg_6: 0.00932121
  Mass in kg, for sodium hydroxide, without water, in 50% solution state; Articulated lorry transport, Euro 4, Total weight >32 t; EU+EFTA+UK
- km_6: 57.3754
  Distance in km, for sodium hydroxide, without water, in 50% solution state; Articulated lorry transport, Euro 4, Total weight >32 t; EU+EFTA+UK
- kg_km_6: 0.534808; = kg_6*km_6
  Transport amount in km*km, for sodium hydroxide, without water, in 50% solution state; Articulated lorry transport, Euro 4, Total weight >32 t; EU+EFTA+UK
- kg_7: 0.00932121
  Mass in kg, for sodium hydroxide, without water, in 50% solution state; Articulated lorry transport, Total weight >32 t, mix Euro 0-5; ROW w/o EU+EFTA
- km_7: 151.425
  Distance in km, for sodium hydroxide, without water, in 50% solution state; Articulated lorry transport, Total weight >32 t, mix Euro 0-5; ROW w/o EU+EFTA
- kg_km_7: 1.41146; = kg_7*km_7
  Transport amount in km*km, for sodium hydroxide, without water, in 50% solution state; Articulated lorry transport, Total weight >32 t, mix Euro 0-5; ROW w/o EU+EFTA
- kg_8: 0.0302921
  Mass in kg, for hydrogen peroxide, 50% // hydrogen peroxide, 50% production // eu+efta+uk; Articulated lorry transport, Euro 4, Total weight >32 t; EU+EFTA+UK
- km_8: 1000.26
  Distance in km, for hydrogen peroxide, 50% // hydrogen peroxide, 50% production // eu+efta+uk; Articulated lorry transport, Euro 4, Total weight >32 t; EU+EFTA+UK
- kg_km_8: 30.3; = kg_8*km_8
  Transport amount in km*km, for hydrogen peroxide, 50% // hydrogen peroxide, 50% production // eu+efta+uk; Articulated lorry transport, Euro 4, Total weight >32 t; EU+EFTA+UK
- kg_9: 0.0302921
  Mass in kg, for hydrogen peroxide, 50% // hydrogen peroxide, 50% production // eu+efta+uk; Transoceanic ship, containers; GLO
- km_9: 17991.5
  Distance in km, for hydrogen peroxide, 50% // hydrogen peroxide, 50% production // eu+efta+uk; Transoceanic ship, containers; GLO
- kg_km_9: 545; = kg_9*km_9
  Transport amount in km*km, for hydrogen peroxide, 50% // hydrogen peroxide, 50% production // eu+efta+uk; Transoceanic ship, containers; GLO

## Reference product
- bleaching, conventional // bleaching, conventional // glo: 1

## Inputs
- Electricity from Electricity grid mix 1kV-60kV - AU: 0.0003
- Electricity from Electricity grid mix 1kV-60kV - EU+EFTA+UK: 0.005
- Electricity from Electricity grid mix 1kV-60kV - NZ: 0.0001
- Electricity from Electricity grid mix 1kV-60kV - RAF: 0.0011
- Electricity from Electricity grid mix 1kV-60kV - RNA: 0.0074
- Electricity from Electricity grid mix 1kV-60kV - RSA: 0.0025
- Electricity from Electricity grid mix 1kV-60kV - RU: 0.0015
- Transport of sodium hydroxide, without water, in 50% solution state by Transoceanic ship, containers - GLO: 5.5834; = kg_km_0
- Transport of sodium hydroxide, without water, in 50% solution state by Freight train, diesel traction - EU+EFTA+UK: 2.13709; = kg_km_1
- Transport of sodium hydroxide, without water, in 50% solution state by Freight train, electricity traction - EU+EFTA+UK: 0.726951; = kg_km_2
- Transport of sodium hydroxide, without water, in 50% solution state by Freight train, average - EU+EFTA+UK: 0.0171455; = kg_km_3
- Transport of sodium hydroxide, without water, in 50% solution state by Barge - EU+EFTA+UK: 0.0753798; = kg_km_4
- Transport of sodium hydroxide, without water, in 50% solution state by Barge - ROW w/o EU+EFTA: 0.153922; = kg_km_5
- Transport of sodium hydroxide, without water, in 50% solution state by Articulated lorry transport, Euro 4, Total weight >32 t - EU+EFTA+UK: 0.534808; = kg_km_6
- Transport of sodium hydroxide, without water, in 50% solution state by Articulated lorry transport, Total weight >32 t, mix Euro 0-5 - ROW w/o EU+EFTA: 1.41146; = kg_km_7
- Thermal energy (MJ) from Thermal energy from light fuel oil (LFO) - ROW: 0.224897
- Transport of hydrogen peroxide, 50% // hydrogen peroxide, 50% production // eu+efta+uk by Articulated lorry transport, Euro 4, Total weight >32 t - EU+EFTA+UK: 30.3; = kg_km_8
- Transport of hydrogen peroxide, 50% // hydrogen peroxide, 50% production // eu+efta+uk by Transoceanic ship, containers - GLO: 545; = kg_km_9
- Electricity from Electricity grid mix 1kV-60kV - CN: 0.00753947
- Electricity from Electricity grid mix 1kV-60kV - RAS w/o CN: 0.00826053
- bleaching, conventional // bleaching, conventional // glo, blackbox: 1
- bleaching, conventional // bleaching, conventional // glo, elementary: 1

## Impact indicators
- Eutrophication marine: 0.000157002
- Ecotoxicity, freshwater: 1.16342
- Land use: -0.0636188
- Water use: 0.169139
- Resource use, minerals and metals: 6.81644e-7
- Resource use, fossils: 1.1346
- Climate change: 0.0903761
- Ozone depletion: 8.38605e-9
- Human toxicity, cancer: 6.44653e-11
- Human toxicity, non-cancer: 8.50881e-10
- EF-particulate Matter: 1.10221e-8
- Ionising radiation, human health: 0.00396984
- Photochemical ozone formation - human health: 0.000358416
- Acidification: 0.000551774
- Eutrophication, terrestrial: 0.00132897
- Eutrophication, freshwater: 1.14079e-5

## Deviations from the LCI method principle
The background data uses:
- the \xe2\x80\x9cRecycled content cut-off\xe2\x80\x9d approach to allocate end-of-life by-products and secondary materials. This allocation is explained in the description of the recycled content system model (http://www.ecoinvent.org/database/system-models-in-ecoinvent-3/cut-off-system-model/allocation-cut-off-by-classification.html).
OR
- EF compliant data

## Deviations from the LCI method approaches
Background data:
- the \xe2\x80\x9cRecycled content cut-off\xe2\x80\x9d approach to allocate end-of-life by-products and secondary materials. This allocation is explained in the description of the recycled content system model (http://www.ecoinvent.org/database/system-models-in-ecoinvent-3/cut-off-system-model/allocation-cut-off-by-classification.html). The ecoinvent database mostly relies on “Allocation – market values” apart for few exceptions particularly in the energy sector. ecoinvent energy data is replaced with EF3.0 core data as per the EF guidelines version 2.0.
OR
- EF compliant data

## Modelling constants
All modelling constants follow the requirements listed in the Tender Specifications 070201/2020/SER/ENV.B1. Completeness: There are no intentional cut-offs in the inventory no matter how small their contribution to all the EF impact categories is. Eventual cut-offs are in compliance with the Guide for EF compliant data sets (JRC 2020), i.e. only if below the 3% cut-off rule. Water use: water use is modelled at country level using separate flows for water withdrawal, water release and water evaporation. Handling multi-functional processes: the following PEF multi- functionality decision hierarchy is applied for resolving all multi- functionality problems: (1) subdivision or system expansion; (2) allocation based on a relevant underlying physical relationship (substitution may apply here); (3) allocation based on some other relationship. Direct land use change: GHG emissions from direct LUC allocated to good/service for 20 years after the LUC occurs, with IPCC default values. Carbon storage and delayed emissions: credits associated with temporary (carbon) storage or delayed emissions up to 300 years are not be considered. Emissions off-setting: are not included. Capital goods (including infrastructures) and their End of life: they are included. System boundaries: system boundaries include all processes linked to the product supply chain (e.g. maintenance). Time period: emissions and removals are modelled as if released or removed at the beginning of the assessment method. Fossil and biogenic carbon emissions and removals: removals and emissions are modelled as follows: All GHG emissions from fossil fuels (including peat and limestone) are modelled consistently with the most updated ILCD list of elementary flows. The non-fossil (biogenic) carbon flows are modelled consistently with the most updated ILCD list of elementary flows.

## Cut-off and completeness
There are no intentional cut-offs in the inventory no matter how small their contribution to all the EF impact categories is. Eventual cut-offs are in compliance with the Guide for EF compliant data sets (JRC 2020), i.e. only if below the 3% cut-off rule. The dataset dry mass and water balance has been checked to ensure the inventory is complete. Capital goods (e.g. infrastructure) and their end-of-life are included.

## Data selection and combination
These datasets include, in both their foreground and background data, links to EF3.0 compliant data.
The relevant background data on energy, transport, and End of Life are from the LCDN data node (http://lcdn.thinkstep.com/Node/).
All other background data in the supply of this product for which no EF3.0 process was available are from ecoinvent v3.7 database (www.ecoinvent.org) or other data sources.

## Data treatment and extrapolations
Several data sources have been used to model the inventory.

## Review details
Internal reviews have been asked to review the plausibility of the unit process, LCIA scores, and DQRs. Internal reviewers have also been asked to review the data for EF compliancy. The consortium is therefore responsible for aspects such as compliancy with the ILCD format, including validation in Look@LCI, and nomenclature.
Internal reviwers have been asked to judge based on the process name, that the unit process models in a complete and representative way the process in the requested location. The review encompassed the plausability of:
- exchanges with nature (elementary flows) as well as exchanges such as product and waste flows.
- meta information (general comment, technology comment, system boundaries, allocation, cut-off rules, etc.). Reviewers were asked to judge if the provided information is enough to understand the content of the process.
- LCIA scores
- DQRs including precision, technology, time and geography. As well as the overall DQR.
External reviewers have been asked to provide their expertise in the field of interest. External reviewers have been asked to review the unit process, including eventual methodological choices, the LCIA scores (provided with contribution scores as well), and DQRs. External reviewers have been provided all the information in a tool developed by the consortium for the purpose of this project.
External reviewers have been asked to judge based on the process name, that the unit process models in a complete and representative way the process in the requested location. The review encompassed:
- Plausability and completeness of exchanges with nature (elementary flows) as well as exchanges such as product and waste flows.
- Review of meta information (general comment, technology comment, system boundaries, allocation, cut-off rules, etc.). Reviewers were asked to judge if the provided information is enough to understand the content of the process.
- Review of properties (biogenic carbon and water content).
- Review of allocation keys.
- Plausability of LCIA scores calculated by the consortium.
- Plausability of DQRs including precision, technology, time and geography. As well as the overall DQR.

## Data sources
- Background Data for Representative products and organisations. EF 3.0 compliant (data stock)
- ecoinvent (2017) Data on the Production of Chemicals created for the EU Product Environmental Footprint (PEF) pilot phase implementation, www.ecoinvent.org, ecoinvent Association, Zurich, Switzerland
- Moreno Ruiz E., Valsasina L., FitzGerald D., Symeonidis A., Turner D., Müller J., Minas N., Bourgault G., Vadenbo C., Ioannidou D., Wernet, G., (2020). Documentation of changes implemented in ecoinvent database v3.7 & v3.7.1. ecoinvent Association, Zürich, Switzerland.
- UNFCCC (2012) COMPONENT PROJECT ACTIVITIES DESIGN DOCUMENT (CPA-DD). Accessed online August 8th 2021: http://gec.jp/gec/jp/Activities/cdm-fs/2012/2012_cdmfs01_jPear_bangladesh_cpa-dd.pdf
- QDTONGDA (2021) Td638 Bunch Shaped Indigo Rope Dyeing Machine of Fast Dyeing Speed. Accessed online August 8th 2021: https://qdtongda.en.made-in-china.com/product/jyeQIDuEZXcl/China-Td638-Bunch-Shaped-Indigo-Rope-Dyeing-Machine-of-Fast-Dyeing-Speed.html

## Intended applications
Implementation of regular Product Environmental Footprint (PEF) studies and Organisation Environmental Footprint (OEF) studies exclusively under the specified Product groups and sectors as defined in the Product Environmental Footprint Category Rules (PEFCR) and Organisation Environmental Footprint Sectorial Rules (OEFSR) listed in http://ec.europa.eu/environment/eussd/smgp/PEFCR_OEFSR.htm
