# heel attachment; heel attachment process; production mix, at plant; service of heel attachment to 1 pair of shoes

Dataset: ILCD process, Partly terminated system
Geography: GLO
Reference year: 2021
Valid until: 2024
Classification: Systems / Textiles, furnitures and other interiors
LCI method principle: Attributional
LCI method approaches: Allocation - market value
Completeness: All relevant flows quantified
Project: Provision of process-based 3.0 Environmental Footprint-compliant life cycle inventory datasets - Apparel 1 - contract number 070201/2020/840291/SER/ENV.B.1
Generated by: Life Cycle Indonesia
Owner: PRé Sustainability B.V.
Compliance: ILCD Data Network - Entry-level; Suggestions for updating the PEF method 2019; ISO 14040 Environmental Management – Life Cycle Assessment – Principles and Framework, 2006; ISO 14044:2006. Environmental Management – Life Cycle Assessment – Requirements and guidelines.; Environmental Footprint 3.1
Review: Dependent internal review by Avraam Symeonidis, Emilia Moreno Ruiz; Independent review panel by Subramanian Senthilkannan Muthu
Data quality: Overall quality: Very good; Time representativeness: Very good; Geographical representativeness: Good; Technological representativeness: Very good; Precision: Good; Methodological appropriateness and consistency: Not applicable
Amounts: no units in this file; such an amount is in the reference unit of its flow, which a separate flow dataset defines
copyright: true
licenseType: Free of charge for some user types or use types
accessRestrictions: Free of charge for all final users implementing a regular Product Environmental Footprint (PEF) studies and Organisation Environmental Footprint (OEF) studies exclusively under the specified Product groups and sectors as defined in the Product Environmental Footprint Category Rules (PEFCR) and Organisation Environmental Footprint Sectorial Rules (OEFSR) listed in http://ec.europa.eu/environment/eussd/smgp/PEFCR_OEFSR.htm and in accordance with the terms and conditions of the EULA (available at https://ecoinvent.lca-data.com/) exclusively until 31st December 2024. Any use of this dataset or any derivative data not within the specific context of one of the PEF/OEF projects or after the end of 2024 is not permitted.

## General comment
Notice: this data set supersedes the EF3.0-compliant version (see link under "preceding data set version" below calculated with the EF3.0). The life cycle inventory is not changed from the original EF3.0 data set. The LCIA results are calculated based on the EF3.1 methods which provide updated characterisation factors in the following impact categories: Climate Change, Ecotoxicity freshwater, Photochemical Ozone Formation, Acidification, Human Toxicity non-cancer, and Human Toxicity cancer. The review report and the data quality ratings refer to the original results. The data set has been updated by the European Commission on the basis of the original EF3.0 data set delivered by the data provider.Heel attachment is the process of attaching high heels on women's shoes, not heels for any other kinds of shoes (those are typically called soles). The heel itself may be attached to the shank of the shoe using nails, screw nails, tacks, cement, staples, or sets of molded prongs (or some combination), depending on the style of the shoe, the height of the heel, the materials used in construction, and other factors including cost. The heels may be constructed of several layers. If it is covered with leather or cloth, the covering is glued or stitched onto the heel before it is attached to the shoe. The sole is trimmed and the tacks are removed so the shoe can be taken off the last. The outside of the shoe is stained or polished, and any fine linings are attached inside the shoe.

Made How (2021) Volume 5: High Heel, http://www.madehow.com/Volume-5/High-Heel.html

## Technology and included processes
Heel attaching can be done by hand or by machine. In this model, the process is done by machine. In this process, heels are glued then screwed to the midsole with a fully automatic heel nailing machine. Materials entering the process such as screw are included as well as glue, screw, energy consumption from electricity, and infrastructure. There is no direct emission to air since the emission comes from electricity usage, while hazardous waste comes from waste lube oil. The consumption of lubricating oil using a thermobonding oven as a proxy. This dataset is a service process which does not include the footwear input.

Quantis data (2021) - Part of industrial data from World Apparel & Footwear Life Cycle Assessment Database, https://quantis-intl.com/metrics/databases/waldb-apparel-footwear/

## Parameters
- kg_0: 3.20487e-5
  Mass in kg, for steel, low-alloyed; Transoceanic ship, bulk; GLO
- km_0: 110058
  Distance in km, for steel, low-alloyed; Transoceanic ship, bulk; GLO
- kg_km_0: 3.5272; = kg_0*km_0
  Transport amount in km*km, for steel, low-alloyed; Transoceanic ship, bulk; GLO
- kg_1: 3.20487e-5
  Mass in kg, for steel, low-alloyed; Freight train, diesel traction; EU+EFTA+UK
- km_1: 35234.7
  Distance in km, for steel, low-alloyed; Freight train, diesel traction; EU+EFTA+UK
- kg_km_1: 1.12922; = kg_1*km_1
  Transport amount in km*km, for steel, low-alloyed; Freight train, diesel traction; EU+EFTA+UK
- kg_2: 3.20487e-5
  Mass in kg, for steel, low-alloyed; Freight train, electricity traction; EU+EFTA+UK
- km_2: 11985.4
  Distance in km, for steel, low-alloyed; Freight train, electricity traction; EU+EFTA+UK
- kg_km_2: 0.384116; = kg_2*km_2
  Transport amount in km*km, for steel, low-alloyed; Freight train, electricity traction; EU+EFTA+UK
- kg_3: 3.20487e-5
  Mass in kg, for steel, low-alloyed; Freight train, average; EU+EFTA+UK
- km_3: 282.681
  Distance in km, for steel, low-alloyed; Freight train, average; EU+EFTA+UK
- kg_km_3: 0.00905956; = kg_3*km_3
  Transport amount in km*km, for steel, low-alloyed; Freight train, average; EU+EFTA+UK
- kg_4: 3.20487e-5
  Mass in kg, for steel, low-alloyed; Barge; EU+EFTA+UK
- km_4: 1649.39
  Distance in km, for steel, low-alloyed; Barge; EU+EFTA+UK
- kg_km_4: 0.0528608; = kg_4*km_4
  Transport amount in km*km, for steel, low-alloyed; Barge; EU+EFTA+UK
- kg_5: 3.20487e-5
  Mass in kg, for steel, low-alloyed; Barge; ROW w/o EU+EFTA
- km_5: 3367.98
  Distance in km, for steel, low-alloyed; Barge; ROW w/o EU+EFTA
- kg_km_5: 0.107939; = kg_5*km_5
  Transport amount in km*km, for steel, low-alloyed; Barge; ROW w/o EU+EFTA
- kg_6: 3.20487e-5
  Mass in kg, for steel, low-alloyed; Articulated lorry transport, Euro 4, Total weight >32 t; EU+EFTA+UK
- km_6: 14164.3
  Distance in km, for steel, low-alloyed; Articulated lorry transport, Euro 4, Total weight >32 t; EU+EFTA+UK
- kg_km_6: 0.453947; = kg_6*km_6
  Transport amount in km*km, for steel, low-alloyed; Articulated lorry transport, Euro 4, Total weight >32 t; EU+EFTA+UK
- kg_7: 3.20487e-5
  Mass in kg, for steel, low-alloyed; Articulated lorry transport, Total weight >32 t, mix Euro 0-5; ROW w/o EU+EFTA
- km_7: 37382.3
  Distance in km, for steel, low-alloyed; Articulated lorry transport, Total weight >32 t, mix Euro 0-5; ROW w/o EU+EFTA
- kg_km_7: 1.19805; = kg_7*km_7
  Transport amount in km*km, for steel, low-alloyed; Articulated lorry transport, Total weight >32 t, mix Euro 0-5; ROW w/o EU+EFTA
- kg_8: 0.006
  Mass in kg, for lamination, solvent glue // lamination, solvent glue // glo; Articulated lorry transport, Euro 4, Total weight >32 t; EU+EFTA+UK
- km_8: 1000
  Distance in km, for lamination, solvent glue // lamination, solvent glue // glo; Articulated lorry transport, Euro 4, Total weight >32 t; EU+EFTA+UK
- kg_km_8: 6; = kg_8*km_8
  Transport amount in km*km, for lamination, solvent glue // lamination, solvent glue // glo; Articulated lorry transport, Euro 4, Total weight >32 t; EU+EFTA+UK
- kg_9: 1.35979e-6
  Mass in kg, for lubricating oil // lubricants at refinery // cn; Articulated lorry transport, Euro 4, Total weight >32 t; EU+EFTA+UK
- km_9: 1000.16
  Distance in km, for lubricating oil // lubricants at refinery // cn; Articulated lorry transport, Euro 4, Total weight >32 t; EU+EFTA+UK
- kg_km_9: 0.00136; = kg_9*km_9
  Transport amount in km*km, for lubricating oil // lubricants at refinery // cn; Articulated lorry transport, Euro 4, Total weight >32 t; EU+EFTA+UK
- kg_10: 4.36241e-6
  Mass in kg, for lubricating oil // lubricants at refinery // eu+efta+uk; Articulated lorry transport, Euro 4, Total weight >32 t; EU+EFTA+UK
- km_10: 999.448
  Distance in km, for lubricating oil // lubricants at refinery // eu+efta+uk; Articulated lorry transport, Euro 4, Total weight >32 t; EU+EFTA+UK
- kg_km_10: 0.00436; = kg_10*km_10
  Transport amount in km*km, for lubricating oil // lubricants at refinery // eu+efta+uk; Articulated lorry transport, Euro 4, Total weight >32 t; EU+EFTA+UK
- kg_11: 3.26816e-7
  Mass in kg, for lubricating oil // lubricants at refinery // raf; Articulated lorry transport, Euro 4, Total weight >32 t; EU+EFTA+UK
- km_11: 1000.56
  Distance in km, for lubricating oil // lubricants at refinery // raf; Articulated lorry transport, Euro 4, Total weight >32 t; EU+EFTA+UK
- kg_km_11: 0.000327; = kg_11*km_11
  Transport amount in km*km, for lubricating oil // lubricants at refinery // raf; Articulated lorry transport, Euro 4, Total weight >32 t; EU+EFTA+UK
- kg_12: 8.56433e-6
  Mass in kg, for lubricating oil // lubricants at refinery // ras w/o cn; Articulated lorry transport, Euro 4, Total weight >32 t; EU+EFTA+UK
- km_12: 999.494
  Distance in km, for lubricating oil // lubricants at refinery // ras w/o cn; Articulated lorry transport, Euro 4, Total weight >32 t; EU+EFTA+UK
- kg_km_12: 0.00856; = kg_12*km_12
  Transport amount in km*km, for lubricating oil // lubricants at refinery // ras w/o cn; Articulated lorry transport, Euro 4, Total weight >32 t; EU+EFTA+UK
- kg_13: 6.68514e-6
  Mass in kg, for lubricating oil // lubricants at refinery // rna; Articulated lorry transport, Euro 4, Total weight >32 t; EU+EFTA+UK
- km_13: 1000.73
  Distance in km, for lubricating oil // lubricants at refinery // rna; Articulated lorry transport, Euro 4, Total weight >32 t; EU+EFTA+UK
- kg_km_13: 0.00669; = kg_13*km_13
  Transport amount in km*km, for lubricating oil // lubricants at refinery // rna; Articulated lorry transport, Euro 4, Total weight >32 t; EU+EFTA+UK
- kg_14: 7.96614e-7
  Mass in kg, for lubricating oil // lubricants at refinery // rsa; Articulated lorry transport, Euro 4, Total weight >32 t; EU+EFTA+UK
- km_14: 1000.48
  Distance in km, for lubricating oil // lubricants at refinery // rsa; Articulated lorry transport, Euro 4, Total weight >32 t; EU+EFTA+UK
- kg_km_14: 0.000797; = kg_14*km_14
  Transport amount in km*km, for lubricating oil // lubricants at refinery // rsa; Articulated lorry transport, Euro 4, Total weight >32 t; EU+EFTA+UK
- kg_15: 7.08199e-6
  Mass in kg, for lubricating oil // lubricants at refinery // ru; Articulated lorry transport, Euro 4, Total weight >32 t; EU+EFTA+UK
- km_15: 999.72
  Distance in km, for lubricating oil // lubricants at refinery // ru; Articulated lorry transport, Euro 4, Total weight >32 t; EU+EFTA+UK
- kg_km_15: 0.00708; = kg_15*km_15
  Transport amount in km*km, for lubricating oil // lubricants at refinery // ru; Articulated lorry transport, Euro 4, Total weight >32 t; EU+EFTA+UK
- kg_16: 0.006
  Mass in kg, for lamination, solvent glue // lamination, solvent glue // glo; Transoceanic ship, containers; GLO
- km_16: 18000
  Distance in km, for lamination, solvent glue // lamination, solvent glue // glo; Transoceanic ship, containers; GLO
- kg_km_16: 108; = kg_16*km_16
  Transport amount in km*km, for lamination, solvent glue // lamination, solvent glue // glo; Transoceanic ship, containers; GLO
- kg_17: 1.35979e-6
  Mass in kg, for lubricating oil // lubricants at refinery // cn; Transoceanic ship, containers; GLO
- km_17: 18017.5
  Distance in km, for lubricating oil // lubricants at refinery // cn; Transoceanic ship, containers; GLO
- kg_km_17: 0.0245; = kg_17*km_17
  Transport amount in km*km, for lubricating oil // lubricants at refinery // cn; Transoceanic ship, containers; GLO
- kg_18: 4.36241e-6
  Mass in kg, for lubricating oil // lubricants at refinery // eu+efta+uk; Transoceanic ship, containers; GLO
- km_18: 17994.6
  Distance in km, for lubricating oil // lubricants at refinery // eu+efta+uk; Transoceanic ship, containers; GLO
- kg_km_18: 0.0785; = kg_18*km_18
  Transport amount in km*km, for lubricating oil // lubricants at refinery // eu+efta+uk; Transoceanic ship, containers; GLO
- kg_19: 3.26816e-7
  Mass in kg, for lubricating oil // lubricants at refinery // raf; Transoceanic ship, containers; GLO
- km_19: 17991.8
  Distance in km, for lubricating oil // lubricants at refinery // raf; Transoceanic ship, containers; GLO
- kg_km_19: 0.00588; = kg_19*km_19
  Transport amount in km*km, for lubricating oil // lubricants at refinery // raf; Transoceanic ship, containers; GLO
- kg_20: 8.56433e-6
  Mass in kg, for lubricating oil // lubricants at refinery // ras w/o cn; Transoceanic ship, containers; GLO
- km_20: 17981.6
  Distance in km, for lubricating oil // lubricants at refinery // ras w/o cn; Transoceanic ship, containers; GLO
- kg_km_20: 0.154; = kg_20*km_20
  Transport amount in km*km, for lubricating oil // lubricants at refinery // ras w/o cn; Transoceanic ship, containers; GLO
- kg_21: 6.68514e-6
  Mass in kg, for lubricating oil // lubricants at refinery // rna; Transoceanic ship, containers; GLO
- km_21: 17950.3
  Distance in km, for lubricating oil // lubricants at refinery // rna; Transoceanic ship, containers; GLO
- kg_km_21: 0.12; = kg_21*km_21
  Transport amount in km*km, for lubricating oil // lubricants at refinery // rna; Transoceanic ship, containers; GLO
- kg_22: 7.96614e-7
  Mass in kg, for lubricating oil // lubricants at refinery // rsa; Transoceanic ship, containers; GLO
- km_22: 17951
  Distance in km, for lubricating oil // lubricants at refinery // rsa; Transoceanic ship, containers; GLO
- kg_km_22: 0.0143; = kg_22*km_22
  Transport amount in km*km, for lubricating oil // lubricants at refinery // rsa; Transoceanic ship, containers; GLO
- kg_23: 7.08199e-6
  Mass in kg, for lubricating oil // lubricants at refinery // ru; Transoceanic ship, containers; GLO
- km_23: 17932.8
  Distance in km, for lubricating oil // lubricants at refinery // ru; Transoceanic ship, containers; GLO
- kg_km_23: 0.127; = kg_23*km_23
  Transport amount in km*km, for lubricating oil // lubricants at refinery // ru; Transoceanic ship, containers; GLO

## Reference product
- heel attachment // heel attachment // glo: 1

## Inputs
- Electricity from Electricity grid mix 1kV-60kV - AU: 0
- Electricity from Electricity grid mix 1kV-60kV - EU+EFTA+UK: 0.0004
- Electricity from Electricity grid mix 1kV-60kV - NZ: 0
- Electricity from Electricity grid mix 1kV-60kV - RAF: 0.0001
- Electricity from Electricity grid mix 1kV-60kV - RNA: 0.0006
- Electricity from Electricity grid mix 1kV-60kV - RSA: 0.0002
- Electricity from Electricity grid mix 1kV-60kV - RU: 0.0001
- Transport of steel, low-alloyed by Transoceanic ship, bulk - GLO: 3.5272; = kg_km_0
- Transport of steel, low-alloyed by Freight train, diesel traction - EU+EFTA+UK: 1.12922; = kg_km_1
- Transport of steel, low-alloyed by Freight train, electricity traction - EU+EFTA+UK: 0.384116; = kg_km_2
- Transport of steel, low-alloyed by Freight train, average - EU+EFTA+UK: 0.00905956; = kg_km_3
- Transport of steel, low-alloyed by Barge - EU+EFTA+UK: 0.0528608; = kg_km_4
- Transport of steel, low-alloyed by Barge - ROW w/o EU+EFTA: 0.107939; = kg_km_5
- Transport of steel, low-alloyed by Articulated lorry transport, Euro 4, Total weight >32 t - EU+EFTA+UK: 0.453947; = kg_km_6
- Transport of steel, low-alloyed by Articulated lorry transport, Total weight >32 t, mix Euro 0-5 - ROW w/o EU+EFTA: 1.19805; = kg_km_7
- Transport of lamination, solvent glue // lamination, solvent glue // glo by Articulated lorry transport, Euro 4, Total weight >32 t - EU+EFTA+UK: 6; = kg_km_8
- Transport of lubricating oil // lubricants at refinery // cn by Articulated lorry transport, Euro 4, Total weight >32 t - EU+EFTA+UK: 0.00136; = kg_km_9
- Transport of lubricating oil // lubricants at refinery // eu+efta+uk by Articulated lorry transport, Euro 4, Total weight >32 t - EU+EFTA+UK: 0.00436; = kg_km_10
- Transport of lubricating oil // lubricants at refinery // raf by Articulated lorry transport, Euro 4, Total weight >32 t - EU+EFTA+UK: 0.000327; = kg_km_11
- Transport of lubricating oil // lubricants at refinery // ras w/o cn by Articulated lorry transport, Euro 4, Total weight >32 t - EU+EFTA+UK: 0.00856; = kg_km_12
- Transport of lubricating oil // lubricants at refinery // rna by Articulated lorry transport, Euro 4, Total weight >32 t - EU+EFTA+UK: 0.00669; = kg_km_13
- Transport of lubricating oil // lubricants at refinery // rsa by Articulated lorry transport, Euro 4, Total weight >32 t - EU+EFTA+UK: 0.000797; = kg_km_14
- Transport of lubricating oil // lubricants at refinery // ru by Articulated lorry transport, Euro 4, Total weight >32 t - EU+EFTA+UK: 0.00708; = kg_km_15
- Transport of lamination, solvent glue // lamination, solvent glue // glo by Transoceanic ship, containers - GLO: 108; = kg_km_16
- Transport of lubricating oil // lubricants at refinery // cn by Transoceanic ship, containers - GLO: 0.0245; = kg_km_17
- Transport of lubricating oil // lubricants at refinery // eu+efta+uk by Transoceanic ship, containers - GLO: 0.0785; = kg_km_18
- Transport of lubricating oil // lubricants at refinery // raf by Transoceanic ship, containers - GLO: 0.00588; = kg_km_19
- Transport of lubricating oil // lubricants at refinery // ras w/o cn by Transoceanic ship, containers - GLO: 0.154; = kg_km_20
- Transport of lubricating oil // lubricants at refinery // rna by Transoceanic ship, containers - GLO: 0.12; = kg_km_21
- Transport of lubricating oil // lubricants at refinery // rsa by Transoceanic ship, containers - GLO: 0.0143; = kg_km_22
- Transport of lubricating oil // lubricants at refinery // ru by Transoceanic ship, containers - GLO: 0.127; = kg_km_23
- Electricity from Electricity grid mix 1kV-60kV - CN: 0.000668054
- Electricity from Electricity grid mix 1kV-60kV - RAS w/o CN: 0.000731946
- heel attachment // heel attachment // glo, blackbox: 1
- heel attachment // heel attachment // glo, elementary: 1

## Impact indicators
- Eutrophication marine: 6.73345e-5
- Ecotoxicity, freshwater: 0.305319
- Land use: 0.101289
- Water use: 0.0225055
- Resource use, minerals and metals: 1.77376e-7
- Resource use, fossils: 0.702844
- Climate change: 0.0520247
- Ozone depletion: 3.5507e-10
- Human toxicity, cancer: 2.22154e-10
- Human toxicity, non-cancer: 4.69279e-10
- EF-particulate Matter: 1.09647e-8
- Ionising radiation, human health: 0.00291505
- Photochemical ozone formation - human health: 0.000423246
- Acidification: 0.000353421
- Eutrophication, terrestrial: 0.000682081
- Eutrophication, freshwater: 1.60356e-6

## Deviations from the LCI method principle
The background data uses:
- the \xe2\x80\x9cRecycled content cut-off\xe2\x80\x9d approach to allocate end-of-life by-products and secondary materials. This allocation is explained in the description of the recycled content system model (http://www.ecoinvent.org/database/system-models-in-ecoinvent-3/cut-off-system-model/allocation-cut-off-by-classification.html).
OR
- EF compliant data

## Deviations from the LCI method approaches
Background data:
- the \xe2\x80\x9cRecycled content cut-off\xe2\x80\x9d approach to allocate end-of-life by-products and secondary materials. This allocation is explained in the description of the recycled content system model (http://www.ecoinvent.org/database/system-models-in-ecoinvent-3/cut-off-system-model/allocation-cut-off-by-classification.html). The ecoinvent database mostly relies on “Allocation – market values” apart for few exceptions particularly in the energy sector. ecoinvent energy data is replaced with EF3.0 core data as per the EF guidelines version 2.0.
OR
- EF compliant data

## Modelling constants
All modelling constants follow the requirements listed in the Tender Specifications 070201/2020/SER/ENV.B1. Completeness: There are no intentional cut-offs in the inventory no matter how small their contribution to all the EF impact categories is. Eventual cut-offs are in compliance with the Guide for EF compliant data sets (JRC 2020), i.e. only if below the 3% cut-off rule. Water use: water use is modelled at country level using separate flows for water withdrawal, water release and water evaporation. Handling multi-functional processes: the following PEF multi- functionality decision hierarchy is applied for resolving all multi- functionality problems: (1) subdivision or system expansion; (2) allocation based on a relevant underlying physical relationship (substitution may apply here); (3) allocation based on some other relationship. Direct land use change: GHG emissions from direct LUC allocated to good/service for 20 years after the LUC occurs, with IPCC default values. Carbon storage and delayed emissions: credits associated with temporary (carbon) storage or delayed emissions up to 300 years are not be considered. Emissions off-setting: are not included. Capital goods (including infrastructures) and their End of life: they are included. System boundaries: system boundaries include all processes linked to the product supply chain (e.g. maintenance). Time period: emissions and removals are modelled as if released or removed at the beginning of the assessment method. Fossil and biogenic carbon emissions and removals: removals and emissions are modelled as follows: All GHG emissions from fossil fuels (including peat and limestone) are modelled consistently with the most updated ILCD list of elementary flows. The non-fossil (biogenic) carbon flows are modelled consistently with the most updated ILCD list of elementary flows.

## Cut-off and completeness
There are no intentional cut-offs in the inventory no matter how small their contribution to all the EF impact categories is. Eventual cut-offs are in compliance with the Guide for EF compliant data sets (JRC 2020), i.e. only if below the 3% cut-off rule. The dataset dry mass and water balance has been checked to ensure the inventory is complete. Capital goods (e.g. infrastructure) and their end-of-life are included.

## Data selection and combination
These datasets include, in both their foreground and background data, links to EF3.0 compliant data.
The relevant background data on energy, transport, and End of Life are from the LCDN data node (http://lcdn.thinkstep.com/Node/).
All other background data in the supply of this product for which no EF3.0 process was available are from ecoinvent v3.7 database (www.ecoinvent.org) or other data sources.

## Data treatment and extrapolations
Several data sources have been used to model the inventory.

## Review details
Internal reviews have been asked to review the plausibility of the unit process, LCIA scores, and DQRs. Internal reviewers have also been asked to review the data for EF compliancy. The consortium is therefore responsible for aspects such as compliancy with the ILCD format, including validation in Look@LCI, and nomenclature.
Internal reviwers have been asked to judge based on the process name, that the unit process models in a complete and representative way the process in the requested location. The review encompassed the plausability of:
- exchanges with nature (elementary flows) as well as exchanges such as product and waste flows.
- meta information (general comment, technology comment, system boundaries, allocation, cut-off rules, etc.). Reviewers were asked to judge if the provided information is enough to understand the content of the process.
- LCIA scores
- DQRs including precision, technology, time and geography. As well as the overall DQR.
External reviewers have been asked to provide their expertise in the field of interest. External reviewers have been asked to review the unit process, including eventual methodological choices, the LCIA scores (provided with contribution scores as well), and DQRs. External reviewers have been provided all the information in a tool developed by the consortium for the purpose of this project.
External reviewers have been asked to judge based on the process name, that the unit process models in a complete and representative way the process in the requested location. The review encompassed:
- Plausability and completeness of exchanges with nature (elementary flows) as well as exchanges such as product and waste flows.
- Review of meta information (general comment, technology comment, system boundaries, allocation, cut-off rules, etc.). Reviewers were asked to judge if the provided information is enough to understand the content of the process.
- Review of properties (biogenic carbon and water content).
- Review of allocation keys.
- Plausability of LCIA scores calculated by the consortium.
- Plausability of DQRs including precision, technology, time and geography. As well as the overall DQR.

## Data sources
- Background Data for Representative products and organisations. EF 3.0 compliant (data stock)
- Quantis Data (2021)
- UN Data (2018) Statistics Data for Lubricants Productions, http://data.un.org/Data.aspx?q=Lubricants&d=EDATA&f=cmID%3aLU, United Nations Statistics Division, Global
- Lebon (2021) Nonwoven Oven Machine, Catalog and Company Messages, Qingdao Lebon Industry Co., Ltd., China
- Licheng (2021) LC-338 Fully Automatic Heel Nailing Machine, http://en.licheng.acshoes.com/Product/299131.html, Shenzhen Quan Licheng Machinery Manufacturing Co., Ltd, China

## Intended applications
Implementation of regular Product Environmental Footprint (PEF) studies and Organisation Environmental Footprint (OEF) studies exclusively under the specified Product groups and sectors as defined in the Product Environmental Footprint Category Rules (PEFCR) and Organisation Environmental Footprint Sectorial Rules (OEFSR) listed in http://ec.europa.eu/environment/eussd/smgp/PEFCR_OEFSR.htm
