# welding; welding process; production mix, at plant; service

Dataset: ILCD process, Partly terminated system
Geography: GLO
Reference year: 2021
Valid until: 2024
Classification: Systems / Textiles, furnitures and other interiors
LCI method principle: Attributional
LCI method approaches: Allocation - market value
Completeness: All relevant flows quantified
Project: Provision of process-based 3.0 Environmental Footprint-compliant life cycle inventory datasets - Apparel 1 - contract number 070201/2020/840291/SER/ENV.B.1
Generated by: Life Cycle Indonesia
Owner: PRé Sustainability B.V.
Compliance: ILCD Data Network - Entry-level; Suggestions for updating the PEF method 2019; ISO 14040 Environmental Management – Life Cycle Assessment – Principles and Framework, 2006; ISO 14044:2006. Environmental Management – Life Cycle Assessment – Requirements and guidelines.; Environmental Footprint 3.1
Review: Dependent internal review by Avraam Symeonidis, Emilia Moreno Ruiz; Independent review panel by Subramanian Senthilkannan Muthu
Data quality: Overall quality: Very good; Time representativeness: Very good; Geographical representativeness: Good; Technological representativeness: Very good; Precision: Good; Methodological appropriateness and consistency: Not applicable
Amounts: no units in this file; such an amount is in the reference unit of its flow, which a separate flow dataset defines
copyright: true
licenseType: Free of charge for some user types or use types
accessRestrictions: Free of charge for all final users implementing a regular Product Environmental Footprint (PEF) studies and Organisation Environmental Footprint (OEF) studies exclusively under the specified Product groups and sectors as defined in the Product Environmental Footprint Category Rules (PEFCR) and Organisation Environmental Footprint Sectorial Rules (OEFSR) listed in http://ec.europa.eu/environment/eussd/smgp/PEFCR_OEFSR.htm and in accordance with the terms and conditions of the EULA (available at https://ecoinvent.lca-data.com/) exclusively until 31st December 2024. Any use of this dataset or any derivative data not within the specific context of one of the PEF/OEF projects or after the end of 2024 is not permitted.

## General comment
Notice: this data set supersedes the EF3.0-compliant version (see link under "preceding data set version" below calculated with the EF3.0). The life cycle inventory is not changed from the original EF3.0 data set. The LCIA results are calculated based on the EF3.1 methods which provide updated characterisation factors in the following impact categories: Climate Change, Ecotoxicity freshwater, Photochemical Ozone Formation, Acidification, Human Toxicity non-cancer, and Human Toxicity cancer. The review report and the data quality ratings refer to the original results. The data set has been updated by the European Commission on the basis of the original EF3.0 data set delivered by the data provider.Welding is the heat bonding of thermo plastics. Fabric welding is the process of joining pieces of fabrics using heat and pressure. Thermoplastic coatings, such as polyvinylchloride (PVC), polyurethane (PU), polyethylene fabric (PE) and polypropylene (PP) are used for heat sealing.

Hans, Karl Routte. 2001. Encyclopedia of Textile Finishing pp 2660
https://www.researchgate.net/publication/297687236_Assembling_technologies_for_functional_garments-An_overview

## Technology and included processes
The process of thermoplastic welding consists of the same basic elements: heat, pressure, and cooling. How these three elements are combined is controlled by the materials being welded, the welding method, and the speed of the manufacturing process. In addition, textile industrial welding techniques differ in how heat is generated and applied. One of the best things about these thermoplastic welding techniques is that they are flexible enough to work with most common industrial textiles. High Frequency, hot air, and hot edge welding can join thermoplastics such as polypropylene, polyurethane, polyethylene, and polyvinyl chloride (PVC), and PVC-coated fabrics. The type of machine covered in this dataset is the Hot Wedge Welding machine as the most common machine.

Hot wedge welding uses a heated metal wedge precisely positioned at the weld point to provide the required heat. Two sheets of fabric or film are pulled across the heated wedge, then subjected to pressure from rollers to form the weld. The highly controlled temperature of the wedge can range from 700F to 920F (370C to 490C). This process is ideal for welding long, continuous thermoplastic fabrics and can be used to fuse previously welded materials to a third fabric layer.

In this process, welding machines use electrical power as the source of heat or energy. This dataset is a service process that does not include the raw material input (thermoplastic). The energy consumption and infrastructure of the machine are included in the dataset. There is no direct emission to the air since the emission comes from electricity usage. Since the machine used is a handheld machine and the size is relatively small compared to other industrial machines, the lube oil consumption is not significant in this process.

https://erez-therm.com/welding-thermoplastics/

## Reference product
- welding // welding // glo: 1

## Inputs
- Electricity from Electricity grid mix 1kV-60kV - AU: 0.0018
- Electricity from Electricity grid mix 1kV-60kV - EU+EFTA+UK: 0.0258
- Electricity from Electricity grid mix 1kV-60kV - NZ: 0.0003
- Electricity from Electricity grid mix 1kV-60kV - RAF: 0.0056
- Electricity from Electricity grid mix 1kV-60kV - RNA: 0.0378
- Electricity from Electricity grid mix 1kV-60kV - RSA: 0.0128
- Electricity from Electricity grid mix 1kV-60kV - RU: 0.0076
- Electricity from Electricity grid mix 1kV-60kV - CN: 0.0387471
- Electricity from Electricity grid mix 1kV-60kV - RAS w/o CN: 0.0424529
- welding // welding // glo, blackbox: 1
- welding // welding // glo, elementary: 1

## Impact indicators
- Eutrophication marine: 2.80922e-5
- Ecotoxicity, freshwater: 0.142687
- Land use: 0.0423033
- Water use: 0.0107289
- Resource use, minerals and metals: 3.53659e-9
- Resource use, fossils: 0.432209
- Climate change: 0.0328004
- Ozone depletion: 2.51334e-12
- Human toxicity, cancer: 1.56806e-11
- Human toxicity, non-cancer: 1.85761e-10
- EF-particulate Matter: 7.84186e-9
- Ionising radiation, human health: 0.00237825
- Photochemical ozone formation - human health: 8.60987e-5
- Acidification: 0.000208275
- Eutrophication, terrestrial: 0.000306006
- Eutrophication, freshwater: 1.81315e-8

## Deviations from the LCI method principle
The background data use the \xe2\x80\x9cRecycled content cut-off\xe2\x80\x9d approach to allocate end-of-life by-products and secondary materials. This allocation is explained in the description of the recycled content system model (http://www.ecoinvent.org/database/system-models-in-ecoinvent-3/cut-off-system-model/allocation-cut-off-by-classification.html).

## Deviations from the LCI method approaches
Background data:
- the \xe2\x80\x9cRecycled content cut-off\xe2\x80\x9d approach to allocate end-of-life by-products and secondary materials. This allocation is explained in the description of the recycled content system model (http://www.ecoinvent.org/database/system-models-in-ecoinvent-3/cut-off-system-model/allocation-cut-off-by-classification.html). The ecoinvent database mostly relies on “Allocation – market values” apart for few exceptions particularly in the energy sector. ecoinvent energy data is replaced with EF3.0 core data as per the EF guidelines version 2.0.
OR
- EF compliant data

## Modelling constants
All modelling constants follow the requirements listed in the Tender Specifications ENV.B.1/SER/2016/0038vl. Completeness: All known environmental flows are included. All known resource uses and emissions are listed in the inventory. Water use: water use is modelled at country level using separate flows for water withdrawal, water release and water evaporation. Cut-off: All known environmental flows are included. All known resource uses and emissions are listed in the inventory. Handling multi-functional processes: the following PEF multi- functionality decision hierarchy is applied for resolving all multi- functionality problems: (1) subdivision or system expansion; (2) allocation based on a relevant underlying physical relationship (substitution may apply here); (3) allocation based on some other relationship. Direct land use change: GHG emissions from direct LUC allocated to good/service for 20 years after the LUC occurs, with IPCC default values. Carbon storage and delayed emissions: credits associated with temporary (carbon) storage or delayed emissions up to 300 years are not be considered. Emissions off-setting: are not included. Capital goods (including infrastructures) and their End of life: they are included. System boundaries: system boundaries include all processes linked to the product supply chain (e.g. maintenance). Time period: emissions and removals are modelled as if released or removed at the beginning of the assessment method. Fossil and biogenic carbon emissions and removals: removals and emissions are modelled as follows: All GHG emissions from fossil fuels (including peat and limestone) are modelled consistently with the most updated ILCD list of elementary flows. The non-fossil (biogenic) carbon flows are modelled consistently with the most updated ILCD list of elementary flows.

## Cut-off and completeness
All known environmental flows are included. All known resource uses and emissions are listed in the inventory. The dataset dry mass balance has been checked to ensure the inventory is complete. Capital goods (e.g. infrastructure) and their end-of-life are included.

## Data selection and combination
These datasets include, in both their foreground and background data, links to EF3.0 compliant data.
The relevant background data on energy, transport, and End of Life are from the LCDN data node (http://lcdn.thinkstep.com/Node/).
All other background data in the supply of this product for which no EF3.0 process was available are from ecoinvent v3.7 database (www.ecoinvent.org) or other data sources.

## Data treatment and extrapolations
Several data sources have been used to model the inventory.

## Review details
Internal reviews have been asked to review the plausibility of the unit process, LCIA scores, and DQRs. Internal reviewers have also been asked to review the data for EF compliancy. The consortium is therefore responsible for aspects such as compliancy with the ILCD format, including validation in Look@LCI, and nomenclature.
Internal reviwers have been asked to judge based on the process name, that the unit process models in a complete and representative way the process in the requested location. The review encompassed the plausability of:
- exchanges with nature (elementary flows) as well as exchanges such as product and waste flows.
- meta information (general comment, technology comment, system boundaries, allocation, cut-off rules, etc.). Reviewers were asked to judge if the provided information is enough to understand the content of the process.
- LCIA scores
- DQRs including precision, technology, time and geography. As well as the overall DQR.
External reviewers have been asked to provide their expertise in the field of interest. External reviewers have been asked to review the unit process, including eventual methodological choices, the LCIA scores (provided with contribution scores as well), and DQRs. External reviewers have been provided all the information in a tool developed by the consortium for the purpose of this project.
External reviewers have been asked to judge based on the process name, that the unit process models in a complete and representative way the process in the requested location. The review encompassed:
- Plausability and completeness of exchanges with nature (elementary flows) as well as exchanges such as product and waste flows.
- Review of meta information (general comment, technology comment, system boundaries, allocation, cut-off rules, etc.). Reviewers were asked to judge if the provided information is enough to understand the content of the process.
- Review of properties (biogenic carbon and water content).
- Review of allocation keys.
- Plausability of LCIA scores calculated by the consortium.
- Plausability of DQRs including precision, technology, time and geography. As well as the overall DQR.

## Data sources
- Background Data for Representative products and organisations. EF 3.0 compliant (data stock)
- Heatfounder (2021), ZX5700 Hot wedge welding machine, https://www.heatfounder.com/zx5700-combi-wedge-welder.html , Heat Funger Co., Ltd., Shanghai, China

## Intended applications
Implementation of regular Product Environmental Footprint (PEF) studies and Organisation Environmental Footprint (OEF) studies exclusively under the specified Product groups and sectors as defined in the Product Environmental Footprint Category Rules (PEFCR) and Organisation Environmental Footprint Sectorial Rules (OEFSR) listed in http://ec.europa.eu/environment/eussd/smgp/PEFCR_OEFSR.htm
