# thermomechanical pulp; technology mix; production mix, at plant; dry mass 0.9 kg; carbon content, non fossil 0.494

Dataset: ILCD process, Partly terminated system
Geography: WORLD (WITHOUT EU+EFTA+UK)
Reference year: 2015
Valid until: 2024
Classification: Materials production / Wood
LCI method principle: Attributional
LCI method approaches: Allocation - market value
Completeness: All relevant flows quantified
Project: Provision of process-based 3.0 Environmental Footprint-compliant life cycle inventory datasets - Renewable materials - contract number 070201/2020/840085/SER/ENV.B.1
Generated by: ACV Brasil
Owner: ecoinvent
Compliance: ILCD Data Network - Entry-level; Suggestions for updating the PEF method 2019; ISO 14040 Environmental Management – Life Cycle Assessment – Principles and Framework, 2006; ISO 14044:2006. Environmental Management – Life Cycle Assessment – Requirements and guidelines.; Environmental Footprint 3.1
Review: Dependent internal review by Lucia Valsasina, Emilia Moreno Ruiz; Independent review panel by Michael Sturges
Data quality: Overall quality: Very good; Time representativeness: Fair; Geographical representativeness: Good; Technological representativeness: Very good; Precision: Very good; Methodological appropriateness and consistency: Not applicable
Amounts: no units in this file; such an amount is in the reference unit of its flow, which a separate flow dataset defines
copyright: true
licenseType: Free of charge for some user types or use types
accessRestrictions: Free of charge for all final users implementing a regular Product Environmental Footprint (PEF) studies and Organisation Environmental Footprint (OEF) studies exclusively under the specified Product groups and sectors as defined in the Product Environmental Footprint Category Rules (PEFCR) and Organisation Environmental Footprint Sectorial Rules (OEFSR) listed in http://ec.europa.eu/environment/eussd/smgp/PEFCR_OEFSR.htm and in accordance with the terms and conditions of the EULA (available at https://ecoinvent.lca-data.com/) exclusively until 31st December 2024. Any use of this dataset or any derivative data not within the specific context of one of the PEF/OEF projects or after the end of 2024 is not permitted.

## General comment
Notice: this data set supersedes the EF3.0-compliant version (see link under "preceding data set version" below calculated with the EF3.0). The life cycle inventory is not changed from the original EF3.0 data set. The LCIA results are calculated based on the EF3.1 methods which provide updated characterisation factors in the following impact categories: Climate Change, Ecotoxicity freshwater, Photochemical Ozone Formation, Acidification, Human Toxicity non-cancer, and Human Toxicity cancer. The review report and the data quality ratings refer to the original results. The data set has been updated by the European Commission on the basis of the original EF3.0 data set delivered by the data provider.This dataset represents the production of 1 kg of thermo-mechanical wood pulp. This pulp is used mainly in newsprints and wood-containing papers, like LWC (light-weight coated) and SC (super-calendered) papers (Suhr et al., 2015).

## Technology and included processes
Pulp is produced in a thermomechanical process where wood particles are softened by steam before entering a pressurized refiner. This dataset is modelled according to the activity ‘thermo-mechanical pulp production - RER', valid from 1993 to 2000, published in the ecoinvent database 3.7.1. The dataset is updated with electricity requirements reported by Bajpai (2016) as well as pulp yield retrieved from Suhr et al. (2015).
The activity starts with materials entering the process. Energy consumption, infrastructure and the treatment of waste are included.
References:
Bajpai, P. (2016). Chapter 3 - Pulp and paper production processes and energy overview. Pulp and Paper Industry. Pages 15-49. ISBN 9780128034118. https://doi.org/10.1016/B978-0-12-803411-8.00003-2. Elsevier.
Suhr et al. (2015). Best Available Techniques (BAT) Reference Document for the Production of Pulp, Paper and Board. Industrial Emissions Directive 2010/75/EU (Integrated Pollution Prevention and Control). European Commission. Joint Research Centre.

## Parameters
- kg_0: 0.0286
  Mass in kg, for hydrogen peroxide, 50% // hydrogen peroxide, 50% production // eu+efta+uk; Articulated lorry transport, Euro 4, Total weight >32 t; EU+EFTA+UK
- km_0: 1000
  Distance in km, for hydrogen peroxide, 50% // hydrogen peroxide, 50% production // eu+efta+uk; Articulated lorry transport, Euro 4, Total weight >32 t; EU+EFTA+UK
- kg_km_0: 28.6; = kg_0*km_0
  Transport amount in km*km, for hydrogen peroxide, 50% // hydrogen peroxide, 50% production // eu+efta+uk; Articulated lorry transport, Euro 4, Total weight >32 t; EU+EFTA+UK
- kg_1: 0.0286
  Mass in kg, for hydrogen peroxide, 50% // hydrogen peroxide, 50% production // eu+efta+uk; Transoceanic ship, containers; GLO
- km_1: 18007
  Distance in km, for hydrogen peroxide, 50% // hydrogen peroxide, 50% production // eu+efta+uk; Transoceanic ship, containers; GLO
- kg_km_1: 515; = kg_1*km_1
  Transport amount in km*km, for hydrogen peroxide, 50% // hydrogen peroxide, 50% production // eu+efta+uk; Transoceanic ship, containers; GLO
- kg_2: 0.0142
  Mass in kg, for sodium hydroxide, without water, in 50% solution state; Transoceanic ship, containers; GLO
- km_2: 599
  Distance in km, for sodium hydroxide, without water, in 50% solution state; Transoceanic ship, containers; GLO
- kg_km_2: 8.5058; = kg_2*km_2
  Transport amount in km*km, for sodium hydroxide, without water, in 50% solution state; Transoceanic ship, containers; GLO
- kg_3: 0.0142
  Mass in kg, for sodium hydroxide, without water, in 50% solution state; Freight train, diesel traction; EU+EFTA+UK
- km_3: 229.272
  Distance in km, for sodium hydroxide, without water, in 50% solution state; Freight train, diesel traction; EU+EFTA+UK
- kg_km_3: 3.25566; = kg_3*km_3
  Transport amount in km*km, for sodium hydroxide, without water, in 50% solution state; Freight train, diesel traction; EU+EFTA+UK
- kg_4: 0.0142
  Mass in kg, for sodium hydroxide, without water, in 50% solution state; Freight train, electricity traction; EU+EFTA+UK
- km_4: 77.9889
  Distance in km, for sodium hydroxide, without water, in 50% solution state; Freight train, electricity traction; EU+EFTA+UK
- kg_km_4: 1.10744; = kg_4*km_4
  Transport amount in km*km, for sodium hydroxide, without water, in 50% solution state; Freight train, electricity traction; EU+EFTA+UK
- kg_5: 0.0142
  Mass in kg, for sodium hydroxide, without water, in 50% solution state; Freight train, average; EU+EFTA+UK
- km_5: 1.8394
  Distance in km, for sodium hydroxide, without water, in 50% solution state; Freight train, average; EU+EFTA+UK
- kg_km_5: 0.0261195; = kg_5*km_5
  Transport amount in km*km, for sodium hydroxide, without water, in 50% solution state; Freight train, average; EU+EFTA+UK
- kg_6: 0.0142
  Mass in kg, for sodium hydroxide, without water, in 50% solution state; Barge; EU+EFTA+UK
- km_6: 8.08691
  Distance in km, for sodium hydroxide, without water, in 50% solution state; Barge; EU+EFTA+UK
- kg_km_6: 0.114834; = kg_6*km_6
  Transport amount in km*km, for sodium hydroxide, without water, in 50% solution state; Barge; EU+EFTA+UK
- kg_7: 0.0142
  Mass in kg, for sodium hydroxide, without water, in 50% solution state; Barge; ROW w/o EU+EFTA
- km_7: 16.5131
  Distance in km, for sodium hydroxide, without water, in 50% solution state; Barge; ROW w/o EU+EFTA
- kg_km_7: 0.234486; = kg_7*km_7
  Transport amount in km*km, for sodium hydroxide, without water, in 50% solution state; Barge; ROW w/o EU+EFTA
- kg_8: 0.0142
  Mass in kg, for sodium hydroxide, without water, in 50% solution state; Articulated lorry transport, Euro 4, Total weight >32 t; EU+EFTA+UK
- km_8: 57.3754
  Distance in km, for sodium hydroxide, without water, in 50% solution state; Articulated lorry transport, Euro 4, Total weight >32 t; EU+EFTA+UK
- kg_km_8: 0.81473; = kg_8*km_8
  Transport amount in km*km, for sodium hydroxide, without water, in 50% solution state; Articulated lorry transport, Euro 4, Total weight >32 t; EU+EFTA+UK
- kg_9: 0.0142
  Mass in kg, for sodium hydroxide, without water, in 50% solution state; Articulated lorry transport, Total weight >32 t, mix Euro 0-5; ROW w/o EU+EFTA
- km_9: 151.425
  Distance in km, for sodium hydroxide, without water, in 50% solution state; Articulated lorry transport, Total weight >32 t, mix Euro 0-5; ROW w/o EU+EFTA
- kg_km_9: 2.15023; = kg_9*km_9
  Transport amount in km*km, for sodium hydroxide, without water, in 50% solution state; Articulated lorry transport, Total weight >32 t, mix Euro 0-5; ROW w/o EU+EFTA
- kg_10: 0.0164
  Mass in kg, for sodium silicate powder // sodium silicate powder production // eu+efta+uk; Articulated lorry transport, Euro 4, Total weight >32 t; EU+EFTA+UK
- km_10: 1000
  Distance in km, for sodium silicate powder // sodium silicate powder production // eu+efta+uk; Articulated lorry transport, Euro 4, Total weight >32 t; EU+EFTA+UK
- kg_km_10: 16.4; = kg_10*km_10
  Transport amount in km*km, for sodium silicate powder // sodium silicate powder production // eu+efta+uk; Articulated lorry transport, Euro 4, Total weight >32 t; EU+EFTA+UK
- kg_11: 0.0164
  Mass in kg, for sodium silicate powder // sodium silicate powder production // eu+efta+uk; Transoceanic ship, containers; GLO
- km_11: 17987.8
  Distance in km, for sodium silicate powder // sodium silicate powder production // eu+efta+uk; Transoceanic ship, containers; GLO
- kg_km_11: 295; = kg_11*km_11
  Transport amount in km*km, for sodium silicate powder // sodium silicate powder production // eu+efta+uk; Transoceanic ship, containers; GLO
- kg_12: 7.4e-5
  Mass in kg, for paper and paperboard waste to landfill // landfill of paper and paperboard waste // eu+efta+uk; Articulated lorry transport, Euro 4, Total weight >32 t; EU+EFTA+UK
- km_12: 70
  Distance in km, for paper and paperboard waste to landfill // landfill of paper and paperboard waste // eu+efta+uk; Articulated lorry transport, Euro 4, Total weight >32 t; EU+EFTA+UK
- kg_km_12: 0.00518; = kg_12*km_12
  Transport amount in km*km, for paper and paperboard waste to landfill // landfill of paper and paperboard waste // eu+efta+uk; Articulated lorry transport, Euro 4, Total weight >32 t; EU+EFTA+UK
- kg_13: 2.41e-5
  Mass in kg, for textiles to landfill // landfill of textile // eu+efta+uk; Articulated lorry transport, Euro 4, Total weight >32 t; EU+EFTA+UK
- km_13: 70
  Distance in km, for textiles to landfill // landfill of textile // eu+efta+uk; Articulated lorry transport, Euro 4, Total weight >32 t; EU+EFTA+UK
- kg_km_13: 0.001687; = kg_13*km_13
  Transport amount in km*km, for textiles to landfill // landfill of textile // eu+efta+uk; Articulated lorry transport, Euro 4, Total weight >32 t; EU+EFTA+UK
- kg_14: 2.59e-5
  Mass in kg, for waste (unspecified) // landfill of inert (steel) // eu+efta+uk; Articulated lorry transport, Euro 4, Total weight >32 t; EU+EFTA+UK
- km_14: 70
  Distance in km, for waste (unspecified) // landfill of inert (steel) // eu+efta+uk; Articulated lorry transport, Euro 4, Total weight >32 t; EU+EFTA+UK
- kg_km_14: 0.001813; = kg_14*km_14
  Transport amount in km*km, for waste (unspecified) // landfill of inert (steel) // eu+efta+uk; Articulated lorry transport, Euro 4, Total weight >32 t; EU+EFTA+UK
- kg_15: 0.000233
  Mass in kg, for waste (unspecified) // landfill of plastic waste // eu+efta+uk; Articulated lorry transport, Euro 4, Total weight >32 t; EU+EFTA+UK
- km_15: 70
  Distance in km, for waste (unspecified) // landfill of plastic waste // eu+efta+uk; Articulated lorry transport, Euro 4, Total weight >32 t; EU+EFTA+UK
- kg_km_15: 0.01631; = kg_15*km_15
  Transport amount in km*km, for waste (unspecified) // landfill of plastic waste // eu+efta+uk; Articulated lorry transport, Euro 4, Total weight >32 t; EU+EFTA+UK

## Reference product
- thermomechanical pulp // thermomechanical pulp // world (without eu+efta+uk): 1

## Inputs
- Electricity from Electricity grid mix 1kV-60kV - AU: 0.0876
- Electricity from Electricity grid mix 1kV-60kV - NZ: 0.0167
- Electricity from Electricity grid mix 1kV-60kV - RAF: 0.282
- Electricity from Electricity grid mix 1kV-60kV - RNA: 1.8883
- Electricity from Electricity grid mix 1kV-60kV - RSA: 0.6407
- Electricity from Electricity grid mix 1kV-60kV - RU: 0.3776
- Transport of hydrogen peroxide, 50% // hydrogen peroxide, 50% production // eu+efta+uk by Articulated lorry transport, Euro 4, Total weight >32 t - EU+EFTA+UK: 28.6; = kg_km_0
- Transport of hydrogen peroxide, 50% // hydrogen peroxide, 50% production // eu+efta+uk by Transoceanic ship, containers - GLO: 515; = kg_km_1
- Transport of sodium hydroxide, without water, in 50% solution state by Transoceanic ship, containers - GLO: 8.5058; = kg_km_2
- Transport of sodium hydroxide, without water, in 50% solution state by Freight train, diesel traction - EU+EFTA+UK: 3.25566; = kg_km_3
- Transport of sodium hydroxide, without water, in 50% solution state by Freight train, electricity traction - EU+EFTA+UK: 1.10744; = kg_km_4
- Transport of sodium hydroxide, without water, in 50% solution state by Freight train, average - EU+EFTA+UK: 0.0261195; = kg_km_5
- Transport of sodium hydroxide, without water, in 50% solution state by Barge - EU+EFTA+UK: 0.114834; = kg_km_6
- Transport of sodium hydroxide, without water, in 50% solution state by Barge - ROW w/o EU+EFTA: 0.234486; = kg_km_7
- Transport of sodium hydroxide, without water, in 50% solution state by Articulated lorry transport, Euro 4, Total weight >32 t - EU+EFTA+UK: 0.81473; = kg_km_8
- Transport of sodium hydroxide, without water, in 50% solution state by Articulated lorry transport, Total weight >32 t, mix Euro 0-5 - ROW w/o EU+EFTA: 2.15023; = kg_km_9
- Transport of sodium silicate powder // sodium silicate powder production // eu+efta+uk by Articulated lorry transport, Euro 4, Total weight >32 t - EU+EFTA+UK: 16.4; = kg_km_10
- Transport of sodium silicate powder // sodium silicate powder production // eu+efta+uk by Transoceanic ship, containers - GLO: 295; = kg_km_11
- Thermal energy (MJ) from Thermal energy from light fuel oil (LFO) - ROW: 0.0585581
- Thermal energy (MJ) from Thermal energy from LPG - ROW: 0.0585581
- Thermal energy (MJ) from Thermal energy from natural gas - ROW: 0.062035
- Transport of paper and paperboard waste to landfill // landfill of paper and paperboard waste // eu+efta+uk by Articulated lorry transport, Euro 4, Total weight >32 t - EU+EFTA+UK: 0.00518; = kg_km_12
- Transport of textiles to landfill // landfill of textile // eu+efta+uk by Articulated lorry transport, Euro 4, Total weight >32 t - EU+EFTA+UK: 0.001687; = kg_km_13
- Transport of waste (unspecified) // landfill of inert (steel) // eu+efta+uk by Articulated lorry transport, Euro 4, Total weight >32 t - EU+EFTA+UK: 0.001813; = kg_km_14
- Transport of waste (unspecified) // landfill of plastic waste // eu+efta+uk by Articulated lorry transport, Euro 4, Total weight >32 t - EU+EFTA+UK: 0.01631; = kg_km_15
- Electricity from Electricity grid mix 1kV-60kV - CN: 1.93483
- Electricity from Electricity grid mix 1kV-60kV - RAS w/o CN: 2.11987
- thermomechanical pulp // thermomechanical pulp // world (without eu+efta+uk), blackbox: 1
- thermomechanical pulp // thermomechanical pulp // world (without eu+efta+uk), elementary: 1

## Impact indicators
- Eutrophication marine: 0.00216568
- Ecotoxicity, freshwater: 7.60497
- Land use: 228.638
- Water use: 0.748632
- Resource use, minerals and metals: 2.74672e-6
- Resource use, fossils: 20.314
- Climate change: 1.58699
- Ozone depletion: 1.64678e-8
- Human toxicity, cancer: 9.08227e-10
- Human toxicity, non-cancer: 1.02521e-8
- EF-particulate Matter: 4.07086e-7
- Ionising radiation, human health: 0.0559896
- Photochemical ozone formation - human health: 0.00648701
- Acidification: 0.0119829
- Eutrophication, terrestrial: 0.0237565
- Eutrophication, freshwater: 2.98284e-5

## Deviations from the LCI method principle
The background data uses:
- the \xe2\x80\x9cRecycled content cut-off\xe2\x80\x9d approach to allocate end-of-life by-products and secondary materials. This allocation is explained in the description of the recycled content system model (http://www.ecoinvent.org/database/system-models-in-ecoinvent-3/cut-off-system-model/allocation-cut-off-by-classification.html).
OR
- EF compliant data

## Deviations from the LCI method approaches
Background data:
- the \xe2\x80\x9cRecycled content cut-off\xe2\x80\x9d approach to allocate end-of-life by-products and secondary materials. This allocation is explained in the description of the recycled content system model (http://www.ecoinvent.org/database/system-models-in-ecoinvent-3/cut-off-system-model/allocation-cut-off-by-classification.html). The ecoinvent database mostly relies on “Allocation – market values” apart for few exceptions particularly in the energy sector. ecoinvent energy data is replaced with EF3.0 core data as per the EF guidelines version 2.0.
OR
- EF compliant data

## Modelling constants
All modelling constants follow the requirements listed in the Tender Specifications 070201/2020/SER/ENV.B1. Completeness: There are no intentional cut-offs in the inventory no matter how small their contribution to all the EF impact categories is. Eventual cut-offs are in compliance with the Guide for EF compliant data sets (JRC 2020), i.e. only if below the 3% cut-off rule. Water use: water use is modelled at country level using separate flows for water withdrawal, water release and water evaporation. Handling multi-functional processes: the following PEF multi- functionality decision hierarchy is applied for resolving all multi- functionality problems: (1) subdivision or system expansion; (2) allocation based on a relevant underlying physical relationship (substitution may apply here); (3) allocation based on some other relationship. Direct land use change: GHG emissions from direct LUC allocated to good/service for 20 years after the LUC occurs, with IPCC default values. Carbon storage and delayed emissions: credits associated with temporary (carbon) storage or delayed emissions up to 300 years are not be considered. Emissions off-setting: are not included. Capital goods (including infrastructures) and their End of life: they are included. System boundaries: system boundaries include all processes linked to the product supply chain (e.g. maintenance). Time period: emissions and removals are modelled as if released or removed at the beginning of the assessment method. Fossil and biogenic carbon emissions and removals: removals and emissions are modelled as follows: All GHG emissions from fossil fuels (including peat and limestone) are modelled consistently with the most updated ILCD list of elementary flows. The non-fossil (biogenic) carbon flows are modelled consistently with the most updated ILCD list of elementary flows.

## Cut-off and completeness
There are no intentional cut-offs in the inventory no matter how small their contribution to all the EF impact categories is. Eventual cut-offs are in compliance with the Guide for EF compliant data sets (JRC 2020), i.e. only if below the 3% cut-off rule. The dataset dry mass and water balance has been checked to ensure the inventory is complete. Capital goods (e.g. infrastructure) and their end-of-life are included.

## Data selection and combination
These datasets include, in both their foreground and background data, links to EF3.0 compliant data.
The relevant background data on energy, transport, and End of Life are from the LCDN data node (http://lcdn.thinkstep.com/Node/).
All other background data in the supply of this product for which no EF3.0 process was available are from ecoinvent v3.7 database (www.ecoinvent.org) or other data sources.

## Data treatment and extrapolations
Several data sources have been used to model the inventory.

## Review details
Internal reviews have been asked to review the plausibility of the unit process, LCIA scores, and DQRs. Internal reviewers have also been asked to review the data for EF compliancy. The consortium is therefore responsible for aspects such as compliancy with the ILCD format, including validation in Look@LCI, and nomenclature.
Internal reviwers have been asked to judge based on the process name, that the unit process models in a complete and representative way the process in the requested location. The review encompassed the plausability of:
- exchanges with nature (elementary flows) as well as exchanges such as product and waste flows.
- meta information (general comment, technology comment, system boundaries, allocation, cut-off rules, etc.). Reviewers were asked to judge if the provided information is enough to understand the content of the process.
- LCIA scores
- DQRs including precision, technology, time and geography. As well as the overall DQR.
External reviewers have been asked to provide their expertise in the field of interest. External reviewers have been asked to review the unit process, including eventual methodological choices, the LCIA scores (provided with contribution scores as well), and DQRs. External reviewers have been provided all the information in a tool developed by the consortium for the purpose of this project.
External reviewers have been asked to judge based on the process name, that the unit process models in a complete and representative way the process in the requested location. The review encompassed:
- Plausability and completeness of exchanges with nature (elementary flows) as well as exchanges such as product and waste flows.
- Review of meta information (general comment, technology comment, system boundaries, allocation, cut-off rules, etc.). Reviewers were asked to judge if the provided information is enough to understand the content of the process.
- Review of properties (biogenic carbon and water content).
- Review of allocation keys.
- Plausability of LCIA scores calculated by the consortium.
- Plausability of DQRs including precision, technology, time and geography. As well as the overall DQR.

## Data sources
- Background Data for Representative products and organisations. EF 3.0 compliant (data stock)
- Bajpai, P. (2016). Chapter 3 - Pulp and paper production processes and energy overview. Pulp and Paper Industry. Pages 15-49. ISBN 9780128034118. https://doi.org/10.1016/B978-0-12-803411-8.00003-2. Elsevier.
- Suhr et al. (2015). Best Available Techniques (BAT) Reference Document for the Production of Pulp, Paper and Board. Industrial Emissions Directive 2010/75/EU (Integrated Pollution Prevention and Control). European Commission. Joint Research Centre.

## Intended applications
Implementation of regular Product Environmental Footprint (PEF) studies and Organisation Environmental Footprint (OEF) studies exclusively under the specified Product groups and sectors as defined in the Product Environmental Footprint Category Rules (PEFCR) and Organisation Environmental Footprint Sectorial Rules (OEFSR) listed in http://ec.europa.eu/environment/eussd/smgp/PEFCR_OEFSR.htm
