# bleaching, enzymatic; Pre-treatment; production mix, at plant; textile service

Dataset: ILCD process, Partly terminated system
Geography: GLO
Reference year: 2011
Valid until: 2024
Classification: Systems / Textiles, furnitures and other interiors
LCI method principle: Attributional
LCI method approaches: Allocation - market value
Completeness: All relevant flows quantified
Project: Provision of process-based 3.0 Environmental Footprint-compliant life cycle inventory datasets - Apparel 1 - contract number 070201/2020/840291/SER/ENV.B.1
Generated by: CADIS
Owner: PRé Sustainability B.V.
Compliance: ILCD Data Network - Entry-level; Suggestions for updating the PEF method 2019; ISO 14040 Environmental Management – Life Cycle Assessment – Principles and Framework, 2006; ISO 14044:2006. Environmental Management – Life Cycle Assessment – Requirements and guidelines.; Environmental Footprint 3.1
Review: Dependent internal review by Avraam Symeonidis, Emilia Moreno Ruiz; Independent review panel by Fábio Valebona
Data quality: Overall quality: Good; Time representativeness: Very good; Geographical representativeness: Good; Technological representativeness: Good; Precision: Good; Methodological appropriateness and consistency: Not applicable
Amounts: no units in this file; such an amount is in the reference unit of its flow, which a separate flow dataset defines
copyright: true
licenseType: Free of charge for some user types or use types
accessRestrictions: Free of charge for all final users implementing a regular Product Environmental Footprint (PEF) studies and Organisation Environmental Footprint (OEF) studies exclusively under the specified Product groups and sectors as defined in the Product Environmental Footprint Category Rules (PEFCR) and Organisation Environmental Footprint Sectorial Rules (OEFSR) listed in http://ec.europa.eu/environment/eussd/smgp/PEFCR_OEFSR.htm and in accordance with the terms and conditions of the EULA (available at https://ecoinvent.lca-data.com/) exclusively until 31st December 2024. Any use of this dataset or any derivative data not within the specific context of one of the PEF/OEF projects or after the end of 2024 is not permitted.

## General comment
Notice: this data set supersedes the EF3.0-compliant version (see link under "preceding data set version" below calculated with the EF3.0). The life cycle inventory is not changed from the original EF3.0 data set. The LCIA results are calculated based on the EF3.1 methods which provide updated characterisation factors in the following impact categories: Climate Change, Ecotoxicity freshwater, Photochemical Ozone Formation, Acidification, Human Toxicity non-cancer, and Human Toxicity cancer. The review report and the data quality ratings refer to the original results. The data set has been updated by the European Commission on the basis of the original EF3.0 data set delivered by the data provider.This dataset has been adapted from Ecoinvent conventional bleaching dataset. Adaptations are based on data from Dettore (2011) and Spicka (2013). A user employing this service within their models should use it along with 1.0375 kg of material to bleach 1 kg of fabric. Chemicals used for bleaching, as well as fiber loss go out the process disolved in the wastewater. Life expectancy of pretreatment machine is assumed to be 25 years (UNFCCC, 2012) with an average production capacity of 42.5 m/min and a machine weight of 2 tons (QDTONGDA, 2021), assuming a fabric weight of 300 g/m and 10 h/d operating time.

## Technology and included processes
The process uses a propietary enzyme (esterase) system which catalyzes the perhydrolysis of propylene glycol diacetate in situ at neutral pH forming propylene glycol and peracetic acid (the bleaching agent). Compared to conventional bleaching, enzymatic bleaching: Occurs at lower temperatures, occurs at neutral pH values, uses less water, uses bacterial arylesterase enzyme, uses propylene glycol diacetate, which is hydrolized, generating propylene glycol and peracetic acid (bleaching agent), avoids substrate loss.

## Parameters
- kg_0: 0.050274
  Mass in kg, for hydrogen peroxide, 50% // hydrogen peroxide, 50% production // eu+efta+uk; Articulated lorry transport, Euro 4, Total weight >32 t; EU+EFTA+UK
- km_0: 1000
  Distance in km, for hydrogen peroxide, 50% // hydrogen peroxide, 50% production // eu+efta+uk; Articulated lorry transport, Euro 4, Total weight >32 t; EU+EFTA+UK
- kg_km_0: 50.274; = kg_0*km_0
  Transport amount in km*km, for hydrogen peroxide, 50% // hydrogen peroxide, 50% production // eu+efta+uk; Articulated lorry transport, Euro 4, Total weight >32 t; EU+EFTA+UK
- kg_1: 0.06
  Mass in kg, for treatment, cellulase enzyme // treatment, cellulase enzyme // glo; Articulated lorry transport, Euro 4, Total weight >32 t; EU+EFTA+UK
- km_1: 1000
  Distance in km, for treatment, cellulase enzyme // treatment, cellulase enzyme // glo; Articulated lorry transport, Euro 4, Total weight >32 t; EU+EFTA+UK
- kg_km_1: 60; = kg_1*km_1
  Transport amount in km*km, for treatment, cellulase enzyme // treatment, cellulase enzyme // glo; Articulated lorry transport, Euro 4, Total weight >32 t; EU+EFTA+UK
- kg_2: 0.02
  Mass in kg, for sodium bicarbonate // sodium bicarbonate production // eu+efta+uk; Articulated lorry transport, Euro 4, Total weight >32 t; EU+EFTA+UK
- km_2: 1000
  Distance in km, for sodium bicarbonate // sodium bicarbonate production // eu+efta+uk; Articulated lorry transport, Euro 4, Total weight >32 t; EU+EFTA+UK
- kg_km_2: 20; = kg_2*km_2
  Transport amount in km*km, for sodium bicarbonate // sodium bicarbonate production // eu+efta+uk; Articulated lorry transport, Euro 4, Total weight >32 t; EU+EFTA+UK
- kg_3: 0.01
  Mass in kg, for alkylbenzene sulfonate // alkylbenzene sulfonate production // glo; Articulated lorry transport, Euro 4, Total weight >32 t; EU+EFTA+UK
- km_3: 1000
  Distance in km, for alkylbenzene sulfonate // alkylbenzene sulfonate production // glo; Articulated lorry transport, Euro 4, Total weight >32 t; EU+EFTA+UK
- kg_km_3: 10; = kg_3*km_3
  Transport amount in km*km, for alkylbenzene sulfonate // alkylbenzene sulfonate production // glo; Articulated lorry transport, Euro 4, Total weight >32 t; EU+EFTA+UK
- kg_4: 0.050274
  Mass in kg, for hydrogen peroxide, 50% // hydrogen peroxide, 50% production // eu+efta+uk; Transoceanic ship, containers; GLO
- km_4: 18000
  Distance in km, for hydrogen peroxide, 50% // hydrogen peroxide, 50% production // eu+efta+uk; Transoceanic ship, containers; GLO
- kg_km_4: 904.932; = kg_4*km_4
  Transport amount in km*km, for hydrogen peroxide, 50% // hydrogen peroxide, 50% production // eu+efta+uk; Transoceanic ship, containers; GLO
- kg_5: 0.06
  Mass in kg, for treatment, cellulase enzyme // treatment, cellulase enzyme // glo; Transoceanic ship, containers; GLO
- km_5: 18000
  Distance in km, for treatment, cellulase enzyme // treatment, cellulase enzyme // glo; Transoceanic ship, containers; GLO
- kg_km_5: 1080; = kg_5*km_5
  Transport amount in km*km, for treatment, cellulase enzyme // treatment, cellulase enzyme // glo; Transoceanic ship, containers; GLO
- kg_6: 0.02
  Mass in kg, for sodium bicarbonate // sodium bicarbonate production // eu+efta+uk; Transoceanic ship, containers; GLO
- km_6: 18000
  Distance in km, for sodium bicarbonate // sodium bicarbonate production // eu+efta+uk; Transoceanic ship, containers; GLO
- kg_km_6: 360; = kg_6*km_6
  Transport amount in km*km, for sodium bicarbonate // sodium bicarbonate production // eu+efta+uk; Transoceanic ship, containers; GLO
- kg_7: 0.01
  Mass in kg, for alkylbenzene sulfonate // alkylbenzene sulfonate production // glo; Transoceanic ship, containers; GLO
- km_7: 18000
  Distance in km, for alkylbenzene sulfonate // alkylbenzene sulfonate production // glo; Transoceanic ship, containers; GLO
- kg_km_7: 180; = kg_7*km_7
  Transport amount in km*km, for alkylbenzene sulfonate // alkylbenzene sulfonate production // glo; Transoceanic ship, containers; GLO

## Reference product
- bleaching, enzymatic // bleaching, enzymatic // glo: 1

## Inputs
- Electricity from Electricity grid mix 1kV-60kV - AU: 0.0001
- Electricity from Electricity grid mix 1kV-60kV - EU+EFTA+UK: 0.0022
- Electricity from Electricity grid mix 1kV-60kV - NZ: 0
- Electricity from Electricity grid mix 1kV-60kV - RAF: 0.0005
- Electricity from Electricity grid mix 1kV-60kV - RNA: 0.0032
- Electricity from Electricity grid mix 1kV-60kV - RSA: 0.0011
- Electricity from Electricity grid mix 1kV-60kV - RU: 0.0006
- Thermal energy (MJ) from Thermal energy from LPG - ROW: 0.0407013
- Thermal energy (MJ) from Thermal energy from natural gas - ROW: 0.184196
- Transport of hydrogen peroxide, 50% // hydrogen peroxide, 50% production // eu+efta+uk by Articulated lorry transport, Euro 4, Total weight >32 t - EU+EFTA+UK: 50.274; = kg_km_0
- Transport of treatment, cellulase enzyme // treatment, cellulase enzyme // glo by Articulated lorry transport, Euro 4, Total weight >32 t - EU+EFTA+UK: 60; = kg_km_1
- Transport of sodium bicarbonate // sodium bicarbonate production // eu+efta+uk by Articulated lorry transport, Euro 4, Total weight >32 t - EU+EFTA+UK: 20; = kg_km_2
- Transport of alkylbenzene sulfonate // alkylbenzene sulfonate production // glo by Articulated lorry transport, Euro 4, Total weight >32 t - EU+EFTA+UK: 10; = kg_km_3
- Transport of hydrogen peroxide, 50% // hydrogen peroxide, 50% production // eu+efta+uk by Transoceanic ship, containers - GLO: 904.932; = kg_km_4
- Transport of treatment, cellulase enzyme // treatment, cellulase enzyme // glo by Transoceanic ship, containers - GLO: 1080; = kg_km_5
- Transport of sodium bicarbonate // sodium bicarbonate production // eu+efta+uk by Transoceanic ship, containers - GLO: 360; = kg_km_6
- Transport of alkylbenzene sulfonate // alkylbenzene sulfonate production // glo by Transoceanic ship, containers - GLO: 180; = kg_km_7
- Electricity from Electricity grid mix 1kV-60kV - CN: 0.00324483
- Electricity from Electricity grid mix 1kV-60kV - RAS w/o CN: 0.00355517
- bleaching, enzymatic // bleaching, enzymatic // glo, blackbox: 1
- bleaching, enzymatic // bleaching, enzymatic // glo, elementary: 1

## Impact indicators
- Eutrophication marine: 0.000330679
- Ecotoxicity, freshwater: 1.77438
- Land use: 0.275785
- Water use: 0.220876
- Resource use, minerals and metals: 8.32487e-7
- Resource use, fossils: 2.05218
- Climate change: 0.148215
- Ozone depletion: 2.99066e-9
- Human toxicity, cancer: 2.0732e-10
- Human toxicity, non-cancer: 1.36298e-9
- EF-particulate Matter: 2.38061e-8
- Ionising radiation, human health: 0.00534125
- Photochemical ozone formation - human health: 0.00100849
- Acidification: 0.00138094
- Eutrophication, terrestrial: 0.00384062
- Eutrophication, freshwater: 9.14005e-6

## Deviations from the LCI method principle
The background data uses:
- the \xe2\x80\x9cRecycled content cut-off\xe2\x80\x9d approach to allocate end-of-life by-products and secondary materials. This allocation is explained in the description of the recycled content system model (http://www.ecoinvent.org/database/system-models-in-ecoinvent-3/cut-off-system-model/allocation-cut-off-by-classification.html).
OR
- EF compliant data

## Deviations from the LCI method approaches
Background data:
- the \xe2\x80\x9cRecycled content cut-off\xe2\x80\x9d approach to allocate end-of-life by-products and secondary materials. This allocation is explained in the description of the recycled content system model (http://www.ecoinvent.org/database/system-models-in-ecoinvent-3/cut-off-system-model/allocation-cut-off-by-classification.html). The ecoinvent database mostly relies on “Allocation – market values” apart for few exceptions particularly in the energy sector. ecoinvent energy data is replaced with EF3.0 core data as per the EF guidelines version 2.0.
OR
- EF compliant data

## Modelling constants
All modelling constants follow the requirements listed in the Tender Specifications 070201/2020/SER/ENV.B1. Completeness: There are no intentional cut-offs in the inventory no matter how small their contribution to all the EF impact categories is. Eventual cut-offs are in compliance with the Guide for EF compliant data sets (JRC 2020), i.e. only if below the 3% cut-off rule. Water use: water use is modelled at country level using separate flows for water withdrawal, water release and water evaporation. Handling multi-functional processes: the following PEF multi- functionality decision hierarchy is applied for resolving all multi- functionality problems: (1) subdivision or system expansion; (2) allocation based on a relevant underlying physical relationship (substitution may apply here); (3) allocation based on some other relationship. Direct land use change: GHG emissions from direct LUC allocated to good/service for 20 years after the LUC occurs, with IPCC default values. Carbon storage and delayed emissions: credits associated with temporary (carbon) storage or delayed emissions up to 300 years are not be considered. Emissions off-setting: are not included. Capital goods (including infrastructures) and their End of life: they are included. System boundaries: system boundaries include all processes linked to the product supply chain (e.g. maintenance). Time period: emissions and removals are modelled as if released or removed at the beginning of the assessment method. Fossil and biogenic carbon emissions and removals: removals and emissions are modelled as follows: All GHG emissions from fossil fuels (including peat and limestone) are modelled consistently with the most updated ILCD list of elementary flows. The non-fossil (biogenic) carbon flows are modelled consistently with the most updated ILCD list of elementary flows.

## Cut-off and completeness
There are no intentional cut-offs in the inventory no matter how small their contribution to all the EF impact categories is. Eventual cut-offs are in compliance with the Guide for EF compliant data sets (JRC 2020), i.e. only if below the 3% cut-off rule. The dataset dry mass and water balance has been checked to ensure the inventory is complete. Capital goods (e.g. infrastructure) and their end-of-life are included.

## Data selection and combination
These datasets include, in both their foreground and background data, links to EF3.0 compliant data.
The relevant background data on energy, transport, and End of Life are from the LCDN data node (http://lcdn.thinkstep.com/Node/).
All other background data in the supply of this product for which no EF3.0 process was available are from ecoinvent v3.7 database (www.ecoinvent.org) or other data sources.

## Data treatment and extrapolations
Several data sources have been used to model the inventory.

## Review details
Internal reviews have been asked to review the plausibility of the unit process, LCIA scores, and DQRs. Internal reviewers have also been asked to review the data for EF compliancy. The consortium is therefore responsible for aspects such as compliancy with the ILCD format, including validation in Look@LCI, and nomenclature.
Internal reviwers have been asked to judge based on the process name, that the unit process models in a complete and representative way the process in the requested location. The review encompassed the plausability of:
- exchanges with nature (elementary flows) as well as exchanges such as product and waste flows.
- meta information (general comment, technology comment, system boundaries, allocation, cut-off rules, etc.). Reviewers were asked to judge if the provided information is enough to understand the content of the process.
- LCIA scores
- DQRs including precision, technology, time and geography. As well as the overall DQR.
External reviewers have been asked to provide their expertise in the field of interest. External reviewers have been asked to review the unit process, including eventual methodological choices, the LCIA scores (provided with contribution scores as well), and DQRs. External reviewers have been provided all the information in a tool developed by the consortium for the purpose of this project.
External reviewers have been asked to judge based on the process name, that the unit process models in a complete and representative way the process in the requested location. The review encompassed:
- Plausability and completeness of exchanges with nature (elementary flows) as well as exchanges such as product and waste flows.
- Review of meta information (general comment, technology comment, system boundaries, allocation, cut-off rules, etc.). Reviewers were asked to judge if the provided information is enough to understand the content of the process.
- Review of properties (biogenic carbon and water content).
- Review of allocation keys.
- Plausability of LCIA scores calculated by the consortium.
- Plausability of DQRs including precision, technology, time and geography. As well as the overall DQR.

## Data sources
- Background Data for Representative products and organisations. EF 3.0 compliant (data stock)
- ecoinvent (2017) Data on the Production of Chemicals created for the EU Product Environmental Footprint (PEF) pilot phase implementation, www.ecoinvent.org, ecoinvent Association, Zurich, Switzerland
- Moreno Ruiz E., Valsasina L., FitzGerald D., Symeonidis A., Turner D., Müller J., Minas N., Bourgault G., Vadenbo C., Ioannidou D., Wernet, G., (2020). Documentation of changes implemented in ecoinvent database v3.7 & v3.7.1. ecoinvent Association, Zürich, Switzerland.
- Dettore C (2011) Comparative Life-Cycle Assessment (LCA) of Textile Bleaching Systems: Gentle Power Bleach™ vs. Conventional Bleaching System. Poster session at: AATCC 2011 International Conference
- Spicka N, Tavcer PF (2013) NEW COMBINED BIO-SCOURING AND BIO-BLEACHING PROCESS OF COTTON FABRICS. Materials and technology 47 (2013) 4, 409–412. ISSN 1580-2949
- UNFCCC (2012) COMPONENT PROJECT ACTIVITIES DESIGN DOCUMENT (CPA-DD). Accessed online August 8th 2021: http://gec.jp/gec/jp/Activities/cdm-fs/2012/2012_cdmfs01_jPear_bangladesh_cpa-dd.pdf
- QDTONGDA (2021) Td638 Bunch Shaped Indigo Rope Dyeing Machine of Fast Dyeing Speed. Accessed online August 8th 2021: https://qdtongda.en.made-in-china.com/product/jyeQIDuEZXcl/China-Td638-Bunch-Shaped-Indigo-Rope-Dyeing-Machine-of-Fast-Dyeing-Speed.html

## Intended applications
Implementation of regular Product Environmental Footprint (PEF) studies and Organisation Environmental Footprint (OEF) studies exclusively under the specified Product groups and sectors as defined in the Product Environmental Footprint Category Rules (PEFCR) and Organisation Environmental Footprint Sectorial Rules (OEFSR) listed in http://ec.europa.eu/environment/eussd/smgp/PEFCR_OEFSR.htm
