# hemp fibre, elementary; technology mix; production mix, at farm; raw fiber

Dataset: ILCD process, Unit process, single operation
Geography: EU+EFTA+UK
Reference year: 2015
Valid until: 2024
Classification: Other Services / Other services
LCI method principle: Attributional
LCI method approaches: Allocation - market value
Completeness: All relevant flows quantified
Project: Provision of process-based 3.0 Environmental Footprint-compliant life cycle inventory datasets - Renewable materials - contract number 070201/2020/840085/SER/ENV.B.1
Generated by: ecoinvent
Owner: ecoinvent
Compliance: Environmental Footprint non-primary supporting data set; Environmental Footprint 3.1
Amounts: no units in this file; such an amount is in the reference unit of its flow, which a separate flow dataset defines
copyright: true
licenseType: Free of charge for some user types or use types
accessRestrictions: Free of charge for all final users implementing a regular Product Environmental Footprint (PEF) studies and Organisation Environmental Footprint (OEF) studies exclusively under the specified Product groups and sectors as defined in the Product Environmental Footprint Category Rules (PEFCR) and Organisation Environmental Footprint Sectorial Rules (OEFSR) listed in http://ec.europa.eu/environment/eussd/smgp/PEFCR_OEFSR.htm and in accordance with the terms and conditions of the EULA (available at https://ecoinvent.lca-data.com/) exclusively until 31st December 2024. Any use of this dataset or any derivative data not within the specific context of one of the PEF/OEF projects or after the end of 2024 is not permitted.

## General comment
Notice: this data set supersedes the EF3.0-compliant version (see link under "preceding data set version" below calculated with the EF3.0). The life cycle inventory is not changed from the original EF3.0 data set. The LCIA results are calculated based on the EF3.1 methods which provide updated characterisation factors in the following impact categories: Climate Change, Ecotoxicity freshwater, Photochemical Ozone Formation, Acidification, Human Toxicity non-cancer, and Human Toxicity cancer. The review report and the data quality ratings refer to the original results. The data set has been updated by the European Commission on the basis of the original EF3.0 data set delivered by the data provider.This sub-process has limited documentation only. For all detailed documentation of the full model to which this data set belongs (such as DQRs, review reports and other technical documentation), please see this process: hemp fibre - EU+EFTA+UK []

## Technology and included processes
Hemp fibre is produced from an annual, herbaceous plant, that is also called hemp or Cannabis sativa. Mature hemp stalks are manually harvested in bundles. In order to remove the non-fibrous material from the stem and skin of the hemp stalk, the bundles are going through the retting process. They are immersed into stagnant water and after several days of immersion, the hemp fibre gets loosen and are extracted from the stalks. Shivs (or hurds) are generated as by-product. For every kg of hemp fibre 1.6 kg of shivs is produced. The currently used process involves ribboning of green stems. After this the ribbons are immersed in water. Retting takes place from 5-7 days. The retted ribbons are dried in the sun and the resulting reeds are then sent to spinning mills for spinning. Only the electricity consumption is included in the dataset, not the input of spinning machinery. The retting process is based on the jute retting modelling. No infrastructure is added in the dataset because the retting process takes place the hemp cultivation field, tanks, ponds, ditches etc., or in slowly flowing clear water in canals, rivers etc.. The by-product of shivs is economically allocated, attributing an economic value of 0.25 Euros / kg shivs and 0.7 Euros / kg hemp fibre. The by-product of seeds is not considered. The by-product of seeds is considered residues, meaning that according to FAO, 2014 for the cut-off modelling approach applied, upstream emissions shall not be attributes to it.

Reference

FAO, 2014. Environmental performance of animal feeds supply chain, Guidelines for quantification, Livestock Environmental Assessment and Performance Partnership (LEAP) Available at: https://www.fao.org/3/mj751e/mj751e.pdf

Van Eynde H., 2015. Comparative Life Cycle Assessment of hemp and cotton fibers used in Chinese textile manufacturing. Faculteit Bio-Ingenieurswetenschappen. Masters Thesis. KU Leuven. Available at: https://www.scriptiebank.be/sites/default/files/VanEyndeHannes_KUL_Eindwerk.pdf

Symeonidis A., fibre production, jute, retting, GLO, Undefined, ecoinvent database version 3.8

## Reference product
- hemp fibre // hemp fibre // eu+efta+uk, elementary: 1

## Inputs
- water, Renewable material resources from water [AL]: 1.44071e-5
- water, Renewable material resources from water [AT]: 0.000185627
- water, Renewable material resources from water [BA]: 1.79605e-5
- water, Renewable material resources from water [BE]: 0.000223431
- water, Renewable material resources from water [BG]: 5.72135e-5
- water, Renewable material resources from water [BY]: 7.42907e-5
- water, Renewable material resources from water [CH]: 0.000221391
- water, Renewable material resources from water [CZ]: 0.000154086
- water, Renewable material resources from water [DE]: 0.00167695
- water, Renewable material resources from water [DK]: 0.000121598
- water, Renewable material resources from water [EE]: 1.66044e-5
- water, Renewable material resources from water [ES]: 0.000719627
- water, Renewable material resources from water [FI]: 0.000103721
- water, Renewable material resources from water [FR]: 0.00118292
- water, Renewable material resources from water [GB]: 0.00117553
- water, Renewable material resources from water: 7.30168e-6
- water, Renewable material resources from water [GR]: 0.000133724
- water, Renewable material resources from water [HR]: 4.29969e-5
- water, Renewable material resources from water [HU]: 0.000112716
- water, Renewable material resources from water [IE]: 0.000121417
- water, Renewable material resources from water [IS]: 6.92843e-6
- water, Renewable material resources from water [IT]: 0.00101208
- water, Renewable material resources from water [LT]: 3.54532e-5
- water, Renewable material resources from water [LU]: 2.46117e-5
- water, Renewable material resources from water [LV]: 2.09055e-5
- water, Renewable material resources from water [MD]: 1.10615e-5
- water, Renewable material resources from water [ME]: 4.45618e-6
- water, Renewable material resources from water [MK]: 1.23075e-5
- water, Renewable material resources from water [MT]: 6.80832e-6
- water, Renewable material resources from water [NL]: 0.000375164
- water, Renewable material resources from water [NO]: 0.000142011
- water, Renewable material resources from water [PL]: 0.000431771
- water, Renewable material resources from water [PT]: 0.000136239
- water, Renewable material resources from water [RO]: 0.000189144
- water, Renewable material resources from water [RS]: 4.69367e-5
- water, Renewable material resources from water [SE]: 0.00020492
- water, Renewable material resources from water [SI]: 2.90196e-5
- water, Renewable material resources from water [SK]: 6.81133e-5
- water, Renewable material resources from water [SM]: 8.47737e-7
- water, Renewable material resources from water [UA]: 0.000199709
- lake water, Renewable material resources from water [DE]: 0.0162905
- lake water, Renewable material resources from water [ES]: 0.00699071
- lake water, Renewable material resources from water [FR]: 0.0114913
- lake water, Renewable material resources from water [GB]: 0.0114196
- lake water, Renewable material resources from water: 7.09311e-5
- lake water, Renewable material resources from water [IT]: 0.00983172
- lake water, Renewable material resources from water [NL]: 0.00364447
- lake water, Renewable material resources from water [PL]: 0.00419438
- lake water, Renewable material resources from water [RO]: 0.00183741
- lake water, Renewable material resources from water [AT]: 0.00180324
- lake water, Renewable material resources from water [BA]: 0.000174475
- lake water, Renewable material resources from water [BE]: 0.00217048
- lake water, Renewable material resources from water [BG]: 0.000555792
- lake water, Renewable material resources from water [CH]: 0.00215067
- lake water, Renewable material resources from water [CZ]: 0.00149685
- lake water, Renewable material resources from water [DK]: 0.00118125
- lake water, Renewable material resources from water [EE]: 0.000161301
- lake water, Renewable material resources from water [FI]: 0.00100758
- lake water, Renewable material resources from water [GR]: 0.00129905
- lake water, Renewable material resources from water [HU]: 0.00109497
- lake water, Renewable material resources from water [IE]: 0.00117949
- lake water, Renewable material resources from water [IS]: 6.73052e-5
- lake water, Renewable material resources from water [LT]: 0.000344405
- lake water, Renewable material resources from water [LU]: 0.000239087
- lake water, Renewable material resources from water [LV]: 0.000203083
- lake water, Renewable material resources from water [MK]: 0.000119559
- lake water, Renewable material resources from water [NO]: 0.00137954
- lake water, Renewable material resources from water [PT]: 0.00132348
- lake water, Renewable material resources from water [RS]: 0.00045596
- lake water, Renewable material resources from water [SE]: 0.00199066
- lake water, Renewable material resources from water [SI]: 0.000281907
- lake water, Renewable material resources from water [SK]: 0.000661677
- lake water, Renewable material resources from water [UA]: 0.00194004
- lake water, Renewable material resources from water [AL]: 0.000139956
- lake water, Renewable material resources from water [BY]: 0.000721687
- lake water, Renewable material resources from water [HR]: 0.000417687
- lake water, Renewable material resources from water [MD]: 0.000107455
- lake water, Renewable material resources from water [ME]: 4.32889e-5
- lake water, Renewable material resources from water [MT]: 6.61384e-5
- lake water, Renewable material resources from water [SM]: 8.23522e-6

## Outputs
- Water, Emissions to air, unspecified: 0.00829533
- Water, Emissions to fresh water [AL]: 0.000154363
- Water, Emissions to fresh water [AT]: 0.00198886
- Water, Emissions to fresh water [BA]: 0.000192435
- Water, Emissions to fresh water [BE]: 0.00239391
- Water, Emissions to fresh water [BG]: 0.000613004
- Water, Emissions to fresh water [BY]: 0.000795975
- Water, Emissions to fresh water [CH]: 0.00237205
- Water, Emissions to fresh water [CZ]: 0.00165093
- Water, Emissions to fresh water [DE]: 0.0179674
- Water, Emissions to fresh water [DK]: 0.00130284
- Water, Emissions to fresh water [EE]: 0.000177905
- Water, Emissions to fresh water [ES]: 0.00771031
- Water, Emissions to fresh water [FI]: 0.0011113
- Water, Emissions to fresh water [FR]: 0.0126742
- Water, Emissions to fresh water [GB]: 0.012595
- Water, Emissions to fresh water: 7.82326e-5
- Water, Emissions to fresh water [GR]: 0.00143277
- Water, Emissions to fresh water [HR]: 0.000460682
- Water, Emissions to fresh water [HU]: 0.00120768
- Water, Emissions to fresh water [IE]: 0.0013009
- Water, Emissions to fresh water [IS]: 7.42334e-5
- Water, Emissions to fresh water [IT]: 0.0108438
- Water, Emissions to fresh water [LT]: 0.000379857
- Water, Emissions to fresh water [LU]: 0.000263698
- Water, Emissions to fresh water [LV]: 0.000223988
- Water, Emissions to fresh water [MD]: 0.000118516
- Water, Emissions to fresh water [ME]: 4.7745e-5
- Water, Emissions to fresh water [MK]: 0.000131866
- Water, Emissions to fresh water [MT]: 7.29465e-5
- Water, Emissions to fresh water [NL]: 0.00401963
- Water, Emissions to fresh water [NO]: 0.00152155
- Water, Emissions to fresh water [PL]: 0.00462614
- Water, Emissions to fresh water [PT]: 0.00145971
- Water, Emissions to fresh water [RO]: 0.00202655
- Water, Emissions to fresh water [RS]: 0.000502895
- Water, Emissions to fresh water [SE]: 0.00219558
- Water, Emissions to fresh water [SI]: 0.000310925
- Water, Emissions to fresh water [SK]: 0.000729788
- Water, Emissions to fresh water [SM]: 9.08293e-6
- Water, Emissions to fresh water [UA]: 0.00213975

## Impact indicators
- Water use: 4.74666e-6
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
## Deviations from the LCI method principle
The background data uses:
- the \xe2\x80\x9cRecycled content cut-off\xe2\x80\x9d approach to allocate end-of-life by-products and secondary materials. This allocation is explained in the description of the recycled content system model (http://www.ecoinvent.org/database/system-models-in-ecoinvent-3/cut-off-system-model/allocation-cut-off-by-classification.html).
OR
- EF compliant data

## Deviations from the LCI method approaches
Background data:
- the \xe2\x80\x9cRecycled content cut-off\xe2\x80\x9d approach to allocate end-of-life by-products and secondary materials. This allocation is explained in the description of the recycled content system model (http://www.ecoinvent.org/database/system-models-in-ecoinvent-3/cut-off-system-model/allocation-cut-off-by-classification.html). The ecoinvent database mostly relies on “Allocation – market values” apart for few exceptions particularly in the energy sector. ecoinvent energy data is replaced with EF3.0 core data as per the EF guidelines version 2.0.
OR
- EF compliant data

## Modelling constants
All modelling constants follow the requirements listed in the Tender Specifications 070201/2020/SER/ENV.B1. Completeness: There are no intentional cut-offs in the inventory no matter how small their contribution to all the EF impact categories is. Eventual cut-offs are in compliance with the Guide for EF compliant data sets (JRC 2020), i.e. only if below the 3% cut-off rule. Water use: water use is modelled at country level using separate flows for water withdrawal, water release and water evaporation. Handling multi-functional processes: the following PEF multi- functionality decision hierarchy is applied for resolving all multi- functionality problems: (1) subdivision or system expansion; (2) allocation based on a relevant underlying physical relationship (substitution may apply here); (3) allocation based on some other relationship. Direct land use change: GHG emissions from direct LUC allocated to good/service for 20 years after the LUC occurs, with IPCC default values. Carbon storage and delayed emissions: credits associated with temporary (carbon) storage or delayed emissions up to 300 years are not be considered. Emissions off-setting: are not included. Capital goods (including infrastructures) and their End of life: they are included. System boundaries: system boundaries include all processes linked to the product supply chain (e.g. maintenance). Time period: emissions and removals are modelled as if released or removed at the beginning of the assessment method. Fossil and biogenic carbon emissions and removals: removals and emissions are modelled as follows: All GHG emissions from fossil fuels (including peat and limestone) are modelled consistently with the most updated ILCD list of elementary flows. The non-fossil (biogenic) carbon flows are modelled consistently with the most updated ILCD list of elementary flows.

## Cut-off and completeness
There are no intentional cut-offs in the inventory no matter how small their contribution to all the EF impact categories is. Eventual cut-offs are in compliance with the Guide for EF compliant data sets (JRC 2020), i.e. only if below the 3% cut-off rule. The dataset dry mass and water balance has been checked to ensure the inventory is complete. Capital goods (e.g. infrastructure) and their end-of-life are included.

## Data selection and combination
These datasets include, in both their foreground and background data, links to EF3.0 compliant data.
The relevant background data on energy, transport, and End of Life are from the LCDN data node (http://lcdn.thinkstep.com/Node/).
All other background data in the supply of this product for which no EF3.0 process was available are from ecoinvent v3.7 database (www.ecoinvent.org) or other data sources.

## Data treatment and extrapolations
Several data sources have been used to model the inventory.

## Use advice
This data set is a supporting sub-data set and must be used exclusively as sub-data set of its corresponding level-1 partly disaggregated data set (see “General comment” field for exact name and UUID).

## Data sources
- Background Data for Representative products and organisations. EF 3.0 compliant (data stock)
- Van Eynde H., 2015. Comparative Life Cycle Assessment of hemp and cotton fibers used in Chinese textile manufacturing. Faculteit Bio-Ingenieurswetenschappen. Masters Thesis. KU Leuven. Available at: https://www.scriptiebank.be/sites/default/files/VanEyndeHannes_KUL_Eindwerk.pdf
- Symeonidis A., fibre production, jute, retting, GLO, Undefined, ecoinvent database version 3.8

## Intended applications
Implementation of regular Product Environmental Footprint (PEF) studies and Organisation Environmental Footprint (OEF) studies exclusively under the specified Product groups and sectors as defined in the Product Environmental Footprint Category Rules (PEFCR) and Organisation Environmental Footprint Sectorial Rules (OEFSR) listed in http://ec.europa.eu/environment/eussd/smgp/PEFCR_OEFSR.htm
