# repair for reuse; technology mix; production mix, at plant; for 1 kg apparel

Dataset: ILCD process, Partly terminated system
Geography: GLO
Reference year: 2021
Valid until: 2024
Classification: End-of-life treatment / Reuse or further use
LCI method principle: Attributional
LCI method approaches: Allocation - market value
Completeness: All relevant flows quantified
Project: Provision of process-based 3.0 Environmental Footprint-compliant life cycle inventory datasets - Others - contract number 070201/2020/840235/SER/ENV.B.1
Generated by: Life Cycle Indonesia
Owner: PRé Sustainability B.V.
Compliance: ILCD Data Network - Entry-level; Suggestions for updating the PEF method 2019; ISO 14040 Environmental Management – Life Cycle Assessment – Principles and Framework, 2006; ISO 14044:2006. Environmental Management – Life Cycle Assessment – Requirements and guidelines.; Environmental Footprint 3.1
Review: Dependent internal review by Avraam Symeonidis, Emilia Moreno Ruiz; Independent review panel by Madhuri Nigam
Data quality: Overall quality: Good; Time representativeness: Very good; Geographical representativeness: Good; Technological representativeness: Good; Precision: Good; Methodological appropriateness and consistency: Not applicable
Amounts: no units in this file; such an amount is in the reference unit of its flow, which a separate flow dataset defines
copyright: true
licenseType: Free of charge for some user types or use types
accessRestrictions: Free of charge for all final users implementing a regular Product Environmental Footprint (PEF) studies and Organisation Environmental Footprint (OEF) studies exclusively under the specified Product groups and sectors as defined in the Product Environmental Footprint Category Rules (PEFCR) and Organisation Environmental Footprint Sectorial Rules (OEFSR) listed in http://ec.europa.eu/environment/eussd/smgp/PEFCR_OEFSR.htm and in accordance with the terms and conditions of the EULA (available at https://ecoinvent.lca-data.com/) exclusively until 31st December 2024. Any use of this dataset or any derivative data not within the specific context of one of the PEF/OEF projects or after the end of 2024 is not permitted.

## General comment
Notice: this data set supersedes the EF3.0-compliant version (see link under "preceding data set version" below calculated with the EF3.0). The life cycle inventory is not changed from the original EF3.0 data set. The LCIA results are calculated based on the EF3.1 methods which provide updated characterisation factors in the following impact categories: Climate Change, Ecotoxicity freshwater, Photochemical Ozone Formation, Acidification, Human Toxicity non-cancer, and Human Toxicity cancer. The review report and the data quality ratings refer to the original results. The data set has been updated by the European Commission on the basis of the original EF3.0 data set delivered by the data provider.Repair and reuse is one of the sustainable practices for apparel to reduce the environmental impact of textile and apparel manufacturing. Apparel repair needs are often related to failure in the item’s method of attachment. For instance, a purse strap could break off, your eyeglass rim could snap in half, a necklace chain could break, the strap on your watch could come apart, etc. Another common repair need within the apparel category is for clothing. Clothing repair needs span from repairing holes to reattaching buttons to mending broken zippers. Reuse means to use again used products either for the same previous purposes or for new purposes. Re-use can help save time, money, resources and energy.

Ifixit (2021) Apparel Repair, https://www.ifixit.com/Device/Apparel
Kamis, Arsinah et. al. (2018) Environmentally Sustainable Apparel: Recycle, Repairing and Reuse Apparel, The International Journal of Social Sciences and Humanities Invention 5(01), https://www.researchgate.net/publication/322326412_Environmentally_Sustainable_Apparel_Recycle_Repairing_and_Reuse_Apparel

## Technology and included processes
This dataset is modelled for repairing the jacket zippers for reuse purposes. This process includes lockstitch sewing machines, washing and tumble drying that use electrical power. Thread consumption is also included and was calculated for sewing a 60 cm jacket zipper then converted to kg with a 100 denier thread. In addition infrastructure of the machine is included in the data. There is no direct emission to air since the emission comes from electricity usage, while hazardous waste comes from waste lube oil. There is direct emission to water from this process caused by the use of detergents in the washing process. The consumption of lubricating oil for lockstitch sewing machines using a stitch bonding machine as a proxy, while the consumption of lubricating oil for tumble drying machines using thermobonding oven as a proxy.

## Parameters
- kg_0: 0.081
  Mass in kg, for zipper tape and puller // zipper tape and puller, metal // glo; Articulated lorry transport, Total weight >32 t, mix Euro 0-5; ROW w/o EU+EFTA
- km_0: 1000
  Distance in km, for zipper tape and puller // zipper tape and puller, metal // glo; Articulated lorry transport, Total weight >32 t, mix Euro 0-5; ROW w/o EU+EFTA
- kg_km_0: 81; = kg_0*km_0
  Transport amount in km*km, for zipper tape and puller // zipper tape and puller, metal // glo; Articulated lorry transport, Total weight >32 t, mix Euro 0-5; ROW w/o EU+EFTA
- kg_1: 0.0558
  Mass in kg, for surfactant // surfactant production // glo; Articulated lorry transport, Total weight >32 t, mix Euro 0-5; ROW w/o EU+EFTA
- km_1: 1000
  Distance in km, for surfactant // surfactant production // glo; Articulated lorry transport, Total weight >32 t, mix Euro 0-5; ROW w/o EU+EFTA
- kg_km_1: 55.8; = kg_1*km_1
  Transport amount in km*km, for surfactant // surfactant production // glo; Articulated lorry transport, Total weight >32 t, mix Euro 0-5; ROW w/o EU+EFTA
- kg_2: 0.000616538
  Mass in kg, for lubricating oil // lubricants at refinery // rsa; Articulated lorry transport, Total weight >32 t, mix Euro 0-5; ROW w/o EU+EFTA
- km_2: 1000
  Distance in km, for lubricating oil // lubricants at refinery // rsa; Articulated lorry transport, Total weight >32 t, mix Euro 0-5; ROW w/o EU+EFTA
- kg_km_2: 0.616538; = kg_2*km_2
  Transport amount in km*km, for lubricating oil // lubricants at refinery // rsa; Articulated lorry transport, Total weight >32 t, mix Euro 0-5; ROW w/o EU+EFTA
- kg_3: 0.000252939
  Mass in kg, for lubricating oil // lubricants at refinery // raf; Articulated lorry transport, Total weight >32 t, mix Euro 0-5; ROW w/o EU+EFTA
- km_3: 1000
  Distance in km, for lubricating oil // lubricants at refinery // raf; Articulated lorry transport, Total weight >32 t, mix Euro 0-5; ROW w/o EU+EFTA
- kg_km_3: 0.252939; = kg_3*km_3
  Transport amount in km*km, for lubricating oil // lubricants at refinery // raf; Articulated lorry transport, Total weight >32 t, mix Euro 0-5; ROW w/o EU+EFTA
- kg_4: 0.00662835
  Mass in kg, for lubricating oil // lubricants at refinery // ras w/o cn; Articulated lorry transport, Total weight >32 t, mix Euro 0-5; ROW w/o EU+EFTA
- km_4: 1000
  Distance in km, for lubricating oil // lubricants at refinery // ras w/o cn; Articulated lorry transport, Total weight >32 t, mix Euro 0-5; ROW w/o EU+EFTA
- kg_km_4: 6.62835; = kg_4*km_4
  Transport amount in km*km, for lubricating oil // lubricants at refinery // ras w/o cn; Articulated lorry transport, Total weight >32 t, mix Euro 0-5; ROW w/o EU+EFTA
- kg_5: 0.00548109
  Mass in kg, for lubricating oil // lubricants at refinery // ru; Articulated lorry transport, Total weight >32 t, mix Euro 0-5; ROW w/o EU+EFTA
- km_5: 1000
  Distance in km, for lubricating oil // lubricants at refinery // ru; Articulated lorry transport, Total weight >32 t, mix Euro 0-5; ROW w/o EU+EFTA
- kg_km_5: 5.48109; = kg_5*km_5
  Transport amount in km*km, for lubricating oil // lubricants at refinery // ru; Articulated lorry transport, Total weight >32 t, mix Euro 0-5; ROW w/o EU+EFTA
- kg_6: 0.00337628
  Mass in kg, for lubricating oil // lubricants at refinery // eu+efta+uk; Articulated lorry transport, Total weight >32 t, mix Euro 0-5; ROW w/o EU+EFTA
- km_6: 1000
  Distance in km, for lubricating oil // lubricants at refinery // eu+efta+uk; Articulated lorry transport, Total weight >32 t, mix Euro 0-5; ROW w/o EU+EFTA
- kg_km_6: 3.37628; = kg_6*km_6
  Transport amount in km*km, for lubricating oil // lubricants at refinery // eu+efta+uk; Articulated lorry transport, Total weight >32 t, mix Euro 0-5; ROW w/o EU+EFTA
- kg_7: 0.00517395
  Mass in kg, for lubricating oil // lubricants at refinery // rna; Articulated lorry transport, Total weight >32 t, mix Euro 0-5; ROW w/o EU+EFTA
- km_7: 1000
  Distance in km, for lubricating oil // lubricants at refinery // rna; Articulated lorry transport, Total weight >32 t, mix Euro 0-5; ROW w/o EU+EFTA
- kg_km_7: 5.17395; = kg_7*km_7
  Transport amount in km*km, for lubricating oil // lubricants at refinery // rna; Articulated lorry transport, Total weight >32 t, mix Euro 0-5; ROW w/o EU+EFTA
- kg_8: 0.00105241
  Mass in kg, for lubricating oil // lubricants at refinery // cn; Articulated lorry transport, Total weight >32 t, mix Euro 0-5; ROW w/o EU+EFTA
- km_8: 1000
  Distance in km, for lubricating oil // lubricants at refinery // cn; Articulated lorry transport, Total weight >32 t, mix Euro 0-5; ROW w/o EU+EFTA
- kg_km_8: 1.05241; = kg_8*km_8
  Transport amount in km*km, for lubricating oil // lubricants at refinery // cn; Articulated lorry transport, Total weight >32 t, mix Euro 0-5; ROW w/o EU+EFTA
- kg_9: 8.88889e-6
  Mass in kg, for thread // thread // glo; Articulated lorry transport, Total weight >32 t, mix Euro 0-5; ROW w/o EU+EFTA
- km_9: 1000.12
  Distance in km, for thread // thread // glo; Articulated lorry transport, Total weight >32 t, mix Euro 0-5; ROW w/o EU+EFTA
- kg_km_9: 0.00889; = kg_9*km_9
  Transport amount in km*km, for thread // thread // glo; Articulated lorry transport, Total weight >32 t, mix Euro 0-5; ROW w/o EU+EFTA
- kg_10: 0.081
  Mass in kg, for zipper tape and puller // zipper tape and puller, metal // glo; Transoceanic ship, containers; GLO
- km_10: 18024.7
  Distance in km, for zipper tape and puller // zipper tape and puller, metal // glo; Transoceanic ship, containers; GLO
- kg_km_10: 1460; = kg_10*km_10
  Transport amount in km*km, for zipper tape and puller // zipper tape and puller, metal // glo; Transoceanic ship, containers; GLO
- kg_11: 0.0558
  Mass in kg, for surfactant // surfactant production // glo; Transoceanic ship, containers; GLO
- km_11: 17921.1
  Distance in km, for surfactant // surfactant production // glo; Transoceanic ship, containers; GLO
- kg_km_11: 1000; = kg_11*km_11
  Transport amount in km*km, for surfactant // surfactant production // glo; Transoceanic ship, containers; GLO
- kg_12: 0.000616538
  Mass in kg, for lubricating oil // lubricants at refinery // rsa; Transoceanic ship, containers; GLO
- km_12: 18000
  Distance in km, for lubricating oil // lubricants at refinery // rsa; Transoceanic ship, containers; GLO
- kg_km_12: 11.0977; = kg_12*km_12
  Transport amount in km*km, for lubricating oil // lubricants at refinery // rsa; Transoceanic ship, containers; GLO
- kg_13: 0.000252939
  Mass in kg, for lubricating oil // lubricants at refinery // raf; Transoceanic ship, containers; GLO
- km_13: 18000
  Distance in km, for lubricating oil // lubricants at refinery // raf; Transoceanic ship, containers; GLO
- kg_km_13: 4.5529; = kg_13*km_13
  Transport amount in km*km, for lubricating oil // lubricants at refinery // raf; Transoceanic ship, containers; GLO
- kg_14: 0.00662835
  Mass in kg, for lubricating oil // lubricants at refinery // ras w/o cn; Transoceanic ship, containers; GLO
- km_14: 18000
  Distance in km, for lubricating oil // lubricants at refinery // ras w/o cn; Transoceanic ship, containers; GLO
- kg_km_14: 119.31; = kg_14*km_14
  Transport amount in km*km, for lubricating oil // lubricants at refinery // ras w/o cn; Transoceanic ship, containers; GLO
- kg_15: 0.00548109
  Mass in kg, for lubricating oil // lubricants at refinery // ru; Transoceanic ship, containers; GLO
- km_15: 18000
  Distance in km, for lubricating oil // lubricants at refinery // ru; Transoceanic ship, containers; GLO
- kg_km_15: 98.6596; = kg_15*km_15
  Transport amount in km*km, for lubricating oil // lubricants at refinery // ru; Transoceanic ship, containers; GLO
- kg_16: 0.00337628
  Mass in kg, for lubricating oil // lubricants at refinery // eu+efta+uk; Transoceanic ship, containers; GLO
- km_16: 18000
  Distance in km, for lubricating oil // lubricants at refinery // eu+efta+uk; Transoceanic ship, containers; GLO
- kg_km_16: 60.773; = kg_16*km_16
  Transport amount in km*km, for lubricating oil // lubricants at refinery // eu+efta+uk; Transoceanic ship, containers; GLO
- kg_17: 0.00517395
  Mass in kg, for lubricating oil // lubricants at refinery // rna; Transoceanic ship, containers; GLO
- km_17: 18000
  Distance in km, for lubricating oil // lubricants at refinery // rna; Transoceanic ship, containers; GLO
- kg_km_17: 93.1311; = kg_17*km_17
  Transport amount in km*km, for lubricating oil // lubricants at refinery // rna; Transoceanic ship, containers; GLO
- kg_18: 0.00105241
  Mass in kg, for lubricating oil // lubricants at refinery // cn; Transoceanic ship, containers; GLO
- km_18: 18000
  Distance in km, for lubricating oil // lubricants at refinery // cn; Transoceanic ship, containers; GLO
- kg_km_18: 18.9433; = kg_18*km_18
  Transport amount in km*km, for lubricating oil // lubricants at refinery // cn; Transoceanic ship, containers; GLO
- kg_19: 8.88889e-6
  Mass in kg, for thread // thread // glo; Transoceanic ship, containers; GLO
- km_19: 18000
  Distance in km, for thread // thread // glo; Transoceanic ship, containers; GLO
- kg_km_19: 0.16; = kg_19*km_19
  Transport amount in km*km, for thread // thread // glo; Transoceanic ship, containers; GLO
- kg_20: 0.0062004
  Mass in kg, for washing machine; Transoceanic ship, containers; GLO
- km_20: 737
  Distance in km, for washing machine; Transoceanic ship, containers; GLO
- kg_km_20: 4.56969; = kg_20*km_20
  Transport amount in km*km, for washing machine; Transoceanic ship, containers; GLO
- kg_21: 0.0062004
  Mass in kg, for washing machine; Freight train, diesel traction; EU+EFTA+UK
- km_21: 13.3513
  Distance in km, for washing machine; Freight train, diesel traction; EU+EFTA+UK
- kg_km_21: 0.0827834; = kg_21*km_21
  Transport amount in km*km, for washing machine; Freight train, diesel traction; EU+EFTA+UK
- kg_22: 0.0062004
  Mass in kg, for washing machine; Freight train, electricity traction; EU+EFTA+UK
- km_22: 4.54157
  Distance in km, for washing machine; Freight train, electricity traction; EU+EFTA+UK
- kg_km_22: 0.0281595; = kg_22*km_22
  Transport amount in km*km, for washing machine; Freight train, electricity traction; EU+EFTA+UK
- kg_23: 0.0062004
  Mass in kg, for washing machine; Freight train, average; EU+EFTA+UK
- km_23: 0.107115
  Distance in km, for washing machine; Freight train, average; EU+EFTA+UK
- kg_km_23: 0.000664156; = kg_23*km_23
  Transport amount in km*km, for washing machine; Freight train, average; EU+EFTA+UK
- kg_24: 0.0062004
  Mass in kg, for washing machine; Barge; EU+EFTA+UK
- km_24: 0.328736
  Distance in km, for washing machine; Barge; EU+EFTA+UK
- kg_km_24: 0.00203829; = kg_24*km_24
  Transport amount in km*km, for washing machine; Barge; EU+EFTA+UK
- kg_25: 0.0062004
  Mass in kg, for washing machine; Barge; ROW w/o EU+EFTA
- km_25: 0.671264
  Distance in km, for washing machine; Barge; ROW w/o EU+EFTA
- kg_km_25: 0.0041621; = kg_25*km_25
  Transport amount in km*km, for washing machine; Barge; ROW w/o EU+EFTA
- kg_26: 0.0062004
  Mass in kg, for washing machine; Articulated lorry transport, Total weight <7.5 t, mix Euro 0-5; EU+EFTA+UK
- km_26: 9.50673
  Distance in km, for washing machine; Articulated lorry transport, Total weight <7.5 t, mix Euro 0-5; EU+EFTA+UK
- kg_km_26: 0.0589455; = kg_26*km_26
  Transport amount in km*km, for washing machine; Articulated lorry transport, Total weight <7.5 t, mix Euro 0-5; EU+EFTA+UK
- kg_27: 0.0062004
  Mass in kg, for washing machine; Articulated lorry transport, Euro 4, Total weight >32 t; EU+EFTA+UK
- km_27: 86.5577
  Distance in km, for washing machine; Articulated lorry transport, Euro 4, Total weight >32 t; EU+EFTA+UK
- kg_km_27: 0.536692; = kg_27*km_27
  Transport amount in km*km, for washing machine; Articulated lorry transport, Euro 4, Total weight >32 t; EU+EFTA+UK
- kg_28: 0.0062004
  Mass in kg, for washing machine; Articulated lorry transport, Total weight >32 t, mix Euro 0-5; ROW w/o EU+EFTA
- km_28: 228.442
  Distance in km, for washing machine; Articulated lorry transport, Total weight >32 t, mix Euro 0-5; ROW w/o EU+EFTA
- kg_km_28: 1.41643; = kg_28*km_28
  Transport amount in km*km, for washing machine; Articulated lorry transport, Total weight >32 t, mix Euro 0-5; ROW w/o EU+EFTA

## Reference product
- apparel, repair for reuse // repair for reuse // glo: 1

## Inputs
- Electricity from Electricity grid mix 1kV-60kV - AU: 0.0206
- Electricity from Electricity grid mix 1kV-60kV - EU+EFTA+UK: 0.304
- Electricity from Electricity grid mix 1kV-60kV - NZ: 0.0039
- Electricity from Electricity grid mix 1kV-60kV - RAF: 0.0664
- Electricity from Electricity grid mix 1kV-60kV - RNA: 0.4449
- Electricity from Electricity grid mix 1kV-60kV - RSA: 0.151
- Electricity from Electricity grid mix 1kV-60kV - RU: 0.089
- Transport of zipper tape and puller // zipper tape and puller, metal // glo by Articulated lorry transport, Total weight >32 t, mix Euro 0-5 - ROW w/o EU+EFTA: 81; = kg_km_0
- Transport of surfactant // surfactant production // glo by Articulated lorry transport, Total weight >32 t, mix Euro 0-5 - ROW w/o EU+EFTA: 55.8; = kg_km_1
- Transport of lubricating oil // lubricants at refinery // rsa by Articulated lorry transport, Total weight >32 t, mix Euro 0-5 - ROW w/o EU+EFTA: 0.616538; = kg_km_2
- Transport of lubricating oil // lubricants at refinery // raf by Articulated lorry transport, Total weight >32 t, mix Euro 0-5 - ROW w/o EU+EFTA: 0.252939; = kg_km_3
- Transport of lubricating oil // lubricants at refinery // ras w/o cn by Articulated lorry transport, Total weight >32 t, mix Euro 0-5 - ROW w/o EU+EFTA: 6.62835; = kg_km_4
- Transport of lubricating oil // lubricants at refinery // ru by Articulated lorry transport, Total weight >32 t, mix Euro 0-5 - ROW w/o EU+EFTA: 5.48109; = kg_km_5
- Transport of lubricating oil // lubricants at refinery // eu+efta+uk by Articulated lorry transport, Total weight >32 t, mix Euro 0-5 - ROW w/o EU+EFTA: 3.37628; = kg_km_6
- Transport of lubricating oil // lubricants at refinery // rna by Articulated lorry transport, Total weight >32 t, mix Euro 0-5 - ROW w/o EU+EFTA: 5.17395; = kg_km_7
- Transport of lubricating oil // lubricants at refinery // cn by Articulated lorry transport, Total weight >32 t, mix Euro 0-5 - ROW w/o EU+EFTA: 1.05241; = kg_km_8
- Transport of thread // thread // glo by Articulated lorry transport, Total weight >32 t, mix Euro 0-5 - ROW w/o EU+EFTA: 0.00889; = kg_km_9
- Transport of zipper tape and puller // zipper tape and puller, metal // glo by Transoceanic ship, containers - GLO: 1460; = kg_km_10
- Transport of surfactant // surfactant production // glo by Transoceanic ship, containers - GLO: 1000; = kg_km_11
- Transport of lubricating oil // lubricants at refinery // rsa by Transoceanic ship, containers - GLO: 11.0977; = kg_km_12
- Transport of lubricating oil // lubricants at refinery // raf by Transoceanic ship, containers - GLO: 4.5529; = kg_km_13
- Transport of lubricating oil // lubricants at refinery // ras w/o cn by Transoceanic ship, containers - GLO: 119.31; = kg_km_14
- Transport of lubricating oil // lubricants at refinery // ru by Transoceanic ship, containers - GLO: 98.6596; = kg_km_15
- Transport of lubricating oil // lubricants at refinery // eu+efta+uk by Transoceanic ship, containers - GLO: 60.773; = kg_km_16
- Transport of lubricating oil // lubricants at refinery // rna by Transoceanic ship, containers - GLO: 93.1311; = kg_km_17
- Transport of lubricating oil // lubricants at refinery // cn by Transoceanic ship, containers - GLO: 18.9433; = kg_km_18
- Transport of thread // thread // glo by Transoceanic ship, containers - GLO: 0.16; = kg_km_19
- Transport of washing machine by Transoceanic ship, containers - GLO: 4.56969; = kg_km_20
- Transport of washing machine by Freight train, diesel traction - EU+EFTA+UK: 0.0827834; = kg_km_21
- Transport of washing machine by Freight train, electricity traction - EU+EFTA+UK: 0.0281595; = kg_km_22
- Transport of washing machine by Freight train, average - EU+EFTA+UK: 0.000664156; = kg_km_23
- Transport of washing machine by Barge - EU+EFTA+UK: 0.00203829; = kg_km_24
- Transport of washing machine by Barge - ROW w/o EU+EFTA: 0.0041621; = kg_km_25
- Transport of washing machine by Articulated lorry transport, Total weight <7.5 t, mix Euro 0-5 - EU+EFTA+UK: 0.0589455; = kg_km_26
- Transport of washing machine by Articulated lorry transport, Euro 4, Total weight >32 t - EU+EFTA+UK: 0.536692; = kg_km_27
- Transport of washing machine by Articulated lorry transport, Total weight >32 t, mix Euro 0-5 - ROW w/o EU+EFTA: 1.41643; = kg_km_28
- Electricity from Electricity grid mix 1kV-60kV - CN: 0.455852
- Electricity from Electricity grid mix 1kV-60kV - RAS w/o CN: 0.499448
- apparel, repair for reuse // repair for reuse // glo, blackbox: 1
- apparel, repair for reuse // repair for reuse // glo, elementary: 1

## Impact indicators
- Eutrophication marine: 0.00356158
- Ecotoxicity, freshwater: 47.9319
- Land use: 20.2994
- Water use: 1.097
- Resource use, minerals and metals: 0.000693111
- Resource use, fossils: 20.045
- Climate change: 1.42507
- Ozone depletion: 5.52581e-9
- Human toxicity, cancer: 4.64211e-9
- Human toxicity, non-cancer: 1.73812e-7
- EF-particulate Matter: 3.04354e-7
- Ionising radiation, human health: 0.0745191
- Photochemical ozone formation - human health: 0.00836853
- Acidification: 0.0143584
- Eutrophication, terrestrial: 0.0342704
- Eutrophication, freshwater: 0.00203107

## Deviations from the LCI method principle
The background data use the \xe2\x80\x9cRecycled content cut-off\xe2\x80\x9d approach to allocate end-of-life by-products and secondary materials. This allocation is explained in the description of the recycled content system model (http://www.ecoinvent.org/database/system-models-in-ecoinvent-3/cut-off-system-model/allocation-cut-off-by-classification.html).

## Deviations from the LCI method approaches
Allocation following the ISO 14044 hierarchy.

## Modelling constants
All modelling constants follow the requirements listed in the Tender Specifications ENV.B.1/SER/2016/0038vl. Completeness: All known environmental flows are included. All known resource uses and emissions are listed in the inventory. Water use: water use is modelled at country level using separate flows for water withdrawal, water release and water evaporation. Cut-off: All known environmental flows are included. All known resource uses and emissions are listed in the inventory. Handling multi-functional processes: the following PEF multi- functionality decision hierarchy is applied for resolving all multi- functionality problems: (1) subdivision or system expansion; (2) allocation based on a relevant underlying physical relationship (substitution may apply here); (3) allocation based on some other relationship. Direct land use change: GHG emissions from direct LUC allocated to good/service for 20 years after the LUC occurs, with IPCC default values. Carbon storage and delayed emissions: credits associated with temporary (carbon) storage or delayed emissions up to 300 years are not be considered. Emissions off-setting: are not included. Capital goods (including infrastructures) and their End of life: they are included. System boundaries: system boundaries include all processes linked to the product supply chain (e.g. maintenance). Time period: emissions and removals are modelled as if released or removed at the beginning of the assessment method. Fossil and biogenic carbon emissions and removals: removals and emissions are modelled as follows: All GHG emissions from fossil fuels (including peat and limestone) are modelled consistently with the most updated ILCD list of elementary flows. The non-fossil (biogenic) carbon flows are modelled consistently with the most updated ILCD list of elementary flows.

## Cut-off and completeness
All known environmental flows are included. All known resource uses and emissions are listed in the inventory. The dataset dry mass balance has been checked to ensure the inventory is complete. Capital goods (e.g. infrastructure) and their end-of-life are included.

## Data selection and combination
These datasets include, in both their foreground and background data, links to EF3.0 compliant data.
The relevant background data on energy, transport, and End of Life are from the LCDN data node (http://lcdn.thinkstep.com/Node/).
All other background data in the supply of this product for which no EF3.0 process was available are from ecoinvent v3.7 database (www.ecoinvent.org) or other data sources.

## Data treatment and extrapolations
Several data sources have been used to model the inventory.

## Review details
Internal reviews have been asked to review the plausibility of the unit process, LCIA scores, and DQRs. Internal reviewers have also been asked to review the data for EF compliancy. The consortium is therefore responsible for aspects such as compliancy with the ILCD format, including validation in Look@LCI, and nomenclature.
Internal reviwers have been asked to judge based on the process name, that the unit process models in a complete and representative way the process in the requested location. The review encompassed the plausability of:
- exchanges with nature (elementary flows) as well as exchanges such as product and waste flows.
- meta information (general comment, technology comment, system boundaries, allocation, cut-off rules, etc.). Reviewers were asked to judge if the provided information is enough to understand the content of the process.
- LCIA scores
- DQRs including precision, technology, time and geography. As well as the overall DQR.
External reviewers have been asked to provide their expertise in the field of interest. External reviewers have been asked to review the unit process, including eventual methodological choices, the LCIA scores (provided with contribution scores as well), and DQRs. External reviewers have been provided all the information in a tool developed by the consortium for the purpose of this project.
External reviewers have been asked to judge based on the process name, that the unit process models in a complete and representative way the process in the requested location. The review encompassed:
- Plausability and completeness of exchanges with nature (elementary flows) as well as exchanges such as product and waste flows.
- Review of meta information (general comment, technology comment, system boundaries, allocation, cut-off rules, etc.). Reviewers were asked to judge if the provided information is enough to understand the content of the process.
- Review of properties (biogenic carbon and water content).
- Review of allocation keys.
- Plausability of LCIA scores calculated by the consortium.
- Plausability of DQRs including precision, technology, time and geography. As well as the overall DQR.

## Data sources
- Background Data for Representative products and organisations. EF 3.0 compliant (data stock)
- Expert Interview (2021)
- Textile School (2019) Yarn/Thread Count Numbering System, https://www.textileschool.com/259/thread-numbering-system/, Textile School, India
- Parcl (2021) Approximate weight of goods, https://www.parcl.com/education/customers/shipping-weight/, Parcl, Australia
- Cotex (2021) Stitch Bonding Machine, Catalog and Company Email, Suzhou Cotex International Co., Ltd., China.
- Lebon (2021) Nonwoven Oven Machine, Catalog and Company Messages, Qingdao Lebon Industry Co., Ltd., China
- UN Data (2018) Statistics Data for Lubricants Productions, http://data.un.org/Data.aspx?q=Lubricants&d=EDATA&f=cmID%3aLU, United Nations Statistics Division, Global.
- JUKI (2021), DDL-9000C-SMS lockstitch sewing system https://www.juki.co.jp/industrial_e/products_e/apparel_e/1needle_lock_e/detail.php?cd=DDL-9000CS_E , JUKI industrial sewing machinery, Japan
- James V. (2021) Life Expectancy: How Long Will My Sewing Machine Last?, https://sewingiscool.com/life-expectancy-how-long-will-my-sewing-machine-last/, Sewing is Cool
- Kirsi Laitala, Ingun Grimstad Klepp, Roy Kettlewell and Stephen Wiedemann (2020). Laundry Care Regimes: Do the Practices of Keeping Clothes Clean Have Different Environmental Impacts Based on the Fibre Content?, www.mdpi.com, Molecular Diversity Preservation International (MDPI) Sustainability Foundation, Basel, Switzerland
- Persil (2021) HOW TO USE WASHING POWDER, https://www.persil.com/uk/laundry/laundry-tips/washing-tips/dosing-for-powder.html, Persil Unilever, United Kingdom
- Europian Union (2019) Review study on household tumble driers Final Report, https://www.applia-europe.eu/images/Library/Review_study_on_tumble_dryers_06-2019.pdf, Europian Union
- Bosch (2021) Tumble Dryer WTR85V00SG, https://media3.bosch-home.com/Documents/9001388135_A.pdf, Bosch Home Appliances, Munich, Germany
- Capital Repairs (2021) Why Your Appliances Should Really Be Lasting Longer, https://capitalrepairs.co.uk/news/why-your-appliances-should-really-be-lasting-longer/#:~:text=Tumble%20Dryers%20Should%20Last%20for,caused%20by%20a%20tripped%20thermostat, Capital Repairs, United Kingdom

## Intended applications
Implementation of regular Product Environmental Footprint (PEF) studies and Organisation Environmental Footprint (OEF) studies exclusively under the specified Product groups and sectors as defined in the Product Environmental Footprint Category Rules (PEFCR) and Organisation Environmental Footprint Sectorial Rules (OEFSR) listed in http://ec.europa.eu/environment/eussd/smgp/PEFCR_OEFSR.htm
