# desizing, synthetic fibers; technology mix; production mix, at plant; service (raw materials excluded)

Dataset: ILCD process, Partly terminated system
Geography: GLO
Reference year: 2021
Valid until: 2024
Classification: Systems / Textiles, furnitures and other interiors
LCI method principle: Attributional
LCI method approaches: Allocation - market value
Completeness: All relevant flows quantified
Project: Provision of process-based 3.0 Environmental Footprint-compliant life cycle inventory datasets - Apparel 1 - contract number 070201/2020/840291/SER/ENV.B.1
Generated by: Life Cycle Indonesia
Owner: PRé Sustainability B.V.
Compliance: ILCD Data Network - Entry-level; Suggestions for updating the PEF method 2019; ISO 14040 Environmental Management – Life Cycle Assessment – Principles and Framework, 2006; ISO 14044:2006. Environmental Management – Life Cycle Assessment – Requirements and guidelines.; Environmental Footprint 3.1
Review: Dependent internal review by Avraam Symeonidis, Emilia Moreno Ruiz; Independent review panel by Fábio Valebona
Data quality: Overall quality: Good; Time representativeness: Very good; Geographical representativeness: Good; Technological representativeness: Good; Precision: Good; Methodological appropriateness and consistency: Not applicable
Amounts: no units in this file; such an amount is in the reference unit of its flow, which a separate flow dataset defines
copyright: true
licenseType: Free of charge for some user types or use types
accessRestrictions: Free of charge for all final users implementing a regular Product Environmental Footprint (PEF) studies and Organisation Environmental Footprint (OEF) studies exclusively under the specified Product groups and sectors as defined in the Product Environmental Footprint Category Rules (PEFCR) and Organisation Environmental Footprint Sectorial Rules (OEFSR) listed in http://ec.europa.eu/environment/eussd/smgp/PEFCR_OEFSR.htm and in accordance with the terms and conditions of the EULA (available at https://ecoinvent.lca-data.com/) exclusively until 31st December 2024. Any use of this dataset or any derivative data not within the specific context of one of the PEF/OEF projects or after the end of 2024 is not permitted.

## General comment
Notice: this data set supersedes the EF3.0-compliant version (see link under "preceding data set version" below calculated with the EF3.0). The life cycle inventory is not changed from the original EF3.0 data set. The LCIA results are calculated based on the EF3.1 methods which provide updated characterisation factors in the following impact categories: Climate Change, Ecotoxicity freshwater, Photochemical Ozone Formation, Acidification, Human Toxicity non-cancer, and Human Toxicity cancer. The review report and the data quality ratings refer to the original results. The data set has been updated by the European Commission on the basis of the original EF3.0 data set delivered by the data provider.Desizing is one of the textiles pre-treatment processes to prepare the material for dyeing, printing, or finishing. Desizing is the process of removing sizing products to ensure the success of scour boiling and bleaching and production of faultless dyeing. For an effective desizing operation it is necessary to find out sizing products used. In synthetic fibres the nature of sizes and sizing ingredients are different. Synthetic yarns are stronger and hence increasing strength by sizing is not the aim and adhesion of the sizing material to the yarn is also difficult. Starch sizing of man made fibres possess many problems when yarns are slashed and fabrics are woven. Furthermore, with the introduction of textured synthetic fibre yams, blended fibre fabrics, introduction ofjet looms, system of dyeing and sizing together, permanant application of sizing, solvent sizing etc., change the pattern of sizing with conventional sizing ingredients. The demand for increasing the warp speed has also led to the development of special synthetic polymers and paraffin-based lubricants. The main synthetic sizes comprise ofpolyvinyl alcohol (PVA), polyacrylic acid, CMC, series ofplasticised acidic vinyl acetate and acidic methyl acrylate polymers. On synthetic fibers, the desizing can be done for polyester, rayon, acetate, nylon, and acrylic (modacrylic) material.

Kolanjikombil, Mathews. 2019. Handbook of Textile Processors Series Pretreatment of Textile Substrates. New Delhi: Woodhead Publishing India, pp 20
Karmakar, Samir R. 1999. Chemical Techonology in the Pre-treatment Processes of Textiles Vol.12. West Bengal: ScienceDirect, pp 70
Shaikh, Muhammad A. 2009. Water Conservation in Textile Industry. Karachi: College of Textile Engineering SFDAC, pp 48

## Technology and included processes
There are various methods of desizing including enzymatic desizing, oxidative desizing, acid steeping, rot steeping (use of bacteria), desizing with hot caustic soda treatment, and hot washing with detergents. The most widely practice for natural fiber is the enzymatic desizing. Desizing process can be executed in a discontinuous, half-continuous or continuous process. (Kolanjikombil, 2019)

The usual sizing agents of synthetic fiber can only be removed by an alkaline washing with a non-ionic detergent. It is better to use soft water for this treatment as metal ions may interfere with the removal size or add sequestering agent. A washing process allows sufficient time for swelling of these additives may be adequate to remove most of the size. In a typical process a woven fabric in full width may be first impregnated with concentrated detergent solution, and then left standing for some time to let the size swell. The impurities and foreign matter are then removed by washing in the fullwidth washer at elevated temperature. Using a detergent with dispersing agent also ensures complete removal of fats, oils and waxes that contain no emulsifying agent. (Kolanjikombil, 2019)

The input raw materials are not included in the model. Energy uses, infrastructure water and chemicals are included. There is no direct emission to soil, but there is direct emission to water from this process such as BOD, COD, TDS, ......... etc. In the model, the polyester synthetic fibers are pre-treated by an alkaline washing with a non-ionic detergent using the average value of 4 types of machines (jet, winch, jigger, and padder). The consumption of lubricating oil using an oven bonding machines as a proxy.

Kolanjikombil, Mathews. 2019. Handbook of Textile Processors Series Pretreatment of Textile Substrates. New Delhi: Woodhead Publishing India, pp 20, pp 43-46

## Parameters
- kg_0: 7.5e-6
  Mass in kg, for DTPA, diethylenetriaminepentaacetic acid; Freight train, diesel traction; EU+EFTA+UK
- km_0: 235.909
  Distance in km, for DTPA, diethylenetriaminepentaacetic acid; Freight train, diesel traction; EU+EFTA+UK
- kg_km_0: 0.00176932; = kg_0*km_0
  Transport amount in km*km, for DTPA, diethylenetriaminepentaacetic acid; Freight train, diesel traction; EU+EFTA+UK
- kg_1: 7.5e-6
  Mass in kg, for DTPA, diethylenetriaminepentaacetic acid; Freight train, electricity traction; EU+EFTA+UK
- km_1: 71.2401
  Distance in km, for DTPA, diethylenetriaminepentaacetic acid; Freight train, electricity traction; EU+EFTA+UK
- kg_km_1: 0.000534301; = kg_1*km_1
  Transport amount in km*km, for DTPA, diethylenetriaminepentaacetic acid; Freight train, electricity traction; EU+EFTA+UK
- kg_2: 7.5e-6
  Mass in kg, for DTPA, diethylenetriaminepentaacetic acid; Freight train, average; EU+EFTA+UK
- km_2: 1.95106
  Distance in km, for DTPA, diethylenetriaminepentaacetic acid; Freight train, average; EU+EFTA+UK
- kg_km_2: 1.4633e-5; = kg_2*km_2
  Transport amount in km*km, for DTPA, diethylenetriaminepentaacetic acid; Freight train, average; EU+EFTA+UK
- kg_3: 7.5e-6
  Mass in kg, for DTPA, diethylenetriaminepentaacetic acid; Articulated lorry transport, Total weight >32 t, mix Euro 0-5; ROW w/o EU+EFTA
- km_3: 208.8
  Distance in km, for DTPA, diethylenetriaminepentaacetic acid; Articulated lorry transport, Total weight >32 t, mix Euro 0-5; ROW w/o EU+EFTA
- kg_km_3: 0.001566; = kg_3*km_3
  Transport amount in km*km, for DTPA, diethylenetriaminepentaacetic acid; Articulated lorry transport, Total weight >32 t, mix Euro 0-5; ROW w/o EU+EFTA
- kg_4: 7.5e-6
  Mass in kg, for DTPA, diethylenetriaminepentaacetic acid; Transoceanic ship, containers; GLO
- km_4: 599
  Distance in km, for DTPA, diethylenetriaminepentaacetic acid; Transoceanic ship, containers; GLO
- kg_km_4: 0.0044925; = kg_4*km_4
  Transport amount in km*km, for DTPA, diethylenetriaminepentaacetic acid; Transoceanic ship, containers; GLO
- kg_5: 7.5e-6
  Mass in kg, for DTPA, diethylenetriaminepentaacetic acid; Barge; ROW w/o EU+EFTA
- km_5: 24.6
  Distance in km, for DTPA, diethylenetriaminepentaacetic acid; Barge; ROW w/o EU+EFTA
- kg_km_5: 0.0001845; = kg_5*km_5
  Transport amount in km*km, for DTPA, diethylenetriaminepentaacetic acid; Barge; ROW w/o EU+EFTA
- kg_6: 1.305e-6
  Mass in kg, for EDTA, ethylenediaminetetraacetic acid; Transoceanic ship, containers; GLO
- km_6: 3442.53
  Distance in km, for EDTA, ethylenediaminetetraacetic acid; Transoceanic ship, containers; GLO
- kg_km_6: 0.0044925; = kg_6*km_6
  Transport amount in km*km, for EDTA, ethylenediaminetetraacetic acid; Transoceanic ship, containers; GLO
- kg_7: 1.305e-6
  Mass in kg, for EDTA, ethylenediaminetetraacetic acid; Freight train, diesel traction; EU+EFTA+UK
- km_7: 1317.65
  Distance in km, for EDTA, ethylenediaminetetraacetic acid; Freight train, diesel traction; EU+EFTA+UK
- kg_km_7: 0.00171954; = kg_7*km_7
  Transport amount in km*km, for EDTA, ethylenediaminetetraacetic acid; Freight train, diesel traction; EU+EFTA+UK
- kg_8: 1.305e-6
  Mass in kg, for EDTA, ethylenediaminetetraacetic acid; Freight train, electricity traction; EU+EFTA+UK
- km_8: 448.212
  Distance in km, for EDTA, ethylenediaminetetraacetic acid; Freight train, electricity traction; EU+EFTA+UK
- kg_km_8: 0.000584916; = kg_8*km_8
  Transport amount in km*km, for EDTA, ethylenediaminetetraacetic acid; Freight train, electricity traction; EU+EFTA+UK
- kg_9: 1.305e-6
  Mass in kg, for EDTA, ethylenediaminetetraacetic acid; Freight train, average; EU+EFTA+UK
- km_9: 10.5713
  Distance in km, for EDTA, ethylenediaminetetraacetic acid; Freight train, average; EU+EFTA+UK
- kg_km_9: 1.37955e-5; = kg_9*km_9
  Transport amount in km*km, for EDTA, ethylenediaminetetraacetic acid; Freight train, average; EU+EFTA+UK
- kg_10: 1.305e-6
  Mass in kg, for EDTA, ethylenediaminetetraacetic acid; Barge; EU+EFTA+UK
- km_10: 46.4765
  Distance in km, for EDTA, ethylenediaminetetraacetic acid; Barge; EU+EFTA+UK
- kg_km_10: 6.06518e-5; = kg_10*km_10
  Transport amount in km*km, for EDTA, ethylenediaminetetraacetic acid; Barge; EU+EFTA+UK
- kg_11: 1.305e-6
  Mass in kg, for EDTA, ethylenediaminetetraacetic acid; Barge; ROW w/o EU+EFTA
- km_11: 94.9028
  Distance in km, for EDTA, ethylenediaminetetraacetic acid; Barge; ROW w/o EU+EFTA
- kg_km_11: 0.000123848; = kg_11*km_11
  Transport amount in km*km, for EDTA, ethylenediaminetetraacetic acid; Barge; ROW w/o EU+EFTA
- kg_12: 1.305e-6
  Mass in kg, for EDTA, ethylenediaminetetraacetic acid; Articulated lorry transport, Euro 4, Total weight >32 t; EU+EFTA+UK
- km_12: 329.743
  Distance in km, for EDTA, ethylenediaminetetraacetic acid; Articulated lorry transport, Euro 4, Total weight >32 t; EU+EFTA+UK
- kg_km_12: 0.000430315; = kg_12*km_12
  Transport amount in km*km, for EDTA, ethylenediaminetetraacetic acid; Articulated lorry transport, Euro 4, Total weight >32 t; EU+EFTA+UK
- kg_13: 1.305e-6
  Mass in kg, for EDTA, ethylenediaminetetraacetic acid; Articulated lorry transport, Total weight >32 t, mix Euro 0-5; ROW w/o EU+EFTA
- km_13: 870.257
  Distance in km, for EDTA, ethylenediaminetetraacetic acid; Articulated lorry transport, Total weight >32 t, mix Euro 0-5; ROW w/o EU+EFTA
- kg_km_13: 0.00113568; = kg_13*km_13
  Transport amount in km*km, for EDTA, ethylenediaminetetraacetic acid; Articulated lorry transport, Total weight >32 t, mix Euro 0-5; ROW w/o EU+EFTA
- kg_14: 1.49568e-6
  Mass in kg, for lubricating oil // lubricants at refinery // eu+efta+uk; Articulated lorry transport, Euro 4, Total weight >32 t; EU+EFTA+UK
- km_14: 1002.89
  Distance in km, for lubricating oil // lubricants at refinery // eu+efta+uk; Articulated lorry transport, Euro 4, Total weight >32 t; EU+EFTA+UK
- kg_km_14: 0.0015; = kg_14*km_14
  Transport amount in km*km, for lubricating oil // lubricants at refinery // eu+efta+uk; Articulated lorry transport, Euro 4, Total weight >32 t; EU+EFTA+UK
- kg_15: 2.73125e-7
  Mass in kg, for lubricating oil // lubricants at refinery // rsa; Articulated lorry transport, Euro 4, Total weight >32 t; EU+EFTA+UK
- km_15: 1000
  Distance in km, for lubricating oil // lubricants at refinery // rsa; Articulated lorry transport, Euro 4, Total weight >32 t; EU+EFTA+UK
- kg_km_15: 0.000273125; = kg_15*km_15
  Transport amount in km*km, for lubricating oil // lubricants at refinery // rsa; Articulated lorry transport, Euro 4, Total weight >32 t; EU+EFTA+UK
- kg_16: 1.12051e-7
  Mass in kg, for lubricating oil // lubricants at refinery // raf; Articulated lorry transport, Euro 4, Total weight >32 t; EU+EFTA+UK
- km_16: 1000
  Distance in km, for lubricating oil // lubricants at refinery // raf; Articulated lorry transport, Euro 4, Total weight >32 t; EU+EFTA+UK
- kg_km_16: 0.000112051; = kg_16*km_16
  Transport amount in km*km, for lubricating oil // lubricants at refinery // raf; Articulated lorry transport, Euro 4, Total weight >32 t; EU+EFTA+UK
- kg_17: 2.93634e-6
  Mass in kg, for lubricating oil // lubricants at refinery // ras w/o cn; Articulated lorry transport, Euro 4, Total weight >32 t; EU+EFTA+UK
- km_17: 1000
  Distance in km, for lubricating oil // lubricants at refinery // ras w/o cn; Articulated lorry transport, Euro 4, Total weight >32 t; EU+EFTA+UK
- kg_km_17: 0.00293634; = kg_17*km_17
  Transport amount in km*km, for lubricating oil // lubricants at refinery // ras w/o cn; Articulated lorry transport, Euro 4, Total weight >32 t; EU+EFTA+UK
- kg_18: 5e-5
  Mass in kg, for soda ash // soda ash production // glo; Articulated lorry transport, Euro 4, Total weight >32 t; EU+EFTA+UK
- km_18: 0.01366
  Distance in km, for soda ash // soda ash production // glo; Articulated lorry transport, Euro 4, Total weight >32 t; EU+EFTA+UK
- kg_km_18: 6.83e-7; = kg_18*km_18
  Transport amount in km*km, for soda ash // soda ash production // glo; Articulated lorry transport, Euro 4, Total weight >32 t; EU+EFTA+UK
- kg_19: 2.42811e-6
  Mass in kg, for lubricating oil // lubricants at refinery // ru; Articulated lorry transport, Euro 4, Total weight >32 t; EU+EFTA+UK
- km_19: 1000
  Distance in km, for lubricating oil // lubricants at refinery // ru; Articulated lorry transport, Euro 4, Total weight >32 t; EU+EFTA+UK
- kg_km_19: 0.00242811; = kg_19*km_19
  Transport amount in km*km, for lubricating oil // lubricants at refinery // ru; Articulated lorry transport, Euro 4, Total weight >32 t; EU+EFTA+UK
- kg_20: 2.29205e-6
  Mass in kg, for lubricating oil // lubricants at refinery // rna; Articulated lorry transport, Euro 4, Total weight >32 t; EU+EFTA+UK
- km_20: 1000
  Distance in km, for lubricating oil // lubricants at refinery // rna; Articulated lorry transport, Euro 4, Total weight >32 t; EU+EFTA+UK
- kg_km_20: 0.00229205; = kg_20*km_20
  Transport amount in km*km, for lubricating oil // lubricants at refinery // rna; Articulated lorry transport, Euro 4, Total weight >32 t; EU+EFTA+UK
- kg_21: 4.66213e-7
  Mass in kg, for lubricating oil // lubricants at refinery // cn; Articulated lorry transport, Euro 4, Total weight >32 t; EU+EFTA+UK
- km_21: 1000
  Distance in km, for lubricating oil // lubricants at refinery // cn; Articulated lorry transport, Euro 4, Total weight >32 t; EU+EFTA+UK
- kg_km_21: 0.000466213; = kg_21*km_21
  Transport amount in km*km, for lubricating oil // lubricants at refinery // cn; Articulated lorry transport, Euro 4, Total weight >32 t; EU+EFTA+UK
- kg_22: 8e-5
  Mass in kg, for ethylene glycol // ethylene glycol production // eu+efta+uk; Articulated lorry transport, Euro 4, Total weight >32 t; EU+EFTA+UK
- km_22: 1e6
  Distance in km, for ethylene glycol // ethylene glycol production // eu+efta+uk; Articulated lorry transport, Euro 4, Total weight >32 t; EU+EFTA+UK
- kg_km_22: 80; = kg_22*km_22
  Transport amount in km*km, for ethylene glycol // ethylene glycol production // eu+efta+uk; Articulated lorry transport, Euro 4, Total weight >32 t; EU+EFTA+UK
- kg_23: 7.5e-6
  Mass in kg, for sodium tripolyphosphate // sodium tripolyphosphate production // eu+efta+uk; Articulated lorry transport, Euro 4, Total weight >32 t; EU+EFTA+UK
- km_23: 1e6
  Distance in km, for sodium tripolyphosphate // sodium tripolyphosphate production // eu+efta+uk; Articulated lorry transport, Euro 4, Total weight >32 t; EU+EFTA+UK
- kg_km_23: 7.5; = kg_23*km_23
  Transport amount in km*km, for sodium tripolyphosphate // sodium tripolyphosphate production // eu+efta+uk; Articulated lorry transport, Euro 4, Total weight >32 t; EU+EFTA+UK
- kg_24: 2.73125e-7
  Mass in kg, for lubricating oil // lubricants at refinery // rsa; Transoceanic ship, containers; GLO
- km_24: 18000
  Distance in km, for lubricating oil // lubricants at refinery // rsa; Transoceanic ship, containers; GLO
- kg_km_24: 0.00491625; = kg_24*km_24
  Transport amount in km*km, for lubricating oil // lubricants at refinery // rsa; Transoceanic ship, containers; GLO
- kg_25: 1.12051e-7
  Mass in kg, for lubricating oil // lubricants at refinery // raf; Transoceanic ship, containers; GLO
- km_25: 18000
  Distance in km, for lubricating oil // lubricants at refinery // raf; Transoceanic ship, containers; GLO
- kg_km_25: 0.00201692; = kg_25*km_25
  Transport amount in km*km, for lubricating oil // lubricants at refinery // raf; Transoceanic ship, containers; GLO
- kg_26: 1.49568e-6
  Mass in kg, for lubricating oil // lubricants at refinery // eu+efta+uk; Transoceanic ship, containers; GLO
- km_26: 17985.1
  Distance in km, for lubricating oil // lubricants at refinery // eu+efta+uk; Transoceanic ship, containers; GLO
- kg_km_26: 0.0269; = kg_26*km_26
  Transport amount in km*km, for lubricating oil // lubricants at refinery // eu+efta+uk; Transoceanic ship, containers; GLO
- kg_27: 5e-5
  Mass in kg, for soda ash // soda ash production // glo; Transoceanic ship, containers; GLO
- km_27: 0.246
  Distance in km, for soda ash // soda ash production // glo; Transoceanic ship, containers; GLO
- kg_km_27: 1.23e-5; = kg_27*km_27
  Transport amount in km*km, for soda ash // soda ash production // glo; Transoceanic ship, containers; GLO
- kg_28: 2.93634e-6
  Mass in kg, for lubricating oil // lubricants at refinery // ras w/o cn; Transoceanic ship, containers; GLO
- km_28: 18000
  Distance in km, for lubricating oil // lubricants at refinery // ras w/o cn; Transoceanic ship, containers; GLO
- kg_km_28: 0.0528542; = kg_28*km_28
  Transport amount in km*km, for lubricating oil // lubricants at refinery // ras w/o cn; Transoceanic ship, containers; GLO
- kg_29: 2.42811e-6
  Mass in kg, for lubricating oil // lubricants at refinery // ru; Transoceanic ship, containers; GLO
- km_29: 18000
  Distance in km, for lubricating oil // lubricants at refinery // ru; Transoceanic ship, containers; GLO
- kg_km_29: 0.043706; = kg_29*km_29
  Transport amount in km*km, for lubricating oil // lubricants at refinery // ru; Transoceanic ship, containers; GLO
- kg_30: 2.29205e-6
  Mass in kg, for lubricating oil // lubricants at refinery // rna; Transoceanic ship, containers; GLO
- km_30: 18000
  Distance in km, for lubricating oil // lubricants at refinery // rna; Transoceanic ship, containers; GLO
- kg_km_30: 0.0412569; = kg_30*km_30
  Transport amount in km*km, for lubricating oil // lubricants at refinery // rna; Transoceanic ship, containers; GLO
- kg_31: 4.66213e-7
  Mass in kg, for lubricating oil // lubricants at refinery // cn; Transoceanic ship, containers; GLO
- km_31: 18000
  Distance in km, for lubricating oil // lubricants at refinery // cn; Transoceanic ship, containers; GLO
- kg_km_31: 0.00839183; = kg_31*km_31
  Transport amount in km*km, for lubricating oil // lubricants at refinery // cn; Transoceanic ship, containers; GLO
- kg_32: 8e-5
  Mass in kg, for ethylene glycol // ethylene glycol production // eu+efta+uk; Transoceanic ship, containers; GLO
- km_32: 1.8e7
  Distance in km, for ethylene glycol // ethylene glycol production // eu+efta+uk; Transoceanic ship, containers; GLO
- kg_km_32: 1440; = kg_32*km_32
  Transport amount in km*km, for ethylene glycol // ethylene glycol production // eu+efta+uk; Transoceanic ship, containers; GLO
- kg_33: 7.5e-6
  Mass in kg, for sodium tripolyphosphate // sodium tripolyphosphate production // eu+efta+uk; Transoceanic ship, containers; GLO
- km_33: 1.8e7
  Distance in km, for sodium tripolyphosphate // sodium tripolyphosphate production // eu+efta+uk; Transoceanic ship, containers; GLO
- kg_km_33: 135; = kg_33*km_33
  Transport amount in km*km, for sodium tripolyphosphate // sodium tripolyphosphate production // eu+efta+uk; Transoceanic ship, containers; GLO

## Reference product
- desizing, synthetic fibers // desizing, synthetic fibers // glo: 1

## Inputs
- Transport of DTPA, diethylenetriaminepentaacetic acid by Freight train, diesel traction - EU+EFTA+UK: 0.00176932; = kg_km_0
- Transport of DTPA, diethylenetriaminepentaacetic acid by Freight train, electricity traction - EU+EFTA+UK: 0.000534301; = kg_km_1
- Transport of DTPA, diethylenetriaminepentaacetic acid by Freight train, average - EU+EFTA+UK: 1.4633e-5; = kg_km_2
- Transport of DTPA, diethylenetriaminepentaacetic acid by Articulated lorry transport, Total weight >32 t, mix Euro 0-5 - ROW w/o EU+EFTA: 0.001566; = kg_km_3
- Transport of DTPA, diethylenetriaminepentaacetic acid by Transoceanic ship, containers - GLO: 0.0044925; = kg_km_4
- Transport of DTPA, diethylenetriaminepentaacetic acid by Barge - ROW w/o EU+EFTA: 0.0001845; = kg_km_5
- Transport of EDTA, ethylenediaminetetraacetic acid by Transoceanic ship, containers - GLO: 0.0044925; = kg_km_6
- Transport of EDTA, ethylenediaminetetraacetic acid by Freight train, diesel traction - EU+EFTA+UK: 0.00171954; = kg_km_7
- Transport of EDTA, ethylenediaminetetraacetic acid by Freight train, electricity traction - EU+EFTA+UK: 0.000584916; = kg_km_8
- Transport of EDTA, ethylenediaminetetraacetic acid by Freight train, average - EU+EFTA+UK: 1.37955e-5; = kg_km_9
- Transport of EDTA, ethylenediaminetetraacetic acid by Barge - EU+EFTA+UK: 6.06518e-5; = kg_km_10
- Transport of EDTA, ethylenediaminetetraacetic acid by Barge - ROW w/o EU+EFTA: 0.000123848; = kg_km_11
- Transport of EDTA, ethylenediaminetetraacetic acid by Articulated lorry transport, Euro 4, Total weight >32 t - EU+EFTA+UK: 0.000430315; = kg_km_12
- Transport of EDTA, ethylenediaminetetraacetic acid by Articulated lorry transport, Total weight >32 t, mix Euro 0-5 - ROW w/o EU+EFTA: 0.00113568; = kg_km_13
- Electricity from Electricity grid mix 1kV-60kV - AU: 0.0012
- Electricity from Electricity grid mix 1kV-60kV - EU+EFTA+UK: 0.0176
- Electricity from Electricity grid mix 1kV-60kV - NZ: 0.0002
- Electricity from Electricity grid mix 1kV-60kV - RAF: 0.0038
- Electricity from Electricity grid mix 1kV-60kV - RNA: 0.0258
- Electricity from Electricity grid mix 1kV-60kV - RSA: 0.0087
- Electricity from Electricity grid mix 1kV-60kV - RU: 0.0052
- Transport of lubricating oil // lubricants at refinery // eu+efta+uk by Articulated lorry transport, Euro 4, Total weight >32 t - EU+EFTA+UK: 0.0015; = kg_km_14
- Transport of lubricating oil // lubricants at refinery // rsa by Articulated lorry transport, Euro 4, Total weight >32 t - EU+EFTA+UK: 0.000273125; = kg_km_15
- Transport of lubricating oil // lubricants at refinery // raf by Articulated lorry transport, Euro 4, Total weight >32 t - EU+EFTA+UK: 0.000112051; = kg_km_16
- Transport of lubricating oil // lubricants at refinery // ras w/o cn by Articulated lorry transport, Euro 4, Total weight >32 t - EU+EFTA+UK: 0.00293634; = kg_km_17
- Transport of soda ash // soda ash production // glo by Articulated lorry transport, Euro 4, Total weight >32 t - EU+EFTA+UK: 6.83e-7; = kg_km_18
- Transport of lubricating oil // lubricants at refinery // ru by Articulated lorry transport, Euro 4, Total weight >32 t - EU+EFTA+UK: 0.00242811; = kg_km_19
- Transport of lubricating oil // lubricants at refinery // rna by Articulated lorry transport, Euro 4, Total weight >32 t - EU+EFTA+UK: 0.00229205; = kg_km_20
- Transport of lubricating oil // lubricants at refinery // cn by Articulated lorry transport, Euro 4, Total weight >32 t - EU+EFTA+UK: 0.000466213; = kg_km_21
- Transport of ethylene glycol // ethylene glycol production // eu+efta+uk by Articulated lorry transport, Euro 4, Total weight >32 t - EU+EFTA+UK: 80; = kg_km_22
- Transport of sodium tripolyphosphate // sodium tripolyphosphate production // eu+efta+uk by Articulated lorry transport, Euro 4, Total weight >32 t - EU+EFTA+UK: 7.5; = kg_km_23
- Transport of lubricating oil // lubricants at refinery // rsa by Transoceanic ship, containers - GLO: 0.00491625; = kg_km_24
- Transport of lubricating oil // lubricants at refinery // raf by Transoceanic ship, containers - GLO: 0.00201692; = kg_km_25
- Transport of lubricating oil // lubricants at refinery // eu+efta+uk by Transoceanic ship, containers - GLO: 0.0269; = kg_km_26
- Transport of soda ash // soda ash production // glo by Transoceanic ship, containers - GLO: 1.23e-5; = kg_km_27
- Transport of lubricating oil // lubricants at refinery // ras w/o cn by Transoceanic ship, containers - GLO: 0.0528542; = kg_km_28
- Transport of lubricating oil // lubricants at refinery // ru by Transoceanic ship, containers - GLO: 0.043706; = kg_km_29
- Transport of lubricating oil // lubricants at refinery // rna by Transoceanic ship, containers - GLO: 0.0412569; = kg_km_30
- Transport of lubricating oil // lubricants at refinery // cn by Transoceanic ship, containers - GLO: 0.00839183; = kg_km_31
- Transport of ethylene glycol // ethylene glycol production // eu+efta+uk by Transoceanic ship, containers - GLO: 1440; = kg_km_32
- Transport of sodium tripolyphosphate // sodium tripolyphosphate production // eu+efta+uk by Transoceanic ship, containers - GLO: 135; = kg_km_33
- Electricity from Electricity grid mix 1kV-60kV - CN: 0.0264359
- Electricity from Electricity grid mix 1kV-60kV - RAS w/o CN: 0.0289641
- desizing, synthetic fibers // desizing, synthetic fibers // glo, blackbox: 1
- desizing, synthetic fibers // desizing, synthetic fibers // glo, elementary: 1

## Impact indicators
- Eutrophication marine: 0.000290294
- Ecotoxicity, freshwater: 1.52527
- Land use: -0.64686
- Water use: 0.444994
- Resource use, minerals and metals: 6.45229e-8
- Resource use, fossils: 0.830483
- Climate change: 0.0874842
- Ozone depletion: 2.92795e-10
- Human toxicity, cancer: 1.36424e-10
- Human toxicity, non-cancer: 2.26343e-9
- EF-particulate Matter: 1.46149e-8
- Ionising radiation, human health: 0.00256969
- Photochemical ozone formation - human health: 0.000546904
- Acidification: 0.000771545
- Eutrophication, terrestrial: 0.00189824
- Eutrophication, freshwater: 2.44705e-5

## Deviations from the LCI method principle
The background data uses:
- the \xe2\x80\x9cRecycled content cut-off\xe2\x80\x9d approach to allocate end-of-life by-products and secondary materials. This allocation is explained in the description of the recycled content system model (http://www.ecoinvent.org/database/system-models-in-ecoinvent-3/cut-off-system-model/allocation-cut-off-by-classification.html).
OR
- EF compliant data

## Deviations from the LCI method approaches
Background data:
- the \xe2\x80\x9cRecycled content cut-off\xe2\x80\x9d approach to allocate end-of-life by-products and secondary materials. This allocation is explained in the description of the recycled content system model (http://www.ecoinvent.org/database/system-models-in-ecoinvent-3/cut-off-system-model/allocation-cut-off-by-classification.html). The ecoinvent database mostly relies on “Allocation – market values” apart for few exceptions particularly in the energy sector. ecoinvent energy data is replaced with EF3.0 core data as per the EF guidelines version 2.0.
OR
- EF compliant data

## Modelling constants
All modelling constants follow the requirements listed in the Tender Specifications 070201/2020/SER/ENV.B1. Completeness: There are no intentional cut-offs in the inventory no matter how small their contribution to all the EF impact categories is. Eventual cut-offs are in compliance with the Guide for EF compliant data sets (JRC 2020), i.e. only if below the 3% cut-off rule. Water use: water use is modelled at country level using separate flows for water withdrawal, water release and water evaporation. Handling multi-functional processes: the following PEF multi- functionality decision hierarchy is applied for resolving all multi- functionality problems: (1) subdivision or system expansion; (2) allocation based on a relevant underlying physical relationship (substitution may apply here); (3) allocation based on some other relationship. Direct land use change: GHG emissions from direct LUC allocated to good/service for 20 years after the LUC occurs, with IPCC default values. Carbon storage and delayed emissions: credits associated with temporary (carbon) storage or delayed emissions up to 300 years are not be considered. Emissions off-setting: are not included. Capital goods (including infrastructures) and their End of life: they are included. System boundaries: system boundaries include all processes linked to the product supply chain (e.g. maintenance). Time period: emissions and removals are modelled as if released or removed at the beginning of the assessment method. Fossil and biogenic carbon emissions and removals: removals and emissions are modelled as follows: All GHG emissions from fossil fuels (including peat and limestone) are modelled consistently with the most updated ILCD list of elementary flows. The non-fossil (biogenic) carbon flows are modelled consistently with the most updated ILCD list of elementary flows.

## Cut-off and completeness
There are no intentional cut-offs in the inventory no matter how small their contribution to all the EF impact categories is. Eventual cut-offs are in compliance with the Guide for EF compliant data sets (JRC 2020), i.e. only if below the 3% cut-off rule. The dataset dry mass and water balance has been checked to ensure the inventory is complete. Capital goods (e.g. infrastructure) and their end-of-life are included.

## Data selection and combination
These datasets include, in both their foreground and background data, links to EF3.0 compliant data.
The relevant background data on energy, transport, and End of Life are from the LCDN data node (http://lcdn.thinkstep.com/Node/).
All other background data in the supply of this product for which no EF3.0 process was available are from ecoinvent v3.7 database (www.ecoinvent.org) or other data sources.

## Data treatment and extrapolations
Several data sources have been used to model the inventory.

## Review details
Internal reviews have been asked to review the plausibility of the unit process, LCIA scores, and DQRs. Internal reviewers have also been asked to review the data for EF compliancy. The consortium is therefore responsible for aspects such as compliancy with the ILCD format, including validation in Look@LCI, and nomenclature.
Internal reviwers have been asked to judge based on the process name, that the unit process models in a complete and representative way the process in the requested location. The review encompassed the plausability of:
- exchanges with nature (elementary flows) as well as exchanges such as product and waste flows.
- meta information (general comment, technology comment, system boundaries, allocation, cut-off rules, etc.). Reviewers were asked to judge if the provided information is enough to understand the content of the process.
- LCIA scores
- DQRs including precision, technology, time and geography. As well as the overall DQR.
External reviewers have been asked to provide their expertise in the field of interest. External reviewers have been asked to review the unit process, including eventual methodological choices, the LCIA scores (provided with contribution scores as well), and DQRs. External reviewers have been provided all the information in a tool developed by the consortium for the purpose of this project.
External reviewers have been asked to judge based on the process name, that the unit process models in a complete and representative way the process in the requested location. The review encompassed:
- Plausability and completeness of exchanges with nature (elementary flows) as well as exchanges such as product and waste flows.
- Review of meta information (general comment, technology comment, system boundaries, allocation, cut-off rules, etc.). Reviewers were asked to judge if the provided information is enough to understand the content of the process.
- Review of properties (biogenic carbon and water content).
- Review of allocation keys.
- Plausability of LCIA scores calculated by the consortium.
- Plausability of DQRs including precision, technology, time and geography. As well as the overall DQR.

## Data sources
- Background Data for Representative products and organisations. EF 3.0 compliant (data stock)
- Mathews Kolanjikombil, (2019). Handbook of Textile Processors Series Pretreatment of Textile Substrates. WOODHEAD PUBLISHING INDIA PVT LTD, New Delhi, India
- Lebon (2021) Nonwoven Oven Machine, Catalog and Company Messages, Qingdao Lebon Industry Co., Ltd., China
- UN Data (2018) Statistics Data for Lubricants Productions, http://data.un.org/Data.aspx?q=Lubricants&d=EDATA&f=cmID%3aLU, United Nations Statistics Division, Global.
- Buentex (2021) Jet Dyeing Machine, https://buentex.com/en/product/high-temperature-jet-dyeing-machine.html, Buentex Machinery Trading Co.,Ltd, China
- Buentex (2021) Low Liquor Ratio Dyeing Machine, https://buentex.com/en/product/low-liquor-ratio-dyeing-machine.html, Buetex Machinery Trading Co.,Ltd, China
- Zen (2021) Jigger Machine, https://www.zenindustrialengineers.com/automatic-dyeing-jigger.html, Zen Industrial Engineers, Gujarat, India
- Buentex (2021), Cold Pad Batch Dyeing Machine, https://buentex.com/en/product/Cold-Pad-Batch.html, Buentex Machinery Trading Co.,Ltd, China

## Intended applications
Implementation of regular Product Environmental Footprint (PEF) studies and Organisation Environmental Footprint (OEF) studies exclusively under the specified Product groups and sectors as defined in the Product Environmental Footprint Category Rules (PEFCR) and Organisation Environmental Footprint Sectorial Rules (OEFSR) listed in http://ec.europa.eu/environment/eussd/smgp/PEFCR_OEFSR.htm
