# scouring, cotton; technology mix; production mix, at plant; service (raw materials excluded)

Dataset: ILCD process, Partly terminated system
Geography: GLO
Reference year: 2021
Valid until: 2024
Classification: Systems / Textiles, furnitures and other interiors
LCI method principle: Attributional
LCI method approaches: Allocation - market value
Completeness: All relevant flows quantified
Project: Provision of process-based 3.0 Environmental Footprint-compliant life cycle inventory datasets - Apparel 2 - contract number 070201/2020/840292/SER/ENV.B.1
Generated by: Life Cycle Indonesia
Owner: PRé Sustainability B.V.
Compliance: ILCD Data Network - Entry-level; Suggestions for updating the PEF method 2019; ISO 14040 Environmental Management – Life Cycle Assessment – Principles and Framework, 2006; ISO 14044:2006. Environmental Management – Life Cycle Assessment – Requirements and guidelines.; Environmental Footprint 3.1
Review: Dependent internal review by Avraam Symeonidis, Emilia Moreno Ruiz; Independent review panel by Fábio Valebona
Data quality: Overall quality: Good; Time representativeness: Very good; Geographical representativeness: Fair; Technological representativeness: Very good; Precision: Good; Methodological appropriateness and consistency: Not applicable
Amounts: no units in this file; such an amount is in the reference unit of its flow, which a separate flow dataset defines
copyright: true
licenseType: Free of charge for some user types or use types
accessRestrictions: Free of charge for all final users implementing a regular Product Environmental Footprint (PEF) studies and Organisation Environmental Footprint (OEF) studies exclusively under the specified Product groups and sectors as defined in the Product Environmental Footprint Category Rules (PEFCR) and Organisation Environmental Footprint Sectorial Rules (OEFSR) listed in http://ec.europa.eu/environment/eussd/smgp/PEFCR_OEFSR.htm and in accordance with the terms and conditions of the EULA (available at https://ecoinvent.lca-data.com/) exclusively until 31st December 2024. Any use of this dataset or any derivative data not within the specific context of one of the PEF/OEF projects or after the end of 2024 is not permitted.

## General comment
Notice: this data set supersedes the EF3.0-compliant version (see link under "preceding data set version" below calculated with the EF3.0). The life cycle inventory is not changed from the original EF3.0 data set. The LCIA results are calculated based on the EF3.1 methods which provide updated characterisation factors in the following impact categories: Climate Change, Ecotoxicity freshwater, Photochemical Ozone Formation, Acidification, Human Toxicity non-cancer, and Human Toxicity cancer. The review report and the data quality ratings refer to the original results. The data set has been updated by the European Commission on the basis of the original EF3.0 data set delivered by the data provider.Scouring is one of the textiles pre-treatment processes to prepare the material for dyeing, printing, or finishing. Alkaline scour boiling is a cleaning process for cellulosic fibres using large quantities of caustic soda at high temperature as well as special chemical products to remove the natural impurities in cotton and other cellulosic fibres, free them from troubling substances and make them absorbent. At the same time vegetable contamination swells perfectly and is softened for rapid decolouration during bleaching. Hence, it is also essential to eliminate vegetable residues as well as the proteins and other substances present in the fibre. Impurities to be removed from the fibres by scouring include fats and waxes, pectin and related substances, minerals and heavy metals, amino acids or proteins, lubricating or knitting oils, etc. A scouring recipe should contain chemicals which help in removing each impurities present in the fibre/fabric to be treated. Alkaline scour boiling is an intermediate process after enzymatic desizing and before peroxide bleaching.

Kolanjikombil, Mathews. 2019. Handbook of Textile Processors Series Pretreatment of Textile Substrates. New Delhi: Woodhead Publishing India, pp 123

## Technology and included processes
There are various scouring agents used in processing of fabrics, out of which the alkaline scouring agents are the most widely used worldwide. (Kolanjikombil, 2019)

The scouring process essentially consists of treatment with soap or detergent with or without addition of alkali. Depending on the fibre type, alkali may be weak (e.g. soda ash) or strong (caustic soda). When soap is used, a good supply of soft water is necessary. The metal ion (Fe3+ and Ca2+) present in hard water and pectin of cotton can form insoluble soap. The chelating or sequestering agent, e.g., Ethylenediaminetetraacetic acid (EDTA), Nitrilotriacetic acid (NTA), etc., may be used to prevent scum and film formation. Anionic, non-ionic detergents or their blends, solvent-assisted detergent blends and soaps are mostly used for scouring. For accelerating the scouring process, wetting agents in conjunction with high boiling solvents are sometimes used, but the process may not be eco-friendly. (Clark, 2011)

Builders are added to the kier boiling bath to increase the activity of soap or detergents. These are generally salts such as borates, silicates, phosphates, sodium chloride or sodium sulphate. Sodium metasilicate (Na2SiO3, 5H2O) can additionally act as a detergent and buffer. The function of the buffer is to drive soap from the water phase to the fabric/water interface and consequently increase the concentration of soap on the fabric. During boiling of cotton with caustic soda, entrapped air may cause oxidation of cellulose. This may be prevented by the addition of a mild reducing agent such as sodium bisulphite or even hydrosulphite in the scouring liquor. (Clark, 2011)

The activity starts when the raw materials enter the process. Materials entering the process are included as well as energy uses, water and chemicals. There is no direct emission to soil, but there is direct emission to water from this process such as BOD, COD, TDS. Chemical agents that are used in the process are emitted through the wastewater. Meanwhile some of the water is emitted to air and the rest will become the wastewater. In the model, the 5 different varieties of cotton fabrics are pre-treated by an alkaline scour boiling using the average value of 2 types of machines (kier boiler and jigger). The consumption of lubricating oil using an oven bonding machines as a proxy. The BOD and TDS using the average value of bioscouring and conventional scouring + bleaching as a proxy.

Kolanjikombil, Mathews. 2019. Handbook of Textile Processors Series Pretreatment of Textile Substrates. New Delhi: Woodhead Publishing India, pp 123
Clark, M. 2011. Handbook of Textile and Industrial Dyeing Vol. 1. Cambidge: Woodhead Publishing Limited, pp 86

## Parameters
- kg_0: 0.000375
  Mass in kg, for DTPA, diethylenetriaminepentaacetic acid; Freight train, diesel traction; EU+EFTA+UK
- km_0: 235.909
  Distance in km, for DTPA, diethylenetriaminepentaacetic acid; Freight train, diesel traction; EU+EFTA+UK
- kg_km_0: 0.0884658; = kg_0*km_0
  Transport amount in km*km, for DTPA, diethylenetriaminepentaacetic acid; Freight train, diesel traction; EU+EFTA+UK
- kg_1: 0.000375
  Mass in kg, for DTPA, diethylenetriaminepentaacetic acid; Freight train, electricity traction; EU+EFTA+UK
- km_1: 71.2401
  Distance in km, for DTPA, diethylenetriaminepentaacetic acid; Freight train, electricity traction; EU+EFTA+UK
- kg_km_1: 0.026715; = kg_1*km_1
  Transport amount in km*km, for DTPA, diethylenetriaminepentaacetic acid; Freight train, electricity traction; EU+EFTA+UK
- kg_2: 0.000375
  Mass in kg, for DTPA, diethylenetriaminepentaacetic acid; Freight train, average; EU+EFTA+UK
- km_2: 1.95106
  Distance in km, for DTPA, diethylenetriaminepentaacetic acid; Freight train, average; EU+EFTA+UK
- kg_km_2: 0.000731648; = kg_2*km_2
  Transport amount in km*km, for DTPA, diethylenetriaminepentaacetic acid; Freight train, average; EU+EFTA+UK
- kg_3: 0.000375
  Mass in kg, for DTPA, diethylenetriaminepentaacetic acid; Articulated lorry transport, Total weight >32 t, mix Euro 0-5; ROW w/o EU+EFTA
- km_3: 208.8
  Distance in km, for DTPA, diethylenetriaminepentaacetic acid; Articulated lorry transport, Total weight >32 t, mix Euro 0-5; ROW w/o EU+EFTA
- kg_km_3: 0.0783; = kg_3*km_3
  Transport amount in km*km, for DTPA, diethylenetriaminepentaacetic acid; Articulated lorry transport, Total weight >32 t, mix Euro 0-5; ROW w/o EU+EFTA
- kg_4: 0.000375
  Mass in kg, for DTPA, diethylenetriaminepentaacetic acid; Transoceanic ship, containers; GLO
- km_4: 599
  Distance in km, for DTPA, diethylenetriaminepentaacetic acid; Transoceanic ship, containers; GLO
- kg_km_4: 0.224625; = kg_4*km_4
  Transport amount in km*km, for DTPA, diethylenetriaminepentaacetic acid; Transoceanic ship, containers; GLO
- kg_5: 0.000375
  Mass in kg, for DTPA, diethylenetriaminepentaacetic acid; Barge; ROW w/o EU+EFTA
- km_5: 24.6
  Distance in km, for DTPA, diethylenetriaminepentaacetic acid; Barge; ROW w/o EU+EFTA
- kg_km_5: 0.009225; = kg_5*km_5
  Transport amount in km*km, for DTPA, diethylenetriaminepentaacetic acid; Barge; ROW w/o EU+EFTA
- kg_6: 0.03
  Mass in kg, for sodium hydroxide, without water, in 50% solution state; Transoceanic ship, containers; GLO
- km_6: 599
  Distance in km, for sodium hydroxide, without water, in 50% solution state; Transoceanic ship, containers; GLO
- kg_km_6: 17.97; = kg_6*km_6
  Transport amount in km*km, for sodium hydroxide, without water, in 50% solution state; Transoceanic ship, containers; GLO
- kg_7: 0.03
  Mass in kg, for sodium hydroxide, without water, in 50% solution state; Freight train, diesel traction; EU+EFTA+UK
- km_7: 229.272
  Distance in km, for sodium hydroxide, without water, in 50% solution state; Freight train, diesel traction; EU+EFTA+UK
- kg_km_7: 6.87815; = kg_7*km_7
  Transport amount in km*km, for sodium hydroxide, without water, in 50% solution state; Freight train, diesel traction; EU+EFTA+UK
- kg_8: 0.03
  Mass in kg, for sodium hydroxide, without water, in 50% solution state; Freight train, electricity traction; EU+EFTA+UK
- km_8: 77.9889
  Distance in km, for sodium hydroxide, without water, in 50% solution state; Freight train, electricity traction; EU+EFTA+UK
- kg_km_8: 2.33967; = kg_8*km_8
  Transport amount in km*km, for sodium hydroxide, without water, in 50% solution state; Freight train, electricity traction; EU+EFTA+UK
- kg_9: 0.03
  Mass in kg, for sodium hydroxide, without water, in 50% solution state; Freight train, average; EU+EFTA+UK
- km_9: 1.8394
  Distance in km, for sodium hydroxide, without water, in 50% solution state; Freight train, average; EU+EFTA+UK
- kg_km_9: 0.0551821; = kg_9*km_9
  Transport amount in km*km, for sodium hydroxide, without water, in 50% solution state; Freight train, average; EU+EFTA+UK
- kg_10: 0.03
  Mass in kg, for sodium hydroxide, without water, in 50% solution state; Barge; EU+EFTA+UK
- km_10: 8.08691
  Distance in km, for sodium hydroxide, without water, in 50% solution state; Barge; EU+EFTA+UK
- kg_km_10: 0.242607; = kg_10*km_10
  Transport amount in km*km, for sodium hydroxide, without water, in 50% solution state; Barge; EU+EFTA+UK
- kg_11: 0.03
  Mass in kg, for sodium hydroxide, without water, in 50% solution state; Barge; ROW w/o EU+EFTA
- km_11: 16.5131
  Distance in km, for sodium hydroxide, without water, in 50% solution state; Barge; ROW w/o EU+EFTA
- kg_km_11: 0.495393; = kg_11*km_11
  Transport amount in km*km, for sodium hydroxide, without water, in 50% solution state; Barge; ROW w/o EU+EFTA
- kg_12: 0.03
  Mass in kg, for sodium hydroxide, without water, in 50% solution state; Articulated lorry transport, Euro 4, Total weight >32 t; EU+EFTA+UK
- km_12: 57.3754
  Distance in km, for sodium hydroxide, without water, in 50% solution state; Articulated lorry transport, Euro 4, Total weight >32 t; EU+EFTA+UK
- kg_km_12: 1.72126; = kg_12*km_12
  Transport amount in km*km, for sodium hydroxide, without water, in 50% solution state; Articulated lorry transport, Euro 4, Total weight >32 t; EU+EFTA+UK
- kg_13: 0.03
  Mass in kg, for sodium hydroxide, without water, in 50% solution state; Articulated lorry transport, Total weight >32 t, mix Euro 0-5; ROW w/o EU+EFTA
- km_13: 151.425
  Distance in km, for sodium hydroxide, without water, in 50% solution state; Articulated lorry transport, Total weight >32 t, mix Euro 0-5; ROW w/o EU+EFTA
- kg_km_13: 4.54274; = kg_13*km_13
  Transport amount in km*km, for sodium hydroxide, without water, in 50% solution state; Articulated lorry transport, Total weight >32 t, mix Euro 0-5; ROW w/o EU+EFTA
- kg_14: 0.005
  Mass in kg, for sodium silicate, solid; Freight train, diesel traction; EU+EFTA+UK
- km_14: 235.909
  Distance in km, for sodium silicate, solid; Freight train, diesel traction; EU+EFTA+UK
- kg_km_14: 1.17954; = kg_14*km_14
  Transport amount in km*km, for sodium silicate, solid; Freight train, diesel traction; EU+EFTA+UK
- kg_15: 0.005
  Mass in kg, for sodium silicate, solid; Freight train, electricity traction; EU+EFTA+UK
- km_15: 71.2401
  Distance in km, for sodium silicate, solid; Freight train, electricity traction; EU+EFTA+UK
- kg_km_15: 0.356201; = kg_15*km_15
  Transport amount in km*km, for sodium silicate, solid; Freight train, electricity traction; EU+EFTA+UK
- kg_16: 0.005
  Mass in kg, for sodium silicate, solid; Freight train, average; EU+EFTA+UK
- km_16: 1.95106
  Distance in km, for sodium silicate, solid; Freight train, average; EU+EFTA+UK
- kg_km_16: 0.0097553; = kg_16*km_16
  Transport amount in km*km, for sodium silicate, solid; Freight train, average; EU+EFTA+UK
- kg_17: 0.005
  Mass in kg, for sodium silicate, solid; Articulated lorry transport, Total weight >32 t, mix Euro 0-5; ROW w/o EU+EFTA
- km_17: 208.8
  Distance in km, for sodium silicate, solid; Articulated lorry transport, Total weight >32 t, mix Euro 0-5; ROW w/o EU+EFTA
- kg_km_17: 1.044; = kg_17*km_17
  Transport amount in km*km, for sodium silicate, solid; Articulated lorry transport, Total weight >32 t, mix Euro 0-5; ROW w/o EU+EFTA
- kg_18: 0.005
  Mass in kg, for sodium silicate, solid; Transoceanic ship, containers; GLO
- km_18: 599
  Distance in km, for sodium silicate, solid; Transoceanic ship, containers; GLO
- kg_km_18: 2.995; = kg_18*km_18
  Transport amount in km*km, for sodium silicate, solid; Transoceanic ship, containers; GLO
- kg_19: 0.005
  Mass in kg, for sodium silicate, solid; Barge; ROW w/o EU+EFTA
- km_19: 24.6
  Distance in km, for sodium silicate, solid; Barge; ROW w/o EU+EFTA
- kg_km_19: 0.123; = kg_19*km_19
  Transport amount in km*km, for sodium silicate, solid; Barge; ROW w/o EU+EFTA
- kg_20: 0.005
  Mass in kg, for surfactant // surfactant production // glo; Articulated lorry transport, Euro 4, Total weight >32 t; EU+EFTA+UK
- km_20: 1000
  Distance in km, for surfactant // surfactant production // glo; Articulated lorry transport, Euro 4, Total weight >32 t; EU+EFTA+UK
- kg_km_20: 5; = kg_20*km_20
  Transport amount in km*km, for surfactant // surfactant production // glo; Articulated lorry transport, Euro 4, Total weight >32 t; EU+EFTA+UK
- kg_21: 0.000375
  Mass in kg, for edta // edta production // eu+efta+uk; Articulated lorry transport, Euro 4, Total weight >32 t; EU+EFTA+UK
- km_21: 1000
  Distance in km, for edta // edta production // eu+efta+uk; Articulated lorry transport, Euro 4, Total weight >32 t; EU+EFTA+UK
- kg_km_21: 0.375; = kg_21*km_21
  Transport amount in km*km, for edta // edta production // eu+efta+uk; Articulated lorry transport, Euro 4, Total weight >32 t; EU+EFTA+UK
- kg_22: 0.000375
  Mass in kg, for edta // edta production // eu+efta+uk; Transoceanic ship, containers; GLO
- km_22: 18000
  Distance in km, for edta // edta production // eu+efta+uk; Transoceanic ship, containers; GLO
- kg_km_22: 6.75; = kg_22*km_22
  Transport amount in km*km, for edta // edta production // eu+efta+uk; Transoceanic ship, containers; GLO
- kg_23: 0.005
  Mass in kg, for sodium sulphite // sodium sulphite production // eu+efta+uk; Articulated lorry transport, Euro 4, Total weight >32 t; EU+EFTA+UK
- km_23: 1000
  Distance in km, for sodium sulphite // sodium sulphite production // eu+efta+uk; Articulated lorry transport, Euro 4, Total weight >32 t; EU+EFTA+UK
- kg_km_23: 5; = kg_23*km_23
  Transport amount in km*km, for sodium sulphite // sodium sulphite production // eu+efta+uk; Articulated lorry transport, Euro 4, Total weight >32 t; EU+EFTA+UK
- kg_24: 6.20984e-6
  Mass in kg, for lubricating oil // lubricants at refinery // eu+efta+uk; Articulated lorry transport, Euro 4, Total weight >32 t; EU+EFTA+UK
- km_24: 1000.03
  Distance in km, for lubricating oil // lubricants at refinery // eu+efta+uk; Articulated lorry transport, Euro 4, Total weight >32 t; EU+EFTA+UK
- kg_km_24: 0.00621; = kg_24*km_24
  Transport amount in km*km, for lubricating oil // lubricants at refinery // eu+efta+uk; Articulated lorry transport, Euro 4, Total weight >32 t; EU+EFTA+UK
- kg_25: 1.13397e-6
  Mass in kg, for lubricating oil // lubricants at refinery // rsa; Articulated lorry transport, Euro 4, Total weight >32 t; EU+EFTA+UK
- km_25: 1000
  Distance in km, for lubricating oil // lubricants at refinery // rsa; Articulated lorry transport, Euro 4, Total weight >32 t; EU+EFTA+UK
- kg_km_25: 0.00113397; = kg_25*km_25
  Transport amount in km*km, for lubricating oil // lubricants at refinery // rsa; Articulated lorry transport, Euro 4, Total weight >32 t; EU+EFTA+UK
- kg_26: 4.65219e-7
  Mass in kg, for lubricating oil // lubricants at refinery // raf; Articulated lorry transport, Euro 4, Total weight >32 t; EU+EFTA+UK
- km_26: 1000
  Distance in km, for lubricating oil // lubricants at refinery // raf; Articulated lorry transport, Euro 4, Total weight >32 t; EU+EFTA+UK
- kg_km_26: 0.000465219; = kg_26*km_26
  Transport amount in km*km, for lubricating oil // lubricants at refinery // raf; Articulated lorry transport, Euro 4, Total weight >32 t; EU+EFTA+UK
- kg_27: 0.002
  Mass in kg, for ethoxylated alcohol (ae7), petrochemical // ethoxylated alcohol (ae7) production, petrochemical // eu+efta+uk; Articulated lorry transport, Euro 4, Total weight >32 t; EU+EFTA+UK
- km_27: 1000
  Distance in km, for ethoxylated alcohol (ae7), petrochemical // ethoxylated alcohol (ae7) production, petrochemical // eu+efta+uk; Articulated lorry transport, Euro 4, Total weight >32 t; EU+EFTA+UK
- kg_km_27: 2; = kg_27*km_27
  Transport amount in km*km, for ethoxylated alcohol (ae7), petrochemical // ethoxylated alcohol (ae7) production, petrochemical // eu+efta+uk; Articulated lorry transport, Euro 4, Total weight >32 t; EU+EFTA+UK
- kg_28: 0.02
  Mass in kg, for soda ash // soda ash production // glo; Articulated lorry transport, Euro 4, Total weight >32 t; EU+EFTA+UK
- km_28: 1000
  Distance in km, for soda ash // soda ash production // glo; Articulated lorry transport, Euro 4, Total weight >32 t; EU+EFTA+UK
- kg_km_28: 20; = kg_28*km_28
  Transport amount in km*km, for soda ash // soda ash production // glo; Articulated lorry transport, Euro 4, Total weight >32 t; EU+EFTA+UK
- kg_29: 1.21912e-5
  Mass in kg, for lubricating oil // lubricants at refinery // ras w/o cn; Articulated lorry transport, Euro 4, Total weight >32 t; EU+EFTA+UK
- km_29: 1000
  Distance in km, for lubricating oil // lubricants at refinery // ras w/o cn; Articulated lorry transport, Euro 4, Total weight >32 t; EU+EFTA+UK
- kg_km_29: 0.0121912; = kg_29*km_29
  Transport amount in km*km, for lubricating oil // lubricants at refinery // ras w/o cn; Articulated lorry transport, Euro 4, Total weight >32 t; EU+EFTA+UK
- kg_30: 1.00811e-5
  Mass in kg, for lubricating oil // lubricants at refinery // ru; Articulated lorry transport, Euro 4, Total weight >32 t; EU+EFTA+UK
- km_30: 1000
  Distance in km, for lubricating oil // lubricants at refinery // ru; Articulated lorry transport, Euro 4, Total weight >32 t; EU+EFTA+UK
- kg_km_30: 0.0100811; = kg_30*km_30
  Transport amount in km*km, for lubricating oil // lubricants at refinery // ru; Articulated lorry transport, Euro 4, Total weight >32 t; EU+EFTA+UK
- kg_31: 9.51621e-6
  Mass in kg, for lubricating oil // lubricants at refinery // rna; Articulated lorry transport, Euro 4, Total weight >32 t; EU+EFTA+UK
- km_31: 1000
  Distance in km, for lubricating oil // lubricants at refinery // rna; Articulated lorry transport, Euro 4, Total weight >32 t; EU+EFTA+UK
- kg_km_31: 0.00951621; = kg_31*km_31
  Transport amount in km*km, for lubricating oil // lubricants at refinery // rna; Articulated lorry transport, Euro 4, Total weight >32 t; EU+EFTA+UK
- kg_32: 1.93564e-6
  Mass in kg, for lubricating oil // lubricants at refinery // cn; Articulated lorry transport, Euro 4, Total weight >32 t; EU+EFTA+UK
- km_32: 1000
  Distance in km, for lubricating oil // lubricants at refinery // cn; Articulated lorry transport, Euro 4, Total weight >32 t; EU+EFTA+UK
- kg_km_32: 0.00193564; = kg_32*km_32
  Transport amount in km*km, for lubricating oil // lubricants at refinery // cn; Articulated lorry transport, Euro 4, Total weight >32 t; EU+EFTA+UK
- kg_33: 0.005
  Mass in kg, for surfactant // surfactant production // glo; Transoceanic ship, containers; GLO
- km_33: 18000
  Distance in km, for surfactant // surfactant production // glo; Transoceanic ship, containers; GLO
- kg_km_33: 90; = kg_33*km_33
  Transport amount in km*km, for surfactant // surfactant production // glo; Transoceanic ship, containers; GLO
- kg_34: 0.002
  Mass in kg, for ethoxylated alcohol (ae7), petrochemical // ethoxylated alcohol (ae7) production, petrochemical // eu+efta+uk; Transoceanic ship, containers; GLO
- km_34: 18000
  Distance in km, for ethoxylated alcohol (ae7), petrochemical // ethoxylated alcohol (ae7) production, petrochemical // eu+efta+uk; Transoceanic ship, containers; GLO
- kg_km_34: 36; = kg_34*km_34
  Transport amount in km*km, for ethoxylated alcohol (ae7), petrochemical // ethoxylated alcohol (ae7) production, petrochemical // eu+efta+uk; Transoceanic ship, containers; GLO
- kg_35: 6.20984e-6
  Mass in kg, for lubricating oil // lubricants at refinery // eu+efta+uk; Transoceanic ship, containers; GLO
- km_35: 18035.9
  Distance in km, for lubricating oil // lubricants at refinery // eu+efta+uk; Transoceanic ship, containers; GLO
- kg_km_35: 0.112; = kg_35*km_35
  Transport amount in km*km, for lubricating oil // lubricants at refinery // eu+efta+uk; Transoceanic ship, containers; GLO
- kg_36: 0.02
  Mass in kg, for soda ash // soda ash production // glo; Transoceanic ship, containers; GLO
- km_36: 18000
  Distance in km, for soda ash // soda ash production // glo; Transoceanic ship, containers; GLO
- kg_km_36: 360; = kg_36*km_36
  Transport amount in km*km, for soda ash // soda ash production // glo; Transoceanic ship, containers; GLO
- kg_37: 0.005
  Mass in kg, for sodium sulphite // sodium sulphite production // eu+efta+uk; Transoceanic ship, containers; GLO
- km_37: 18000
  Distance in km, for sodium sulphite // sodium sulphite production // eu+efta+uk; Transoceanic ship, containers; GLO
- kg_km_37: 90; = kg_37*km_37
  Transport amount in km*km, for sodium sulphite // sodium sulphite production // eu+efta+uk; Transoceanic ship, containers; GLO
- kg_38: 1.13397e-6
  Mass in kg, for lubricating oil // lubricants at refinery // rsa; Transoceanic ship, containers; GLO
- km_38: 18000
  Distance in km, for lubricating oil // lubricants at refinery // rsa; Transoceanic ship, containers; GLO
- kg_km_38: 0.0204115; = kg_38*km_38
  Transport amount in km*km, for lubricating oil // lubricants at refinery // rsa; Transoceanic ship, containers; GLO
- kg_39: 4.65219e-7
  Mass in kg, for lubricating oil // lubricants at refinery // raf; Transoceanic ship, containers; GLO
- km_39: 18000
  Distance in km, for lubricating oil // lubricants at refinery // raf; Transoceanic ship, containers; GLO
- kg_km_39: 0.00837393; = kg_39*km_39
  Transport amount in km*km, for lubricating oil // lubricants at refinery // raf; Transoceanic ship, containers; GLO
- kg_40: 1.21912e-5
  Mass in kg, for lubricating oil // lubricants at refinery // ras w/o cn; Transoceanic ship, containers; GLO
- km_40: 18000
  Distance in km, for lubricating oil // lubricants at refinery // ras w/o cn; Transoceanic ship, containers; GLO
- kg_km_40: 0.219442; = kg_40*km_40
  Transport amount in km*km, for lubricating oil // lubricants at refinery // ras w/o cn; Transoceanic ship, containers; GLO
- kg_41: 1.00811e-5
  Mass in kg, for lubricating oil // lubricants at refinery // ru; Transoceanic ship, containers; GLO
- km_41: 18000
  Distance in km, for lubricating oil // lubricants at refinery // ru; Transoceanic ship, containers; GLO
- kg_km_41: 0.18146; = kg_41*km_41
  Transport amount in km*km, for lubricating oil // lubricants at refinery // ru; Transoceanic ship, containers; GLO
- kg_42: 9.51621e-6
  Mass in kg, for lubricating oil // lubricants at refinery // rna; Transoceanic ship, containers; GLO
- km_42: 18000
  Distance in km, for lubricating oil // lubricants at refinery // rna; Transoceanic ship, containers; GLO
- kg_km_42: 0.171292; = kg_42*km_42
  Transport amount in km*km, for lubricating oil // lubricants at refinery // rna; Transoceanic ship, containers; GLO
- kg_43: 1.93564e-6
  Mass in kg, for lubricating oil // lubricants at refinery // cn; Transoceanic ship, containers; GLO
- km_43: 18000
  Distance in km, for lubricating oil // lubricants at refinery // cn; Transoceanic ship, containers; GLO
- kg_km_43: 0.0348415; = kg_43*km_43
  Transport amount in km*km, for lubricating oil // lubricants at refinery // cn; Transoceanic ship, containers; GLO

## Reference product
- scouring, cotton // scouring, cotton // glo: 1

## Inputs
- Transport of DTPA, diethylenetriaminepentaacetic acid by Freight train, diesel traction - EU+EFTA+UK: 0.0884658; = kg_km_0
- Transport of DTPA, diethylenetriaminepentaacetic acid by Freight train, electricity traction - EU+EFTA+UK: 0.026715; = kg_km_1
- Transport of DTPA, diethylenetriaminepentaacetic acid by Freight train, average - EU+EFTA+UK: 0.000731648; = kg_km_2
- Transport of DTPA, diethylenetriaminepentaacetic acid by Articulated lorry transport, Total weight >32 t, mix Euro 0-5 - ROW w/o EU+EFTA: 0.0783; = kg_km_3
- Transport of DTPA, diethylenetriaminepentaacetic acid by Transoceanic ship, containers - GLO: 0.224625; = kg_km_4
- Transport of DTPA, diethylenetriaminepentaacetic acid by Barge - ROW w/o EU+EFTA: 0.009225; = kg_km_5
- Electricity from Electricity grid mix 1kV-60kV - AU: 0.0157
- Electricity from Electricity grid mix 1kV-60kV - EU+EFTA+UK: 0.2308
- Electricity from Electricity grid mix 1kV-60kV - NZ: 0.003
- Electricity from Electricity grid mix 1kV-60kV - RAF: 0.0504
- Electricity from Electricity grid mix 1kV-60kV - RAS w/o CN: 0.7254
- Electricity from Electricity grid mix 1kV-60kV - RNA: 0.3378
- Electricity from Electricity grid mix 1kV-60kV - RSA: 0.1146
- Electricity from Electricity grid mix 1kV-60kV - RU: 0.0675
- Transport of sodium hydroxide, without water, in 50% solution state by Transoceanic ship, containers - GLO: 17.97; = kg_km_6
- Transport of sodium hydroxide, without water, in 50% solution state by Freight train, diesel traction - EU+EFTA+UK: 6.87815; = kg_km_7
- Transport of sodium hydroxide, without water, in 50% solution state by Freight train, electricity traction - EU+EFTA+UK: 2.33967; = kg_km_8
- Transport of sodium hydroxide, without water, in 50% solution state by Freight train, average - EU+EFTA+UK: 0.0551821; = kg_km_9
- Transport of sodium hydroxide, without water, in 50% solution state by Barge - EU+EFTA+UK: 0.242607; = kg_km_10
- Transport of sodium hydroxide, without water, in 50% solution state by Barge - ROW w/o EU+EFTA: 0.495393; = kg_km_11
- Transport of sodium hydroxide, without water, in 50% solution state by Articulated lorry transport, Euro 4, Total weight >32 t - EU+EFTA+UK: 1.72126; = kg_km_12
- Transport of sodium hydroxide, without water, in 50% solution state by Articulated lorry transport, Total weight >32 t, mix Euro 0-5 - ROW w/o EU+EFTA: 4.54274; = kg_km_13
- Transport of sodium silicate, solid by Freight train, diesel traction - EU+EFTA+UK: 1.17954; = kg_km_14
- Transport of sodium silicate, solid by Freight train, electricity traction - EU+EFTA+UK: 0.356201; = kg_km_15
- Transport of sodium silicate, solid by Freight train, average - EU+EFTA+UK: 0.0097553; = kg_km_16
- Transport of sodium silicate, solid by Articulated lorry transport, Total weight >32 t, mix Euro 0-5 - ROW w/o EU+EFTA: 1.044; = kg_km_17
- Transport of sodium silicate, solid by Transoceanic ship, containers - GLO: 2.995; = kg_km_18
- Transport of sodium silicate, solid by Barge - ROW w/o EU+EFTA: 0.123; = kg_km_19
- Transport of surfactant // surfactant production // glo by Articulated lorry transport, Euro 4, Total weight >32 t - EU+EFTA+UK: 5; = kg_km_20
- Transport of edta // edta production // eu+efta+uk by Articulated lorry transport, Euro 4, Total weight >32 t - EU+EFTA+UK: 0.375; = kg_km_21
- Transport of edta // edta production // eu+efta+uk by Transoceanic ship, containers - GLO: 6.75; = kg_km_22
- Transport of sodium sulphite // sodium sulphite production // eu+efta+uk by Articulated lorry transport, Euro 4, Total weight >32 t - EU+EFTA+UK: 5; = kg_km_23
- Transport of lubricating oil // lubricants at refinery // eu+efta+uk by Articulated lorry transport, Euro 4, Total weight >32 t - EU+EFTA+UK: 0.00621; = kg_km_24
- Transport of lubricating oil // lubricants at refinery // rsa by Articulated lorry transport, Euro 4, Total weight >32 t - EU+EFTA+UK: 0.00113397; = kg_km_25
- Transport of lubricating oil // lubricants at refinery // raf by Articulated lorry transport, Euro 4, Total weight >32 t - EU+EFTA+UK: 0.000465219; = kg_km_26
- Transport of ethoxylated alcohol (ae7), petrochemical // ethoxylated alcohol (ae7) production, petrochemical // eu+efta+uk by Articulated lorry transport, Euro 4, Total weight >32 t - EU+EFTA+UK: 2; = kg_km_27
- Transport of soda ash // soda ash production // glo by Articulated lorry transport, Euro 4, Total weight >32 t - EU+EFTA+UK: 20; = kg_km_28
- Transport of lubricating oil // lubricants at refinery // ras w/o cn by Articulated lorry transport, Euro 4, Total weight >32 t - EU+EFTA+UK: 0.0121912; = kg_km_29
- Transport of lubricating oil // lubricants at refinery // ru by Articulated lorry transport, Euro 4, Total weight >32 t - EU+EFTA+UK: 0.0100811; = kg_km_30
- Transport of lubricating oil // lubricants at refinery // rna by Articulated lorry transport, Euro 4, Total weight >32 t - EU+EFTA+UK: 0.00951621; = kg_km_31
- Transport of lubricating oil // lubricants at refinery // cn by Articulated lorry transport, Euro 4, Total weight >32 t - EU+EFTA+UK: 0.00193564; = kg_km_32
- Transport of surfactant // surfactant production // glo by Transoceanic ship, containers - GLO: 90; = kg_km_33
- Transport of ethoxylated alcohol (ae7), petrochemical // ethoxylated alcohol (ae7) production, petrochemical // eu+efta+uk by Transoceanic ship, containers - GLO: 36; = kg_km_34
- Transport of lubricating oil // lubricants at refinery // eu+efta+uk by Transoceanic ship, containers - GLO: 0.112; = kg_km_35
- Transport of soda ash // soda ash production // glo by Transoceanic ship, containers - GLO: 360; = kg_km_36
- Transport of sodium sulphite // sodium sulphite production // eu+efta+uk by Transoceanic ship, containers - GLO: 90; = kg_km_37
- Transport of lubricating oil // lubricants at refinery // rsa by Transoceanic ship, containers - GLO: 0.0204115; = kg_km_38
- Transport of lubricating oil // lubricants at refinery // raf by Transoceanic ship, containers - GLO: 0.00837393; = kg_km_39
- Transport of lubricating oil // lubricants at refinery // ras w/o cn by Transoceanic ship, containers - GLO: 0.219442; = kg_km_40
- Transport of lubricating oil // lubricants at refinery // ru by Transoceanic ship, containers - GLO: 0.18146; = kg_km_41
- Transport of lubricating oil // lubricants at refinery // rna by Transoceanic ship, containers - GLO: 0.171292; = kg_km_42
- Transport of lubricating oil // lubricants at refinery // cn by Transoceanic ship, containers - GLO: 0.0348415; = kg_km_43
- scouring, cotton // scouring, cotton // glo, blackbox: 1
- scouring, cotton // scouring, cotton // glo, elementary: 1

## Impact indicators
- Eutrophication marine: 0.000612488
- Ecotoxicity, freshwater: 4.64886
- Land use: 0.581581
- Water use: 0.608451
- Resource use, minerals and metals: 1.26368e-6
- Resource use, fossils: 5.49526
- Climate change: 0.408595
- Ozone depletion: 2.51561e-8
- Human toxicity, cancer: 3.44764e-10
- Human toxicity, non-cancer: 4.45437e-9
- EF-particulate Matter: 5.57818e-8
- Ionising radiation, human health: 0.0289407
- Photochemical ozone formation - human health: 0.00136202
- Acidification: 0.00318325
- Eutrophication, terrestrial: 0.00500584
- Eutrophication, freshwater: 3.12655e-5

## Deviations from the LCI method principle
The background data uses:
- the \xe2\x80\x9cRecycled content cut-off\xe2\x80\x9d approach to allocate end-of-life by-products and secondary materials. This allocation is explained in the description of the recycled content system model (http://www.ecoinvent.org/database/system-models-in-ecoinvent-3/cut-off-system-model/allocation-cut-off-by-classification.html).
OR
- EF compliant data

## Deviations from the LCI method approaches
Background data:
- the \xe2\x80\x9cRecycled content cut-off\xe2\x80\x9d approach to allocate end-of-life by-products and secondary materials. This allocation is explained in the description of the recycled content system model (http://www.ecoinvent.org/database/system-models-in-ecoinvent-3/cut-off-system-model/allocation-cut-off-by-classification.html). The ecoinvent database mostly relies on “Allocation – market values” apart for few exceptions particularly in the energy sector. ecoinvent energy data is replaced with EF3.0 core data as per the EF guidelines version 2.0.
OR
- EF compliant data

## Modelling constants
All modelling constants follow the requirements listed in the Tender Specifications 070201/2020/SER/ENV.B1. Completeness: There are no intentional cut-offs in the inventory no matter how small their contribution to all the EF impact categories is. Eventual cut-offs are in compliance with the Guide for EF compliant data sets (JRC 2020), i.e. only if below the 3% cut-off rule. Water use: water use is modelled at country level using separate flows for water withdrawal, water release and water evaporation. Handling multi-functional processes: the following PEF multi- functionality decision hierarchy is applied for resolving all multi- functionality problems: (1) subdivision or system expansion; (2) allocation based on a relevant underlying physical relationship (substitution may apply here); (3) allocation based on some other relationship. Direct land use change: GHG emissions from direct LUC allocated to good/service for 20 years after the LUC occurs, with IPCC default values. Carbon storage and delayed emissions: credits associated with temporary (carbon) storage or delayed emissions up to 300 years are not be considered. Emissions off-setting: are not included. Capital goods (including infrastructures) and their End of life: they are included. System boundaries: system boundaries include all processes linked to the product supply chain (e.g. maintenance). Time period: emissions and removals are modelled as if released or removed at the beginning of the assessment method. Fossil and biogenic carbon emissions and removals: removals and emissions are modelled as follows: All GHG emissions from fossil fuels (including peat and limestone) are modelled consistently with the most updated ILCD list of elementary flows. The non-fossil (biogenic) carbon flows are modelled consistently with the most updated ILCD list of elementary flows.

## Cut-off and completeness
There are no intentional cut-offs in the inventory no matter how small their contribution to all the EF impact categories is. Eventual cut-offs are in compliance with the Guide for EF compliant data sets (JRC 2020), i.e. only if below the 3% cut-off rule. The dataset dry mass and water balance has been checked to ensure the inventory is complete. Capital goods (e.g. infrastructure) and their end-of-life are included.

## Data selection and combination
These datasets include, in both their foreground and background data, links to EF3.0 compliant data.
The relevant background data on energy, transport, and End of Life are from the LCDN data node (http://lcdn.thinkstep.com/Node/).
All other background data in the supply of this product for which no EF3.0 process was available are from ecoinvent v3.7 database (www.ecoinvent.org) or other data sources.

## Data treatment and extrapolations
Several data sources have been used to model the inventory.

## Review details
Internal reviews have been asked to review the plausibility of the unit process, LCIA scores, and DQRs. Internal reviewers have also been asked to review the data for EF compliancy. The consortium is therefore responsible for aspects such as compliancy with the ILCD format, including validation in Look@LCI, and nomenclature.
Internal reviwers have been asked to judge based on the process name, that the unit process models in a complete and representative way the process in the requested location. The review encompassed the plausability of:
- exchanges with nature (elementary flows) as well as exchanges such as product and waste flows.
- meta information (general comment, technology comment, system boundaries, allocation, cut-off rules, etc.). Reviewers were asked to judge if the provided information is enough to understand the content of the process.
- LCIA scores
- DQRs including precision, technology, time and geography. As well as the overall DQR.
External reviewers have been asked to provide their expertise in the field of interest. External reviewers have been asked to review the unit process, including eventual methodological choices, the LCIA scores (provided with contribution scores as well), and DQRs. External reviewers have been provided all the information in a tool developed by the consortium for the purpose of this project.
External reviewers have been asked to judge based on the process name, that the unit process models in a complete and representative way the process in the requested location. The review encompassed:
- Plausability and completeness of exchanges with nature (elementary flows) as well as exchanges such as product and waste flows.
- Review of meta information (general comment, technology comment, system boundaries, allocation, cut-off rules, etc.). Reviewers were asked to judge if the provided information is enough to understand the content of the process.
- Review of properties (biogenic carbon and water content).
- Review of allocation keys.
- Plausability of LCIA scores calculated by the consortium.
- Plausability of DQRs including precision, technology, time and geography. As well as the overall DQR.

## Data sources
- Background Data for Representative products and organisations. EF 3.0 compliant (data stock)
- Mathews Kolanjikombil, (2019). Handbook of Textile Processors Series Pretreatment of Textile Substrates. WOODHEAD PUBLISHING INDIA PVT LTD, New Delhi, India
- M. Clark (2011). Handbook of textile and industrial dyeing Volume 1: Principles, processes and types of dyes. Woodhead Publishing Limited, Cambridge, UK
- Lebon (2021) Nonwoven Oven Machine, Catalog and Company Messages, Qingdao Lebon Industry Co., Ltd., China
- UN Data (2018) Statistics Data for Lubricants Productions, http://data.un.org/Data.aspx?q=Lubricants&d=EDATA&f=cmID%3aLU, United Nations Statistics Division, Global.
- Heshan (2021) High Temperature High Pressure Dyeing Machines, http://www.hsperfect.com/cgi/search-en.cgi?f=company_en_1_+product_en_1_&t=product_en_1_&id=92839, Heshan Perfect Dyeing Equipment Factory Co.,Ltd., China
- Zen (2021) Jigger Machine, https://www.zenindustrialengineers.com/automatic-dyeing-jigger.html, Zen Industrial Engineers, Gujarat, India
- Ruchika Aggarwal, Tanmay Dutta, Javed Sheikh, (2020). Extraction of pectinase from Candida isolated from textile mill effluent and its application in bio-scouring of cotton. Sustainable Chemistry and Pharmacy. Elsevier, New Delhi, India
- Umweltbundesamt (2003). Best Available Techniques in Textile Industry. Federal Environmental Agency (Umweltbundesamt), Berlin, Germany
- Ruchika Aggarwal, Tanmay Dutta, Javed Sheikh, (2020). Extraction of pectinase from Candida isolated from textile mill effluent and its application in bio-scouring of cotton. Sustainable Chemistry and Pharmacy. Elsevier, Delhi, India

## Intended applications
Implementation of regular Product Environmental Footprint (PEF) studies and Organisation Environmental Footprint (OEF) studies exclusively under the specified Product groups and sectors as defined in the Product Environmental Footprint Category Rules (PEFCR) and Organisation Environmental Footprint Sectorial Rules (OEFSR) listed in http://ec.europa.eu/environment/eussd/smgp/PEFCR_OEFSR.htm
