# non-woven primary backing production; needle loom machine, heat setting stenter machine, and hot calendering machine; production mix, at plant; service

Dataset: ILCD process, Partly terminated system
Geography: EU+EFTA+UK
Reference year: 2021
Valid until: 2024
Classification: Systems / Textiles, furnitures and other interiors
LCI method principle: Attributional
LCI method approaches: Allocation - market value
Completeness: All relevant flows quantified
Project: Provision of process-based 3.0 Environmental Footprint-compliant life cycle inventory datasets - Apparel 1 - contract number 070201/2020/840291/SER/ENV.B.1
Generated by: Life Cycle Indonesia
Owner: PRé Sustainability B.V.
Compliance: ILCD Data Network - Entry-level; Suggestions for updating the PEF method 2019; ISO 14040 Environmental Management – Life Cycle Assessment – Principles and Framework, 2006; ISO 14044:2006. Environmental Management – Life Cycle Assessment – Requirements and guidelines.; Environmental Footprint 3.1
Review: Dependent internal review by Avraam Symeonidis, Emilia Moreno Ruiz; Independent review panel by Subramanian Senthilkannan Muthu
Data quality: Overall quality: Good; Time representativeness: Very good; Geographical representativeness: Good; Technological representativeness: Good; Precision: Good; Methodological appropriateness and consistency: Not applicable
Amounts: no units in this file; such an amount is in the reference unit of its flow, which a separate flow dataset defines
copyright: true
licenseType: Free of charge for some user types or use types
accessRestrictions: Free of charge for all final users implementing a regular Product Environmental Footprint (PEF) studies and Organisation Environmental Footprint (OEF) studies exclusively under the specified Product groups and sectors as defined in the Product Environmental Footprint Category Rules (PEFCR) and Organisation Environmental Footprint Sectorial Rules (OEFSR) listed in http://ec.europa.eu/environment/eussd/smgp/PEFCR_OEFSR.htm and in accordance with the terms and conditions of the EULA (available at https://ecoinvent.lca-data.com/) exclusively until 31st December 2024. Any use of this dataset or any derivative data not within the specific context of one of the PEF/OEF projects or after the end of 2024 is not permitted.

## General comment
Notice: this data set supersedes the EF3.0-compliant version (see link under "preceding data set version" below calculated with the EF3.0). The life cycle inventory is not changed from the original EF3.0 data set. The LCIA results are calculated based on the EF3.1 methods which provide updated characterisation factors in the following impact categories: Climate Change, Ecotoxicity freshwater, Photochemical Ozone Formation, Acidification, Human Toxicity non-cancer, and Human Toxicity cancer. The review report and the data quality ratings refer to the original results. The data set has been updated by the European Commission on the basis of the original EF3.0 data set delivered by the data provider.The non-woven primary backing production process is described for treating a nonwoven fabric to improve its suitability for use as a primary backing in manufacturing tufted carpets and carpet tiles. A primary carpet backing comprising at least a first and a second layer of fibers, characterised in that both the first and the second layer of fibers has a uniform composition throughout the layer of fibers. Uniform composition as used herein has to be understood that the type of fibers and the amount of fibers throughout the layer is constant within the limits encountered in standard nonwoven production processes. The first and second layer of fibers each comprises at least two different polymers.

The primary carpet backing is thermally bonded using binder polymer originating from the fibers. As the melting temperature of the lower melting polymer can, and preferably is, different in each layer of fibers, the thermal bonding process should be performed at the temperature corresponding to the lower melting polymer which has the highest melting point. The nonwoven primary carpet backings used in carpet production are either nonwovens comprising backbone of polyester fibers, e.g. PET, or nonwovens comprising a backbone polypropylene fibers. The term fibers as used herein refers both to staple fibers and filaments.

A user employing this service within their models should use it along with 0.78 kg of materials (polypropylene/polyester) to produce 1 kg of non-woven primary backing production. A user is responsible for defining the nature of recycling and/or disposal of this waste. Additionally, a user is responsible for accounting transportation expenditures of all extra input and output materials that need to be modelled alongside this service.

Aseree, Lester M. 2006. PROCESS OF PREPARING CARPET BACKING USING NONWOVEN MATERAL, https://patents.google.com/patent/US20070298208A1/en, United States
Visscher, Edze Jan. 2010. Primary carpet backing, https://patents.google.com/patent/US20120244310A1/en, United States

## Technology and included processes
The process includes the steps of needle-entangling a nonwoven fabric, preferably a spun-bonded polyester web, from one or both sides, heat-setting the needled web, calendering and cooling the web and then saturating with a liquid curable elastomeric binder. The saturated web preferably is treated to remove the excess binder, heated to dry the web and cure the binder, and wound up on rolls. The resultant fabric is dimensionally stable and has elastomeric properties similar to a woven fabric which provide improved tuft grip and repairability when used as a backing for tufted carpeting (Aseree, 2006)

This process includes the use of the needle loom machine, heat setting stenter machine, and hot calendering machine. It has function of needle punching, drying and curing. The activity starts when the raw materials enter the process. The chemicals (latex and silicone), energy consumption and infrastructure of the machine are included. There is no direct emission to air since the emission comes from electricity usage, while hazardous waste comes from waste lube oil. In the model, the energy sources of machines used solely from electricity, steam (for heat setting stenter), and thermal oil (for hot calendering). The cooling process using the conventional method so it doesn't required energy. The consumption of lubricating oil for needle loom using a stitch bonding machine as a proxy, heat setting stenter using a thermobonding oven as a proxy, and the hot calendering machine using the hot calendering machine itself. In the model, the latex and silicone (elastomeric binder) is part of the final product. Hence, there is no waste or emission resulted from the usage of elastomeric binders. The raw material of the primary backing is polypropylene with 115 GSM output.

Aseree, Lester M. 2006. PROCESS OF PREPARING CARPET BACKING USING NONWOVEN MATERAL, https://patents.google.com/patent/US20070298208A1/en, United States
Domotex. 2020. Primary Backing, https://www.domotex.de/product/primary-backing/204373/K616779

## Parameters
- kg_0: 0.17
  Mass in kg, for latex, natural, virgin // latex production, natural, virgin // glo; Articulated lorry transport, Euro 4, Total weight >32 t; EU+EFTA+UK
- km_0: 130
  Distance in km, for latex, natural, virgin // latex production, natural, virgin // glo; Articulated lorry transport, Euro 4, Total weight >32 t; EU+EFTA+UK
- kg_km_0: 22.1; = kg_0*km_0
  Transport amount in km*km, for latex, natural, virgin // latex production, natural, virgin // glo; Articulated lorry transport, Euro 4, Total weight >32 t; EU+EFTA+UK
- kg_1: 0.000122142
  Mass in kg, for lubricating oil // lubricants at refinery // eu+efta+uk; Articulated lorry transport, Euro 4, Total weight >32 t; EU+EFTA+UK
- km_1: 130.176
  Distance in km, for lubricating oil // lubricants at refinery // eu+efta+uk; Articulated lorry transport, Euro 4, Total weight >32 t; EU+EFTA+UK
- kg_km_1: 0.0159; = kg_1*km_1
  Transport amount in km*km, for lubricating oil // lubricants at refinery // eu+efta+uk; Articulated lorry transport, Euro 4, Total weight >32 t; EU+EFTA+UK
- kg_2: 9.61538e-5
  Mass in kg, for heat transfer fluid oil // heat transfer fluid oil production // eu+efta+uk; Articulated lorry transport, Euro 4, Total weight >32 t; EU+EFTA+UK
- km_2: 130
  Distance in km, for heat transfer fluid oil // heat transfer fluid oil production // eu+efta+uk; Articulated lorry transport, Euro 4, Total weight >32 t; EU+EFTA+UK
- kg_km_2: 0.0125; = kg_2*km_2
  Transport amount in km*km, for heat transfer fluid oil // heat transfer fluid oil production // eu+efta+uk; Articulated lorry transport, Euro 4, Total weight >32 t; EU+EFTA+UK
- kg_3: 0.05
  Mass in kg, for silicone, fossil fuel-based // silicone production // glo; Articulated lorry transport, Euro 4, Total weight >32 t; EU+EFTA+UK
- km_3: 130
  Distance in km, for silicone, fossil fuel-based // silicone production // glo; Articulated lorry transport, Euro 4, Total weight >32 t; EU+EFTA+UK
- kg_km_3: 6.5; = kg_3*km_3
  Transport amount in km*km, for silicone, fossil fuel-based // silicone production // glo; Articulated lorry transport, Euro 4, Total weight >32 t; EU+EFTA+UK
- kg_4: 0.17
  Mass in kg, for latex, natural, virgin // latex production, natural, virgin // glo; Barge; EU+EFTA+UK
- km_4: 270
  Distance in km, for latex, natural, virgin // latex production, natural, virgin // glo; Barge; EU+EFTA+UK
- kg_km_4: 45.9; = kg_4*km_4
  Transport amount in km*km, for latex, natural, virgin // latex production, natural, virgin // glo; Barge; EU+EFTA+UK
- kg_5: 0.000122142
  Mass in kg, for lubricating oil // lubricants at refinery // eu+efta+uk; Barge; EU+EFTA+UK
- km_5: 270.177
  Distance in km, for lubricating oil // lubricants at refinery // eu+efta+uk; Barge; EU+EFTA+UK
- kg_km_5: 0.033; = kg_5*km_5
  Transport amount in km*km, for lubricating oil // lubricants at refinery // eu+efta+uk; Barge; EU+EFTA+UK
- kg_6: 9.61538e-5
  Mass in kg, for heat transfer fluid oil // heat transfer fluid oil production // eu+efta+uk; Barge; EU+EFTA+UK
- km_6: 270.4
  Distance in km, for heat transfer fluid oil // heat transfer fluid oil production // eu+efta+uk; Barge; EU+EFTA+UK
- kg_km_6: 0.026; = kg_6*km_6
  Transport amount in km*km, for heat transfer fluid oil // heat transfer fluid oil production // eu+efta+uk; Barge; EU+EFTA+UK
- kg_7: 0.05
  Mass in kg, for silicone, fossil fuel-based // silicone production // glo; Barge; EU+EFTA+UK
- km_7: 270
  Distance in km, for silicone, fossil fuel-based // silicone production // glo; Barge; EU+EFTA+UK
- kg_km_7: 13.5; = kg_7*km_7
  Transport amount in km*km, for silicone, fossil fuel-based // silicone production // glo; Barge; EU+EFTA+UK
- kg_8: 9.61538e-5
  Mass in kg, for heat transfer fluid oil // heat transfer fluid oil production // eu+efta+uk; Freight train, average; EU+EFTA+UK
- km_8: 240.24
  Distance in km, for heat transfer fluid oil // heat transfer fluid oil production // eu+efta+uk; Freight train, average; EU+EFTA+UK
- kg_km_8: 0.0231; = kg_8*km_8
  Transport amount in km*km, for heat transfer fluid oil // heat transfer fluid oil production // eu+efta+uk; Freight train, average; EU+EFTA+UK
- kg_9: 0.17
  Mass in kg, for latex, natural, virgin // latex production, natural, virgin // glo; Freight train, average; EU+EFTA+UK
- km_9: 240
  Distance in km, for latex, natural, virgin // latex production, natural, virgin // glo; Freight train, average; EU+EFTA+UK
- kg_km_9: 40.8; = kg_9*km_9
  Transport amount in km*km, for latex, natural, virgin // latex production, natural, virgin // glo; Freight train, average; EU+EFTA+UK
- kg_10: 0.000122142
  Mass in kg, for lubricating oil // lubricants at refinery // eu+efta+uk; Freight train, average; EU+EFTA+UK
- km_10: 239.884
  Distance in km, for lubricating oil // lubricants at refinery // eu+efta+uk; Freight train, average; EU+EFTA+UK
- kg_km_10: 0.0293; = kg_10*km_10
  Transport amount in km*km, for lubricating oil // lubricants at refinery // eu+efta+uk; Freight train, average; EU+EFTA+UK
- kg_11: 0.05
  Mass in kg, for silicone, fossil fuel-based // silicone production // glo; Freight train, average; EU+EFTA+UK
- km_11: 240
  Distance in km, for silicone, fossil fuel-based // silicone production // glo; Freight train, average; EU+EFTA+UK
- kg_km_11: 12; = kg_11*km_11
  Transport amount in km*km, for silicone, fossil fuel-based // silicone production // glo; Freight train, average; EU+EFTA+UK

## Reference product
- non-woven primary backing production // non-woven primary backing production // eu+efta+uk: 1

## Inputs
- Electricity from Electricity grid mix 1kV-60kV - EU+EFTA+UK: 4.65543
- Transport of latex, natural, virgin // latex production, natural, virgin // glo by Articulated lorry transport, Euro 4, Total weight >32 t - EU+EFTA+UK: 22.1; = kg_km_0
- Transport of lubricating oil // lubricants at refinery // eu+efta+uk by Articulated lorry transport, Euro 4, Total weight >32 t - EU+EFTA+UK: 0.0159; = kg_km_1
- Transport of heat transfer fluid oil // heat transfer fluid oil production // eu+efta+uk by Articulated lorry transport, Euro 4, Total weight >32 t - EU+EFTA+UK: 0.0125; = kg_km_2
- Transport of silicone, fossil fuel-based // silicone production // glo by Articulated lorry transport, Euro 4, Total weight >32 t - EU+EFTA+UK: 6.5; = kg_km_3
- Transport of latex, natural, virgin // latex production, natural, virgin // glo by Barge - EU+EFTA+UK: 45.9; = kg_km_4
- Transport of lubricating oil // lubricants at refinery // eu+efta+uk by Barge - EU+EFTA+UK: 0.033; = kg_km_5
- Transport of heat transfer fluid oil // heat transfer fluid oil production // eu+efta+uk by Barge - EU+EFTA+UK: 0.026; = kg_km_6
- Transport of silicone, fossil fuel-based // silicone production // glo by Barge - EU+EFTA+UK: 13.5; = kg_km_7
- Transport of heat transfer fluid oil // heat transfer fluid oil production // eu+efta+uk by Freight train, average - EU+EFTA+UK: 0.0231; = kg_km_8
- Transport of latex, natural, virgin // latex production, natural, virgin // glo by Freight train, average - EU+EFTA+UK: 40.8; = kg_km_9
- Transport of lubricating oil // lubricants at refinery // eu+efta+uk by Freight train, average - EU+EFTA+UK: 0.0293; = kg_km_10
- Transport of silicone, fossil fuel-based // silicone production // glo by Freight train, average - EU+EFTA+UK: 12; = kg_km_11
- non-woven primary backing production // non-woven primary backing production // eu+efta+uk, blackbox: 1
- non-woven primary backing production // non-woven primary backing production // eu+efta+uk, elementary: 1

## Impact indicators
- Eutrophication marine: 0.00145681
- Ecotoxicity, freshwater: 61.012
- Land use: 59.6283
- Water use: 0.51875
- Resource use, minerals and metals: 3.83485e-6
- Resource use, fossils: 15.1812
- Climate change: 2.81803
- Ozone depletion: 5.7359e-5
- Human toxicity, cancer: 1.01165e-9
- Human toxicity, non-cancer: 1.83245e-8
- EF-particulate Matter: 1.25953e-7
- Ionising radiation, human health: 0.230251
- Photochemical ozone formation - human health: 0.00491701
- Acidification: 0.00719312
- Eutrophication, terrestrial: 0.0147716
- Eutrophication, freshwater: 2.63398e-5

## Deviations from the LCI method principle
The background data uses:
- the \xe2\x80\x9cRecycled content cut-off\xe2\x80\x9d approach to allocate end-of-life by-products and secondary materials. This allocation is explained in the description of the recycled content system model (http://www.ecoinvent.org/database/system-models-in-ecoinvent-3/cut-off-system-model/allocation-cut-off-by-classification.html).
OR
- EF compliant data

## Deviations from the LCI method approaches
Background data:
- the \xe2\x80\x9cRecycled content cut-off\xe2\x80\x9d approach to allocate end-of-life by-products and secondary materials. This allocation is explained in the description of the recycled content system model (http://www.ecoinvent.org/database/system-models-in-ecoinvent-3/cut-off-system-model/allocation-cut-off-by-classification.html). The ecoinvent database mostly relies on “Allocation – market values” apart for few exceptions particularly in the energy sector. ecoinvent energy data is replaced with EF3.0 core data as per the EF guidelines version 2.0.
OR
- EF compliant data

## Modelling constants
All modelling constants follow the requirements listed in the Tender Specifications 070201/2020/SER/ENV.B1. Completeness: There are no intentional cut-offs in the inventory no matter how small their contribution to all the EF impact categories is. Eventual cut-offs are in compliance with the Guide for EF compliant data sets (JRC 2020), i.e. only if below the 3% cut-off rule. Water use: water use is modelled at country level using separate flows for water withdrawal, water release and water evaporation. Handling multi-functional processes: the following PEF multi- functionality decision hierarchy is applied for resolving all multi- functionality problems: (1) subdivision or system expansion; (2) allocation based on a relevant underlying physical relationship (substitution may apply here); (3) allocation based on some other relationship. Direct land use change: GHG emissions from direct LUC allocated to good/service for 20 years after the LUC occurs, with IPCC default values. Carbon storage and delayed emissions: credits associated with temporary (carbon) storage or delayed emissions up to 300 years are not be considered. Emissions off-setting: are not included. Capital goods (including infrastructures) and their End of life: they are included. System boundaries: system boundaries include all processes linked to the product supply chain (e.g. maintenance). Time period: emissions and removals are modelled as if released or removed at the beginning of the assessment method. Fossil and biogenic carbon emissions and removals: removals and emissions are modelled as follows: All GHG emissions from fossil fuels (including peat and limestone) are modelled consistently with the most updated ILCD list of elementary flows. The non-fossil (biogenic) carbon flows are modelled consistently with the most updated ILCD list of elementary flows.

## Cut-off and completeness
There are no intentional cut-offs in the inventory no matter how small their contribution to all the EF impact categories is. Eventual cut-offs are in compliance with the Guide for EF compliant data sets (JRC 2020), i.e. only if below the 3% cut-off rule. The dataset dry mass and water balance has been checked to ensure the inventory is complete. Capital goods (e.g. infrastructure) and their end-of-life are included.

## Data selection and combination
These datasets include, in both their foreground and background data, links to EF3.0 compliant data.
The relevant background data on energy, transport, and End of Life are from the LCDN data node (http://lcdn.thinkstep.com/Node/).
All other background data in the supply of this product for which no EF3.0 process was available are from ecoinvent v3.7 database (www.ecoinvent.org) or other data sources.

## Data treatment and extrapolations
Several data sources have been used to model the inventory.

## Review details
Internal reviews have been asked to review the plausibility of the unit process, LCIA scores, and DQRs. Internal reviewers have also been asked to review the data for EF compliancy. The consortium is therefore responsible for aspects such as compliancy with the ILCD format, including validation in Look@LCI, and nomenclature.
Internal reviwers have been asked to judge based on the process name, that the unit process models in a complete and representative way the process in the requested location. The review encompassed the plausability of:
- exchanges with nature (elementary flows) as well as exchanges such as product and waste flows.
- meta information (general comment, technology comment, system boundaries, allocation, cut-off rules, etc.). Reviewers were asked to judge if the provided information is enough to understand the content of the process.
- LCIA scores
- DQRs including precision, technology, time and geography. As well as the overall DQR.
External reviewers have been asked to provide their expertise in the field of interest. External reviewers have been asked to review the unit process, including eventual methodological choices, the LCIA scores (provided with contribution scores as well), and DQRs. External reviewers have been provided all the information in a tool developed by the consortium for the purpose of this project.
External reviewers have been asked to judge based on the process name, that the unit process models in a complete and representative way the process in the requested location. The review encompassed:
- Plausability and completeness of exchanges with nature (elementary flows) as well as exchanges such as product and waste flows.
- Review of meta information (general comment, technology comment, system boundaries, allocation, cut-off rules, etc.). Reviewers were asked to judge if the provided information is enough to understand the content of the process.
- Review of properties (biogenic carbon and water content).
- Review of allocation keys.
- Plausability of LCIA scores calculated by the consortium.
- Plausability of DQRs including precision, technology, time and geography. As well as the overall DQR.

## Data sources
- Background Data for Representative products and organisations. EF 3.0 compliant (data stock)
- UN Data (2018) Statistics Data for Lubricants Productions, http://data.un.org/Data.aspx?q=Lubricants&d=EDATA&f=cmID%3aLU, United Nations Statistics Division, Global.
- Cotex (2021) Stitch Bonding Machine, Catalog and Company Email, Suzhou Cotex International Co., Ltd., China.
- Lebon (2021) Nonwoven Oven Machine, Catalog and Company Messages, Qingdao Lebon Industry Co., Ltd., China
- Lebon Machinery (2021), Nonwoven Ironing Machine, Catalog and Company Massages, Qingdao Lebon Industry Co., Ltd., China
- Asree, Lester M. 2006. Process of Preparing Carpet Backing Using Nonwoven Material, https://patents.google.com/patent/US20070298208A1/en, United States
- Mustafa Sabri Ozen, Erhan Sancak, Mehmet Akalin (2015). The effect of needle-punched nonwoven fabric thickness on electromagnetic shielding effectiveness. Textile Research Journal, United Kingdom
- Yarun (2020) Primary Backing, http://www.yrunfabric.com/pinfo.php?title=Primary-Backing&mid=2&u=687, Yangzhou Yarun Fabric Co., Ltd., Yizheng, China https://www.domotex.de/product/primary-backing/204373/K616779
- Sail (2021) Pre Needle Loom Machine, E-mail Company, Sail Nonwoven Machinery Co. Ltd., China
- Sail (2021) Main Needle Loom Machine, E-mail Company, Sail Nonwoven Machinery Co. Ltd., China
- Finestart (2018) Heat Setting Stenter (Stenter Machine). http://www.finestart.com.cn/index.php?m=content&c=index&a=show&catid=54&id=61, Heat Setting Stenter (Stenter Machine), Shandong, China
- Lebon (2021) Nonwoven Ironing Machine, https://www.china-lebon.com/128.html, Qingdao Lebon Industry Co., Ltd., China Alibaba (2021) Nonwoven machinery calender ironing machine, https://www.alibaba.com/product-detail/Nonwoven-machinery-calender-ironing-machine-felt_62016069669.html?spm=a2700.galleryofferlist.normal_offer.d_title.54c95cb4TlzyTj, Alibaba Group, China

## Intended applications
Implementation of regular Product Environmental Footprint (PEF) studies and Organisation Environmental Footprint (OEF) studies exclusively under the specified Product groups and sectors as defined in the Product Environmental Footprint Category Rules (PEFCR) and Organisation Environmental Footprint Sectorial Rules (OEFSR) listed in http://ec.europa.eu/environment/eussd/smgp/PEFCR_OEFSR.htm
