# bleached kraft pulp, eucalyptus, elementary; technology mix; production mix, at plant; dry mass 0.9, carbon content, non-fossil 0.494

Dataset: ILCD process, Unit process, single operation
Geography: EU+EFTA+UK
Reference year: 2020
Valid until: 2024
Classification: Other Services / Other services
LCI method principle: Attributional
LCI method approaches: Allocation - market value
Completeness: All relevant flows quantified
Project: Provision of process-based 3.0 Environmental Footprint-compliant life cycle inventory datasets - Renewable materials - contract number 070201/2020/840085/SER/ENV.B.1
Generated by: EPIS
Owner: EPIS
Compliance: Environmental Footprint non-primary supporting data set; Environmental Footprint 3.1
Amounts: no units in this file; such an amount is in the reference unit of its flow, which a separate flow dataset defines
copyright: true
licenseType: Free of charge for some user types or use types
accessRestrictions: Free of charge for all final users implementing a regular Product Environmental Footprint (PEF) studies and Organisation Environmental Footprint (OEF) studies exclusively under the specified Product groups and sectors as defined in the Product Environmental Footprint Category Rules (PEFCR) and Organisation Environmental Footprint Sectorial Rules (OEFSR) listed in http://ec.europa.eu/environment/eussd/smgp/PEFCR_OEFSR.htm and in accordance with the terms and conditions of the EULA (available at https://ecoinvent.lca-data.com/) exclusively until 31st December 2024. Any use of this dataset or any derivative data not within the specific context of one of the PEF/OEF projects or after the end of 2024 is not permitted.

## General comment
Notice: this data set supersedes the EF3.0-compliant version (see link under "preceding data set version" below calculated with the EF3.0). The life cycle inventory is not changed from the original EF3.0 data set. The LCIA results are calculated based on the EF3.1 methods which provide updated characterisation factors in the following impact categories: Climate Change, Ecotoxicity freshwater, Photochemical Ozone Formation, Acidification, Human Toxicity non-cancer, and Human Toxicity cancer. The review report and the data quality ratings refer to the original results. The data set has been updated by the European Commission on the basis of the original EF3.0 data set delivered by the data provider.This sub-process has limited documentation only. For all detailed documentation of the full model to which this data set belongs (such as DQRs, review reports and other technical documentation), please see this process: bleached kraft pulp, eucalyptus - EU+EFTA+UK []

## Technology and included processes
The pulp, or fibres from the wood are separated in a kraft cooking process in a so-called fibre line. In a recovery line, the chemicals used in the cooking process are recovered to be used again and energy is produced. The third process is effluent treatment where gaseous and liquid discharges to the environment are continuously minimized and monitored.
The process includes transports to the pulp mill, wood handling, chemical pulping and bleaching, drying process, energy production on-site, recovery cycles of chemicals and internal waste water treatment. The input of magnesium sulphate (0.00104 kg/kg) has been excluded from the inventory since its contribution was less than 3 % in terms of mass and single score.
The following air emissions were reported in the study:
CO2 (fossil and biogenic), CO, SOx (as SO2), NOx, TRS (as S), SO2 (reported as S), Dust (unspecified). Next to these key emissions, additional emissions from on-site energy production from external and internal fuels were calculated, using emission profiles from ecoinvent combustion processes. Internal biogenic fuels are represented by the calculated emissions but do not have the corresponding fuel input from technosphere, because they are supplied from within the system boundaries. The amounts of internal fuels used in the process are: Bark (8.85E+02 MJ/t), -Black liquor (1.33E+04 MJ/t), Sludge (2.70E+01 MJ/t), and Methanol (2.25E+02 MJ/t).

The following ecoinvent combustion processes were used to estimate additional air emissions:
Biofuel - Bark: heat production, wood chips from industry, at furnace 1000kW, CH; Methanol: heat production, natural gas, at industrial furnace >100kW, Europe without Switzerland; Natural gas: heat production, natural gas, at industrial furnace >100kW, Europe without Switzerland; Heavy fuel oil: heat production, heavy fuel oil, at industrial furnace 1MW, Europe without Switzerland; Light fuel oil: heat production, light fuel oil, at industrial furnace 1MW, Europe without Switzerland; Coke: heat production, at coal coke industrial furnace 1-10MW; propane: heat production, propane, at industrial furnace >100kW;

Black liquor and sludge were not included in the emissions calculations because no specific emission profiles, e.g. for the black liquor recovery process, were available. Emissions from these internal energy generation processes are therefore only reflected in the key emission factors provided by the industry, other emissions constitute a data gap.
The amount of infrastructure (pulp factory) was taken from the dataset "The European Pulp Industry Sector Association AISBL, sulfate pulp production, from eucalyptus, bleached, RLA, Undefined, ecoinvent database version 3.7.1."

## Reference product
- bleached kraft pulp, eucalyptus // bleached kraft pulp, eucalyptus // eu+efta+uk, elementary: 1

## Inputs
- ground water, Renewable material resources from water [AL]: 2.66291e-6
- ground water, Renewable material resources from water [AT]: 3.43099e-5
- ground water, Renewable material resources from water [BA]: 3.31969e-6
- ground water, Renewable material resources from water [BE]: 4.12973e-5
- ground water, Renewable material resources from water [BG]: 1.05749e-5
- ground water, Renewable material resources from water [BY]: 1.37314e-5
- ground water, Renewable material resources from water [CH]: 4.09202e-5
- ground water, Renewable material resources from water [CZ]: 2.84802e-5
- ground water, Renewable material resources from water [DE]: 0.000309955
- ground water, Renewable material resources from water [DK]: 2.24753e-5
- ground water, Renewable material resources from water [EE]: 3.06903e-6
- ground water, Renewable material resources from water [ES]: 0.000133011
- ground water, Renewable material resources from water [FI]: 1.9171e-5
- ground water, Renewable material resources from water [FR]: 0.000218642
- ground water, Renewable material resources from water [GB]: 0.000217277
- ground water, Renewable material resources from water: 1.34959e-6
- ground water, Renewable material resources from water [GR]: 2.47166e-5
- ground water, Renewable material resources from water [HR]: 7.94722e-6
- ground water, Renewable material resources from water [HU]: 2.08336e-5
- ground water, Renewable material resources from water [IE]: 2.24419e-5
- ground water, Renewable material resources from water [IS]: 1.2806e-6
- ground water, Renewable material resources from water [IT]: 0.000187066
- ground water, Renewable material resources from water [LT]: 6.55291e-6
- ground water, Renewable material resources from water [LU]: 4.54905e-6
- ground water, Renewable material resources from water [LV]: 3.86401e-6
- ground water, Renewable material resources from water [MD]: 2.04452e-6
- ground water, Renewable material resources from water [ME]: 8.23648e-7
- ground water, Renewable material resources from water [MK]: 2.27482e-6
- ground water, Renewable material resources from water [MT]: 1.2584e-6
- ground water, Renewable material resources from water [NL]: 6.93425e-5
- ground water, Renewable material resources from water [NO]: 2.62482e-5
- ground water, Renewable material resources from water [PL]: 7.98054e-5
- ground water, Renewable material resources from water [PT]: 2.51815e-5
- ground water, Renewable material resources from water [RO]: 3.496e-5
- ground water, Renewable material resources from water [RS]: 8.67544e-6
- ground water, Renewable material resources from water [SE]: 3.78759e-5
- ground water, Renewable material resources from water [SI]: 5.36377e-6
- ground water, Renewable material resources from water [SK]: 1.25896e-5
- ground water, Renewable material resources from water [SM]: 1.56689e-7
- ground water, Renewable material resources from water [UA]: 3.69127e-5
- water, Renewable material resources from water [AL]: 3.52085e-5
- water, Renewable material resources from water [AT]: 0.00045364
- water, Renewable material resources from water [BA]: 4.38924e-5
- water, Renewable material resources from water [BE]: 0.000546026
- water, Renewable material resources from water [BG]: 0.00013982
- water, Renewable material resources from water [BY]: 0.000181554
- water, Renewable material resources from water [CH]: 0.000541041
- water, Renewable material resources from water [CZ]: 0.000376561
- water, Renewable material resources from water [DE]: 0.00409818
- water, Renewable material resources from water [DK]: 0.000297165
- water, Renewable material resources from water [EE]: 4.05783e-5
- water, Renewable material resources from water [ES]: 0.00175864
- water, Renewable material resources from water [FI]: 0.000253476
- water, Renewable material resources from water [FR]: 0.00289085
- water, Renewable material resources from water [GB]: 0.0028728
- water, Renewable material resources from water: 1.78441e-5
- water, Renewable material resources from water [GR]: 0.0003268
- water, Renewable material resources from water [HR]: 0.000105077
- water, Renewable material resources from water [HU]: 0.000275459
- water, Renewable material resources from water [IE]: 0.000296723
- water, Renewable material resources from water [IS]: 1.69319e-5
- water, Renewable material resources from water [IT]: 0.00247335
- water, Renewable material resources from water [LT]: 8.66416e-5
- water, Renewable material resources from water [LU]: 6.01469e-5
- water, Renewable material resources from water [LV]: 5.10894e-5
- water, Renewable material resources from water [MD]: 2.70323e-5
- water, Renewable material resources from water [ME]: 1.08901e-5
- water, Renewable material resources from water [MK]: 3.00773e-5
- water, Renewable material resources from water [MT]: 1.66384e-5
- water, Renewable material resources from water [NL]: 0.000916836
- water, Renewable material resources from water [NO]: 0.00034705
- water, Renewable material resources from water [PL]: 0.00105517
- water, Renewable material resources from water [PT]: 0.000332945
- water, Renewable material resources from water [RO]: 0.000462235
- water, Renewable material resources from water [RS]: 0.000114705
- water, Renewable material resources from water [SE]: 0.000500789
- water, Renewable material resources from water [SI]: 7.09189e-5
- water, Renewable material resources from water [SK]: 0.000166457
- water, Renewable material resources from water [SM]: 2.07172e-6
- water, Renewable material resources from water [UA]: 0.000488054

## Outputs
- carbon dioxide (fossil), Emissions to urban air close to ground: 0.120875
- Water, Emissions to water, unspecified [AL]: 3.14655e-5
- Water, Emissions to water, unspecified [AT]: 0.000405412
- Water, Emissions to water, unspecified [BA]: 3.92262e-5
- Water, Emissions to water, unspecified [BE]: 0.000487977
- Water, Emissions to water, unspecified [BG]: 0.000124955
- Water, Emissions to water, unspecified [BY]: 0.000162253
- Water, Emissions to water, unspecified [CH]: 0.000483522
- Water, Emissions to water, unspecified [CZ]: 0.000336528
- Water, Emissions to water, unspecified [DE]: 0.0036625
- Water, Emissions to water, unspecified [DK]: 0.000265573
- Water, Emissions to water, unspecified [EE]: 3.62643e-5
- Water, Emissions to water, unspecified [ES]: 0.00157168
- Water, Emissions to water, unspecified [FI]: 0.000226528
- Water, Emissions to water, unspecified [FR]: 0.00258352
- Water, Emissions to water, unspecified [GB]: 0.00256739
- Water, Emissions to water, unspecified: 1.5947e-5
- Water, Emissions to water, unspecified [GR]: 0.000292057
- Water, Emissions to water, unspecified [HR]: 9.3906e-5
- Water, Emissions to water, unspecified [HU]: 0.000246175
- Water, Emissions to water, unspecified [IE]: 0.000265178
- Water, Emissions to water, unspecified [IS]: 1.51318e-5
- Water, Emissions to water, unspecified [IT]: 0.00221041
- Water, Emissions to water, unspecified [LT]: 7.74306e-5
- Water, Emissions to water, unspecified [LU]: 5.37525e-5
- Water, Emissions to water, unspecified [LV]: 4.5658e-5
- Water, Emissions to water, unspecified [MD]: 2.41585e-5
- Water, Emissions to water, unspecified [ME]: 9.73239e-6
- Water, Emissions to water, unspecified [MK]: 2.68797e-5
- Water, Emissions to water, unspecified [MT]: 1.48695e-5
- Water, Emissions to water, unspecified [NL]: 0.000819365
- Water, Emissions to water, unspecified [NO]: 0.000310154
- Water, Emissions to water, unspecified [PL]: 0.000942997
- Water, Emissions to water, unspecified [PT]: 0.000297549
- Water, Emissions to water, unspecified [RO]: 0.000413094
- Water, Emissions to water, unspecified [RS]: 0.000102511
- Water, Emissions to water, unspecified [SE]: 0.000447549
- Water, Emissions to water, unspecified [SI]: 6.33794e-5
- Water, Emissions to water, unspecified [SK]: 0.000148761
- Water, Emissions to water, unspecified [SM]: 1.85147e-6
- Water, Emissions to water, unspecified [UA]: 0.000436168
- biological oxygen demand, Emissions to fresh water: 0.000644821
- chemical oxygen demand, Emissions to fresh water: 0.00476194
- Phosphorus, Emissions to fresh water: 4.61548e-5
- total organic carbon, Emissions to fresh water: 0.00176368
- nitrogen, total (excluding N2), Emissions to fresh water: 0.000108166
- sulfur oxides, Emissions to air, unspecified: 9.62586e-7
- adsorbable organic halogen compounds, Emissions to fresh water: 3.75805e-5
- Suspended solids, unspecified, Emissions to water, unspecified: 0.000588877
- sulfur dioxide, Emissions to air, unspecified (long-term): 1.23763e-6
- ammonia, Emissions to urban air close to ground: 3.31621e-8
- acetic acid, Emissions to urban air close to ground: 2.47642e-7
- formaldehyde, Emissions to urban air close to ground: 1.04827e-6
- acetone, Emissions to urban air close to ground: 1.32317e-8
- ammonia, Emissions to urban air close to ground [AL]: 6.51987e-9
- ammonia, Emissions to urban air close to ground [AT]: 8.40044e-8
- ammonia, Emissions to urban air close to ground [BA]: 8.12795e-9
- ammonia, Emissions to urban air close to ground [BE]: 1.01112e-7
- ammonia, Emissions to urban air close to ground [BG]: 2.58917e-8
- ammonia, Emissions to urban air close to ground [BY]: 3.36199e-8
- ammonia, Emissions to urban air close to ground [CH]: 1.00189e-7
- ammonia, Emissions to urban air close to ground [CZ]: 6.9731e-8
- ammonia, Emissions to urban air close to ground [DE]: 7.58896e-7
- ammonia, Emissions to urban air close to ground [DK]: 5.50286e-8
- ammonia, Emissions to urban air close to ground [EE]: 7.51423e-9
- ammonia, Emissions to urban air close to ground [ES]: 3.25664e-7
- ammonia, Emissions to urban air close to ground [FI]: 4.69383e-8
- ammonia, Emissions to urban air close to ground [FR]: 5.35324e-7
- ammonia, Emissions to urban air close to ground [GB]: 5.31982e-7
- ammonia, Emissions to urban air close to ground [GR]: 6.05163e-8
- ammonia, Emissions to urban air close to ground [HR]: 1.9458e-8
- ammonia, Emissions to urban air close to ground [HU]: 5.10092e-8
- ammonia, Emissions to urban air close to ground [IE]: 5.49468e-8
- ammonia, Emissions to urban air close to ground [IT]: 4.58012e-7
- ammonia, Emissions to urban air close to ground [LT]: 1.60442e-8
- ammonia, Emissions to urban air close to ground [LU]: 1.11379e-8
- ammonia, Emissions to urban air close to ground [LV]: 9.46067e-9
- ammonia, Emissions to urban air close to ground [MD]: 5.00581e-9
- ammonia, Emissions to urban air close to ground [MK]: 5.56968e-9
- ammonia, Emissions to urban air close to ground [NL]: 1.69779e-7
- ammonia, Emissions to urban air close to ground [NO]: 6.42663e-8
- ammonia, Emissions to urban air close to ground [PL]: 1.95396e-7
- ammonia, Emissions to urban air close to ground [PT]: 6.16544e-8
- ammonia, Emissions to urban air close to ground [RO]: 8.55961e-8
- ammonia, Emissions to urban air close to ground [SE]: 9.27354e-8
- ammonia, Emissions to urban air close to ground [SI]: 1.31327e-8
- ammonia, Emissions to urban air close to ground [SK]: 3.08243e-8
- ammonia, Emissions to urban air close to ground [UA]: 9.03773e-8
- chlorine, Emissions to urban air close to ground: 4.29074e-7
- toluene, Emissions to urban air close to ground: 1.00326e-6
- carbon monoxide (fossil), Emissions to urban air close to ground: 8.17147e-6
- Nitrogen oxides, Emissions to urban air close to ground [AL]: 2.35672e-6
- Nitrogen oxides, Emissions to urban air close to ground [AT]: 3.03648e-5
- Nitrogen oxides, Emissions to urban air close to ground [BA]: 2.93798e-6
- Nitrogen oxides, Emissions to urban air close to ground [BE]: 3.65488e-5
- Nitrogen oxides, Emissions to urban air close to ground [BG]: 9.35898e-6
- Nitrogen oxides, Emissions to urban air close to ground [BY]: 1.21525e-5
- Nitrogen oxides, Emissions to urban air close to ground [CH]: 3.62151e-5
- Nitrogen oxides, Emissions to urban air close to ground [CZ]: 2.52055e-5
- Nitrogen oxides, Emissions to urban air close to ground [DE]: 0.000274316
- Nitrogen oxides, Emissions to urban air close to ground [DK]: 1.9891e-5
- Nitrogen oxides, Emissions to urban air close to ground [EE]: 2.71615e-6
- Nitrogen oxides, Emissions to urban air close to ground [ES]: 0.000117717
- Nitrogen oxides, Emissions to urban air close to ground [FI]: 1.69666e-5
- Nitrogen oxides, Emissions to urban air close to ground [FR]: 0.000193502
- Nitrogen oxides, Emissions to urban air close to ground [GB]: 0.000192294
- Nitrogen oxides, Emissions to urban air close to ground: 1.1987e-5
- Nitrogen oxides, Emissions to urban air close to ground [GR]: 2.18746e-5
- Nitrogen oxides, Emissions to urban air close to ground [HR]: 7.03343e-6
- Nitrogen oxides, Emissions to urban air close to ground [HU]: 1.84381e-5
- Nitrogen oxides, Emissions to urban air close to ground [IE]: 1.98615e-5
- Nitrogen oxides, Emissions to urban air close to ground [IT]: 0.000165556
- Nitrogen oxides, Emissions to urban air close to ground [LT]: 5.79944e-6
- Nitrogen oxides, Emissions to urban air close to ground [LU]: 4.02599e-6
- Nitrogen oxides, Emissions to urban air close to ground [LV]: 3.41972e-6
- Nitrogen oxides, Emissions to urban air close to ground [MD]: 1.80944e-6
- Nitrogen oxides, Emissions to urban air close to ground [MK]: 2.01325e-6
- Nitrogen oxides, Emissions to urban air close to ground [NL]: 6.13693e-5
- Nitrogen oxides, Emissions to urban air close to ground [NO]: 2.32301e-5
- Nitrogen oxides, Emissions to urban air close to ground [PL]: 7.06291e-5
- Nitrogen oxides, Emissions to urban air close to ground [PT]: 2.2286e-5
- Nitrogen oxides, Emissions to urban air close to ground [RO]: 3.09402e-5
- Nitrogen oxides, Emissions to urban air close to ground [SE]: 3.35208e-5
- Nitrogen oxides, Emissions to urban air close to ground [SI]: 4.74703e-6
- Nitrogen oxides, Emissions to urban air close to ground [SK]: 1.1142e-5
- Nitrogen oxides, Emissions to urban air close to ground [UA]: 3.26684e-5
- ethylene, Emissions to urban air close to ground: 2.12767e-7
- acetaldehyde, Emissions to urban air close to ground: 1.59938e-7
- methanol, Emissions to urban air close to ground: 4.49879e-8
- propionic acid, Emissions to urban air close to ground: 2.5962e-8
- non-methane volatile organic compounds, Emissions to urban air close to ground: 1.68082e-5
- benzene, Emissions to urban air close to ground: 2.73329e-6
- particles (PM2.5), Emissions to urban air close to ground: 3.92645e-5
- nitrous oxide, Emissions to urban air close to ground: 6.12939e-6
- zinc, Emissions to urban air close to ground: 1.15825e-6
- nickel, Emissions to urban air close to ground: 5.88736e-8
- selenium, Emissions to urban air close to ground: 1.73088e-9
- chromium, Emissions to urban air close to ground: 1.1472e-8
- lead, Emissions to urban air close to ground: 7.77602e-8
- cadmium, Emissions to urban air close to ground: 1.78068e-9
- copper, Emissions to urban air close to ground: 4.93083e-7
- methane (fossil), Emissions to urban air close to ground: 4.19584e-6
- xylene (all isomers), Emissions to urban air close to ground: 7.09223e-9
- pentachlorophenol, Emissions to urban air close to ground: 1.93083e-11
- arsenic, Emissions to urban air close to ground: 5.32483e-9
- benzo[a]pyrene, Emissions to urban air close to ground: 1.22555e-9
- carbon dioxide (biogenic), Emissions to urban air close to ground: 1.63258
- cobalt, Emissions to urban air close to ground: 3.13509e-9
- ethanol, Emissions to urban air close to ground: 2.64634e-8
- fluorine, Emissions to urban air close to ground: 1.19187e-7
- iron, Emissions to urban air close to ground: 3.8581e-7
- m-xylene, Emissions to urban air close to ground: 2.86049e-7
- hydrogen chloride, Emissions to urban air close to ground: 3.0582e-6
- polycyclic aromatic hydrocarbons, Emissions to urban air close to ground: 3.98547e-8
- manganese, Emissions to urban air close to ground: 4.06804e-7
- pentane, Emissions to urban air close to ground: 1.68913e-6
- hexachlorobenzene, Emissions to urban air close to ground: 1.7163e-14
- Hydrocarbons, aromatic, Emissions to urban air close to ground: 3.20054e-8
- DOC, Dissolved Organic Carbon, Emissions to fresh water: 0.00176368
- magnesium, Emissions to urban air close to ground: 1.12694e-6
- potassium, Emissions to urban air close to ground: 5.5869e-5
- sodium, Emissions to urban air close to ground: 3.20985e-6
- calcium, Emissions to urban air close to ground: 1.4044e-5
- vanadium, Emissions to urban air close to ground: 9.08994e-8
- bromine, Emissions to urban air close to ground: 1.43697e-7
- n-butane, Emissions to urban air close to ground: 1.10579e-6
- Hydrocarbons, aliphatic, unsaturated, Emissions to urban air close to ground: 7.42771e-6
- Hydrocarbons, aliphatic, alkanes, unspecified, Emissions to urban air close to ground: 2.55797e-6
- carbon monoxide (biogenic), Emissions to urban air close to ground: 0.000110367
- Phosphorus, Emissions to urban air close to ground: 7.19606e-7
- ethyl benzene, Emissions to urban air close to ground: 7.15123e-8
- chromium (vi), Emissions to urban air close to ground: 2.96924e-10
- molybdenum, Emissions to urban air close to ground: 1.04186e-9
- mercury, Emissions to urban air close to ground: 1.28161e-9
- methane (biogenic), Emissions to urban air close to ground: 7.15123e-6
- hydrogen fluoride, Emissions to urban air close to ground: 9.92283e-8
- propane, Emissions to urban air close to ground: 3.45767e-7
- 2,3,7,8-tetrachlorodibenzo-p-dioxin, Emissions to urban air close to ground: 7.56748e-14
- ethane, Emissions to urban air close to ground: 1.06383e-7
- lead-210, Emissions to urban air close to ground: 3.29789e-6
- antimony, Emissions to urban air close to ground: 1.12057e-10
- polonium-210, Emissions to urban air close to ground: 6.02839e-6
- radium-226, Emissions to urban air close to ground: 8.51067e-7
- thallium, Emissions to urban air close to ground: 1.12057e-10
- tin, Emissions to urban air close to ground: 4.48229e-11
- titanium, Emissions to urban air close to ground: 2.68795e-8
- boron, Emissions to urban air close to ground: 3.36172e-8
- Silicon, Emissions to urban air close to ground: 1.12057e-6
- acetylene, Emissions to urban air close to ground: 3.54611e-8
- beryllium, Emissions to urban air close to ground: 8.93621e-11
- aluminium, Emissions to urban air close to ground: 7.58868e-7
- iodine, Emissions to urban air close to ground: 8.08514e-10
- barium, Emissions to urban air close to ground: 8.93621e-9
- propene, Emissions to urban air close to ground: 3.54611e-8
- radon-222, Emissions to urban air close to ground: 7.09223e-8
- strontium, Emissions to urban air close to ground: 1.34752e-8
- uranium-238, Emissions to urban air close to ground: 7.09223e-7
- particles (PM10), Emissions to urban air close to ground: 0.000137603
- potassium-40, Emissions to urban air close to ground: 9.57451e-7
- radium-228, Emissions to urban air close to ground: 4.60995e-6
- scandium, Emissions to urban air close to ground: 8.93621e-11
- thorium-232, Emissions to urban air close to ground: 2.48228e-7
- Uranium, Emissions to urban air close to ground: 1.79433e-10
- Thorium, Emissions to urban air close to ground: 1.34752e-10
- total reduced sulphur compounds, Emissions to air, unspecified: 9.44159e-6
- radon-220, Emissions to urban air close to ground: 7.09223e-8
- thorium-228, Emissions to urban air close to ground: 3.90072e-7
- sulfur oxides, Emissions to air, unspecified [AL]: 1.8925e-7
- sulfur oxides, Emissions to air, unspecified [AT]: 2.43837e-6
- sulfur oxides, Emissions to air, unspecified [BA]: 2.35927e-7
- sulfur oxides, Emissions to air, unspecified [BE]: 2.93496e-6
- sulfur oxides, Emissions to air, unspecified [BG]: 7.5155e-7
- sulfur oxides, Emissions to air, unspecified [BY]: 9.75875e-7
- sulfur oxides, Emissions to air, unspecified [CH]: 2.90816e-6
- sulfur oxides, Emissions to air, unspecified [CZ]: 2.02406e-6
- sulfur oxides, Emissions to air, unspecified [DE]: 2.20282e-5
- sulfur oxides, Emissions to air, unspecified [DK]: 1.5973e-6
- sulfur oxides, Emissions to air, unspecified [EE]: 2.18113e-7
- sulfur oxides, Emissions to air, unspecified [ES]: 9.45294e-6
- sulfur oxides, Emissions to air, unspecified [FI]: 1.36246e-6
- sulfur oxides, Emissions to air, unspecified [FR]: 1.55387e-5
- sulfur oxides, Emissions to air, unspecified [GB]: 1.54417e-5
- sulfur oxides, Emissions to air, unspecified [GR]: 1.75659e-6
- sulfur oxides, Emissions to air, unspecified [HR]: 5.64802e-7
- sulfur oxides, Emissions to air, unspecified [HU]: 1.48063e-6
- sulfur oxides, Emissions to air, unspecified [IE]: 1.59493e-6
- sulfur oxides, Emissions to air, unspecified [IT]: 1.32946e-5
- sulfur oxides, Emissions to air, unspecified [LT]: 4.6571e-7
- sulfur oxides, Emissions to air, unspecified [LU]: 3.23297e-7
- sulfur oxides, Emissions to air, unspecified [LV]: 2.74612e-7
- sulfur oxides, Emissions to air, unspecified [MD]: 1.45302e-7
- sulfur oxides, Emissions to air, unspecified [MK]: 1.61669e-7
- sulfur oxides, Emissions to air, unspecified [NL]: 4.92811e-6
- sulfur oxides, Emissions to air, unspecified [NO]: 1.86544e-6
- sulfur oxides, Emissions to air, unspecified [PL]: 5.6717e-6
- sulfur oxides, Emissions to air, unspecified [PT]: 1.78962e-6
- sulfur oxides, Emissions to air, unspecified [RO]: 2.48457e-6
- sulfur oxides, Emissions to air, unspecified [SE]: 2.6918e-6
- sulfur oxides, Emissions to air, unspecified [SI]: 3.81198e-7
- sulfur oxides, Emissions to air, unspecified [SK]: 8.94729e-7
- sulfur oxides, Emissions to air, unspecified [UA]: 2.62335e-6
- sulfur dioxide, Emissions to air, unspecified (long-term) [AL]: 2.43325e-7
- sulfur dioxide, Emissions to air, unspecified (long-term) [AT]: 3.13509e-6
- sulfur dioxide, Emissions to air, unspecified (long-term) [BA]: 3.03339e-7
- sulfur dioxide, Emissions to air, unspecified (long-term) [BE]: 3.77357e-6
- sulfur dioxide, Emissions to air, unspecified (long-term) [BG]: 9.66292e-7
- sulfur dioxide, Emissions to air, unspecified (long-term) [BY]: 1.25471e-6
- sulfur dioxide, Emissions to air, unspecified (long-term) [CH]: 3.73912e-6
- sulfur dioxide, Emissions to air, unspecified (long-term) [CZ]: 2.6024e-6
- sulfur dioxide, Emissions to air, unspecified (long-term) [DE]: 2.83224e-5
- sulfur dioxide, Emissions to air, unspecified (long-term) [DK]: 2.0537e-6
- sulfur dioxide, Emissions to air, unspecified (long-term) [EE]: 2.80435e-7
- sulfur dioxide, Emissions to air, unspecified (long-term) [ES]: 1.21539e-5
- sulfur dioxide, Emissions to air, unspecified (long-term) [FI]: 1.75176e-6
- sulfur dioxide, Emissions to air, unspecified (long-term) [FR]: 1.99786e-5
- sulfur dioxide, Emissions to air, unspecified (long-term) [GB]: 1.98539e-5
- sulfur dioxide, Emissions to air, unspecified (long-term) [GR]: 2.2585e-6
- sulfur dioxide, Emissions to air, unspecified (long-term) [HR]: 7.26184e-7
- sulfur dioxide, Emissions to air, unspecified (long-term) [HU]: 1.90369e-6
- sulfur dioxide, Emissions to air, unspecified (long-term) [IE]: 2.05065e-6
- sulfur dioxide, Emissions to air, unspecified (long-term) [IT]: 1.70933e-5
- sulfur dioxide, Emissions to air, unspecified (long-term) [LT]: 5.98778e-7
- sulfur dioxide, Emissions to air, unspecified (long-term) [LU]: 4.15673e-7
- sulfur dioxide, Emissions to air, unspecified (long-term) [LV]: 3.53077e-7
- sulfur dioxide, Emissions to air, unspecified (long-term) [MD]: 1.8682e-7
- sulfur dioxide, Emissions to air, unspecified (long-term) [MK]: 2.07863e-7
- sulfur dioxide, Emissions to air, unspecified (long-term) [NL]: 6.33623e-6
- sulfur dioxide, Emissions to air, unspecified (long-term) [NO]: 2.39845e-6
- sulfur dioxide, Emissions to air, unspecified (long-term) [PL]: 7.29228e-6
- sulfur dioxide, Emissions to air, unspecified (long-term) [PT]: 2.30098e-6
- sulfur dioxide, Emissions to air, unspecified (long-term) [RO]: 3.19449e-6
- sulfur dioxide, Emissions to air, unspecified (long-term) [SE]: 3.46094e-6
- sulfur dioxide, Emissions to air, unspecified (long-term) [SI]: 4.90119e-7
- sulfur dioxide, Emissions to air, unspecified (long-term) [SK]: 1.15038e-6
- sulfur dioxide, Emissions to air, unspecified (long-term) [UA]: 3.37293e-6

## Impact indicators
- Eutrophication marine: 0.000701738
- Ecotoxicity, freshwater: 0.143879
- Land use: 0
- Water use: 0.0656615
- Resource use, minerals and metals: 0
- Resource use, fossils: 0
- Climate change: 0.122866
- Ozone depletion: 0
- Human toxicity, cancer: 4.01607e-11
- Human toxicity, non-cancer: 4.09082e-10
- EF-particulate Matter: 2.16506e-8
- Ionising radiation, human health: 9.76248e-7
- Photochemical ozone formation - human health: 0.00157111
- Acidification: 0.0010542
- Eutrophication, terrestrial: 0.00293074
- Eutrophication, freshwater: 4.61548e-5

## Deviations from the LCI method principle
The background data uses:
- the \xe2\x80\x9cRecycled content cut-off\xe2\x80\x9d approach to allocate end-of-life by-products and secondary materials. This allocation is explained in the description of the recycled content system model (http://www.ecoinvent.org/database/system-models-in-ecoinvent-3/cut-off-system-model/allocation-cut-off-by-classification.html).
OR
- EF compliant data

## Deviations from the LCI method approaches
Background data:
- the \xe2\x80\x9cRecycled content cut-off\xe2\x80\x9d approach to allocate end-of-life by-products and secondary materials. This allocation is explained in the description of the recycled content system model (http://www.ecoinvent.org/database/system-models-in-ecoinvent-3/cut-off-system-model/allocation-cut-off-by-classification.html). The ecoinvent database mostly relies on “Allocation – market values” apart for few exceptions particularly in the energy sector. ecoinvent energy data is replaced with EF3.0 core data as per the EF guidelines version 2.0.
OR
- EF compliant data

## Modelling constants
All modelling constants follow the requirements listed in the Tender Specifications 070201/2020/SER/ENV.B1. Completeness: There are no intentional cut-offs in the inventory no matter how small their contribution to all the EF impact categories is. Eventual cut-offs are in compliance with the Guide for EF compliant data sets (JRC 2020), i.e. only if below the 3% cut-off rule. Water use: water use is modelled at country level using separate flows for water withdrawal, water release and water evaporation. Handling multi-functional processes: the following PEF multi- functionality decision hierarchy is applied for resolving all multi- functionality problems: (1) subdivision or system expansion; (2) allocation based on a relevant underlying physical relationship (substitution may apply here); (3) allocation based on some other relationship. Direct land use change: GHG emissions from direct LUC allocated to good/service for 20 years after the LUC occurs, with IPCC default values. Carbon storage and delayed emissions: credits associated with temporary (carbon) storage or delayed emissions up to 300 years are not be considered. Emissions off-setting: are not included. Capital goods (including infrastructures) and their End of life: they are included. System boundaries: system boundaries include all processes linked to the product supply chain (e.g. maintenance). Time period: emissions and removals are modelled as if released or removed at the beginning of the assessment method. Fossil and biogenic carbon emissions and removals: removals and emissions are modelled as follows: All GHG emissions from fossil fuels (including peat and limestone) are modelled consistently with the most updated ILCD list of elementary flows. The non-fossil (biogenic) carbon flows are modelled consistently with the most updated ILCD list of elementary flows.

## Cut-off and completeness
There are no intentional cut-offs in the inventory no matter how small their contribution to all the EF impact categories is. Eventual cut-offs are in compliance with the Guide for EF compliant data sets (JRC 2020), i.e. only if below the 3% cut-off rule. The dataset dry mass and water balance has been checked to ensure the inventory is complete. Capital goods (e.g. infrastructure) and their end-of-life are included.

## Data selection and combination
These datasets include, in both their foreground and background data, links to EF3.0 compliant data.
The relevant background data on energy, transport, and End of Life are from the LCDN data node (http://lcdn.thinkstep.com/Node/).
All other background data in the supply of this product for which no EF3.0 process was available are from ecoinvent v3.7 database (www.ecoinvent.org) or other data sources.

## Data treatment and extrapolations
Several data sources have been used to model the inventory.

## Use advice
This data set is a supporting sub-data set and must be used exclusively as sub-data set of its corresponding level-1 partly disaggregated data set (see “General comment” field for exact name and UUID).

## Data sources
- Background Data for Representative products and organisations. EF 3.0 compliant (data stock)
- The European Pulp Industry Sector Association AISBL (EPIS), (2020). EPIS Life Cycle Inventory data for Bleached Eucalyptus Kraft Pulp for Europe, 2020 Data.

## Intended applications
Implementation of regular Product Environmental Footprint (PEF) studies and Organisation Environmental Footprint (OEF) studies exclusively under the specified Product groups and sectors as defined in the Product Environmental Footprint Category Rules (PEFCR) and Organisation Environmental Footprint Sectorial Rules (OEFSR) listed in http://ec.europa.eu/environment/eussd/smgp/PEFCR_OEFSR.htm
