# recycling, elementary; recycling of textile; production mix, at plant; recycling of 1kg of textile

Dataset: ILCD process, Unit process, single operation
Geography: GLO
Reference year: 2021
Valid until: 2024
Classification: Other Services / Other services
LCI method principle: Attributional
LCI method approaches: Allocation - market value
Completeness: All relevant flows quantified
Project: Provision of process-based 3.0 Environmental Footprint-compliant life cycle inventory datasets - Others - contract number 070201/2020/840235/SER/ENV.B.1
Generated by: Life Cycle Indonesia
Owner: PRé Sustainability B.V.
Compliance: Environmental Footprint non-primary supporting data set; Environmental Footprint 3.1
Amounts: no units in this file; such an amount is in the reference unit of its flow, which a separate flow dataset defines
copyright: true
licenseType: Free of charge for some user types or use types
accessRestrictions: Free of charge for all final users implementing a regular Product Environmental Footprint (PEF) studies and Organisation Environmental Footprint (OEF) studies exclusively under the specified Product groups and sectors as defined in the Product Environmental Footprint Category Rules (PEFCR) and Organisation Environmental Footprint Sectorial Rules (OEFSR) listed in http://ec.europa.eu/environment/eussd/smgp/PEFCR_OEFSR.htm and in accordance with the terms and conditions of the EULA (available at https://ecoinvent.lca-data.com/) exclusively until 31st December 2024. Any use of this dataset or any derivative data not within the specific context of one of the PEF/OEF projects or after the end of 2024 is not permitted.

## General comment
Notice: this data set supersedes the EF3.0-compliant version (see link under "preceding data set version" below calculated with the EF3.0). The life cycle inventory is not changed from the original EF3.0 data set. The LCIA results are calculated based on the EF3.1 methods which provide updated characterisation factors in the following impact categories: Climate Change, Ecotoxicity freshwater, Photochemical Ozone Formation, Acidification, Human Toxicity non-cancer, and Human Toxicity cancer. The review report and the data quality ratings refer to the original results. The data set has been updated by the European Commission on the basis of the original EF3.0 data set delivered by the data provider.This sub-process has limited documentation only. For all detailed documentation of the full model to which this data set belongs (such as DQRs, review reports and other technical documentation), please see this process: recycling - GLO []

## Technology and included processes
In the textile and apparel industry, there are numerous examples of recycling collection and processing programs. In the processing, there are two categories commonly used in textiles, mechanical and chemical. (Muthu, 2017)

Mechanical recycling processes can result in the production of fabric, yarns, or fibers to be used in new products. The discarded textile is opened up, apparel is disassembled, and fabrics are cut into smaller pieces. It is then passed through a rotating drum to continue the breakdown and fibers are obtained. This process is known as garneting. The resulting fiber characteristics of length, fineness, strength, polymer, and color determine the quality and what the most appropriate new end product would be. Typically, waste collected from the manufacturing supply chain will produce higher-quality recycled fibers that those collected from post-consumer waste. The pre-consumer and post-industrial processed waste can be respun into yarns which woven or knitted into fabrics, and then used in apparel, sheeting, and upholstery. Medium-grade fibers can be used to make fabrics but are used in end products such as wipes and fillings. Lower-quality fibers will be used as reinforcement in other structures (i.e., concrete), nonwoven fabrics, carpet underlays, shoe inlays, automotive sound and thermal insulation, home insulation, stuffing for toys, and other end products. (Muthu, 2017)

Chemical recycling is the other method commonly used to process the collected waste in the textile industry. Synthetic fibers including polyesters, polyamides, and polyolefins can be chemically recycled. This falls under the tertiary class of recycling which requires the breaking down of the synthetic fibers for repolymerization. This process can be used when PET plastic water bottles are recycled. Whether it is the collection of used polyester apparel, fabric scraps, yarns waste, or other plastics, the recycled items are broken into small pieces from which chips are produced. The chips are decomposed to form dimethyl terephthalate, which is then repolymerized and spun into new polyester fibers, filaments, and yarns. (Muthu, 2017)

This dataset describes the process of mechanical recycling. The activity starts when the raw materials enter the process. Materials entering the process are included as well as energy uses and infrastructure. The preparatory steps to eliminate hardpoints (e.g. the process of unbuttoning and unzipping) is not included in this dataset. There is no direct emission to soil and air since the emission comes from electricity usage, while the emission to water comes from waste lube oil. The consumption of lubricating oil using a stich bonding machines as a proxy.

Muthu, Subramanian Senthilkannan (2017). Textiles and Clothing Sustainability Recycled and Upcycled Textiles and Fashion, SGS Hong Kong Limited, Hong Kong

## Reference product
- recycling // recycling // glo, elementary: 1

## Impact indicators
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
## Deviations from the LCI method principle
The background data uses:
- the \xe2\x80\x9cRecycled content cut-off\xe2\x80\x9d approach to allocate end-of-life by-products and secondary materials. This allocation is explained in the description of the recycled content system model (http://www.ecoinvent.org/database/system-models-in-ecoinvent-3/cut-off-system-model/allocation-cut-off-by-classification.html).
OR
- EF compliant data

## Deviations from the LCI method approaches
Background data:
- the \xe2\x80\x9cRecycled content cut-off\xe2\x80\x9d approach to allocate end-of-life by-products and secondary materials. This allocation is explained in the description of the recycled content system model (http://www.ecoinvent.org/database/system-models-in-ecoinvent-3/cut-off-system-model/allocation-cut-off-by-classification.html). The ecoinvent database mostly relies on “Allocation – market values” apart for few exceptions particularly in the energy sector. ecoinvent energy data is replaced with EF3.0 core data as per the EF guidelines version 2.0.
OR
- EF compliant data

## Modelling constants
All modelling constants follow the requirements listed in the Tender Specifications 070201/2020/SER/ENV.B1. Completeness: There are no intentional cut-offs in the inventory no matter how small their contribution to all the EF impact categories is. Eventual cut-offs are in compliance with the Guide for EF compliant data sets (JRC 2020), i.e. only if below the 3% cut-off rule. Water use: water use is modelled at country level using separate flows for water withdrawal, water release and water evaporation. Handling multi-functional processes: the following PEF multi- functionality decision hierarchy is applied for resolving all multi- functionality problems: (1) subdivision or system expansion; (2) allocation based on a relevant underlying physical relationship (substitution may apply here); (3) allocation based on some other relationship. Direct land use change: GHG emissions from direct LUC allocated to good/service for 20 years after the LUC occurs, with IPCC default values. Carbon storage and delayed emissions: credits associated with temporary (carbon) storage or delayed emissions up to 300 years are not be considered. Emissions off-setting: are not included. Capital goods (including infrastructures) and their End of life: they are included. System boundaries: system boundaries include all processes linked to the product supply chain (e.g. maintenance). Time period: emissions and removals are modelled as if released or removed at the beginning of the assessment method. Fossil and biogenic carbon emissions and removals: removals and emissions are modelled as follows: All GHG emissions from fossil fuels (including peat and limestone) are modelled consistently with the most updated ILCD list of elementary flows. The non-fossil (biogenic) carbon flows are modelled consistently with the most updated ILCD list of elementary flows.

## Cut-off and completeness
There are no intentional cut-offs in the inventory no matter how small their contribution to all the EF impact categories is. Eventual cut-offs are in compliance with the Guide for EF compliant data sets (JRC 2020), i.e. only if below the 3% cut-off rule. The dataset dry mass and water balance has been checked to ensure the inventory is complete. Capital goods (e.g. infrastructure) and their end-of-life are included.

## Data selection and combination
These datasets include, in both their foreground and background data, links to EF3.0 compliant data.
The relevant background data on energy, transport, and End of Life are from the LCDN data node (http://lcdn.thinkstep.com/Node/).
All other background data in the supply of this product for which no EF3.0 process was available are from ecoinvent v3.7 database (www.ecoinvent.org) or other data sources.

## Data treatment and extrapolations
Several data sources have been used to model the inventory.

## Use advice
This data set is a supporting sub-data set and must be used exclusively as sub-data set of its corresponding level-1 partly disaggregated data set (see “General comment” field for exact name and UUID).

## Data sources
- Background Data for Representative products and organisations. EF 3.0 compliant (data stock)
- Cotex (2021) Stitch Bonding Machine, Catalog and Company Email, Suzhou Cotex International Co., Ltd., China.
- Rongda (2021) Cutting & Recycling Machine, https://www.rongdamachinery.com/en/case-1.html, Shandong Gaomi Rongda Machinery Co., Ltd., Shandong, China
- Nick (2021) NK1070T100/NK1070T120 Fiber Baling Machine, https://www.nkbaler.com/NK1070T100NK1070T120-Fiber-Baling-Machine.html, Shaanxi Nick Machinery Equipment Co. LTD, Jiangsu, China

## Intended applications
Implementation of regular Product Environmental Footprint (PEF) studies and Organisation Environmental Footprint (OEF) studies exclusively under the specified Product groups and sectors as defined in the Product Environmental Footprint Category Rules (PEFCR) and Organisation Environmental Footprint Sectorial Rules (OEFSR) listed in http://ec.europa.eu/environment/eussd/smgp/PEFCR_OEFSR.htm
