# bleached kraft pulp, softwood; technology mix; production mix, at plant; dry mass 0.9, carbon content, non-fossil 0.494

Dataset: ILCD process, Partly terminated system
Geography: EU+EFTA+UK
Reference year: 2020
Valid until: 2024
Classification: Materials production / Paper and cardboards
LCI method principle: Attributional
LCI method approaches: Allocation - market value
Completeness: All relevant flows quantified
Project: Provision of process-based 3.0 Environmental Footprint-compliant life cycle inventory datasets - Renewable materials - contract number 070201/2020/840085/SER/ENV.B.1
Generated by: EPIS
Owner: EPIS
Compliance: ILCD Data Network - Entry-level; Suggestions for updating the PEF method 2019; ISO 14040 Environmental Management – Life Cycle Assessment – Principles and Framework, 2006; ISO 14044:2006. Environmental Management – Life Cycle Assessment – Requirements and guidelines.; Environmental Footprint 3.1
Review: Dependent internal review by Marisa Vieira, Emilia Moreno Ruiz; Independent review panel by Michael Sturges
Data quality: Overall quality: Very good; Time representativeness: Very good; Geographical representativeness: Very good; Technological representativeness: Very good; Precision: Good; Methodological appropriateness and consistency: Not applicable
Amounts: no units in this file; such an amount is in the reference unit of its flow, which a separate flow dataset defines
copyright: true
licenseType: Free of charge for some user types or use types
accessRestrictions: Free of charge for all final users implementing a regular Product Environmental Footprint (PEF) studies and Organisation Environmental Footprint (OEF) studies exclusively under the specified Product groups and sectors as defined in the Product Environmental Footprint Category Rules (PEFCR) and Organisation Environmental Footprint Sectorial Rules (OEFSR) listed in http://ec.europa.eu/environment/eussd/smgp/PEFCR_OEFSR.htm and in accordance with the terms and conditions of the EULA (available at https://ecoinvent.lca-data.com/) exclusively until 31st December 2024. Any use of this dataset or any derivative data not within the specific context of one of the PEF/OEF projects or after the end of 2024 is not permitted.

## General comment
Notice: this data set supersedes the EF3.0-compliant version (see link under "preceding data set version" below calculated with the EF3.0). The life cycle inventory is not changed from the original EF3.0 data set. The LCIA results are calculated based on the EF3.1 methods which provide updated characterisation factors in the following impact categories: Climate Change, Ecotoxicity freshwater, Photochemical Ozone Formation, Acidification, Human Toxicity non-cancer, and Human Toxicity cancer. The review report and the data quality ratings refer to the original results. The data set has been updated by the European Commission on the basis of the original EF3.0 data set delivered by the data provider.This dataset represents the European production of bleached kraft pulp, obtained from northern European softwood for the year 2020. Industry data was used which was provided by the European Pulp Industry Sector Association AISBL (EPIS). Values represent weighted average of 16 corresponding pulp mills located in Nordic countries and Germany.
Pulp is a clean, wood-based, renewable and biodegradable raw material to make different paper, board and other products. Main end uses for market pulp are tissue (toilet paper), graphic papers, specialty products, packaging, fluff pulp, viscose, CMC etc. Softwood pulp is made from coniferous trees, most typically from different species of pine and spruce. Softwood fibres are long and slender and are used to give the paper and board products their strength properties.
In 2020, total production of the 16 pulp mills corresponded to 86% of the European market capacity.
This activity starts with the transport of raw material to the pulp factory. The activity ends when the kraft pulp is ready to be sold.
The dataset has been allocated based on the following products: Bleached kraft pulp, softwood // Bleached kraft pulp, softwood // EU+EFTA+UK with allocation factor of 96.2035%, tall oil, crude with allocation factor of 2.5336%, Turpentine with allocation factor of 0.3408%, Bark with allocation factor of 0.841%, sawdust, wet, measured as dry mass with allocation factor of 0.0062%, methanol, from biomass with allocation factor of 0.0748%, Sodium hydroxide with allocation factor of 0.0002%.

## Technology and included processes
The pulp, or fibres from the wood are separated in a kraft cooking process in a so-called fibre line. In a recovery line, the chemicals used in the cooking process are recovered to be used again and energy is produced. The third process is effluent treatment where gaseous and liquid discharges to the environment are continuously minimized and monitored.
The process includes transports to the pulp mill, wood handling, chemical pulping and bleaching, drying process, energy production on-site, recovery cycles of chemicals and internal waste water treatment. The input of magnesium sulphate (0.0027 kg/kg) has been excluded from the inventory since its contribution was less than 3 % in terms of mass and single score.
The following air emissions were reported in the study:
CO2 (fossil and biogenic), SOx (as SO2), NOx, TRS (as S), SO2 (reported as S), Dust (unspecified). Next to these key emissions, additional emissions from on-site energy production from external and internal fuels were calculated, using emission profiles from ecoinvent combustion processes. Internal biogenic fuels are represented by the calculated emissions but do not have the corresponding fuel input from technosphere, because they are supplied from within the system boundaries. The amounts of internal fuels used in the process are: Biogas (55MJ/t), Bark (1952MJ/t), Black liquor(18349MJ/t), Sludge (61 MJ/t), Methanol (145 MJ7t), Biomass (6 MJ/t), tall oil pitch (229 MJ/t), Biomass (wood residuals) (84 MJ/t)

The following ecoinvent combustion processes were used to estimate additional air emissions:

Hard coal: heat production, at hard coal industrial furnace 1-10MW, Europe without Switzerland; Heavy fuel oil: heat production, heavy fuel oil, at industrial furnace 1MW, Europe without Switzerland; Light fuel oil: heat production, light fuel oil, at industrial furnace 1MW, Europe without Switzerland; Biofuel - Biogas: heat production, natural gas, at industrial furnace >100kW, Europe without Switzerland; Methanol: heat production, natural gas, at industrial furnace >100kW, Europe without Switzerland; Natural gas: heat production, natural gas, at industrial furnace >100kW, Europe without Switzerland; Biofuel - Bark (wet weight): heat production, wood chips from industry, at furnace 1000kW, CH; Biofuel - Biomass: heat production, wood chips from industry, at furnace 1000kW, CH; Biofuel - Biomass - wood residuals: heat production, wood chips from industry, at furnace 1000kW, CH; Biofuel - Bark: heat production, wood chips from industry, at furnace 1000kW, CH; Wood pellets: heat production, wood chips from industry, at furnace 1000kW, CH;
Black liquor, sludge, tall oil pitch, and sodium formiate were not included in the emissions calculations because no specific emission profiles, e.g. for the black liquor recovery process, were available. Emissions from these internal energy generation processes are therefore only reflected in the key emission factors provided by the industry, other emissions constitute a data gap. Emissions of stemming from biogas are approximated with the combustion of natural gas, whereby CO2, CO and CH4 emissions stemming from biogas were modelled as non-fossil.
The amount of infrastructure (pulp factory) was taken from the dataset “The European Pulp Industry Sector Association AISBL, sulfate pulp production, from softwood, bleached, RER, Undefined, ecoinvent database version 3.7.1”

## Parameters
- kg_0: 0.00501269
  Mass in kg, for methanol, from biomass; Freight train, diesel traction; EU+EFTA+UK
- km_0: 32.6956
  Distance in km, for methanol, from biomass; Freight train, diesel traction; EU+EFTA+UK
- kg_km_0: 0.163893; = kg_0*km_0
  Transport amount in km*km, for methanol, from biomass; Freight train, diesel traction; EU+EFTA+UK
- kg_1: 0.00501269
  Mass in kg, for methanol, from biomass; Freight train, electricity traction; EU+EFTA+UK
- km_1: 11.042
  Distance in km, for methanol, from biomass; Freight train, electricity traction; EU+EFTA+UK
- kg_km_1: 0.0553503; = kg_1*km_1
  Transport amount in km*km, for methanol, from biomass; Freight train, electricity traction; EU+EFTA+UK
- kg_2: 0.00501269
  Mass in kg, for methanol, from biomass; Freight train, average; EU+EFTA+UK
- km_2: 0.262339
  Distance in km, for methanol, from biomass; Freight train, average; EU+EFTA+UK
- kg_km_2: 0.00131502; = kg_2*km_2
  Transport amount in km*km, for methanol, from biomass; Freight train, average; EU+EFTA+UK
- kg_3: 0.00501269
  Mass in kg, for methanol, from biomass; Barge; EU+EFTA+UK
- km_3: 10.6781
  Distance in km, for methanol, from biomass; Barge; EU+EFTA+UK
- kg_km_3: 0.0535261; = kg_3*km_3
  Transport amount in km*km, for methanol, from biomass; Barge; EU+EFTA+UK
- kg_4: 0.00501269
  Mass in kg, for methanol, from biomass; Articulated lorry transport, Total weight >32 t, mix Euro 0-5; ROW w/o EU+EFTA
- km_4: 56.7
  Distance in km, for methanol, from biomass; Articulated lorry transport, Total weight >32 t, mix Euro 0-5; ROW w/o EU+EFTA
- kg_km_4: 0.284219; = kg_4*km_4
  Transport amount in km*km, for methanol, from biomass; Articulated lorry transport, Total weight >32 t, mix Euro 0-5; ROW w/o EU+EFTA
- kg_5: 0.00501269
  Mass in kg, for methanol, from biomass; Articulated lorry transport, Total weight <7.5 t, mix Euro 0-5; EU+EFTA+UK
- km_5: 1.71121
  Distance in km, for methanol, from biomass; Articulated lorry transport, Total weight <7.5 t, mix Euro 0-5; EU+EFTA+UK
- kg_km_5: 0.00857777; = kg_5*km_5
  Transport amount in km*km, for methanol, from biomass; Articulated lorry transport, Total weight <7.5 t, mix Euro 0-5; EU+EFTA+UK
- kg_6: 0.00501269
  Mass in kg, for methanol, from biomass; Barge; ROW w/o EU+EFTA
- km_6: 21.6219
  Distance in km, for methanol, from biomass; Barge; ROW w/o EU+EFTA
- kg_km_6: 0.108384; = kg_6*km_6
  Transport amount in km*km, for methanol, from biomass; Barge; ROW w/o EU+EFTA
- kg_7: 0.000190874
  Mass in kg, for malusil; Transoceanic ship, bulk; GLO
- km_7: 219.908
  Distance in km, for malusil; Transoceanic ship, bulk; GLO
- kg_km_7: 0.0419748; = kg_7*km_7
  Transport amount in km*km, for malusil; Transoceanic ship, bulk; GLO
- kg_8: 0.000190874
  Mass in kg, for malusil; Freight train, diesel traction; EU+EFTA+UK
- km_8: 27.1484
  Distance in km, for malusil; Freight train, diesel traction; EU+EFTA+UK
- kg_km_8: 0.00518192; = kg_8*km_8
  Transport amount in km*km, for malusil; Freight train, diesel traction; EU+EFTA+UK
- kg_9: 0.000190874
  Mass in kg, for malusil; Freight train, electricity traction; EU+EFTA+UK
- km_9: 9.23477
  Distance in km, for malusil; Freight train, electricity traction; EU+EFTA+UK
- kg_km_9: 0.00176268; = kg_9*km_9
  Transport amount in km*km, for malusil; Freight train, electricity traction; EU+EFTA+UK
- kg_10: 0.000190874
  Mass in kg, for malusil; Freight train, average; EU+EFTA+UK
- km_10: 0.217806
  Distance in km, for malusil; Freight train, average; EU+EFTA+UK
- kg_km_10: 4.15736e-5; = kg_10*km_10
  Transport amount in km*km, for malusil; Freight train, average; EU+EFTA+UK
- kg_11: 0.000190874
  Mass in kg, for malusil; Barge; EU+EFTA+UK
- km_11: 2.08821
  Distance in km, for malusil; Barge; EU+EFTA+UK
- kg_km_11: 0.000398585; = kg_11*km_11
  Transport amount in km*km, for malusil; Barge; EU+EFTA+UK
- kg_12: 0.000190874
  Mass in kg, for malusil; Barge; ROW w/o EU+EFTA
- km_12: 4.26403
  Distance in km, for malusil; Barge; ROW w/o EU+EFTA
- kg_km_12: 0.000813891; = kg_12*km_12
  Transport amount in km*km, for malusil; Barge; ROW w/o EU+EFTA
- kg_13: 0.000190874
  Mass in kg, for malusil; Articulated lorry transport, Total weight <7.5 t, mix Euro 0-5; EU+EFTA+UK
- km_13: 2.87567
  Distance in km, for malusil; Articulated lorry transport, Total weight <7.5 t, mix Euro 0-5; EU+EFTA+UK
- kg_km_13: 0.000548889; = kg_13*km_13
  Transport amount in km*km, for malusil; Articulated lorry transport, Total weight <7.5 t, mix Euro 0-5; EU+EFTA+UK
- kg_14: 0.000190874
  Mass in kg, for malusil; Articulated lorry transport, Euro 4, Total weight >32 t; EU+EFTA+UK
- km_14: 26.8476
  Distance in km, for malusil; Articulated lorry transport, Euro 4, Total weight >32 t; EU+EFTA+UK
- kg_km_14: 0.0051245; = kg_14*km_14
  Transport amount in km*km, for malusil; Articulated lorry transport, Euro 4, Total weight >32 t; EU+EFTA+UK
- kg_15: 0.000190874
  Mass in kg, for malusil; Articulated lorry transport, Total weight >32 t, mix Euro 0-5; ROW w/o EU+EFTA
- km_15: 70.8559
  Distance in km, for malusil; Articulated lorry transport, Total weight >32 t, mix Euro 0-5; ROW w/o EU+EFTA
- kg_km_15: 0.0135245; = kg_15*km_15
  Transport amount in km*km, for malusil; Articulated lorry transport, Total weight >32 t, mix Euro 0-5; ROW w/o EU+EFTA
- kg_16: 0.00150355
  Mass in kg, for sodium hydrogen sulphite // sodium hydrogen sulphite production // eu+efta+uk; Freight train, average; EU+EFTA+UK
- km_16: 239.3
  Distance in km, for sodium hydrogen sulphite // sodium hydrogen sulphite production // eu+efta+uk; Freight train, average; EU+EFTA+UK
- kg_km_16: 0.359801; = kg_16*km_16
  Transport amount in km*km, for sodium hydrogen sulphite // sodium hydrogen sulphite production // eu+efta+uk; Freight train, average; EU+EFTA+UK
- kg_17: 0.00150355
  Mass in kg, for sodium hydrogen sulphite // sodium hydrogen sulphite production // eu+efta+uk; Barge; EU+EFTA+UK
- km_17: 269.373
  Distance in km, for sodium hydrogen sulphite // sodium hydrogen sulphite production // eu+efta+uk; Barge; EU+EFTA+UK
- kg_km_17: 0.405017; = kg_17*km_17
  Transport amount in km*km, for sodium hydrogen sulphite // sodium hydrogen sulphite production // eu+efta+uk; Barge; EU+EFTA+UK
- kg_18: 0.00150355
  Mass in kg, for sodium hydrogen sulphite // sodium hydrogen sulphite production // eu+efta+uk; Articulated lorry transport, Euro 4, Total weight >32 t; EU+EFTA+UK
- km_18: 129.888
  Distance in km, for sodium hydrogen sulphite // sodium hydrogen sulphite production // eu+efta+uk; Articulated lorry transport, Euro 4, Total weight >32 t; EU+EFTA+UK
- kg_km_18: 0.195293; = kg_18*km_18
  Transport amount in km*km, for sodium hydrogen sulphite // sodium hydrogen sulphite production // eu+efta+uk; Articulated lorry transport, Euro 4, Total weight >32 t; EU+EFTA+UK
- kg_19: 3.0536
  Mass in kg, for softwood under bark // softwood forestry // eu+efta+uk; Articulated lorry transport, Euro 4, Total weight >32 t; EU+EFTA+UK
- km_19: 74.0691
  Distance in km, for softwood under bark // softwood forestry // eu+efta+uk; Articulated lorry transport, Euro 4, Total weight >32 t; EU+EFTA+UK
- kg_km_19: 226.178; = kg_19*km_19
  Transport amount in km*km, for softwood under bark // softwood forestry // eu+efta+uk; Articulated lorry transport, Euro 4, Total weight >32 t; EU+EFTA+UK
- kg_20: 3.0536
  Mass in kg, for softwood under bark // softwood forestry // eu+efta+uk; Barge; EU+EFTA+UK
- km_20: 7.43276
  Distance in km, for softwood under bark // softwood forestry // eu+efta+uk; Barge; EU+EFTA+UK
- kg_km_20: 22.6967; = kg_20*km_20
  Transport amount in km*km, for softwood under bark // softwood forestry // eu+efta+uk; Barge; EU+EFTA+UK
- kg_21: 3.0536
  Mass in kg, for softwood under bark // softwood forestry // eu+efta+uk; Freight train, average; EU+EFTA+UK
- km_21: 114.418
  Distance in km, for softwood under bark // softwood forestry // eu+efta+uk; Freight train, average; EU+EFTA+UK
- kg_km_21: 349.388; = kg_21*km_21
  Transport amount in km*km, for softwood under bark // softwood forestry // eu+efta+uk; Freight train, average; EU+EFTA+UK
- kg_22: 3.0536
  Mass in kg, for softwood under bark // softwood forestry // eu+efta+uk; Transoceanic ship, bulk; GLO
- km_22: 169.025
  Distance in km, for softwood under bark // softwood forestry // eu+efta+uk; Transoceanic ship, bulk; GLO
- kg_km_22: 516.137; = kg_22*km_22
  Transport amount in km*km, for softwood under bark // softwood forestry // eu+efta+uk; Transoceanic ship, bulk; GLO
- kg_23: 0.428327
  Mass in kg, for wood chips, softwood // wood chips, softwood // eu+efta+uk; Articulated lorry transport, Euro 4, Total weight >32 t; EU+EFTA+UK
- km_23: 106.37
  Distance in km, for wood chips, softwood // wood chips, softwood // eu+efta+uk; Articulated lorry transport, Euro 4, Total weight >32 t; EU+EFTA+UK
- kg_km_23: 45.5613; = kg_23*km_23
  Transport amount in km*km, for wood chips, softwood // wood chips, softwood // eu+efta+uk; Articulated lorry transport, Euro 4, Total weight >32 t; EU+EFTA+UK
- kg_24: 0.428327
  Mass in kg, for wood chips, softwood // wood chips, softwood // eu+efta+uk; Barge; EU+EFTA+UK
- km_24: 9.68459
  Distance in km, for wood chips, softwood // wood chips, softwood // eu+efta+uk; Barge; EU+EFTA+UK
- kg_km_24: 4.14818; = kg_24*km_24
  Transport amount in km*km, for wood chips, softwood // wood chips, softwood // eu+efta+uk; Barge; EU+EFTA+UK
- kg_25: 0.428327
  Mass in kg, for wood chips, softwood // wood chips, softwood // eu+efta+uk; Freight train, average; EU+EFTA+UK
- km_25: 162.615
  Distance in km, for wood chips, softwood // wood chips, softwood // eu+efta+uk; Freight train, average; EU+EFTA+UK
- kg_km_25: 69.6524; = kg_25*km_25
  Transport amount in km*km, for wood chips, softwood // wood chips, softwood // eu+efta+uk; Freight train, average; EU+EFTA+UK
- kg_26: 0.428327
  Mass in kg, for wood chips, softwood // wood chips, softwood // eu+efta+uk; Transoceanic ship, bulk; GLO
- km_26: 201.065
  Distance in km, for wood chips, softwood // wood chips, softwood // eu+efta+uk; Transoceanic ship, bulk; GLO
- kg_km_26: 86.1219; = kg_26*km_26
  Transport amount in km*km, for wood chips, softwood // wood chips, softwood // eu+efta+uk; Transoceanic ship, bulk; GLO
- kg_27: 0.00649766
  Mass in kg, for biogas for bioenergy // biogas for bioenergy // eu+efta+uk; Freight train, average; EU+EFTA+UK
- km_27: 239.855
  Distance in km, for biogas for bioenergy // biogas for bioenergy // eu+efta+uk; Freight train, average; EU+EFTA+UK
- kg_km_27: 1.5585; = kg_27*km_27
  Transport amount in km*km, for biogas for bioenergy // biogas for bioenergy // eu+efta+uk; Freight train, average; EU+EFTA+UK
- kg_28: 0.00649766
  Mass in kg, for biogas for bioenergy // biogas for bioenergy // eu+efta+uk; Barge; EU+EFTA+UK
- km_28: 269.467
  Distance in km, for biogas for bioenergy // biogas for bioenergy // eu+efta+uk; Barge; EU+EFTA+UK
- kg_km_28: 1.7509; = kg_28*km_28
  Transport amount in km*km, for biogas for bioenergy // biogas for bioenergy // eu+efta+uk; Barge; EU+EFTA+UK
- kg_29: 0.00649766
  Mass in kg, for biogas for bioenergy // biogas for bioenergy // eu+efta+uk; Articulated lorry transport, Euro 4, Total weight >32 t; EU+EFTA+UK
- km_29: 129.996
  Distance in km, for biogas for bioenergy // biogas for bioenergy // eu+efta+uk; Articulated lorry transport, Euro 4, Total weight >32 t; EU+EFTA+UK
- kg_km_29: 0.844666; = kg_29*km_29
  Transport amount in km*km, for biogas for bioenergy // biogas for bioenergy // eu+efta+uk; Articulated lorry transport, Euro 4, Total weight >32 t; EU+EFTA+UK
- kg_30: 0.0083749
  Mass in kg, for bark, hardwood // bark, hardwood // eu+efta+uk; Freight train, average; EU+EFTA+UK
- km_30: 407.995
  Distance in km, for bark, hardwood // bark, hardwood // eu+efta+uk; Freight train, average; EU+EFTA+UK
- kg_km_30: 3.41692; = kg_30*km_30
  Transport amount in km*km, for bark, hardwood // bark, hardwood // eu+efta+uk; Freight train, average; EU+EFTA+UK
- kg_31: 0.0083749
  Mass in kg, for bark, hardwood // bark, hardwood // eu+efta+uk; Barge; EU+EFTA+UK
- km_31: 458.994
  Distance in km, for bark, hardwood // bark, hardwood // eu+efta+uk; Barge; EU+EFTA+UK
- kg_km_31: 3.84403; = kg_31*km_31
  Transport amount in km*km, for bark, hardwood // bark, hardwood // eu+efta+uk; Barge; EU+EFTA+UK
- kg_32: 0.0083749
  Mass in kg, for bark, hardwood // bark, hardwood // eu+efta+uk; Articulated lorry transport, Euro 4, Total weight >32 t; EU+EFTA+UK
- km_32: 220.997
  Distance in km, for bark, hardwood // bark, hardwood // eu+efta+uk; Articulated lorry transport, Euro 4, Total weight >32 t; EU+EFTA+UK
- kg_km_32: 1.85083; = kg_32*km_32
  Transport amount in km*km, for bark, hardwood // bark, hardwood // eu+efta+uk; Articulated lorry transport, Euro 4, Total weight >32 t; EU+EFTA+UK
- kg_33: 0.0083749
  Mass in kg, for bark, softwood // bark, softwood // eu+efta+uk; Freight train, average; EU+EFTA+UK
- km_33: 407.995
  Distance in km, for bark, softwood // bark, softwood // eu+efta+uk; Freight train, average; EU+EFTA+UK
- kg_km_33: 3.41692; = kg_33*km_33
  Transport amount in km*km, for bark, softwood // bark, softwood // eu+efta+uk; Freight train, average; EU+EFTA+UK
- kg_34: 0.0083749
  Mass in kg, for bark, softwood // bark, softwood // eu+efta+uk; Barge; EU+EFTA+UK
- km_34: 458.994
  Distance in km, for bark, softwood // bark, softwood // eu+efta+uk; Barge; EU+EFTA+UK
- kg_km_34: 3.84403; = kg_34*km_34
  Transport amount in km*km, for bark, softwood // bark, softwood // eu+efta+uk; Barge; EU+EFTA+UK
- kg_35: 0.0083749
  Mass in kg, for bark, softwood // bark, softwood // eu+efta+uk; Articulated lorry transport, Euro 4, Total weight >32 t; EU+EFTA+UK
- km_35: 220.997
  Distance in km, for bark, softwood // bark, softwood // eu+efta+uk; Articulated lorry transport, Euro 4, Total weight >32 t; EU+EFTA+UK
- kg_km_35: 1.85083; = kg_35*km_35
  Transport amount in km*km, for bark, softwood // bark, softwood // eu+efta+uk; Articulated lorry transport, Euro 4, Total weight >32 t; EU+EFTA+UK
- kg_36: 0.00701028
  Mass in kg, for heavy fuel oil (1.0 wt.% s) // heavy fuel oil at refinery // eu+efta+uk; Freight train, average; EU+EFTA+UK
- km_36: 240.156
  Distance in km, for heavy fuel oil (1.0 wt.% s) // heavy fuel oil at refinery // eu+efta+uk; Freight train, average; EU+EFTA+UK
- kg_km_36: 1.68356; = kg_36*km_36
  Transport amount in km*km, for heavy fuel oil (1.0 wt.% s) // heavy fuel oil at refinery // eu+efta+uk; Freight train, average; EU+EFTA+UK
- kg_37: 0.00701028
  Mass in kg, for heavy fuel oil (1.0 wt.% s) // heavy fuel oil at refinery // eu+efta+uk; Barge; EU+EFTA+UK
- km_37: 270.347
  Distance in km, for heavy fuel oil (1.0 wt.% s) // heavy fuel oil at refinery // eu+efta+uk; Barge; EU+EFTA+UK
- kg_km_37: 1.89521; = kg_37*km_37
  Transport amount in km*km, for heavy fuel oil (1.0 wt.% s) // heavy fuel oil at refinery // eu+efta+uk; Barge; EU+EFTA+UK
- kg_38: 0.00701028
  Mass in kg, for heavy fuel oil (1.0 wt.% s) // heavy fuel oil at refinery // eu+efta+uk; Articulated lorry transport, Euro 4, Total weight >32 t; EU+EFTA+UK
- km_38: 129.959
  Distance in km, for heavy fuel oil (1.0 wt.% s) // heavy fuel oil at refinery // eu+efta+uk; Articulated lorry transport, Euro 4, Total weight >32 t; EU+EFTA+UK
- kg_km_38: 0.911047; = kg_38*km_38
  Transport amount in km*km, for heavy fuel oil (1.0 wt.% s) // heavy fuel oil at refinery // eu+efta+uk; Articulated lorry transport, Euro 4, Total weight >32 t; EU+EFTA+UK
- kg_39: 0.000517856
  Mass in kg, for light fuel oil // light fuel oil at refinery // eu+efta+uk; Freight train, average; EU+EFTA+UK
- km_39: 239.647
  Distance in km, for light fuel oil // light fuel oil at refinery // eu+efta+uk; Freight train, average; EU+EFTA+UK
- kg_km_39: 0.124102; = kg_39*km_39
  Transport amount in km*km, for light fuel oil // light fuel oil at refinery // eu+efta+uk; Freight train, average; EU+EFTA+UK
- kg_40: 0.000517856
  Mass in kg, for light fuel oil // light fuel oil at refinery // eu+efta+uk; Barge; EU+EFTA+UK
- km_40: 269.37
  Distance in km, for light fuel oil // light fuel oil at refinery // eu+efta+uk; Barge; EU+EFTA+UK
- kg_km_40: 0.139495; = kg_40*km_40
  Transport amount in km*km, for light fuel oil // light fuel oil at refinery // eu+efta+uk; Barge; EU+EFTA+UK
- kg_41: 0.000517856
  Mass in kg, for light fuel oil // light fuel oil at refinery // eu+efta+uk; Articulated lorry transport, Euro 4, Total weight >32 t; EU+EFTA+UK
- km_41: 130.041
  Distance in km, for light fuel oil // light fuel oil at refinery // eu+efta+uk; Articulated lorry transport, Euro 4, Total weight >32 t; EU+EFTA+UK
- kg_km_41: 0.0673424; = kg_41*km_41
  Transport amount in km*km, for light fuel oil // light fuel oil at refinery // eu+efta+uk; Articulated lorry transport, Euro 4, Total weight >32 t; EU+EFTA+UK
- kg_42: 8.22394e-5
  Mass in kg, for hard coal, at consumer eu+efta // hard coal mix // eu+efta+uk; Freight train, average; EU+EFTA+UK
- km_42: 239.809
  Distance in km, for hard coal, at consumer eu+efta // hard coal mix // eu+efta+uk; Freight train, average; EU+EFTA+UK
- kg_km_42: 0.0197217; = kg_42*km_42
  Transport amount in km*km, for hard coal, at consumer eu+efta // hard coal mix // eu+efta+uk; Freight train, average; EU+EFTA+UK
- kg_43: 8.22394e-5
  Mass in kg, for hard coal, at consumer eu+efta // hard coal mix // eu+efta+uk; Barge; EU+EFTA+UK
- km_43: 270.223
  Distance in km, for hard coal, at consumer eu+efta // hard coal mix // eu+efta+uk; Barge; EU+EFTA+UK
- kg_km_43: 0.022223; = kg_43*km_43
  Transport amount in km*km, for hard coal, at consumer eu+efta // hard coal mix // eu+efta+uk; Barge; EU+EFTA+UK
- kg_44: 8.22394e-5
  Mass in kg, for hard coal, at consumer eu+efta // hard coal mix // eu+efta+uk; Articulated lorry transport, Euro 4, Total weight >32 t; EU+EFTA+UK
- km_44: 129.848
  Distance in km, for hard coal, at consumer eu+efta // hard coal mix // eu+efta+uk; Articulated lorry transport, Euro 4, Total weight >32 t; EU+EFTA+UK
- kg_km_44: 0.0106786; = kg_44*km_44
  Transport amount in km*km, for hard coal, at consumer eu+efta // hard coal mix // eu+efta+uk; Articulated lorry transport, Euro 4, Total weight >32 t; EU+EFTA+UK
- kg_45: 0.00079538
  Mass in kg, for sodium formate // sodium formate production // eu+efta+uk; Freight train, average; EU+EFTA+UK
- km_45: 239.487
  Distance in km, for sodium formate // sodium formate production // eu+efta+uk; Freight train, average; EU+EFTA+UK
- kg_km_45: 0.190483; = kg_45*km_45
  Transport amount in km*km, for sodium formate // sodium formate production // eu+efta+uk; Freight train, average; EU+EFTA+UK
- kg_46: 0.00079538
  Mass in kg, for sodium formate // sodium formate production // eu+efta+uk; Barge; EU+EFTA+UK
- km_46: 269.725
  Distance in km, for sodium formate // sodium formate production // eu+efta+uk; Barge; EU+EFTA+UK
- kg_km_46: 0.214534; = kg_46*km_46
  Transport amount in km*km, for sodium formate // sodium formate production // eu+efta+uk; Barge; EU+EFTA+UK
- kg_47: 0.00079538
  Mass in kg, for sodium formate // sodium formate production // eu+efta+uk; Articulated lorry transport, Euro 4, Total weight >32 t; EU+EFTA+UK
- km_47: 129.419
  Distance in km, for sodium formate // sodium formate production // eu+efta+uk; Articulated lorry transport, Euro 4, Total weight >32 t; EU+EFTA+UK
- kg_km_47: 0.102938; = kg_47*km_47
  Transport amount in km*km, for sodium formate // sodium formate production // eu+efta+uk; Articulated lorry transport, Euro 4, Total weight >32 t; EU+EFTA+UK
- kg_48: 0.0102337
  Mass in kg, for hydrogen peroxide, 100% // hydrogen peroxide, 100% production // eu+efta+uk; Freight train, average; EU+EFTA+UK
- km_48: 239.717
  Distance in km, for hydrogen peroxide, 100% // hydrogen peroxide, 100% production // eu+efta+uk; Freight train, average; EU+EFTA+UK
- kg_km_48: 2.45319; = kg_48*km_48
  Transport amount in km*km, for hydrogen peroxide, 100% // hydrogen peroxide, 100% production // eu+efta+uk; Freight train, average; EU+EFTA+UK
- kg_49: 0.0102337
  Mass in kg, for hydrogen peroxide, 100% // hydrogen peroxide, 100% production // eu+efta+uk; Barge; EU+EFTA+UK
- km_49: 269.799
  Distance in km, for hydrogen peroxide, 100% // hydrogen peroxide, 100% production // eu+efta+uk; Barge; EU+EFTA+UK
- kg_km_49: 2.76104; = kg_49*km_49
  Transport amount in km*km, for hydrogen peroxide, 100% // hydrogen peroxide, 100% production // eu+efta+uk; Barge; EU+EFTA+UK
- kg_50: 0.0102337
  Mass in kg, for hydrogen peroxide, 100% // hydrogen peroxide, 100% production // eu+efta+uk; Articulated lorry transport, Euro 4, Total weight >32 t; EU+EFTA+UK
- km_50: 129.729
  Distance in km, for hydrogen peroxide, 100% // hydrogen peroxide, 100% production // eu+efta+uk; Articulated lorry transport, Euro 4, Total weight >32 t; EU+EFTA+UK
- kg_km_50: 1.32761; = kg_50*km_50
  Transport amount in km*km, for hydrogen peroxide, 100% // hydrogen peroxide, 100% production // eu+efta+uk; Articulated lorry transport, Euro 4, Total weight >32 t; EU+EFTA+UK
- kg_51: 0.020821
  Mass in kg, for oxygen // oxygen production // eu+efta+uk; Freight train, average; EU+EFTA+UK
- km_51: 239.804
  Distance in km, for oxygen // oxygen production // eu+efta+uk; Freight train, average; EU+EFTA+UK
- kg_km_51: 4.99296; = kg_51*km_51
  Transport amount in km*km, for oxygen // oxygen production // eu+efta+uk; Freight train, average; EU+EFTA+UK
- kg_52: 0.020821
  Mass in kg, for oxygen // oxygen production // eu+efta+uk; Barge; EU+EFTA+UK
- km_52: 269.837
  Distance in km, for oxygen // oxygen production // eu+efta+uk; Barge; EU+EFTA+UK
- kg_km_52: 5.61828; = kg_52*km_52
  Transport amount in km*km, for oxygen // oxygen production // eu+efta+uk; Barge; EU+EFTA+UK
- kg_53: 0.020821
  Mass in kg, for oxygen // oxygen production // eu+efta+uk; Articulated lorry transport, Euro 4, Total weight >32 t; EU+EFTA+UK
- km_53: 129.836
  Distance in km, for oxygen // oxygen production // eu+efta+uk; Articulated lorry transport, Euro 4, Total weight >32 t; EU+EFTA+UK
- kg_km_53: 2.70332; = kg_53*km_53
  Transport amount in km*km, for oxygen // oxygen production // eu+efta+uk; Articulated lorry transport, Euro 4, Total weight >32 t; EU+EFTA+UK
- kg_54: 0.011951
  Mass in kg, for sodium chlorate // sodium chlorate production // glo; Freight train, average; EU+EFTA+UK
- km_54: 239.886
  Distance in km, for sodium chlorate // sodium chlorate production // glo; Freight train, average; EU+EFTA+UK
- kg_km_54: 2.86686; = kg_54*km_54
  Transport amount in km*km, for sodium chlorate // sodium chlorate production // glo; Freight train, average; EU+EFTA+UK
- kg_55: 0.011951
  Mass in kg, for sodium chlorate // sodium chlorate production // glo; Barge; EU+EFTA+UK
- km_55: 269.67
  Distance in km, for sodium chlorate // sodium chlorate production // glo; Barge; EU+EFTA+UK
- kg_km_55: 3.22282; = kg_55*km_55
  Transport amount in km*km, for sodium chlorate // sodium chlorate production // glo; Barge; EU+EFTA+UK
- kg_56: 0.011951
  Mass in kg, for sodium chlorate // sodium chlorate production // glo; Articulated lorry transport, Euro 4, Total weight >32 t; EU+EFTA+UK
- km_56: 129.603
  Distance in km, for sodium chlorate // sodium chlorate production // glo; Articulated lorry transport, Euro 4, Total weight >32 t; EU+EFTA+UK
- kg_km_56: 1.54888; = kg_56*km_56
  Transport amount in km*km, for sodium chlorate // sodium chlorate production // glo; Articulated lorry transport, Euro 4, Total weight >32 t; EU+EFTA+UK
- kg_57: 0.0279281
  Mass in kg, for sodium hydroxide // sodium hydroxide production // eu+efta+uk; Freight train, average; EU+EFTA+UK
- km_57: 240.095
  Distance in km, for sodium hydroxide // sodium hydroxide production // eu+efta+uk; Freight train, average; EU+EFTA+UK
- kg_km_57: 6.70538; = kg_57*km_57
  Transport amount in km*km, for sodium hydroxide // sodium hydroxide production // eu+efta+uk; Freight train, average; EU+EFTA+UK
- kg_58: 0.0279281
  Mass in kg, for sodium hydroxide // sodium hydroxide production // eu+efta+uk; Barge; EU+EFTA+UK
- km_58: 270.063
  Distance in km, for sodium hydroxide // sodium hydroxide production // eu+efta+uk; Barge; EU+EFTA+UK
- kg_km_58: 7.54235; = kg_58*km_58
  Transport amount in km*km, for sodium hydroxide // sodium hydroxide production // eu+efta+uk; Barge; EU+EFTA+UK
- kg_59: 0.0279281
  Mass in kg, for sodium hydroxide // sodium hydroxide production // eu+efta+uk; Articulated lorry transport, Euro 4, Total weight >32 t; EU+EFTA+UK
- km_59: 129.865
  Distance in km, for sodium hydroxide // sodium hydroxide production // eu+efta+uk; Articulated lorry transport, Euro 4, Total weight >32 t; EU+EFTA+UK
- kg_km_59: 3.62687; = kg_59*km_59
  Transport amount in km*km, for sodium hydroxide // sodium hydroxide production // eu+efta+uk; Articulated lorry transport, Euro 4, Total weight >32 t; EU+EFTA+UK
- kg_60: 0.0259189
  Mass in kg, for sulphuric acid // sulphuric acid production // eu+efta+uk; Freight train, average; EU+EFTA+UK
- km_60: 240.148
  Distance in km, for sulphuric acid // sulphuric acid production // eu+efta+uk; Freight train, average; EU+EFTA+UK
- kg_km_60: 6.22436; = kg_60*km_60
  Transport amount in km*km, for sulphuric acid // sulphuric acid production // eu+efta+uk; Freight train, average; EU+EFTA+UK
- kg_61: 0.0259189
  Mass in kg, for sulphuric acid // sulphuric acid production // eu+efta+uk; Barge; EU+EFTA+UK
- km_61: 269.841
  Distance in km, for sulphuric acid // sulphuric acid production // eu+efta+uk; Barge; EU+EFTA+UK
- kg_km_61: 6.99399; = kg_61*km_61
  Transport amount in km*km, for sulphuric acid // sulphuric acid production // eu+efta+uk; Barge; EU+EFTA+UK
- kg_62: 0.0259189
  Mass in kg, for sulphuric acid // sulphuric acid production // eu+efta+uk; Articulated lorry transport, Euro 4, Total weight >32 t; EU+EFTA+UK
- km_62: 129.91
  Distance in km, for sulphuric acid // sulphuric acid production // eu+efta+uk; Articulated lorry transport, Euro 4, Total weight >32 t; EU+EFTA+UK
- kg_km_62: 3.36712; = kg_62*km_62
  Transport amount in km*km, for sulphuric acid // sulphuric acid production // eu+efta+uk; Articulated lorry transport, Euro 4, Total weight >32 t; EU+EFTA+UK
- kg_63: 2.77535e-5
  Mass in kg, for ozone // ozone production // glo; Freight train, average; EU+EFTA+UK
- km_63: 239.872
  Distance in km, for ozone // ozone production // glo; Freight train, average; EU+EFTA+UK
- kg_km_63: 0.00665728; = kg_63*km_63
  Transport amount in km*km, for ozone // ozone production // glo; Freight train, average; EU+EFTA+UK
- kg_64: 2.77535e-5
  Mass in kg, for ozone // ozone production // glo; Barge; EU+EFTA+UK
- km_64: 270.029
  Distance in km, for ozone // ozone production // glo; Barge; EU+EFTA+UK
- kg_km_64: 0.00749425; = kg_64*km_64
  Transport amount in km*km, for ozone // ozone production // glo; Barge; EU+EFTA+UK
- kg_65: 2.77535e-5
  Mass in kg, for ozone // ozone production // glo; Articulated lorry transport, Euro 4, Total weight >32 t; EU+EFTA+UK
- km_65: 129.988
  Distance in km, for ozone // ozone production // glo; Articulated lorry transport, Euro 4, Total weight >32 t; EU+EFTA+UK
- kg_km_65: 0.00360763; = kg_65*km_65
  Transport amount in km*km, for ozone // ozone production // glo; Articulated lorry transport, Euro 4, Total weight >32 t; EU+EFTA+UK
- kg_66: 5.36793e-5
  Mass in kg, for sulphur // sulphur production // eu+efta+uk; Freight train, average; EU+EFTA+UK
- km_66: 240.153
  Distance in km, for sulphur // sulphur production // eu+efta+uk; Freight train, average; EU+EFTA+UK
- kg_km_66: 0.0128913; = kg_66*km_66
  Transport amount in km*km, for sulphur // sulphur production // eu+efta+uk; Freight train, average; EU+EFTA+UK
- kg_67: 5.36793e-5
  Mass in kg, for sulphur // sulphur production // eu+efta+uk; Barge; EU+EFTA+UK
- km_67: 270.62
  Distance in km, for sulphur // sulphur production // eu+efta+uk; Barge; EU+EFTA+UK
- kg_km_67: 0.0145267; = kg_67*km_67
  Transport amount in km*km, for sulphur // sulphur production // eu+efta+uk; Barge; EU+EFTA+UK
- kg_68: 5.36793e-5
  Mass in kg, for sulphur // sulphur production // eu+efta+uk; Articulated lorry transport, Euro 4, Total weight >32 t; EU+EFTA+UK
- km_68: 129.934
  Distance in km, for sulphur // sulphur production // eu+efta+uk; Articulated lorry transport, Euro 4, Total weight >32 t; EU+EFTA+UK
- kg_km_68: 0.00697475; = kg_68*km_68
  Transport amount in km*km, for sulphur // sulphur production // eu+efta+uk; Articulated lorry transport, Euro 4, Total weight >32 t; EU+EFTA+UK
- kg_69: 0.00443998
  Mass in kg, for chlorine dioxide // chlorine dioxide production // glo; Freight train, average; EU+EFTA+UK
- km_69: 240.51
  Distance in km, for chlorine dioxide // chlorine dioxide production // glo; Freight train, average; EU+EFTA+UK
- kg_km_69: 1.06786; = kg_69*km_69
  Transport amount in km*km, for chlorine dioxide // chlorine dioxide production // glo; Freight train, average; EU+EFTA+UK
- kg_70: 0.00443998
  Mass in kg, for chlorine dioxide // chlorine dioxide production // glo; Barge; EU+EFTA+UK
- km_70: 270.844
  Distance in km, for chlorine dioxide // chlorine dioxide production // glo; Barge; EU+EFTA+UK
- kg_km_70: 1.20254; = kg_70*km_70
  Transport amount in km*km, for chlorine dioxide // chlorine dioxide production // glo; Barge; EU+EFTA+UK
- kg_71: 0.00443998
  Mass in kg, for chlorine dioxide // chlorine dioxide production // glo; Articulated lorry transport, Euro 4, Total weight >32 t; EU+EFTA+UK
- km_71: 130.005
  Distance in km, for chlorine dioxide // chlorine dioxide production // glo; Articulated lorry transport, Euro 4, Total weight >32 t; EU+EFTA+UK
- kg_km_71: 0.577221; = kg_71*km_71
  Transport amount in km*km, for chlorine dioxide // chlorine dioxide production // glo; Articulated lorry transport, Euro 4, Total weight >32 t; EU+EFTA+UK
- kg_72: 0.00035099
  Mass in kg, for hydrochloric acid // hydrochloric acid production // eu+efta+uk; Freight train, average; EU+EFTA+UK
- km_72: 240.105
  Distance in km, for hydrochloric acid // hydrochloric acid production // eu+efta+uk; Freight train, average; EU+EFTA+UK
- kg_km_72: 0.0842742; = kg_72*km_72
  Transport amount in km*km, for hydrochloric acid // hydrochloric acid production // eu+efta+uk; Freight train, average; EU+EFTA+UK
- kg_73: 0.00035099
  Mass in kg, for hydrochloric acid // hydrochloric acid production // eu+efta+uk; Barge; EU+EFTA+UK
- km_73: 269.981
  Distance in km, for hydrochloric acid // hydrochloric acid production // eu+efta+uk; Barge; EU+EFTA+UK
- kg_km_73: 0.0947604; = kg_73*km_73
  Transport amount in km*km, for hydrochloric acid // hydrochloric acid production // eu+efta+uk; Barge; EU+EFTA+UK
- kg_74: 0.00035099
  Mass in kg, for hydrochloric acid // hydrochloric acid production // eu+efta+uk; Articulated lorry transport, Euro 4, Total weight >32 t; EU+EFTA+UK
- km_74: 129.92
  Distance in km, for hydrochloric acid // hydrochloric acid production // eu+efta+uk; Articulated lorry transport, Euro 4, Total weight >32 t; EU+EFTA+UK
- kg_km_74: 0.0456004; = kg_74*km_74
  Transport amount in km*km, for hydrochloric acid // hydrochloric acid production // eu+efta+uk; Articulated lorry transport, Euro 4, Total weight >32 t; EU+EFTA+UK
- kg_75: 0.000363886
  Mass in kg, for sodium sulphate // sodium sulphate production // eu+efta+uk; Freight train, average; EU+EFTA+UK
- km_75: 0
  Distance in km, for sodium sulphate // sodium sulphate production // eu+efta+uk; Freight train, average; EU+EFTA+UK
- kg_km_75: 0; = kg_75*km_75
  Transport amount in km*km, for sodium sulphate // sodium sulphate production // eu+efta+uk; Freight train, average; EU+EFTA+UK
- kg_76: 0.000363886
  Mass in kg, for sodium sulphate // sodium sulphate production // eu+efta+uk; Barge; EU+EFTA+UK
- km_76: 0
  Distance in km, for sodium sulphate // sodium sulphate production // eu+efta+uk; Barge; EU+EFTA+UK
- kg_km_76: 0; = kg_76*km_76
  Transport amount in km*km, for sodium sulphate // sodium sulphate production // eu+efta+uk; Barge; EU+EFTA+UK
- kg_77: 0.000363886
  Mass in kg, for sodium sulphate // sodium sulphate production // eu+efta+uk; Articulated lorry transport, Euro 4, Total weight >32 t; EU+EFTA+UK
- km_77: 0
  Distance in km, for sodium sulphate // sodium sulphate production // eu+efta+uk; Articulated lorry transport, Euro 4, Total weight >32 t; EU+EFTA+UK
- kg_km_77: 0; = kg_77*km_77
  Transport amount in km*km, for sodium sulphate // sodium sulphate production // eu+efta+uk; Articulated lorry transport, Euro 4, Total weight >32 t; EU+EFTA+UK
- kg_78: 9.04313e-7
  Mass in kg, for sodium hypochlorite // sodium hypochlorite production // eu+efta+uk; Freight train, average; EU+EFTA+UK
- km_78: 240.426
  Distance in km, for sodium hypochlorite // sodium hypochlorite production // eu+efta+uk; Freight train, average; EU+EFTA+UK
- kg_km_78: 0.00021742; = kg_78*km_78
  Transport amount in km*km, for sodium hypochlorite // sodium hypochlorite production // eu+efta+uk; Freight train, average; EU+EFTA+UK
- kg_79: 9.04313e-7
  Mass in kg, for sodium hypochlorite // sodium hypochlorite production // eu+efta+uk; Barge; EU+EFTA+UK
- km_79: 270.213
  Distance in km, for sodium hypochlorite // sodium hypochlorite production // eu+efta+uk; Barge; EU+EFTA+UK
- kg_km_79: 0.000244357; = kg_79*km_79
  Transport amount in km*km, for sodium hypochlorite // sodium hypochlorite production // eu+efta+uk; Barge; EU+EFTA+UK
- kg_80: 9.04313e-7
  Mass in kg, for sodium hypochlorite // sodium hypochlorite production // eu+efta+uk; Articulated lorry transport, Euro 4, Total weight >32 t; EU+EFTA+UK
- km_80: 129.787
  Distance in km, for sodium hypochlorite // sodium hypochlorite production // eu+efta+uk; Articulated lorry transport, Euro 4, Total weight >32 t; EU+EFTA+UK
- kg_km_80: 0.000117368; = kg_80*km_80
  Transport amount in km*km, for sodium hypochlorite // sodium hypochlorite production // eu+efta+uk; Articulated lorry transport, Euro 4, Total weight >32 t; EU+EFTA+UK
- kg_81: 0.00197821
  Mass in kg, for precipitated calcium carbonate // precipitated calcium carbonate production // eu+efta+uk; Freight train, average; EU+EFTA+UK
- km_81: 240.24
  Distance in km, for precipitated calcium carbonate // precipitated calcium carbonate production // eu+efta+uk; Freight train, average; EU+EFTA+UK
- kg_km_81: 0.475245; = kg_81*km_81
  Transport amount in km*km, for precipitated calcium carbonate // precipitated calcium carbonate production // eu+efta+uk; Freight train, average; EU+EFTA+UK
- kg_82: 0.00197821
  Mass in kg, for precipitated calcium carbonate // precipitated calcium carbonate production // eu+efta+uk; Barge; EU+EFTA+UK
- km_82: 269.905
  Distance in km, for precipitated calcium carbonate // precipitated calcium carbonate production // eu+efta+uk; Barge; EU+EFTA+UK
- kg_km_82: 0.533929; = kg_82*km_82
  Transport amount in km*km, for precipitated calcium carbonate // precipitated calcium carbonate production // eu+efta+uk; Barge; EU+EFTA+UK
- kg_83: 0.00197821
  Mass in kg, for precipitated calcium carbonate // precipitated calcium carbonate production // eu+efta+uk; Articulated lorry transport, Euro 4, Total weight >32 t; EU+EFTA+UK
- km_83: 129.846
  Distance in km, for precipitated calcium carbonate // precipitated calcium carbonate production // eu+efta+uk; Articulated lorry transport, Euro 4, Total weight >32 t; EU+EFTA+UK
- kg_km_83: 0.256863; = kg_83*km_83
  Transport amount in km*km, for precipitated calcium carbonate // precipitated calcium carbonate production // eu+efta+uk; Articulated lorry transport, Euro 4, Total weight >32 t; EU+EFTA+UK
- kg_84: 0.000648333
  Mass in kg, for aluminium sulphate powder // aluminium sulphate powder production // eu+efta+uk; Freight train, average; EU+EFTA+UK
- km_84: 240.385
  Distance in km, for aluminium sulphate powder // aluminium sulphate powder production // eu+efta+uk; Freight train, average; EU+EFTA+UK
- kg_km_84: 0.15585; = kg_84*km_84
  Transport amount in km*km, for aluminium sulphate powder // aluminium sulphate powder production // eu+efta+uk; Freight train, average; EU+EFTA+UK
- kg_85: 0.000648333
  Mass in kg, for aluminium sulphate powder // aluminium sulphate powder production // eu+efta+uk; Barge; EU+EFTA+UK
- km_85: 270.062
  Distance in km, for aluminium sulphate powder // aluminium sulphate powder production // eu+efta+uk; Barge; EU+EFTA+UK
- kg_km_85: 0.17509; = kg_85*km_85
  Transport amount in km*km, for aluminium sulphate powder // aluminium sulphate powder production // eu+efta+uk; Barge; EU+EFTA+UK
- kg_86: 0.000648333
  Mass in kg, for aluminium sulphate powder // aluminium sulphate powder production // eu+efta+uk; Articulated lorry transport, Euro 4, Total weight >32 t; EU+EFTA+UK
- km_86: 129.986
  Distance in km, for aluminium sulphate powder // aluminium sulphate powder production // eu+efta+uk; Articulated lorry transport, Euro 4, Total weight >32 t; EU+EFTA+UK
- kg_km_86: 0.0842742; = kg_86*km_86
  Transport amount in km*km, for aluminium sulphate powder // aluminium sulphate powder production // eu+efta+uk; Articulated lorry transport, Euro 4, Total weight >32 t; EU+EFTA+UK
- kg_87: 0.000630637
  Mass in kg, for edta // edta production // eu+efta+uk; Freight train, average; EU+EFTA+UK
- km_87: 239.503
  Distance in km, for edta // edta production // eu+efta+uk; Freight train, average; EU+EFTA+UK
- kg_km_87: 0.151039; = kg_87*km_87
  Transport amount in km*km, for edta // edta production // eu+efta+uk; Freight train, average; EU+EFTA+UK
- kg_88: 0.000630637
  Mass in kg, for edta // edta production // eu+efta+uk; Barge; EU+EFTA+UK
- km_88: 270.013
  Distance in km, for edta // edta production // eu+efta+uk; Barge; EU+EFTA+UK
- kg_km_88: 0.17028; = kg_88*km_88
  Transport amount in km*km, for edta // edta production // eu+efta+uk; Barge; EU+EFTA+UK
- kg_89: 0.000630637
  Mass in kg, for edta // edta production // eu+efta+uk; Articulated lorry transport, Euro 4, Total weight >32 t; EU+EFTA+UK
- km_89: 129.972
  Distance in km, for edta // edta production // eu+efta+uk; Articulated lorry transport, Euro 4, Total weight >32 t; EU+EFTA+UK
- kg_km_89: 0.0819654; = kg_89*km_89
  Transport amount in km*km, for edta // edta production // eu+efta+uk; Articulated lorry transport, Euro 4, Total weight >32 t; EU+EFTA+UK
- kg_90: 0.000168356
  Mass in kg, for methanol // methanol production // eu+efta+uk; Freight train, average; EU+EFTA+UK
- km_90: 240
  Distance in km, for methanol // methanol production // eu+efta+uk; Freight train, average; EU+EFTA+UK
- kg_km_90: 0.0404055; = kg_90*km_90
  Transport amount in km*km, for methanol // methanol production // eu+efta+uk; Freight train, average; EU+EFTA+UK
- kg_91: 0.000168356
  Mass in kg, for methanol // methanol production // eu+efta+uk; Barge; EU+EFTA+UK
- km_91: 270.286
  Distance in km, for methanol // methanol production // eu+efta+uk; Barge; EU+EFTA+UK
- kg_km_91: 0.0455042; = kg_91*km_91
  Transport amount in km*km, for methanol // methanol production // eu+efta+uk; Barge; EU+EFTA+UK
- kg_92: 0.000168356
  Mass in kg, for methanol // methanol production // eu+efta+uk; Articulated lorry transport, Euro 4, Total weight >32 t; EU+EFTA+UK
- km_92: 130.286
  Distance in km, for methanol // methanol production // eu+efta+uk; Articulated lorry transport, Euro 4, Total weight >32 t; EU+EFTA+UK
- kg_km_92: 0.0219344; = kg_92*km_92
  Transport amount in km*km, for methanol // methanol production // eu+efta+uk; Articulated lorry transport, Euro 4, Total weight >32 t; EU+EFTA+UK
- kg_93: 0.0168319
  Mass in kg, for biodegradable waste to landfill // landfill of biodegradable waste // eu+efta+uk; Articulated lorry transport, Euro 4, Total weight >32 t; EU+EFTA+UK
- km_93: 77
  Distance in km, for biodegradable waste to landfill // landfill of biodegradable waste // eu+efta+uk; Articulated lorry transport, Euro 4, Total weight >32 t; EU+EFTA+UK
- kg_km_93: 1.29606; = kg_93*km_93
  Transport amount in km*km, for biodegradable waste to landfill // landfill of biodegradable waste // eu+efta+uk; Articulated lorry transport, Euro 4, Total weight >32 t; EU+EFTA+UK

## Reference product
- bleached kraft pulp, softwood // bleached kraft pulp, softwood // eu+efta+uk: 1

## Inputs
- Thermal energy (MJ) from Thermal energy from natural gas - EU+EFTA+UK: 0.0378408
- Transport of methanol, from biomass by Freight train, diesel traction - EU+EFTA+UK: 0.163893; = kg_km_0
- Transport of methanol, from biomass by Freight train, electricity traction - EU+EFTA+UK: 0.0553503; = kg_km_1
- Transport of methanol, from biomass by Freight train, average - EU+EFTA+UK: 0.00131502; = kg_km_2
- Transport of methanol, from biomass by Barge - EU+EFTA+UK: 0.0535261; = kg_km_3
- Transport of methanol, from biomass by Articulated lorry transport, Total weight >32 t, mix Euro 0-5 - ROW w/o EU+EFTA: 0.284219; = kg_km_4
- Transport of methanol, from biomass by Articulated lorry transport, Total weight <7.5 t, mix Euro 0-5 - EU+EFTA+UK: 0.00857777; = kg_km_5
- Transport of methanol, from biomass by Barge - ROW w/o EU+EFTA: 0.108384; = kg_km_6
- Transport of malusil by Transoceanic ship, bulk - GLO: 0.0419748; = kg_km_7
- Transport of malusil by Freight train, diesel traction - EU+EFTA+UK: 0.00518192; = kg_km_8
- Transport of malusil by Freight train, electricity traction - EU+EFTA+UK: 0.00176268; = kg_km_9
- Transport of malusil by Freight train, average - EU+EFTA+UK: 4.15736e-5; = kg_km_10
- Transport of malusil by Barge - EU+EFTA+UK: 0.000398585; = kg_km_11
- Transport of malusil by Barge - ROW w/o EU+EFTA: 0.000813891; = kg_km_12
- Transport of malusil by Articulated lorry transport, Total weight <7.5 t, mix Euro 0-5 - EU+EFTA+UK: 0.000548889; = kg_km_13
- Transport of malusil by Articulated lorry transport, Euro 4, Total weight >32 t - EU+EFTA+UK: 0.0051245; = kg_km_14
- Transport of malusil by Articulated lorry transport, Total weight >32 t, mix Euro 0-5 - ROW w/o EU+EFTA: 0.0135245; = kg_km_15
- Transport of sodium hydrogen sulphite // sodium hydrogen sulphite production // eu+efta+uk by Freight train, average - EU+EFTA+UK: 0.359801; = kg_km_16
- Transport of sodium hydrogen sulphite // sodium hydrogen sulphite production // eu+efta+uk by Barge - EU+EFTA+UK: 0.405017; = kg_km_17
- Transport of sodium hydrogen sulphite // sodium hydrogen sulphite production // eu+efta+uk by Articulated lorry transport, Euro 4, Total weight >32 t - EU+EFTA+UK: 0.195293; = kg_km_18
- Transport of softwood under bark // softwood forestry // eu+efta+uk by Articulated lorry transport, Euro 4, Total weight >32 t - EU+EFTA+UK: 226.178; = kg_km_19
- Transport of softwood under bark // softwood forestry // eu+efta+uk by Barge - EU+EFTA+UK: 22.6967; = kg_km_20
- Transport of softwood under bark // softwood forestry // eu+efta+uk by Freight train, average - EU+EFTA+UK: 349.388; = kg_km_21
- Transport of softwood under bark // softwood forestry // eu+efta+uk by Transoceanic ship, bulk - GLO: 516.137; = kg_km_22
- Transport of wood chips, softwood // wood chips, softwood // eu+efta+uk by Articulated lorry transport, Euro 4, Total weight >32 t - EU+EFTA+UK: 45.5613; = kg_km_23
- Transport of wood chips, softwood // wood chips, softwood // eu+efta+uk by Barge - EU+EFTA+UK: 4.14818; = kg_km_24
- Transport of wood chips, softwood // wood chips, softwood // eu+efta+uk by Freight train, average - EU+EFTA+UK: 69.6524; = kg_km_25
- Transport of wood chips, softwood // wood chips, softwood // eu+efta+uk by Transoceanic ship, bulk - GLO: 86.1219; = kg_km_26
- Transport of biogas for bioenergy // biogas for bioenergy // eu+efta+uk by Freight train, average - EU+EFTA+UK: 1.5585; = kg_km_27
- Transport of biogas for bioenergy // biogas for bioenergy // eu+efta+uk by Barge - EU+EFTA+UK: 1.7509; = kg_km_28
- Transport of biogas for bioenergy // biogas for bioenergy // eu+efta+uk by Articulated lorry transport, Euro 4, Total weight >32 t - EU+EFTA+UK: 0.844666; = kg_km_29
- Transport of bark, hardwood // bark, hardwood // eu+efta+uk by Freight train, average - EU+EFTA+UK: 3.41692; = kg_km_30
- Transport of bark, hardwood // bark, hardwood // eu+efta+uk by Barge - EU+EFTA+UK: 3.84403; = kg_km_31
- Transport of bark, hardwood // bark, hardwood // eu+efta+uk by Articulated lorry transport, Euro 4, Total weight >32 t - EU+EFTA+UK: 1.85083; = kg_km_32
- Transport of bark, softwood // bark, softwood // eu+efta+uk by Freight train, average - EU+EFTA+UK: 3.41692; = kg_km_33
- Transport of bark, softwood // bark, softwood // eu+efta+uk by Barge - EU+EFTA+UK: 3.84403; = kg_km_34
- Transport of bark, softwood // bark, softwood // eu+efta+uk by Articulated lorry transport, Euro 4, Total weight >32 t - EU+EFTA+UK: 1.85083; = kg_km_35
- Transport of heavy fuel oil (1.0 wt.% s) // heavy fuel oil at refinery // eu+efta+uk by Freight train, average - EU+EFTA+UK: 1.68356; = kg_km_36
- Transport of heavy fuel oil (1.0 wt.% s) // heavy fuel oil at refinery // eu+efta+uk by Barge - EU+EFTA+UK: 1.89521; = kg_km_37
- Transport of heavy fuel oil (1.0 wt.% s) // heavy fuel oil at refinery // eu+efta+uk by Articulated lorry transport, Euro 4, Total weight >32 t - EU+EFTA+UK: 0.911047; = kg_km_38
- Transport of light fuel oil // light fuel oil at refinery // eu+efta+uk by Freight train, average - EU+EFTA+UK: 0.124102; = kg_km_39
- Transport of light fuel oil // light fuel oil at refinery // eu+efta+uk by Barge - EU+EFTA+UK: 0.139495; = kg_km_40
- Transport of light fuel oil // light fuel oil at refinery // eu+efta+uk by Articulated lorry transport, Euro 4, Total weight >32 t - EU+EFTA+UK: 0.0673424; = kg_km_41
- Transport of hard coal, at consumer eu+efta // hard coal mix // eu+efta+uk by Freight train, average - EU+EFTA+UK: 0.0197217; = kg_km_42
- Transport of hard coal, at consumer eu+efta // hard coal mix // eu+efta+uk by Barge - EU+EFTA+UK: 0.022223; = kg_km_43
- Transport of hard coal, at consumer eu+efta // hard coal mix // eu+efta+uk by Articulated lorry transport, Euro 4, Total weight >32 t - EU+EFTA+UK: 0.0106786; = kg_km_44
- Transport of sodium formate // sodium formate production // eu+efta+uk by Freight train, average - EU+EFTA+UK: 0.190483; = kg_km_45
- Transport of sodium formate // sodium formate production // eu+efta+uk by Barge - EU+EFTA+UK: 0.214534; = kg_km_46
- Transport of sodium formate // sodium formate production // eu+efta+uk by Articulated lorry transport, Euro 4, Total weight >32 t - EU+EFTA+UK: 0.102938; = kg_km_47
- Transport of hydrogen peroxide, 100% // hydrogen peroxide, 100% production // eu+efta+uk by Freight train, average - EU+EFTA+UK: 2.45319; = kg_km_48
- Transport of hydrogen peroxide, 100% // hydrogen peroxide, 100% production // eu+efta+uk by Barge - EU+EFTA+UK: 2.76104; = kg_km_49
- Transport of hydrogen peroxide, 100% // hydrogen peroxide, 100% production // eu+efta+uk by Articulated lorry transport, Euro 4, Total weight >32 t - EU+EFTA+UK: 1.32761; = kg_km_50
- Transport of oxygen // oxygen production // eu+efta+uk by Freight train, average - EU+EFTA+UK: 4.99296; = kg_km_51
- Transport of oxygen // oxygen production // eu+efta+uk by Barge - EU+EFTA+UK: 5.61828; = kg_km_52
- Transport of oxygen // oxygen production // eu+efta+uk by Articulated lorry transport, Euro 4, Total weight >32 t - EU+EFTA+UK: 2.70332; = kg_km_53
- Transport of sodium chlorate // sodium chlorate production // glo by Freight train, average - EU+EFTA+UK: 2.86686; = kg_km_54
- Transport of sodium chlorate // sodium chlorate production // glo by Barge - EU+EFTA+UK: 3.22282; = kg_km_55
- Transport of sodium chlorate // sodium chlorate production // glo by Articulated lorry transport, Euro 4, Total weight >32 t - EU+EFTA+UK: 1.54888; = kg_km_56
- Transport of sodium hydroxide // sodium hydroxide production // eu+efta+uk by Freight train, average - EU+EFTA+UK: 6.70538; = kg_km_57
- Transport of sodium hydroxide // sodium hydroxide production // eu+efta+uk by Barge - EU+EFTA+UK: 7.54235; = kg_km_58
- Transport of sodium hydroxide // sodium hydroxide production // eu+efta+uk by Articulated lorry transport, Euro 4, Total weight >32 t - EU+EFTA+UK: 3.62687; = kg_km_59
- Transport of sulphuric acid // sulphuric acid production // eu+efta+uk by Freight train, average - EU+EFTA+UK: 6.22436; = kg_km_60
- Transport of sulphuric acid // sulphuric acid production // eu+efta+uk by Barge - EU+EFTA+UK: 6.99399; = kg_km_61
- Transport of sulphuric acid // sulphuric acid production // eu+efta+uk by Articulated lorry transport, Euro 4, Total weight >32 t - EU+EFTA+UK: 3.36712; = kg_km_62
- Transport of ozone // ozone production // glo by Freight train, average - EU+EFTA+UK: 0.00665728; = kg_km_63
- Transport of ozone // ozone production // glo by Barge - EU+EFTA+UK: 0.00749425; = kg_km_64
- Transport of ozone // ozone production // glo by Articulated lorry transport, Euro 4, Total weight >32 t - EU+EFTA+UK: 0.00360763; = kg_km_65
- Transport of sulphur // sulphur production // eu+efta+uk by Freight train, average - EU+EFTA+UK: 0.0128913; = kg_km_66
- Transport of sulphur // sulphur production // eu+efta+uk by Barge - EU+EFTA+UK: 0.0145267; = kg_km_67
- Transport of sulphur // sulphur production // eu+efta+uk by Articulated lorry transport, Euro 4, Total weight >32 t - EU+EFTA+UK: 0.00697475; = kg_km_68
- Transport of chlorine dioxide // chlorine dioxide production // glo by Freight train, average - EU+EFTA+UK: 1.06786; = kg_km_69
- Transport of chlorine dioxide // chlorine dioxide production // glo by Barge - EU+EFTA+UK: 1.20254; = kg_km_70
- Transport of chlorine dioxide // chlorine dioxide production // glo by Articulated lorry transport, Euro 4, Total weight >32 t - EU+EFTA+UK: 0.577221; = kg_km_71
- Transport of hydrochloric acid // hydrochloric acid production // eu+efta+uk by Freight train, average - EU+EFTA+UK: 0.0842742; = kg_km_72
- Transport of hydrochloric acid // hydrochloric acid production // eu+efta+uk by Barge - EU+EFTA+UK: 0.0947604; = kg_km_73
- Transport of hydrochloric acid // hydrochloric acid production // eu+efta+uk by Articulated lorry transport, Euro 4, Total weight >32 t - EU+EFTA+UK: 0.0456004; = kg_km_74
- Transport of sodium sulphate // sodium sulphate production // eu+efta+uk by Freight train, average - EU+EFTA+UK: 0; = kg_km_75
- Transport of sodium sulphate // sodium sulphate production // eu+efta+uk by Barge - EU+EFTA+UK: 0; = kg_km_76
- Transport of sodium sulphate // sodium sulphate production // eu+efta+uk by Articulated lorry transport, Euro 4, Total weight >32 t - EU+EFTA+UK: 0; = kg_km_77
- Transport of sodium hypochlorite // sodium hypochlorite production // eu+efta+uk by Freight train, average - EU+EFTA+UK: 0.00021742; = kg_km_78
- Transport of sodium hypochlorite // sodium hypochlorite production // eu+efta+uk by Barge - EU+EFTA+UK: 0.000244357; = kg_km_79
- Transport of sodium hypochlorite // sodium hypochlorite production // eu+efta+uk by Articulated lorry transport, Euro 4, Total weight >32 t - EU+EFTA+UK: 0.000117368; = kg_km_80
- Transport of precipitated calcium carbonate // precipitated calcium carbonate production // eu+efta+uk by Freight train, average - EU+EFTA+UK: 0.475245; = kg_km_81
- Transport of precipitated calcium carbonate // precipitated calcium carbonate production // eu+efta+uk by Barge - EU+EFTA+UK: 0.533929; = kg_km_82
- Transport of precipitated calcium carbonate // precipitated calcium carbonate production // eu+efta+uk by Articulated lorry transport, Euro 4, Total weight >32 t - EU+EFTA+UK: 0.256863; = kg_km_83
- Transport of aluminium sulphate powder // aluminium sulphate powder production // eu+efta+uk by Freight train, average - EU+EFTA+UK: 0.15585; = kg_km_84
- Transport of aluminium sulphate powder // aluminium sulphate powder production // eu+efta+uk by Barge - EU+EFTA+UK: 0.17509; = kg_km_85
- Transport of aluminium sulphate powder // aluminium sulphate powder production // eu+efta+uk by Articulated lorry transport, Euro 4, Total weight >32 t - EU+EFTA+UK: 0.0842742; = kg_km_86
- Transport of edta // edta production // eu+efta+uk by Freight train, average - EU+EFTA+UK: 0.151039; = kg_km_87
- Transport of edta // edta production // eu+efta+uk by Barge - EU+EFTA+UK: 0.17028; = kg_km_88
- Transport of edta // edta production // eu+efta+uk by Articulated lorry transport, Euro 4, Total weight >32 t - EU+EFTA+UK: 0.0819654; = kg_km_89
- Transport of methanol // methanol production // eu+efta+uk by Freight train, average - EU+EFTA+UK: 0.0404055; = kg_km_90
- Transport of methanol // methanol production // eu+efta+uk by Barge - EU+EFTA+UK: 0.0455042; = kg_km_91
- Transport of methanol // methanol production // eu+efta+uk by Articulated lorry transport, Euro 4, Total weight >32 t - EU+EFTA+UK: 0.0219344; = kg_km_92
- Electricity from Electricity grid mix 1kV-60kV - EU+EFTA+UK: 0.12249
- Transport of biodegradable waste to landfill // landfill of biodegradable waste // eu+efta+uk by Articulated lorry transport, Euro 4, Total weight >32 t - EU+EFTA+UK: 1.29606; = kg_km_93
- bleached kraft pulp, softwood // bleached kraft pulp, softwood // eu+efta+uk, blackbox: 1
- bleached kraft pulp, softwood // bleached kraft pulp, softwood // eu+efta+uk, elementary: 1

## Impact indicators
- Eutrophication marine: 0.000939092
- Ecotoxicity, freshwater: 1.49387
- Land use: 711.623
- Water use: 1.02018
- Resource use, minerals and metals: 2.656e-6
- Resource use, fossils: 0.985138
- Climate change: 0.126231
- Ozone depletion: 2.07318e-8
- Human toxicity, cancer: 3.04268e-10
- Human toxicity, non-cancer: 3.31858e-9
- EF-particulate Matter: 4.46248e-8
- Ionising radiation, human health: -0.0400481
- Photochemical ozone formation - human health: 0.00272335
- Acidification: 0.00214517
- Eutrophication, terrestrial: 0.00530128
- Eutrophication, freshwater: 4.50177e-5

## Deviations from the LCI method principle
The background data uses:
- the \xe2\x80\x9cRecycled content cut-off\xe2\x80\x9d approach to allocate end-of-life by-products and secondary materials. This allocation is explained in the description of the recycled content system model (http://www.ecoinvent.org/database/system-models-in-ecoinvent-3/cut-off-system-model/allocation-cut-off-by-classification.html).
OR
- EF compliant data

## Deviations from the LCI method approaches
Background data:
- the \xe2\x80\x9cRecycled content cut-off\xe2\x80\x9d approach to allocate end-of-life by-products and secondary materials. This allocation is explained in the description of the recycled content system model (http://www.ecoinvent.org/database/system-models-in-ecoinvent-3/cut-off-system-model/allocation-cut-off-by-classification.html). The ecoinvent database mostly relies on “Allocation – market values” apart for few exceptions particularly in the energy sector. ecoinvent energy data is replaced with EF3.0 core data as per the EF guidelines version 2.0.
OR
- EF compliant data

## Modelling constants
All modelling constants follow the requirements listed in the Tender Specifications 070201/2020/SER/ENV.B1. Completeness: There are no intentional cut-offs in the inventory no matter how small their contribution to all the EF impact categories is. Eventual cut-offs are in compliance with the Guide for EF compliant data sets (JRC 2020), i.e. only if below the 3% cut-off rule. Water use: water use is modelled at country level using separate flows for water withdrawal, water release and water evaporation. Handling multi-functional processes: the following PEF multi- functionality decision hierarchy is applied for resolving all multi- functionality problems: (1) subdivision or system expansion; (2) allocation based on a relevant underlying physical relationship (substitution may apply here); (3) allocation based on some other relationship. Direct land use change: GHG emissions from direct LUC allocated to good/service for 20 years after the LUC occurs, with IPCC default values. Carbon storage and delayed emissions: credits associated with temporary (carbon) storage or delayed emissions up to 300 years are not be considered. Emissions off-setting: are not included. Capital goods (including infrastructures) and their End of life: they are included. System boundaries: system boundaries include all processes linked to the product supply chain (e.g. maintenance). Time period: emissions and removals are modelled as if released or removed at the beginning of the assessment method. Fossil and biogenic carbon emissions and removals: removals and emissions are modelled as follows: All GHG emissions from fossil fuels (including peat and limestone) are modelled consistently with the most updated ILCD list of elementary flows. The non-fossil (biogenic) carbon flows are modelled consistently with the most updated ILCD list of elementary flows.

## Cut-off and completeness
There are no intentional cut-offs in the inventory no matter how small their contribution to all the EF impact categories is. Eventual cut-offs are in compliance with the Guide for EF compliant data sets (JRC 2020), i.e. only if below the 3% cut-off rule. The dataset dry mass and water balance has been checked to ensure the inventory is complete. Capital goods (e.g. infrastructure) and their end-of-life are included.

## Data selection and combination
These datasets include, in both their foreground and background data, links to EF3.0 compliant data.
The relevant background data on energy, transport, and End of Life are from the LCDN data node (http://lcdn.thinkstep.com/Node/).
All other background data in the supply of this product for which no EF3.0 process was available are from ecoinvent v3.7 database (www.ecoinvent.org) or other data sources.

## Data treatment and extrapolations
Several data sources have been used to model the inventory.

## Review details
Internal reviews have been asked to review the plausibility of the unit process, LCIA scores, and DQRs. Internal reviewers have also been asked to review the data for EF compliancy. The consortium is therefore responsible for aspects such as compliancy with the ILCD format, including validation in Look@LCI, and nomenclature.
Internal reviwers have been asked to judge based on the process name, that the unit process models in a complete and representative way the process in the requested location. The review encompassed the plausability of:
- exchanges with nature (elementary flows) as well as exchanges such as product and waste flows.
- meta information (general comment, technology comment, system boundaries, allocation, cut-off rules, etc.). Reviewers were asked to judge if the provided information is enough to understand the content of the process.
- LCIA scores
- DQRs including precision, technology, time and geography. As well as the overall DQR.
External reviewers have been asked to provide their expertise in the field of interest. External reviewers have been asked to review the unit process, including eventual methodological choices, the LCIA scores (provided with contribution scores as well), and DQRs. External reviewers have been provided all the information in a tool developed by the consortium for the purpose of this project.
External reviewers have been asked to judge based on the process name, that the unit process models in a complete and representative way the process in the requested location. The review encompassed:
- Plausability and completeness of exchanges with nature (elementary flows) as well as exchanges such as product and waste flows.
- Review of meta information (general comment, technology comment, system boundaries, allocation, cut-off rules, etc.). Reviewers were asked to judge if the provided information is enough to understand the content of the process.
- Review of properties (biogenic carbon and water content).
- Review of allocation keys.
- Plausability of LCIA scores calculated by the consortium.
- Plausability of DQRs including precision, technology, time and geography. As well as the overall DQR.

## Data sources
- Background Data for Representative products and organisations. EF 3.0 compliant (data stock)
- The European Pulp Industry Sector Association AISBL (EPIS), (2020). EPIS Life Cycle Inventory data for Northern Bleached Softwood Kraft Pulp, 2020 Data.

## Intended applications
Implementation of regular Product Environmental Footprint (PEF) studies and Organisation Environmental Footprint (OEF) studies exclusively under the specified Product groups and sectors as defined in the Product Environmental Footprint Category Rules (PEFCR) and Organisation Environmental Footprint Sectorial Rules (OEFSR) listed in http://ec.europa.eu/environment/eussd/smgp/PEFCR_OEFSR.htm
