# coating, solvent emulsion, 2 times (for 3 layers); Finishing; technology mix; textile service for 1 kg of fabric

Dataset: ILCD process, Partly terminated system
Geography: GLO
Reference year: 2018
Valid until: 2024
Classification: Systems / Textiles, furnitures and other interiors
LCI method principle: Attributional
LCI method approaches: Allocation - market value
Completeness: All relevant flows quantified
Project: Provision of process-based 3.0 Environmental Footprint-compliant life cycle inventory datasets - Apparel 2 - contract number 070201/2020/840292/SER/ENV.B.1
Generated by: CADIS
Owner: PRé Sustainability B.V.
Compliance: ILCD Data Network - Entry-level; Suggestions for updating the PEF method 2019; ISO 14040 Environmental Management – Life Cycle Assessment – Principles and Framework, 2006; ISO 14044:2006. Environmental Management – Life Cycle Assessment – Requirements and guidelines.; Environmental Footprint 3.1
Review: Dependent internal review by Avraam Symeonidis, Emilia Moreno Ruiz; Independent review panel by Madhuri Nigam
Data quality: Overall quality: Good; Time representativeness: Very good; Geographical representativeness: Fair; Technological representativeness: Good; Precision: Good; Methodological appropriateness and consistency: Not applicable
Amounts: no units in this file; such an amount is in the reference unit of its flow, which a separate flow dataset defines
copyright: true
licenseType: Free of charge for some user types or use types
accessRestrictions: Free of charge for all final users implementing a regular Product Environmental Footprint (PEF) studies and Organisation Environmental Footprint (OEF) studies exclusively under the specified Product groups and sectors as defined in the Product Environmental Footprint Category Rules (PEFCR) and Organisation Environmental Footprint Sectorial Rules (OEFSR) listed in http://ec.europa.eu/environment/eussd/smgp/PEFCR_OEFSR.htm and in accordance with the terms and conditions of the EULA (available at https://ecoinvent.lca-data.com/) exclusively until 31st December 2024. Any use of this dataset or any derivative data not within the specific context of one of the PEF/OEF projects or after the end of 2024 is not permitted.

## General comment
Notice: this data set supersedes the EF3.0-compliant version (see link under "preceding data set version" below calculated with the EF3.0). The life cycle inventory is not changed from the original EF3.0 data set. The LCIA results are calculated based on the EF3.1 methods which provide updated characterisation factors in the following impact categories: Climate Change, Ecotoxicity freshwater, Photochemical Ozone Formation, Acidification, Human Toxicity non-cancer, and Human Toxicity cancer. The review report and the data quality ratings refer to the original results. The data set has been updated by the European Commission on the basis of the original EF3.0 data set delivered by the data provider.This activity is modeled as a service, so no input of textile is considered. A user employing this service within their models should use it along with 1 kg of fabric. Three layer process (application of two coating process). It is assumed that the complete coating process shall be repeated completely for each layer. Coating formulation was obtained from Sur et al. (2018), consisting of polyols (140 g), DBTDL (catalyst, 0.03 wt%), and DMF (solvent, 30 g). Methylene diphenyl diisocyanate (MDI) and 1,4-butanediol are added conserving a molar ratio of 0.2/0.07/0.13 (MDI/polyol/diol). Molecular weight of each component is: polyol 2000, MDI 250.25 and diol 90.068. Steam (1.2 kg/kg) and electricity (0.39 kWh/kg) values for padding fabric into emulsion were obtained from Ka & Geberehiwot, 2020). Heat use (4 MJ/kg) for drying and curing in stenter was obtained from Mazo-Restrepo et al. (2021). Water used for emulsion preparation (50 g of fabric per liter of emulsion) was obtained from Abo-Shosha et al. (2008). Wastewater generation (60% of input water) and evaporated water (40% of input water) values were obtained as average finishing process parameters from Thinkstep (2017). A user employing this service within their models should use it along with 1 kg of fabric. Life expectancy of coating machine is assumed to be 25 years (UNFCCC, 2012) with an average coating capacity of 25 m/min and a machine weight of 11500 kg (XiNLiLONG 2021), assuming 12 h/d operating time, 30 days per month and a fabric weight of 300 grams per square meter. Land use from factory building was calculated based on (EUREKA, 2021) from a total area of 325 thousand square meters, divided into five sub-productive areas: knitting, dyeing, finishing, and home textiles. The respective area (1/5) of total building area (65,000 m2) is divided by the total production capacity of the building in 60 years (assumed life span of the building), with a daily production of 100,000 meters of finished fabric and a fabric weight of 300 grams per square meter (EUREKA, 2021).

## Technology and included processes
Coating is the application of polymer onto a textile as a paste, foam or viscous liquid. The application of polymer is made such that coating cannot be detached. In solvent emulsion coating process, a polymer is dissolved in a solvent and directly applied to textile. Solvent is extracted through coagulation and coating is dried, cured and washed. Coating curing is performed in a stenter. Solvent based water repellents may be applied by this technique to leather clothing, medical garment and wipes.

## Parameters
- kg_0: 0.0166381
  Mass in kg, for butane-1,4-diol; Transoceanic ship, containers; GLO
- km_0: 1811.9
  Distance in km, for butane-1,4-diol; Transoceanic ship, containers; GLO
- kg_km_0: 30.1466; = kg_0*km_0
  Transport amount in km*km, for butane-1,4-diol; Transoceanic ship, containers; GLO
- kg_1: 0.0166381
  Mass in kg, for butane-1,4-diol; Freight train, diesel traction; EU+EFTA+UK
- km_1: 693.518
  Distance in km, for butane-1,4-diol; Freight train, diesel traction; EU+EFTA+UK
- kg_km_1: 11.5388; = kg_1*km_1
  Transport amount in km*km, for butane-1,4-diol; Freight train, diesel traction; EU+EFTA+UK
- kg_2: 0.0166381
  Mass in kg, for butane-1,4-diol; Freight train, electricity traction; EU+EFTA+UK
- km_2: 235.906
  Distance in km, for butane-1,4-diol; Freight train, electricity traction; EU+EFTA+UK
- kg_km_2: 3.92503; = kg_2*km_2
  Transport amount in km*km, for butane-1,4-diol; Freight train, electricity traction; EU+EFTA+UK
- kg_3: 0.0166381
  Mass in kg, for butane-1,4-diol; Freight train, average; EU+EFTA+UK
- km_3: 5.56396
  Distance in km, for butane-1,4-diol; Freight train, average; EU+EFTA+UK
- kg_km_3: 0.0925738; = kg_3*km_3
  Transport amount in km*km, for butane-1,4-diol; Freight train, average; EU+EFTA+UK
- kg_4: 0.0166381
  Mass in kg, for butane-1,4-diol; Barge; EU+EFTA+UK
- km_4: 24.4619
  Distance in km, for butane-1,4-diol; Barge; EU+EFTA+UK
- kg_km_4: 0.406999; = kg_4*km_4
  Transport amount in km*km, for butane-1,4-diol; Barge; EU+EFTA+UK
- kg_5: 0.0166381
  Mass in kg, for butane-1,4-diol; Barge; ROW w/o EU+EFTA
- km_5: 49.95
  Distance in km, for butane-1,4-diol; Barge; ROW w/o EU+EFTA
- kg_km_5: 0.831073; = kg_5*km_5
  Transport amount in km*km, for butane-1,4-diol; Barge; ROW w/o EU+EFTA
- kg_6: 0.0166381
  Mass in kg, for butane-1,4-diol; Articulated lorry transport, Euro 4, Total weight >32 t; EU+EFTA+UK
- km_6: 173.553
  Distance in km, for butane-1,4-diol; Articulated lorry transport, Euro 4, Total weight >32 t; EU+EFTA+UK
- kg_km_6: 2.8876; = kg_6*km_6
  Transport amount in km*km, for butane-1,4-diol; Articulated lorry transport, Euro 4, Total weight >32 t; EU+EFTA+UK
- kg_7: 0.0166381
  Mass in kg, for butane-1,4-diol; Articulated lorry transport, Total weight >32 t, mix Euro 0-5; ROW w/o EU+EFTA
- km_7: 458.04
  Distance in km, for butane-1,4-diol; Articulated lorry transport, Total weight >32 t, mix Euro 0-5; ROW w/o EU+EFTA
- kg_km_7: 7.62092; = kg_7*km_7
  Transport amount in km*km, for butane-1,4-diol; Articulated lorry transport, Total weight >32 t, mix Euro 0-5; ROW w/o EU+EFTA
- kg_8: 0.0426296
  Mass in kg, for N,N-dimethylformamide; Transoceanic ship, containers; GLO
- km_8: 1811.9
  Distance in km, for N,N-dimethylformamide; Transoceanic ship, containers; GLO
- kg_km_8: 77.2405; = kg_8*km_8
  Transport amount in km*km, for N,N-dimethylformamide; Transoceanic ship, containers; GLO
- kg_9: 0.0426296
  Mass in kg, for N,N-dimethylformamide; Freight train, diesel traction; EU+EFTA+UK
- km_9: 693.518
  Distance in km, for N,N-dimethylformamide; Freight train, diesel traction; EU+EFTA+UK
- kg_km_9: 29.5644; = kg_9*km_9
  Transport amount in km*km, for N,N-dimethylformamide; Freight train, diesel traction; EU+EFTA+UK
- kg_10: 0.0426296
  Mass in kg, for N,N-dimethylformamide; Freight train, electricity traction; EU+EFTA+UK
- km_10: 235.906
  Distance in km, for N,N-dimethylformamide; Freight train, electricity traction; EU+EFTA+UK
- kg_km_10: 10.0566; = kg_10*km_10
  Transport amount in km*km, for N,N-dimethylformamide; Freight train, electricity traction; EU+EFTA+UK
- kg_11: 0.0426296
  Mass in kg, for N,N-dimethylformamide; Freight train, average; EU+EFTA+UK
- km_11: 5.56396
  Distance in km, for N,N-dimethylformamide; Freight train, average; EU+EFTA+UK
- kg_km_11: 0.237189; = kg_11*km_11
  Transport amount in km*km, for N,N-dimethylformamide; Freight train, average; EU+EFTA+UK
- kg_12: 0.0426296
  Mass in kg, for N,N-dimethylformamide; Barge; EU+EFTA+UK
- km_12: 24.4619
  Distance in km, for N,N-dimethylformamide; Barge; EU+EFTA+UK
- kg_km_12: 1.0428; = kg_12*km_12
  Transport amount in km*km, for N,N-dimethylformamide; Barge; EU+EFTA+UK
- kg_13: 0.0426296
  Mass in kg, for N,N-dimethylformamide; Barge; ROW w/o EU+EFTA
- km_13: 49.95
  Distance in km, for N,N-dimethylformamide; Barge; ROW w/o EU+EFTA
- kg_km_13: 2.12935; = kg_13*km_13
  Transport amount in km*km, for N,N-dimethylformamide; Barge; ROW w/o EU+EFTA
- kg_14: 0.0426296
  Mass in kg, for N,N-dimethylformamide; Articulated lorry transport, Euro 4, Total weight >32 t; EU+EFTA+UK
- km_14: 173.553
  Distance in km, for N,N-dimethylformamide; Articulated lorry transport, Euro 4, Total weight >32 t; EU+EFTA+UK
- kg_km_14: 7.3985; = kg_14*km_14
  Transport amount in km*km, for N,N-dimethylformamide; Articulated lorry transport, Euro 4, Total weight >32 t; EU+EFTA+UK
- kg_15: 0.0426296
  Mass in kg, for N,N-dimethylformamide; Articulated lorry transport, Total weight >32 t, mix Euro 0-5; ROW w/o EU+EFTA
- km_15: 458.04
  Distance in km, for N,N-dimethylformamide; Articulated lorry transport, Total weight >32 t, mix Euro 0-5; ROW w/o EU+EFTA
- kg_km_15: 19.5261; = kg_15*km_15
  Transport amount in km*km, for N,N-dimethylformamide; Articulated lorry transport, Total weight >32 t, mix Euro 0-5; ROW w/o EU+EFTA
- kg_16: 0.601762
  Mass in kg, for polyether polyols (long chain) // polyether polyols (long chain) production // eu+efta+uk; Articulated lorry transport, Euro 4, Total weight >32 t; EU+EFTA+UK
- km_16: 1000.39
  Distance in km, for polyether polyols (long chain) // polyether polyols (long chain) production // eu+efta+uk; Articulated lorry transport, Euro 4, Total weight >32 t; EU+EFTA+UK
- kg_km_16: 602; = kg_16*km_16
  Transport amount in km*km, for polyether polyols (long chain) // polyether polyols (long chain) production // eu+efta+uk; Articulated lorry transport, Euro 4, Total weight >32 t; EU+EFTA+UK
- kg_17: 0.21513
  Mass in kg, for methylene diphenyldiisocyanate // methylene diphenyldiisocyanate production // glo; Articulated lorry transport, Euro 4, Total weight >32 t; EU+EFTA+UK
- km_17: 1000
  Distance in km, for methylene diphenyldiisocyanate // methylene diphenyldiisocyanate production // glo; Articulated lorry transport, Euro 4, Total weight >32 t; EU+EFTA+UK
- kg_km_17: 215.13; = kg_17*km_17
  Transport amount in km*km, for methylene diphenyldiisocyanate // methylene diphenyldiisocyanate production // glo; Articulated lorry transport, Euro 4, Total weight >32 t; EU+EFTA+UK
- kg_18: 0.601762
  Mass in kg, for polyether polyols (long chain) // polyether polyols (long chain) production // eu+efta+uk; Transoceanic ship, containers; GLO
- km_18: 18013.8
  Distance in km, for polyether polyols (long chain) // polyether polyols (long chain) production // eu+efta+uk; Transoceanic ship, containers; GLO
- kg_km_18: 10840; = kg_18*km_18
  Transport amount in km*km, for polyether polyols (long chain) // polyether polyols (long chain) production // eu+efta+uk; Transoceanic ship, containers; GLO
- kg_19: 0.21513
  Mass in kg, for methylene diphenyldiisocyanate // methylene diphenyldiisocyanate production // glo; Transoceanic ship, containers; GLO
- km_19: 18000
  Distance in km, for methylene diphenyldiisocyanate // methylene diphenyldiisocyanate production // glo; Transoceanic ship, containers; GLO
- kg_km_19: 3872.34; = kg_19*km_19
  Transport amount in km*km, for methylene diphenyldiisocyanate // methylene diphenyldiisocyanate production // glo; Transoceanic ship, containers; GLO

## Reference product
- coating, solvent emulsion, 2 times (for 3 layers) // coating, solvent emulsion, 2 times (for 3 layers) // glo: 1

## Inputs
- Transport of butane-1,4-diol by Transoceanic ship, containers - GLO: 30.1466; = kg_km_0
- Transport of butane-1,4-diol by Freight train, diesel traction - EU+EFTA+UK: 11.5388; = kg_km_1
- Transport of butane-1,4-diol by Freight train, electricity traction - EU+EFTA+UK: 3.92503; = kg_km_2
- Transport of butane-1,4-diol by Freight train, average - EU+EFTA+UK: 0.0925738; = kg_km_3
- Transport of butane-1,4-diol by Barge - EU+EFTA+UK: 0.406999; = kg_km_4
- Transport of butane-1,4-diol by Barge - ROW w/o EU+EFTA: 0.831073; = kg_km_5
- Transport of butane-1,4-diol by Articulated lorry transport, Euro 4, Total weight >32 t - EU+EFTA+UK: 2.8876; = kg_km_6
- Transport of butane-1,4-diol by Articulated lorry transport, Total weight >32 t, mix Euro 0-5 - ROW w/o EU+EFTA: 7.62092; = kg_km_7
- Electricity from Electricity grid mix 1kV-60kV - AU: 0.0307467
- Electricity from Electricity grid mix 1kV-60kV - EU+EFTA+UK: 0.452078
- Electricity from Electricity grid mix 1kV-60kV - NZ: 0.0057709
- Electricity from Electricity grid mix 1kV-60kV - RAF: 0.0988668
- Electricity from Electricity grid mix 1kV-60kV - RNA: 0.661769
- Electricity from Electricity grid mix 1kV-60kV - RSA: 0.224441
- Electricity from Electricity grid mix 1kV-60kV - RU: 0.132392
- Transport of N,N-dimethylformamide by Transoceanic ship, containers - GLO: 77.2405; = kg_km_8
- Transport of N,N-dimethylformamide by Freight train, diesel traction - EU+EFTA+UK: 29.5644; = kg_km_9
- Transport of N,N-dimethylformamide by Freight train, electricity traction - EU+EFTA+UK: 10.0566; = kg_km_10
- Transport of N,N-dimethylformamide by Freight train, average - EU+EFTA+UK: 0.237189; = kg_km_11
- Transport of N,N-dimethylformamide by Barge - EU+EFTA+UK: 1.0428; = kg_km_12
- Transport of N,N-dimethylformamide by Barge - ROW w/o EU+EFTA: 2.12935; = kg_km_13
- Transport of N,N-dimethylformamide by Articulated lorry transport, Euro 4, Total weight >32 t - EU+EFTA+UK: 7.3985; = kg_km_14
- Transport of N,N-dimethylformamide by Articulated lorry transport, Total weight >32 t, mix Euro 0-5 - ROW w/o EU+EFTA: 19.5261; = kg_km_15
- Thermal energy (MJ) from Thermal energy from hard coal - EU+EFTA+UK: 0.77777
- Thermal energy (MJ) from Thermal energy from hard coal - ROW: 0.913034
- Thermal energy (MJ) from Thermal energy from light fuel oil (LFO) - EU+EFTA+UK: 1.16665
- Thermal energy (MJ) from Thermal energy from light fuel oil (LFO) - ROW: 1.36955
- Thermal energy (MJ) from Thermal energy from LPG - ROW: 8
- Thermal energy (MJ) from Thermal energy from natural gas - EU+EFTA+UK: 1.94442
- Thermal energy (MJ) from Thermal energy from natural gas - ROW: 2.28259
- Transport of polyether polyols (long chain) // polyether polyols (long chain) production // eu+efta+uk by Articulated lorry transport, Euro 4, Total weight >32 t - EU+EFTA+UK: 602; = kg_km_16
- Transport of methylene diphenyldiisocyanate // methylene diphenyldiisocyanate production // glo by Articulated lorry transport, Euro 4, Total weight >32 t - EU+EFTA+UK: 215.13; = kg_km_17
- Transport of polyether polyols (long chain) // polyether polyols (long chain) production // eu+efta+uk by Transoceanic ship, containers - GLO: 10840; = kg_km_18
- Transport of methylene diphenyldiisocyanate // methylene diphenyldiisocyanate production // glo by Transoceanic ship, containers - GLO: 3872.34; = kg_km_19
- Electricity from Electricity grid mix 1kV-60kV - CN: 0.678036
- Electricity from Electricity grid mix 1kV-60kV - RAS w/o CN: 0.742882
- coating, solvent emulsion, 2 times (for 3 layers) // coating, solvent emulsion, 2 times (for 3 layers) // glo, blackbox: 1
- coating, solvent emulsion, 2 times (for 3 layers) // coating, solvent emulsion, 2 times (for 3 layers) // glo, elementary: 1

## Impact indicators
- Eutrophication marine: 0.00895089
- Ecotoxicity, freshwater: 131.393
- Land use: 12.0388
- Water use: 5.05299
- Resource use, minerals and metals: 2.49406e-5
- Resource use, fossils: 110.555
- Climate change: 5.86339
- Ozone depletion: 2.09767e-7
- Human toxicity, cancer: 2.63381e-8
- Human toxicity, non-cancer: 5.5884e-8
- EF-particulate Matter: 6.09829e-7
- Ionising radiation, human health: 0.228542
- Photochemical ozone formation - human health: 0.0205294
- Acidification: 0.030941
- Eutrophication, terrestrial: 0.0693036
- Eutrophication, freshwater: 0.000308346

## Deviations from the LCI method principle
The background data uses:
- the \xe2\x80\x9cRecycled content cut-off\xe2\x80\x9d approach to allocate end-of-life by-products and secondary materials. This allocation is explained in the description of the recycled content system model (http://www.ecoinvent.org/database/system-models-in-ecoinvent-3/cut-off-system-model/allocation-cut-off-by-classification.html).
OR
- EF compliant data

## Deviations from the LCI method approaches
Background data:
- the \xe2\x80\x9cRecycled content cut-off\xe2\x80\x9d approach to allocate end-of-life by-products and secondary materials. This allocation is explained in the description of the recycled content system model (http://www.ecoinvent.org/database/system-models-in-ecoinvent-3/cut-off-system-model/allocation-cut-off-by-classification.html). The ecoinvent database mostly relies on “Allocation – market values” apart for few exceptions particularly in the energy sector. ecoinvent energy data is replaced with EF3.0 core data as per the EF guidelines version 2.0.
OR
- EF compliant data

## Modelling constants
All modelling constants follow the requirements listed in the Tender Specifications 070201/2020/SER/ENV.B1. Completeness: There are no intentional cut-offs in the inventory no matter how small their contribution to all the EF impact categories is. Eventual cut-offs are in compliance with the Guide for EF compliant data sets (JRC 2020), i.e. only if below the 3% cut-off rule. Water use: water use is modelled at country level using separate flows for water withdrawal, water release and water evaporation. Handling multi-functional processes: the following PEF multi- functionality decision hierarchy is applied for resolving all multi- functionality problems: (1) subdivision or system expansion; (2) allocation based on a relevant underlying physical relationship (substitution may apply here); (3) allocation based on some other relationship. Direct land use change: GHG emissions from direct LUC allocated to good/service for 20 years after the LUC occurs, with IPCC default values. Carbon storage and delayed emissions: credits associated with temporary (carbon) storage or delayed emissions up to 300 years are not be considered. Emissions off-setting: are not included. Capital goods (including infrastructures) and their End of life: they are included. System boundaries: system boundaries include all processes linked to the product supply chain (e.g. maintenance). Time period: emissions and removals are modelled as if released or removed at the beginning of the assessment method. Fossil and biogenic carbon emissions and removals: removals and emissions are modelled as follows: All GHG emissions from fossil fuels (including peat and limestone) are modelled consistently with the most updated ILCD list of elementary flows. The non-fossil (biogenic) carbon flows are modelled consistently with the most updated ILCD list of elementary flows.

## Cut-off and completeness
There are no intentional cut-offs in the inventory no matter how small their contribution to all the EF impact categories is. Eventual cut-offs are in compliance with the Guide for EF compliant data sets (JRC 2020), i.e. only if below the 3% cut-off rule. The dataset dry mass and water balance has been checked to ensure the inventory is complete. Capital goods (e.g. infrastructure) and their end-of-life are included.

## Data selection and combination
These datasets include, in both their foreground and background data, links to EF3.0 compliant data.
The relevant background data on energy, transport, and End of Life are from the LCDN data node (http://lcdn.thinkstep.com/Node/).
All other background data in the supply of this product for which no EF3.0 process was available are from ecoinvent v3.7 database (www.ecoinvent.org) or other data sources.

## Data treatment and extrapolations
Several data sources have been used to model the inventory.

## Review details
Internal reviews have been asked to review the plausibility of the unit process, LCIA scores, and DQRs. Internal reviewers have also been asked to review the data for EF compliancy. The consortium is therefore responsible for aspects such as compliancy with the ILCD format, including validation in Look@LCI, and nomenclature.
Internal reviwers have been asked to judge based on the process name, that the unit process models in a complete and representative way the process in the requested location. The review encompassed the plausability of:
- exchanges with nature (elementary flows) as well as exchanges such as product and waste flows.
- meta information (general comment, technology comment, system boundaries, allocation, cut-off rules, etc.). Reviewers were asked to judge if the provided information is enough to understand the content of the process.
- LCIA scores
- DQRs including precision, technology, time and geography. As well as the overall DQR.
External reviewers have been asked to provide their expertise in the field of interest. External reviewers have been asked to review the unit process, including eventual methodological choices, the LCIA scores (provided with contribution scores as well), and DQRs. External reviewers have been provided all the information in a tool developed by the consortium for the purpose of this project.
External reviewers have been asked to judge based on the process name, that the unit process models in a complete and representative way the process in the requested location. The review encompassed:
- Plausability and completeness of exchanges with nature (elementary flows) as well as exchanges such as product and waste flows.
- Review of meta information (general comment, technology comment, system boundaries, allocation, cut-off rules, etc.). Reviewers were asked to judge if the provided information is enough to understand the content of the process.
- Review of properties (biogenic carbon and water content).
- Review of allocation keys.
- Plausability of LCIA scores calculated by the consortium.
- Plausability of DQRs including precision, technology, time and geography. As well as the overall DQR.

## Data sources
- Background Data for Representative products and organisations. EF 3.0 compliant (data stock)
- Sur SH, Choi PJ, Ko JW, Lee JY, Lee YH, KHD (2018) Preparation and Properties of DMF-Based Polyurethanes for Wet-Type Polyurethane Artificial Leather. International Journal of Polymer Science Volume 2018, Article ID 7370852, 9 pages https://doi.org/10.1155/2018/7370852
- Ka T, Geberehiwot Z (2020) Economy and Ecology in Dyeing-Cold Pad batch Dyeing Method for Cotton Knitted Fabric. Journal of Textile Science & Engineering. Volume 10:4, 2020 DOI: 10.37421/jtese.2020.10.411
- Mazo-Restrepo R, Alvarado P, Cacua K (2021) Analysis of potential waste heat recovery from a stenter in a textile plant.. DYNA, 88(217), pp. 292-302, April - June, 2021.
- M.H. Abo-Shosha, Z.H. El-Hilw, A.A. Aly, A. Amr and Al Said I. El. Nagdy (2008) Paraffin Wax Emulsion as Water Repellent for Cotton/Polyester Blended fabric. Journal of Industrial Textiles 2008 37: 315 DOI: 10.1177/1528083707083793
- thinkstep AG. 2017. LCA Update of Cotton Fiber and Fabric Life Cycle Inventory.
- UNFCCC (2012) COMPONENT PROJECT ACTIVITIES DESIGN DOCUMENT (CPA-DD). Accessed online August 8th 2021: http://gec.jp/gec/jp/Activities/cdm-fs/2012/2012_cdmfs01_jPear_bangladesh_cpa-dd.pdf
- XiNLiLONG (2021) Solvent based adhesive coating leather fabric bonding machine upholstery making machine. Accessed online August 10th, 2021: https://www.alibaba.com/product-detail/solvent-based-adhesive-coating-leather-fabric_62269930388.html?spm=a2700.7724857.normal_offer.d_title.2e1623ce0I6uFC
- EUREKA (2021) Production activities in line with the “green factory” approach in the textile sector. Accessed online August 8th 2021: https://eureka-eurogia-green.eu/offering_expertise/production-activities-in-line-with-the-green-factory-approach-in-the-textile-sector-13-04-2021/

## Intended applications
Implementation of regular Product Environmental Footprint (PEF) studies and Organisation Environmental Footprint (OEF) studies exclusively under the specified Product groups and sectors as defined in the Product Environmental Footprint Category Rules (PEFCR) and Organisation Environmental Footprint Sectorial Rules (OEFSR) listed in http://ec.europa.eu/environment/eussd/smgp/PEFCR_OEFSR.htm
