# chemi-thermomechanical pulp, elementary; technology mix;; production mix; at plant; dry mass 0.9 kg; carbon content, non fossil 0.494

Dataset: ILCD process, Unit process, single operation
Geography: EU+EFTA+UK
Reference year: 2019
Valid until: 2024
Classification: Other Services / Other services
LCI method principle: Attributional
LCI method approaches: Allocation - market value
Completeness: All relevant flows quantified
Project: Provision of process-based 3.0 Environmental Footprint-compliant life cycle inventory datasets - Renewable materials - contract number 070201/2020/840085/SER/ENV.B.1
Generated by: ecoinvent
Owner: ecoinvent
Compliance: Environmental Footprint non-primary supporting data set; Environmental Footprint 3.1
Amounts: no units in this file; such an amount is in the reference unit of its flow, which a separate flow dataset defines
copyright: true
licenseType: Free of charge for some user types or use types
accessRestrictions: Free of charge for all final users implementing a regular Product Environmental Footprint (PEF) studies and Organisation Environmental Footprint (OEF) studies exclusively under the specified Product groups and sectors as defined in the Product Environmental Footprint Category Rules (PEFCR) and Organisation Environmental Footprint Sectorial Rules (OEFSR) listed in http://ec.europa.eu/environment/eussd/smgp/PEFCR_OEFSR.htm and in accordance with the terms and conditions of the EULA (available at https://ecoinvent.lca-data.com/) exclusively until 31st December 2024. Any use of this dataset or any derivative data not within the specific context of one of the PEF/OEF projects or after the end of 2024 is not permitted.

## General comment
Notice: this data set supersedes the EF3.0-compliant version (see link under "preceding data set version" below calculated with the EF3.0). The life cycle inventory is not changed from the original EF3.0 data set. The LCIA results are calculated based on the EF3.1 methods which provide updated characterisation factors in the following impact categories: Climate Change, Ecotoxicity freshwater, Photochemical Ozone Formation, Acidification, Human Toxicity non-cancer, and Human Toxicity cancer. The review report and the data quality ratings refer to the original results. The data set has been updated by the European Commission on the basis of the original EF3.0 data set delivered by the data provider.This sub-process has limited documentation only. For all detailed documentation of the full model to which this data set belongs (such as DQRs, review reports and other technical documentation), please see this process: chemi-thermomechanical pulp - EU+EFTA+UK []

## Technology and included processes
In the CTMP wood chips are impregnated with chemicals before they are mechanically defibrated in the refiner under high pressure (~about 3 bar) or at atmospheric pressure, mainly in two stages. Bleaching has not been included because chemi-mechanical pulps cannot be brightened effectively by oxidative and reductive bleaching. During mechanical defibration, lignin is plasticised and remains in the pulp.

## Reference product
- chemi-thermomechanical pulp // chemi-thermomechanical pulp // eu+efta+uk, elementary: 1

## Inputs
- water, Renewable material resources from water [AL]: 3.09099e-5
- water, Renewable material resources from water [AT]: 0.000398255
- water, Renewable material resources from water [BA]: 3.85336e-5
- water, Renewable material resources from water [BE]: 0.000479362
- water, Renewable material resources from water [BG]: 0.000122749
- water, Renewable material resources from water [BY]: 0.000159388
- water, Renewable material resources from water [CH]: 0.000474985
- water, Renewable material resources from water [CZ]: 0.000330586
- water, Renewable material resources from water [DE]: 0.00359783
- water, Renewable material resources from water [DK]: 0.000260884
- water, Renewable material resources from water [EE]: 3.56241e-5
- water, Renewable material resources from water [ES]: 0.00154393
- water, Renewable material resources from water [FI]: 0.000222529
- water, Renewable material resources from water [FR]: 0.00253791
- water, Renewable material resources from water [GB]: 0.00252206
- water, Renewable material resources from water: 1.56655e-5
- water, Renewable material resources from water [GR]: 0.000286901
- water, Renewable material resources from water [HR]: 9.22481e-5
- water, Renewable material resources from water [HU]: 0.000241828
- water, Renewable material resources from water [IE]: 0.000260496
- water, Renewable material resources from water [IS]: 1.48647e-5
- water, Renewable material resources from water [IT]: 0.00217138
- water, Renewable material resources from water [LT]: 7.60635e-5
- water, Renewable material resources from water [LU]: 5.28035e-5
- water, Renewable material resources from water [LV]: 4.48519e-5
- water, Renewable material resources from water [MD]: 2.3732e-5
- water, Renewable material resources from water [ME]: 9.56056e-6
- water, Renewable material resources from water [MK]: 2.64052e-5
- water, Renewable material resources from water [MT]: 1.4607e-5
- water, Renewable material resources from water [NL]: 0.000804899
- water, Renewable material resources from water [NO]: 0.000304679
- water, Renewable material resources from water [PL]: 0.000926348
- water, Renewable material resources from water [PT]: 0.000292296
- water, Renewable material resources from water [RO]: 0.000405801
- water, Renewable material resources from water [RS]: 0.000100701
- water, Renewable material resources from water [SE]: 0.000439647
- water, Renewable material resources from water [SI]: 6.22604e-5
- water, Renewable material resources from water [SK]: 0.000146134
- water, Renewable material resources from water [SM]: 1.81879e-6
- water, Renewable material resources from water [UA]: 0.000428468

## Outputs
- Water, Emissions to air, unspecified: 0.003
- Water, Emissions to water, unspecified [AL]: 2.62734e-5
- Water, Emissions to water, unspecified [AT]: 0.000338517
- Water, Emissions to water, unspecified [BA]: 3.27536e-5
- Water, Emissions to water, unspecified [BE]: 0.000407457
- Water, Emissions to water, unspecified [BG]: 0.000104337
- Water, Emissions to water, unspecified [BY]: 0.00013548
- Water, Emissions to water, unspecified [CH]: 0.000403737
- Water, Emissions to water, unspecified [CZ]: 0.000280998
- Water, Emissions to water, unspecified [DE]: 0.00305816
- Water, Emissions to water, unspecified [DK]: 0.000221751
- Water, Emissions to water, unspecified [EE]: 3.02804e-5
- Water, Emissions to water, unspecified [ES]: 0.00131234
- Water, Emissions to water, unspecified [FI]: 0.000189149
- Water, Emissions to water, unspecified [FR]: 0.00215722
- Water, Emissions to water, unspecified [GB]: 0.00214375
- Water, Emissions to water, unspecified: 1.33157e-5
- Water, Emissions to water, unspecified [GR]: 0.000243866
- Water, Emissions to water, unspecified [HR]: 7.84109e-5
- Water, Emissions to water, unspecified [HU]: 0.000205554
- Water, Emissions to water, unspecified [IE]: 0.000221422
- Water, Emissions to water, unspecified [IS]: 1.2635e-5
- Water, Emissions to water, unspecified [IT]: 0.00184567
- Water, Emissions to water, unspecified [LT]: 6.4654e-5
- Water, Emissions to water, unspecified [LU]: 4.4883e-5
- Water, Emissions to water, unspecified [LV]: 3.81241e-5
- Water, Emissions to water, unspecified [MD]: 2.01722e-5
- Water, Emissions to water, unspecified [ME]: 8.12648e-6
- Water, Emissions to water, unspecified [MK]: 2.24444e-5
- Water, Emissions to water, unspecified [MT]: 1.24159e-5
- Water, Emissions to water, unspecified [NL]: 0.000684164
- Water, Emissions to water, unspecified [NO]: 0.000258977
- Water, Emissions to water, unspecified [PL]: 0.000787396
- Water, Emissions to water, unspecified [PT]: 0.000248452
- Water, Emissions to water, unspecified [RO]: 0.000344931
- Water, Emissions to water, unspecified [RS]: 8.55958e-5
- Water, Emissions to water, unspecified [SE]: 0.0003737
- Water, Emissions to water, unspecified [SI]: 5.29213e-5
- Water, Emissions to water, unspecified [SK]: 0.000124214
- Water, Emissions to water, unspecified [SM]: 1.54597e-6
- Water, Emissions to water, unspecified [UA]: 0.000364198
- Phosphorus, Emissions to water, unspecified: 1e-5
- biological oxygen demand, Emissions to water, unspecified: 0.00249
- chemical oxygen demand, Emissions to water, unspecified: 0.0164
- total organic carbon, Emissions to water, unspecified: 0.00607407
- DOC, Dissolved Organic Carbon, Emissions to water, unspecified: 0.00607407
- Nitrogen oxides, Emissions to air, unspecified: 1.57217e-6
- nitrogen, total (excluding N2), Emissions to water, unspecified: 0.0004
- Suspended solids, unspecified, Emissions to water, unspecified: 0.00096
- sulfur dioxide, Emissions to air, unspecified (long-term): 7.86087e-8
- Nitrogen oxides, Emissions to air, unspecified [AL]: 3.09099e-7
- Nitrogen oxides, Emissions to air, unspecified [AT]: 3.98255e-6
- Nitrogen oxides, Emissions to air, unspecified [BA]: 3.85336e-7
- Nitrogen oxides, Emissions to air, unspecified [BE]: 4.79362e-6
- Nitrogen oxides, Emissions to air, unspecified [BG]: 1.22749e-6
- Nitrogen oxides, Emissions to air, unspecified [BY]: 1.59388e-6
- Nitrogen oxides, Emissions to air, unspecified [CH]: 4.74985e-6
- Nitrogen oxides, Emissions to air, unspecified [CZ]: 3.30586e-6
- Nitrogen oxides, Emissions to air, unspecified [DE]: 3.59783e-5
- Nitrogen oxides, Emissions to air, unspecified [DK]: 2.60884e-6
- Nitrogen oxides, Emissions to air, unspecified [EE]: 3.56241e-7
- Nitrogen oxides, Emissions to air, unspecified [ES]: 1.54393e-5
- Nitrogen oxides, Emissions to air, unspecified [FI]: 2.22529e-6
- Nitrogen oxides, Emissions to air, unspecified [FR]: 2.53791e-5
- Nitrogen oxides, Emissions to air, unspecified [GB]: 2.52206e-5
- Nitrogen oxides, Emissions to air, unspecified [GR]: 2.86901e-6
- Nitrogen oxides, Emissions to air, unspecified [HR]: 9.22481e-7
- Nitrogen oxides, Emissions to air, unspecified [HU]: 2.41828e-6
- Nitrogen oxides, Emissions to air, unspecified [IE]: 2.60496e-6
- Nitrogen oxides, Emissions to air, unspecified [IT]: 2.17138e-5
- Nitrogen oxides, Emissions to air, unspecified [LT]: 7.60635e-7
- Nitrogen oxides, Emissions to air, unspecified [LU]: 5.28035e-7
- Nitrogen oxides, Emissions to air, unspecified [LV]: 4.48519e-7
- Nitrogen oxides, Emissions to air, unspecified [MD]: 2.3732e-7
- Nitrogen oxides, Emissions to air, unspecified [MK]: 2.64052e-7
- Nitrogen oxides, Emissions to air, unspecified [NL]: 8.04899e-6
- Nitrogen oxides, Emissions to air, unspecified [NO]: 3.04679e-6
- Nitrogen oxides, Emissions to air, unspecified [PL]: 9.26348e-6
- Nitrogen oxides, Emissions to air, unspecified [PT]: 2.92296e-6
- Nitrogen oxides, Emissions to air, unspecified [RO]: 4.05801e-6
- Nitrogen oxides, Emissions to air, unspecified [SE]: 4.39647e-6
- Nitrogen oxides, Emissions to air, unspecified [SI]: 6.22604e-7
- Nitrogen oxides, Emissions to air, unspecified [SK]: 1.46134e-6
- Nitrogen oxides, Emissions to air, unspecified [UA]: 4.28468e-6
- sulfur dioxide, Emissions to air, unspecified (long-term) [AL]: 1.5455e-8
- sulfur dioxide, Emissions to air, unspecified (long-term) [AT]: 1.99127e-7
- sulfur dioxide, Emissions to air, unspecified (long-term) [BA]: 1.92668e-8
- sulfur dioxide, Emissions to air, unspecified (long-term) [BE]: 2.39681e-7
- sulfur dioxide, Emissions to air, unspecified (long-term) [BG]: 6.13747e-8
- sulfur dioxide, Emissions to air, unspecified (long-term) [BY]: 7.9694e-8
- sulfur dioxide, Emissions to air, unspecified (long-term) [CH]: 2.37493e-7
- sulfur dioxide, Emissions to air, unspecified (long-term) [CZ]: 1.65293e-7
- sulfur dioxide, Emissions to air, unspecified (long-term) [DE]: 1.79892e-6
- sulfur dioxide, Emissions to air, unspecified (long-term) [DK]: 1.30442e-7
- sulfur dioxide, Emissions to air, unspecified (long-term) [EE]: 1.7812e-8
- sulfur dioxide, Emissions to air, unspecified (long-term) [ES]: 7.71966e-7
- sulfur dioxide, Emissions to air, unspecified (long-term) [FI]: 1.11264e-7
- sulfur dioxide, Emissions to air, unspecified (long-term) [FR]: 1.26895e-6
- sulfur dioxide, Emissions to air, unspecified (long-term) [GB]: 1.26103e-6
- sulfur dioxide, Emissions to air, unspecified (long-term) [GR]: 1.4345e-7
- sulfur dioxide, Emissions to air, unspecified (long-term) [HR]: 4.61241e-8
- sulfur dioxide, Emissions to air, unspecified (long-term) [HU]: 1.20914e-7
- sulfur dioxide, Emissions to air, unspecified (long-term) [IE]: 1.30248e-7
- sulfur dioxide, Emissions to air, unspecified (long-term) [IT]: 1.08569e-6
- sulfur dioxide, Emissions to air, unspecified (long-term) [LT]: 3.80318e-8
- sulfur dioxide, Emissions to air, unspecified (long-term) [LU]: 2.64018e-8
- sulfur dioxide, Emissions to air, unspecified (long-term) [LV]: 2.24259e-8
- sulfur dioxide, Emissions to air, unspecified (long-term) [MD]: 1.1866e-8
- sulfur dioxide, Emissions to air, unspecified (long-term) [MK]: 1.32026e-8
- sulfur dioxide, Emissions to air, unspecified (long-term) [NL]: 4.0245e-7
- sulfur dioxide, Emissions to air, unspecified (long-term) [NO]: 1.52339e-7
- sulfur dioxide, Emissions to air, unspecified (long-term) [PL]: 4.63174e-7
- sulfur dioxide, Emissions to air, unspecified (long-term) [PT]: 1.46148e-7
- sulfur dioxide, Emissions to air, unspecified (long-term) [RO]: 2.029e-7
- sulfur dioxide, Emissions to air, unspecified (long-term) [SE]: 2.19824e-7
- sulfur dioxide, Emissions to air, unspecified (long-term) [SI]: 3.11302e-8
- sulfur dioxide, Emissions to air, unspecified (long-term) [SK]: 7.30672e-8
- sulfur dioxide, Emissions to air, unspecified (long-term) [UA]: 2.14234e-7

## Impact indicators
- Eutrophication marine: 0.0004778
- Ecotoxicity, freshwater: 2.0314e-5
- Water use: 0.0475241
- Human toxicity, non-cancer: 1.1098e-14
- EF-particulate Matter: 4e-10
- Photochemical ozone formation - human health: 0.000200811
- Acidification: 0.000107488
- Eutrophication, terrestrial: 0.000379936
- Eutrophication, freshwater: 1e-5
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
## Deviations from the LCI method principle
The background data uses:
- the \xe2\x80\x9cRecycled content cut-off\xe2\x80\x9d approach to allocate end-of-life by-products and secondary materials. This allocation is explained in the description of the recycled content system model (http://www.ecoinvent.org/database/system-models-in-ecoinvent-3/cut-off-system-model/allocation-cut-off-by-classification.html).
OR
- EF compliant data

## Deviations from the LCI method approaches
Background data:
- the \xe2\x80\x9cRecycled content cut-off\xe2\x80\x9d approach to allocate end-of-life by-products and secondary materials. This allocation is explained in the description of the recycled content system model (http://www.ecoinvent.org/database/system-models-in-ecoinvent-3/cut-off-system-model/allocation-cut-off-by-classification.html). The ecoinvent database mostly relies on “Allocation – market values” apart for few exceptions particularly in the energy sector. ecoinvent energy data is replaced with EF3.0 core data as per the EF guidelines version 2.0.
OR
- EF compliant data

## Modelling constants
All modelling constants follow the requirements listed in the Tender Specifications 070201/2020/SER/ENV.B1. Completeness: There are no intentional cut-offs in the inventory no matter how small their contribution to all the EF impact categories is. Eventual cut-offs are in compliance with the Guide for EF compliant data sets (JRC 2020), i.e. only if below the 3% cut-off rule. Water use: water use is modelled at country level using separate flows for water withdrawal, water release and water evaporation. Handling multi-functional processes: the following PEF multi- functionality decision hierarchy is applied for resolving all multi- functionality problems: (1) subdivision or system expansion; (2) allocation based on a relevant underlying physical relationship (substitution may apply here); (3) allocation based on some other relationship. Direct land use change: GHG emissions from direct LUC allocated to good/service for 20 years after the LUC occurs, with IPCC default values. Carbon storage and delayed emissions: credits associated with temporary (carbon) storage or delayed emissions up to 300 years are not be considered. Emissions off-setting: are not included. Capital goods (including infrastructures) and their End of life: they are included. System boundaries: system boundaries include all processes linked to the product supply chain (e.g. maintenance). Time period: emissions and removals are modelled as if released or removed at the beginning of the assessment method. Fossil and biogenic carbon emissions and removals: removals and emissions are modelled as follows: All GHG emissions from fossil fuels (including peat and limestone) are modelled consistently with the most updated ILCD list of elementary flows. The non-fossil (biogenic) carbon flows are modelled consistently with the most updated ILCD list of elementary flows.

## Cut-off and completeness
There are no intentional cut-offs in the inventory no matter how small their contribution to all the EF impact categories is. Eventual cut-offs are in compliance with the Guide for EF compliant data sets (JRC 2020), i.e. only if below the 3% cut-off rule. The dataset dry mass and water balance has been checked to ensure the inventory is complete. Capital goods (e.g. infrastructure) and their end-of-life are included.

## Data selection and combination
These datasets include, in both their foreground and background data, links to EF3.0 compliant data.
The relevant background data on energy, transport, and End of Life are from the LCDN data node (http://lcdn.thinkstep.com/Node/).
All other background data in the supply of this product for which no EF3.0 process was available are from ecoinvent v3.7 database (www.ecoinvent.org) or other data sources.

## Data treatment and extrapolations
Several data sources have been used to model the inventory.

## Use advice
This data set is a supporting sub-data set and must be used exclusively as sub-data set of its corresponding level-1 partly disaggregated data set (see “General comment” field for exact name and UUID).

## Data sources
- Background Data for Representative products and organisations. EF 3.0 compliant (data stock)
- Naturvardsverket, 2001. Naturvardsverket (2001) Skogsindustrins utsläpp - avfallsmängder och energiförbrukning 2000. Report 5154. Naturvardsverket (Swedish EPA), Stockholm.
- Södra (2002) Meeting Södra. Environmental Report 2001. Södra, Växjö (Sweden) as pdf-File under: www.sodra.com.
- European Commission, 2000. European Commission (2000) Integrated Pollution Prevention and Control (IPPC) - Reference Document on Best Available Techniques in the Pulp and Pa-per Industry. Institute for Prospective Technological Studies, Sevilla.
- Patt R., Kordsachia O., Süttinger R., Ohtani Y., Hoesch J. F., Ehrler P., Eich-inger R., Holik H., Hamm U., Rohmann M. E., Mummenhoff P., Petermann E., Miller R. F., Frank D., Wilken R., Baumgarten H. L. and Rentrop G.-H. (1993) Paper and Pulp. In: Ullmann's Encyclopedia of Industrial Chemistry, Vol. A.18. VCH Publisher Inc.
- ecoinvent database v3.7.1, chemi-thermomechanical pulp production, RER
- Rullifank, K. F., Roefinal, M. E., Kostanti, M., Sartika, L., & Evelyn. (2020). Pulp and paper industry: An overview on pulping technologies, factors, and challenges. IOP Conference Series: Materials Science and Engineering, 845(1), 012005. https://doi.org/10.1088/1757-899x/845/1/012005
- Sandberg, Christer, Ferritsius, Olof and Ferritsius, Rita. "Energy efficiency in mechanical pulping – definitions and considerations" Nordic Pulp & Paper Research Journal, vol. 36, no. 3, 2021, pp. 425-434. https://doi.org/10.1515/npprj-2021-0013
- Netramai, S., Kijchavengkul, T., & Kittipinyovath, P. (2016). Pulp and Paper Production. Reference Module in Food Science. https://doi.org/10.1016/b978-0-08-100596-5.03201-7
- Bajpai, P. (2016). Energy conservation measures for mechanical pulping. Pulp and Paper Industry, 125–144. https://doi.org/10.1016/b978-0-12-803411-8.00008-1
- Suhr M, Klein G, Kourti I, Rodrigo Gonzalo M, Giner Santonja G, Roudier S, Delgado Sancho L. Best Available Techniques (BAT) Reference Document for the Production of Pulp, Paper and Board. Industrial Emissions Directive 2010/75/EU (Integrated Pollution Prevention and Control). EUR 27235. Luxembourg (Luxembourg): Publications Office of the European Union; 2015. JRC95678
- Eurostat (2021). Roundwood removals by type of wood and assortment. Tree species: Coniferous. Wood products: Roundwood under bark. Available at: ec.europa.eu/eurostat/databrowser/bookmark/2fe47d27-a1ea-4028-a4cc-06c1f8725af0?lang=en [Accessed on 25/06/2021]

## Intended applications
Implementation of regular Product Environmental Footprint (PEF) studies and Organisation Environmental Footprint (OEF) studies exclusively under the specified Product groups and sectors as defined in the Product Environmental Footprint Category Rules (PEFCR) and Organisation Environmental Footprint Sectorial Rules (OEFSR) listed in http://ec.europa.eu/environment/eussd/smgp/PEFCR_OEFSR.htm
