# cotton fiber, conventional; ginning process; at plant; dry mass = 0.9kg

Dataset: ILCD process, Partly terminated system
Geography: BR
Reference year: 2020
Valid until: 2024
Classification: Materials production / Food and renewable raw materials
LCI method principle: Attributional
LCI method approaches: Allocation - market value
Completeness: All relevant flows quantified
Project: Provision of process-based 3.0 Environmental Footprint-compliant life cycle inventory datasets - Renewable materials - contract number 070201/2020/840085/SER/ENV.B.1
Generated by: ACV Brasil
Owner: Blonk Sustainability Tools
Compliance: ILCD Data Network - Entry-level; Suggestions for updating the PEF method 2019; ISO 14040 Environmental Management – Life Cycle Assessment – Principles and Framework, 2006; ISO 14044:2006. Environmental Management – Life Cycle Assessment – Requirements and guidelines.; Environmental Footprint 3.1
Review: Dependent internal review by Hans Blonk, Emilia Moreno Ruiz; Independent review panel by Philippa Notten
Data quality: Overall quality: Very good; Time representativeness: Very good; Geographical representativeness: Very good; Technological representativeness: Very good; Precision: Good; Methodological appropriateness and consistency: Not applicable
Amounts: no units in this file; such an amount is in the reference unit of its flow, which a separate flow dataset defines
copyright: true
licenseType: Free of charge for some user types or use types
accessRestrictions: Free of charge for all final users implementing a regular Product Environmental Footprint (PEF) studies and Organisation Environmental Footprint (OEF) studies exclusively under the specified Product groups and sectors as defined in the Product Environmental Footprint Category Rules (PEFCR) and Organisation Environmental Footprint Sectorial Rules (OEFSR) listed in http://ec.europa.eu/environment/eussd/smgp/PEFCR_OEFSR.htm and in accordance with the terms and conditions of the EULA (available at https://ecoinvent.lca-data.com/) exclusively until 31st December 2024. Any use of this dataset or any derivative data not within the specific context of one of the PEF/OEF projects or after the end of 2024 is not permitted.

## General comment
Notice: this data set supersedes the EF3.0-compliant version (see link under "preceding data set version" below calculated with the EF3.0). The life cycle inventory is not changed from the original EF3.0 data set. The LCIA results are calculated based on the EF3.1 methods which provide updated characterisation factors in the following impact categories: Climate Change, Ecotoxicity freshwater, Photochemical Ozone Formation, Acidification, Human Toxicity non-cancer, and Human Toxicity cancer. The review report and the data quality ratings refer to the original results. The data set has been updated by the European Commission on the basis of the original EF3.0 data set delivered by the data provider.Ginning process involves the separation of cotton lint from cotton seed. Seed cotton is first dried and it may then be passed through a suitable cleaning equipment for the removal of dirt. The cleaned and dried seed cotton is then passed through cotton ginning setup where the the lint is separated from seeds.

## Technology and included processes
This inventory is based on the ecoinvent 3.7.1 dataset "fibre production, cotton, ginning GLO", adjusting seed cotton and cotton fiber productivities for the 2020/2021 harvest in Mato Grosso (CONAB 2021), the major producer in Brazil. Ginning process starts with the input of seed cotton into the ginning machine where the lint is separated from the seeds and the lint is collected as a continuous loose sheet. The machinery and infrastructure are not included in the process. The loose continuous sheet of lint is then put into a hydraulic press machine to press the lint into bales. The seed is collected separately and are stored for future use in farming or are sent to allied industries for further processing. The ginning process culminates with the output of bales of cotton and separated cotton seeds.
Allocation is done according to the prices of cotton seed and cotton fiber in 2021 (80.03% allocated to cotton fiber, from Cepea / Esalq and ABRAPA, 2021).

ABRAPA. Preço Caroço de Algodão Brasil
​. https://www.abrapa.com.br/Paginas/dados/preco-caroco-de-algodao-brasil.aspx. 2021.

Cepea / Esalq. Preço de Algodão Cepea/Esalq. https://www.abrapa.com.br/Paginas/dados/preco-de-algodao-cepea-esalq.aspx. 2021.
​
CONAB. Dados. Algodão no Brasil. https://www.abrapa.com.br/Paginas/Dados/Algod%C3%A3o%20no%20Brasil.aspx. 2021.

## Parameters
- kg_0: 1.95194
  Mass in kg, for seed cotton, conventional, at farm // seed cotton, conventional // br; Articulated lorry transport, Euro 4, Total weight >32 t; EU+EFTA+UK
- km_0: 1000
  Distance in km, for seed cotton, conventional, at farm // seed cotton, conventional // br; Articulated lorry transport, Euro 4, Total weight >32 t; EU+EFTA+UK
- kg_km_0: 1951.94; = kg_0*km_0
  Transport amount in km*km, for seed cotton, conventional, at farm // seed cotton, conventional // br; Articulated lorry transport, Euro 4, Total weight >32 t; EU+EFTA+UK
- kg_1: 1.95194
  Mass in kg, for seed cotton, conventional, at farm // seed cotton, conventional // br; Transoceanic ship, containers; GLO
- km_1: 18000
  Distance in km, for seed cotton, conventional, at farm // seed cotton, conventional // br; Transoceanic ship, containers; GLO
- kg_km_1: 35134.9; = kg_1*km_1
  Transport amount in km*km, for seed cotton, conventional, at farm // seed cotton, conventional // br; Transoceanic ship, containers; GLO
- kg_2: 0.00016266
  Mass in kg, for industrial machine, heavy, unspecified; Freight train, diesel traction; EU+EFTA+UK
- km_2: 13.7378
  Distance in km, for industrial machine, heavy, unspecified; Freight train, diesel traction; EU+EFTA+UK
- kg_km_2: 0.0022346; = kg_2*km_2
  Transport amount in km*km, for industrial machine, heavy, unspecified; Freight train, diesel traction; EU+EFTA+UK
- kg_3: 0.00016266
  Mass in kg, for industrial machine, heavy, unspecified; Freight train, electricity traction; EU+EFTA+UK
- km_3: 4.14857
  Distance in km, for industrial machine, heavy, unspecified; Freight train, electricity traction; EU+EFTA+UK
- kg_km_3: 0.000674807; = kg_3*km_3
  Transport amount in km*km, for industrial machine, heavy, unspecified; Freight train, electricity traction; EU+EFTA+UK
- kg_4: 0.00016266
  Mass in kg, for industrial machine, heavy, unspecified; Freight train, average; EU+EFTA+UK
- km_4: 0.113617
  Distance in km, for industrial machine, heavy, unspecified; Freight train, average; EU+EFTA+UK
- kg_km_4: 1.8481e-5; = kg_4*km_4
  Transport amount in km*km, for industrial machine, heavy, unspecified; Freight train, average; EU+EFTA+UK
- kg_5: 0.00016266
  Mass in kg, for industrial machine, heavy, unspecified; Articulated lorry transport, Total weight >32 t, mix Euro 0-5; ROW w/o EU+EFTA
- km_5: 325
  Distance in km, for industrial machine, heavy, unspecified; Articulated lorry transport, Total weight >32 t, mix Euro 0-5; ROW w/o EU+EFTA
- kg_km_5: 0.0528646; = kg_5*km_5
  Transport amount in km*km, for industrial machine, heavy, unspecified; Articulated lorry transport, Total weight >32 t, mix Euro 0-5; ROW w/o EU+EFTA
- kg_6: 0.00016266
  Mass in kg, for industrial machine, heavy, unspecified; Transoceanic ship, containers; GLO
- km_6: 737
  Distance in km, for industrial machine, heavy, unspecified; Transoceanic ship, containers; GLO
- kg_km_6: 0.119881; = kg_6*km_6
  Transport amount in km*km, for industrial machine, heavy, unspecified; Transoceanic ship, containers; GLO
- kg_7: 0.00016266
  Mass in kg, for industrial machine, heavy, unspecified; Barge; ROW w/o EU+EFTA
- km_7: 1
  Distance in km, for industrial machine, heavy, unspecified; Barge; ROW w/o EU+EFTA
- kg_km_7: 0.00016266; = kg_7*km_7
  Transport amount in km*km, for industrial machine, heavy, unspecified; Barge; ROW w/o EU+EFTA

## Reference product
- cotton fiber, conventional, at plant // cotton fiber, conventional // br: 1

## Inputs
- Electricity from Electricity grid mix 1kV-60kV - BR: 0.33357
- Thermal energy (MJ) from Thermal energy from natural gas - ROW: 0.0611783
- Transport of seed cotton, conventional, at farm // seed cotton, conventional // br by Articulated lorry transport, Euro 4, Total weight >32 t - EU+EFTA+UK: 1951.94; = kg_km_0
- Transport of seed cotton, conventional, at farm // seed cotton, conventional // br by Transoceanic ship, containers - GLO: 35134.9; = kg_km_1
- Transport of industrial machine, heavy, unspecified by Freight train, diesel traction - EU+EFTA+UK: 0.0022346; = kg_km_2
- Transport of industrial machine, heavy, unspecified by Freight train, electricity traction - EU+EFTA+UK: 0.000674807; = kg_km_3
- Transport of industrial machine, heavy, unspecified by Freight train, average - EU+EFTA+UK: 1.8481e-5; = kg_km_4
- Transport of industrial machine, heavy, unspecified by Articulated lorry transport, Total weight >32 t, mix Euro 0-5 - ROW w/o EU+EFTA: 0.0528646; = kg_km_5
- Transport of industrial machine, heavy, unspecified by Transoceanic ship, containers - GLO: 0.119881; = kg_km_6
- Transport of industrial machine, heavy, unspecified by Barge - ROW w/o EU+EFTA: 0.00016266; = kg_km_7
- cotton fiber, conventional, at plant // cotton fiber, conventional // br, blackbox: 1
- cotton fiber, conventional, at plant // cotton fiber, conventional // br, elementary: 1

## Impact indicators
- Eutrophication marine: 0.0391314
- Ecotoxicity, freshwater: 136.879
- Land use: 525.661
- Water use: 2.41435
- Resource use, minerals and metals: 2.35642e-5
- Resource use, fossils: 40.5422
- Climate change: 5.72541
- Ozone depletion: 1.62584e-6
- Human toxicity, cancer: 1.05215e-8
- Human toxicity, non-cancer: 5.68934e-7
- EF-particulate Matter: 8.61866e-7
- Ionising radiation, human health: 0.055583
- Photochemical ozone formation - human health: 0.0306012
- Acidification: 0.0665197
- Eutrophication, terrestrial: 0.241379
- Eutrophication, freshwater: 0.00157374

## Deviations from the LCI method principle
The background data uses:
- the \xe2\x80\x9cRecycled content cut-off\xe2\x80\x9d approach to allocate end-of-life by-products and secondary materials. This allocation is explained in the description of the recycled content system model (http://www.ecoinvent.org/database/system-models-in-ecoinvent-3/cut-off-system-model/allocation-cut-off-by-classification.html).
OR
- EF compliant data

## Deviations from the LCI method approaches
Background data:
- the \xe2\x80\x9cRecycled content cut-off\xe2\x80\x9d approach to allocate end-of-life by-products and secondary materials. This allocation is explained in the description of the recycled content system model (http://www.ecoinvent.org/database/system-models-in-ecoinvent-3/cut-off-system-model/allocation-cut-off-by-classification.html). The ecoinvent database mostly relies on “Allocation – market values” apart for few exceptions particularly in the energy sector. ecoinvent energy data is replaced with EF3.0 core data as per the EF guidelines version 2.0.
OR
- EF compliant data

## Modelling constants
All modelling constants follow the requirements listed in the Tender Specifications 070201/2020/SER/ENV.B1. Completeness: There are no intentional cut-offs in the inventory no matter how small their contribution to all the EF impact categories is. Eventual cut-offs are in compliance with the Guide for EF compliant data sets (JRC 2020), i.e. only if below the 3% cut-off rule. Water use: water use is modelled at country level using separate flows for water withdrawal, water release and water evaporation. Handling multi-functional processes: the following PEF multi- functionality decision hierarchy is applied for resolving all multi- functionality problems: (1) subdivision or system expansion; (2) allocation based on a relevant underlying physical relationship (substitution may apply here); (3) allocation based on some other relationship. Direct land use change: GHG emissions from direct LUC allocated to good/service for 20 years after the LUC occurs, with IPCC default values. Carbon storage and delayed emissions: credits associated with temporary (carbon) storage or delayed emissions up to 300 years are not be considered. Emissions off-setting: are not included. Capital goods (including infrastructures) and their End of life: they are included. System boundaries: system boundaries include all processes linked to the product supply chain (e.g. maintenance). Time period: emissions and removals are modelled as if released or removed at the beginning of the assessment method. Fossil and biogenic carbon emissions and removals: removals and emissions are modelled as follows: All GHG emissions from fossil fuels (including peat and limestone) are modelled consistently with the most updated ILCD list of elementary flows. The non-fossil (biogenic) carbon flows are modelled consistently with the most updated ILCD list of elementary flows.

## Cut-off and completeness
There are no intentional cut-offs in the inventory no matter how small their contribution to all the EF impact categories is. Eventual cut-offs are in compliance with the Guide for EF compliant data sets (JRC 2020), i.e. only if below the 3% cut-off rule. The dataset dry mass and water balance has been checked to ensure the inventory is complete. Capital goods (e.g. infrastructure) and their end-of-life are included.

## Data selection and combination
These datasets include, in both their foreground and background data, links to EF3.0 compliant data.
The relevant background data on energy, transport, and End of Life are from the LCDN data node (http://lcdn.thinkstep.com/Node/).
All other background data in the supply of this product for which no EF3.0 process was available are from ecoinvent v3.7 database (www.ecoinvent.org) or other data sources.

## Data treatment and extrapolations
Several data sources have been used to model the inventory.

## Review details
Internal reviews have been asked to review the plausibility of the unit process, LCIA scores, and DQRs. Internal reviewers have also been asked to review the data for EF compliancy. The consortium is therefore responsible for aspects such as compliancy with the ILCD format, including validation in Look@LCI, and nomenclature.
Internal reviwers have been asked to judge based on the process name, that the unit process models in a complete and representative way the process in the requested location. The review encompassed the plausability of:
- exchanges with nature (elementary flows) as well as exchanges such as product and waste flows.
- meta information (general comment, technology comment, system boundaries, allocation, cut-off rules, etc.). Reviewers were asked to judge if the provided information is enough to understand the content of the process.
- LCIA scores
- DQRs including precision, technology, time and geography. As well as the overall DQR.
External reviewers have been asked to provide their expertise in the field of interest. External reviewers have been asked to review the unit process, including eventual methodological choices, the LCIA scores (provided with contribution scores as well), and DQRs. External reviewers have been provided all the information in a tool developed by the consortium for the purpose of this project.
External reviewers have been asked to judge based on the process name, that the unit process models in a complete and representative way the process in the requested location. The review encompassed:
- Plausability and completeness of exchanges with nature (elementary flows) as well as exchanges such as product and waste flows.
- Review of meta information (general comment, technology comment, system boundaries, allocation, cut-off rules, etc.). Reviewers were asked to judge if the provided information is enough to understand the content of the process.
- Review of properties (biogenic carbon and water content).
- Review of allocation keys.
- Plausability of LCIA scores calculated by the consortium.
- Plausability of DQRs including precision, technology, time and geography. As well as the overall DQR.

## Data sources
- Background Data for Representative products and organisations. EF 3.0 compliant (data stock)
- ABRAPA. Preço Caroço de Algodão Brasil ​. https://www.abrapa.com.br/Paginas/dados/preco-caroco-de-algodao-brasil.aspx. 2021.
- Cepea / Esalq. Preço de Algodão Cepea/Esalq. https://www.abrapa.com.br/Paginas/dados/preco-de-algodao-cepea-esalq.aspx. 2021. ​
- CONAB. Dados. Algodão no Brasil. https://www.abrapa.com.br/Paginas/Dados/Algod%C3%A3o%20no%20Brasil.aspx. 2021.

## Intended applications
Implementation of regular Product Environmental Footprint (PEF) studies and Organisation Environmental Footprint (OEF) studies exclusively under the specified Product groups and sectors as defined in the Product Environmental Footprint Category Rules (PEFCR) and Organisation Environmental Footprint Sectorial Rules (OEFSR) listed in http://ec.europa.eu/environment/eussd/smgp/PEFCR_OEFSR.htm
