# painting/staining/coloring, outsole; Painting, Painting/Spray Booth machine; production mix, at plant; service

Dataset: ILCD process, Partly terminated system
Geography: GLO
Reference year: 2021
Valid until: 2024
Classification: Systems / Textiles, furnitures and other interiors
LCI method principle: Attributional
LCI method approaches: Allocation - market value
Completeness: All relevant flows quantified
Project: Provision of process-based 3.0 Environmental Footprint-compliant life cycle inventory datasets - Apparel 3 - contract number 070201/2020/840294/SER/ENV.B.1
Generated by: Life Cycle Indonesia
Owner: PRé Sustainability B.V.
Compliance: ILCD Data Network - Entry-level; Suggestions for updating the PEF method 2019; ISO 14040 Environmental Management – Life Cycle Assessment – Principles and Framework, 2006; ISO 14044:2006. Environmental Management – Life Cycle Assessment – Requirements and guidelines.; Environmental Footprint 3.1
Review: Dependent internal review by Avraam Symeonidis, Emilia Moreno Ruiz; Independent review panel by Subramanian Senthilkannan Muthu
Data quality: Overall quality: Good; Time representativeness: Very good; Geographical representativeness: Good; Technological representativeness: Good; Precision: Good; Methodological appropriateness and consistency: Not applicable
Amounts: no units in this file; such an amount is in the reference unit of its flow, which a separate flow dataset defines
copyright: true
licenseType: Free of charge for some user types or use types
accessRestrictions: Free of charge for all final users implementing a regular Product Environmental Footprint (PEF) studies and Organisation Environmental Footprint (OEF) studies exclusively under the specified Product groups and sectors as defined in the Product Environmental Footprint Category Rules (PEFCR) and Organisation Environmental Footprint Sectorial Rules (OEFSR) listed in http://ec.europa.eu/environment/eussd/smgp/PEFCR_OEFSR.htm and in accordance with the terms and conditions of the EULA (available at https://ecoinvent.lca-data.com/) exclusively until 31st December 2024. Any use of this dataset or any derivative data not within the specific context of one of the PEF/OEF projects or after the end of 2024 is not permitted.

## General comment
Notice: this data set supersedes the EF3.0-compliant version (see link under "preceding data set version" below calculated with the EF3.0). The life cycle inventory is not changed from the original EF3.0 data set. The LCIA results are calculated based on the EF3.1 methods which provide updated characterisation factors in the following impact categories: Climate Change, Ecotoxicity freshwater, Photochemical Ozone Formation, Acidification, Human Toxicity non-cancer, and Human Toxicity cancer. The review report and the data quality ratings refer to the original results. The data set has been updated by the European Commission on the basis of the original EF3.0 data set delivered by the data provider.Painting outsole is a process that apply an additional layer of paint on the outsole. The process is a quiet crucial segment at the finish stage. It is recommended to use compressed air guns in the paint booth for applying finish bases, applications of brightness, oils, inks for color correction and color enhancers. The pistols have the advantage of uniformity of application and must have pressure control and always be well cleaned.

CFPIC and ICSAS-Team. (2017). Train-the-Trainer Manual: lasting. Erasmus+ : Europe
http://icsas-project.eu/wp-content/uploads/2020/02/Finishing_EN.pdf

## Technology and included processes
Painting using Painting/Spray Booth machine mainly used in the finishing stage of the shoe industry and it is designed for painting shoes and shoe details, soles by applying polish, paint and other materials.
The painting booth is equipped with exhausting fan and curtain to eliminate harmful vapors, odors and paint drips. Shoe outsole material usually belong to the category of hydrophobic substrate (Sustainable Apparel, 2015). It is require disperse dyes for painting the material (WHO, 2010). The anthraquinone is used to represent disperse dyes.

In the automatic spray painting machine, the disperse dyes, energy consumption from electricity and infrastructure of the machine are included. The dye is part of the final product. Hence, there is no waste or emission resulted from the usage of dye. There is no direct emission to air since the emission comes from electricity usage, while hazardous waste comes from waste lube oil. The consumption of lubricating oil using a thermobonding oven machine as a proxy. Vapors and paint drips are not included in the model as the amount are not significant and uncountable.

CFPIC and ICSAS-Team. (2017). Train-the-Trainer Manual: lasting. Erasmus+ : Europe
World Health Organization (WHO). 2010. Chemistry of Dyes. Some Aromatic Amines, Organic Dyes, and Related Exposures. IARC Monographs on the Evaluation of Carcinogenic Risks to Humans, No. 99. International Agency for Research on Cancer. Lyon, France.
Sustainable Apparel (2015) https://www.sciencedirect.com/topics/engineering/reactive-dye

## Parameters
- kg_0: 0.00156205
  Mass in kg, for anthraquinone; Transoceanic ship, containers; GLO
- km_0: 1811.9
  Distance in km, for anthraquinone; Transoceanic ship, containers; GLO
- kg_km_0: 2.83028; = kg_0*km_0
  Transport amount in km*km, for anthraquinone; Transoceanic ship, containers; GLO
- kg_1: 0.00156205
  Mass in kg, for anthraquinone; Freight train, diesel traction; EU+EFTA+UK
- km_1: 693.518
  Distance in km, for anthraquinone; Freight train, diesel traction; EU+EFTA+UK
- kg_km_1: 1.08331; = kg_1*km_1
  Transport amount in km*km, for anthraquinone; Freight train, diesel traction; EU+EFTA+UK
- kg_2: 0.00156205
  Mass in kg, for anthraquinone; Freight train, electricity traction; EU+EFTA+UK
- km_2: 235.906
  Distance in km, for anthraquinone; Freight train, electricity traction; EU+EFTA+UK
- kg_km_2: 0.368497; = kg_2*km_2
  Transport amount in km*km, for anthraquinone; Freight train, electricity traction; EU+EFTA+UK
- kg_3: 0.00156205
  Mass in kg, for anthraquinone; Freight train, average; EU+EFTA+UK
- km_3: 5.56396
  Distance in km, for anthraquinone; Freight train, average; EU+EFTA+UK
- kg_km_3: 0.00869118; = kg_3*km_3
  Transport amount in km*km, for anthraquinone; Freight train, average; EU+EFTA+UK
- kg_4: 0.00156205
  Mass in kg, for anthraquinone; Barge; EU+EFTA+UK
- km_4: 24.4619
  Distance in km, for anthraquinone; Barge; EU+EFTA+UK
- kg_km_4: 0.0382106; = kg_4*km_4
  Transport amount in km*km, for anthraquinone; Barge; EU+EFTA+UK
- kg_5: 0.00156205
  Mass in kg, for anthraquinone; Barge; ROW w/o EU+EFTA
- km_5: 49.95
  Distance in km, for anthraquinone; Barge; ROW w/o EU+EFTA
- kg_km_5: 0.0780244; = kg_5*km_5
  Transport amount in km*km, for anthraquinone; Barge; ROW w/o EU+EFTA
- kg_6: 0.00156205
  Mass in kg, for anthraquinone; Articulated lorry transport, Euro 4, Total weight >32 t; EU+EFTA+UK
- km_6: 173.553
  Distance in km, for anthraquinone; Articulated lorry transport, Euro 4, Total weight >32 t; EU+EFTA+UK
- kg_km_6: 0.271099; = kg_6*km_6
  Transport amount in km*km, for anthraquinone; Articulated lorry transport, Euro 4, Total weight >32 t; EU+EFTA+UK
- kg_7: 0.00156205
  Mass in kg, for anthraquinone; Articulated lorry transport, Total weight >32 t, mix Euro 0-5; ROW w/o EU+EFTA
- km_7: 458.04
  Distance in km, for anthraquinone; Articulated lorry transport, Total weight >32 t, mix Euro 0-5; ROW w/o EU+EFTA
- kg_km_7: 0.715481; = kg_7*km_7
  Transport amount in km*km, for anthraquinone; Articulated lorry transport, Total weight >32 t, mix Euro 0-5; ROW w/o EU+EFTA
- kg_8: 3.96583e-6
  Mass in kg, for lubricating oil // lubricants at refinery // eu+efta+uk; Articulated lorry transport, Euro 4, Total weight >32 t; EU+EFTA+UK
- km_8: 1001.05
  Distance in km, for lubricating oil // lubricants at refinery // eu+efta+uk; Articulated lorry transport, Euro 4, Total weight >32 t; EU+EFTA+UK
- kg_km_8: 0.00397; = kg_8*km_8
  Transport amount in km*km, for lubricating oil // lubricants at refinery // eu+efta+uk; Articulated lorry transport, Euro 4, Total weight >32 t; EU+EFTA+UK
- kg_9: 7.24195e-7
  Mass in kg, for lubricating oil // lubricants at refinery // rsa; Articulated lorry transport, Euro 4, Total weight >32 t; EU+EFTA+UK
- km_9: 1000
  Distance in km, for lubricating oil // lubricants at refinery // rsa; Articulated lorry transport, Euro 4, Total weight >32 t; EU+EFTA+UK
- kg_km_9: 0.000724195; = kg_9*km_9
  Transport amount in km*km, for lubricating oil // lubricants at refinery // rsa; Articulated lorry transport, Euro 4, Total weight >32 t; EU+EFTA+UK
- kg_10: 2.97105e-7
  Mass in kg, for lubricating oil // lubricants at refinery // raf; Articulated lorry transport, Euro 4, Total weight >32 t; EU+EFTA+UK
- km_10: 1000
  Distance in km, for lubricating oil // lubricants at refinery // raf; Articulated lorry transport, Euro 4, Total weight >32 t; EU+EFTA+UK
- kg_km_10: 0.000297105; = kg_10*km_10
  Transport amount in km*km, for lubricating oil // lubricants at refinery // raf; Articulated lorry transport, Euro 4, Total weight >32 t; EU+EFTA+UK
- kg_11: 7.78575e-6
  Mass in kg, for lubricating oil // lubricants at refinery // ras w/o cn; Articulated lorry transport, Euro 4, Total weight >32 t; EU+EFTA+UK
- km_11: 1000
  Distance in km, for lubricating oil // lubricants at refinery // ras w/o cn; Articulated lorry transport, Euro 4, Total weight >32 t; EU+EFTA+UK
- kg_km_11: 0.00778575; = kg_11*km_11
  Transport amount in km*km, for lubricating oil // lubricants at refinery // ras w/o cn; Articulated lorry transport, Euro 4, Total weight >32 t; EU+EFTA+UK
- kg_12: 6.43817e-6
  Mass in kg, for lubricating oil // lubricants at refinery // ru; Articulated lorry transport, Euro 4, Total weight >32 t; EU+EFTA+UK
- km_12: 1000
  Distance in km, for lubricating oil // lubricants at refinery // ru; Articulated lorry transport, Euro 4, Total weight >32 t; EU+EFTA+UK
- kg_km_12: 0.00643817; = kg_12*km_12
  Transport amount in km*km, for lubricating oil // lubricants at refinery // ru; Articulated lorry transport, Euro 4, Total weight >32 t; EU+EFTA+UK
- kg_13: 6.0774e-6
  Mass in kg, for lubricating oil // lubricants at refinery // rna; Articulated lorry transport, Euro 4, Total weight >32 t; EU+EFTA+UK
- km_13: 1000
  Distance in km, for lubricating oil // lubricants at refinery // rna; Articulated lorry transport, Euro 4, Total weight >32 t; EU+EFTA+UK
- kg_km_13: 0.0060774; = kg_13*km_13
  Transport amount in km*km, for lubricating oil // lubricants at refinery // rna; Articulated lorry transport, Euro 4, Total weight >32 t; EU+EFTA+UK
- kg_14: 1.23617e-6
  Mass in kg, for lubricating oil // lubricants at refinery // cn; Articulated lorry transport, Euro 4, Total weight >32 t; EU+EFTA+UK
- km_14: 1000
  Distance in km, for lubricating oil // lubricants at refinery // cn; Articulated lorry transport, Euro 4, Total weight >32 t; EU+EFTA+UK
- kg_km_14: 0.00123617; = kg_14*km_14
  Transport amount in km*km, for lubricating oil // lubricants at refinery // cn; Articulated lorry transport, Euro 4, Total weight >32 t; EU+EFTA+UK
- kg_15: 3.96583e-6
  Mass in kg, for lubricating oil // lubricants at refinery // eu+efta+uk; Transoceanic ship, containers; GLO
- km_15: 18003.8
  Distance in km, for lubricating oil // lubricants at refinery // eu+efta+uk; Transoceanic ship, containers; GLO
- kg_km_15: 0.0714; = kg_15*km_15
  Transport amount in km*km, for lubricating oil // lubricants at refinery // eu+efta+uk; Transoceanic ship, containers; GLO
- kg_16: 7.24195e-7
  Mass in kg, for lubricating oil // lubricants at refinery // rsa; Transoceanic ship, containers; GLO
- km_16: 18000
  Distance in km, for lubricating oil // lubricants at refinery // rsa; Transoceanic ship, containers; GLO
- kg_km_16: 0.0130355; = kg_16*km_16
  Transport amount in km*km, for lubricating oil // lubricants at refinery // rsa; Transoceanic ship, containers; GLO
- kg_17: 2.97105e-7
  Mass in kg, for lubricating oil // lubricants at refinery // raf; Transoceanic ship, containers; GLO
- km_17: 18000
  Distance in km, for lubricating oil // lubricants at refinery // raf; Transoceanic ship, containers; GLO
- kg_km_17: 0.0053479; = kg_17*km_17
  Transport amount in km*km, for lubricating oil // lubricants at refinery // raf; Transoceanic ship, containers; GLO
- kg_18: 7.78575e-6
  Mass in kg, for lubricating oil // lubricants at refinery // ras w/o cn; Transoceanic ship, containers; GLO
- km_18: 18000
  Distance in km, for lubricating oil // lubricants at refinery // ras w/o cn; Transoceanic ship, containers; GLO
- kg_km_18: 0.140144; = kg_18*km_18
  Transport amount in km*km, for lubricating oil // lubricants at refinery // ras w/o cn; Transoceanic ship, containers; GLO
- kg_19: 6.43817e-6
  Mass in kg, for lubricating oil // lubricants at refinery // ru; Transoceanic ship, containers; GLO
- km_19: 18000
  Distance in km, for lubricating oil // lubricants at refinery // ru; Transoceanic ship, containers; GLO
- kg_km_19: 0.115887; = kg_19*km_19
  Transport amount in km*km, for lubricating oil // lubricants at refinery // ru; Transoceanic ship, containers; GLO
- kg_20: 6.0774e-6
  Mass in kg, for lubricating oil // lubricants at refinery // rna; Transoceanic ship, containers; GLO
- km_20: 18000
  Distance in km, for lubricating oil // lubricants at refinery // rna; Transoceanic ship, containers; GLO
- kg_km_20: 0.109393; = kg_20*km_20
  Transport amount in km*km, for lubricating oil // lubricants at refinery // rna; Transoceanic ship, containers; GLO
- kg_21: 1.23617e-6
  Mass in kg, for lubricating oil // lubricants at refinery // cn; Transoceanic ship, containers; GLO
- km_21: 18000
  Distance in km, for lubricating oil // lubricants at refinery // cn; Transoceanic ship, containers; GLO
- kg_km_21: 0.0222511; = kg_21*km_21
  Transport amount in km*km, for lubricating oil // lubricants at refinery // cn; Transoceanic ship, containers; GLO

## Reference product
- painting/staining/coloring, outsole // painting/staining/coloring, outsole // glo: 1

## Inputs
- Transport of anthraquinone by Transoceanic ship, containers - GLO: 2.83028; = kg_km_0
- Transport of anthraquinone by Freight train, diesel traction - EU+EFTA+UK: 1.08331; = kg_km_1
- Transport of anthraquinone by Freight train, electricity traction - EU+EFTA+UK: 0.368497; = kg_km_2
- Transport of anthraquinone by Freight train, average - EU+EFTA+UK: 0.00869118; = kg_km_3
- Transport of anthraquinone by Barge - EU+EFTA+UK: 0.0382106; = kg_km_4
- Transport of anthraquinone by Barge - ROW w/o EU+EFTA: 0.0780244; = kg_km_5
- Transport of anthraquinone by Articulated lorry transport, Euro 4, Total weight >32 t - EU+EFTA+UK: 0.271099; = kg_km_6
- Transport of anthraquinone by Articulated lorry transport, Total weight >32 t, mix Euro 0-5 - ROW w/o EU+EFTA: 0.715481; = kg_km_7
- Electricity from Electricity grid mix 1kV-60kV - AU: 0.0002
- Electricity from Electricity grid mix 1kV-60kV - EU+EFTA+UK: 0.0023
- Electricity from Electricity grid mix 1kV-60kV - NZ: 0
- Electricity from Electricity grid mix 1kV-60kV - RAF: 0.0005
- Electricity from Electricity grid mix 1kV-60kV - RNA: 0.0034
- Electricity from Electricity grid mix 1kV-60kV - RSA: 0.0012
- Electricity from Electricity grid mix 1kV-60kV - RU: 0.0007
- Transport of lubricating oil // lubricants at refinery // eu+efta+uk by Articulated lorry transport, Euro 4, Total weight >32 t - EU+EFTA+UK: 0.00397; = kg_km_8
- Transport of lubricating oil // lubricants at refinery // rsa by Articulated lorry transport, Euro 4, Total weight >32 t - EU+EFTA+UK: 0.000724195; = kg_km_9
- Transport of lubricating oil // lubricants at refinery // raf by Articulated lorry transport, Euro 4, Total weight >32 t - EU+EFTA+UK: 0.000297105; = kg_km_10
- Transport of lubricating oil // lubricants at refinery // ras w/o cn by Articulated lorry transport, Euro 4, Total weight >32 t - EU+EFTA+UK: 0.00778575; = kg_km_11
- Transport of lubricating oil // lubricants at refinery // ru by Articulated lorry transport, Euro 4, Total weight >32 t - EU+EFTA+UK: 0.00643817; = kg_km_12
- Transport of lubricating oil // lubricants at refinery // rna by Articulated lorry transport, Euro 4, Total weight >32 t - EU+EFTA+UK: 0.0060774; = kg_km_13
- Transport of lubricating oil // lubricants at refinery // cn by Articulated lorry transport, Euro 4, Total weight >32 t - EU+EFTA+UK: 0.00123617; = kg_km_14
- Transport of lubricating oil // lubricants at refinery // eu+efta+uk by Transoceanic ship, containers - GLO: 0.0714; = kg_km_15
- Transport of lubricating oil // lubricants at refinery // rsa by Transoceanic ship, containers - GLO: 0.0130355; = kg_km_16
- Transport of lubricating oil // lubricants at refinery // raf by Transoceanic ship, containers - GLO: 0.0053479; = kg_km_17
- Transport of lubricating oil // lubricants at refinery // ras w/o cn by Transoceanic ship, containers - GLO: 0.140144; = kg_km_18
- Transport of lubricating oil // lubricants at refinery // ru by Transoceanic ship, containers - GLO: 0.115887; = kg_km_19
- Transport of lubricating oil // lubricants at refinery // rna by Transoceanic ship, containers - GLO: 0.109393; = kg_km_20
- Transport of lubricating oil // lubricants at refinery // cn by Transoceanic ship, containers - GLO: 0.0222511; = kg_km_21
- Electricity from Electricity grid mix 1kV-60kV - CN: 0.00353114
- Electricity from Electricity grid mix 1kV-60kV - RAS w/o CN: 0.00386886
- painting/staining/coloring, outsole // painting/staining/coloring, outsole // glo, blackbox: 1
- painting/staining/coloring, outsole // painting/staining/coloring, outsole // glo, elementary: 1

## Impact indicators
- Eutrophication marine: 8.53891e-5
- Ecotoxicity, freshwater: 0.989834
- Land use: 0.241966
- Water use: 0.051747
- Resource use, minerals and metals: 2.78392e-6
- Resource use, fossils: 1.36395
- Climate change: 0.106528
- Ozone depletion: 1.28715e-9
- Human toxicity, cancer: 1.02538e-10
- Human toxicity, non-cancer: 8.15587e-10
- EF-particulate Matter: 1.71004e-8
- Ionising radiation, human health: 0.00464515
- Photochemical ozone formation - human health: 0.000291916
- Acidification: 0.000656127
- Eutrophication, terrestrial: 0.00096665
- Eutrophication, freshwater: 4.77305e-6

## Deviations from the LCI method principle
The background data uses:
- the \xe2\x80\x9cRecycled content cut-off\xe2\x80\x9d approach to allocate end-of-life by-products and secondary materials. This allocation is explained in the description of the recycled content system model (http://www.ecoinvent.org/database/system-models-in-ecoinvent-3/cut-off-system-model/allocation-cut-off-by-classification.html).
OR
- EF compliant data

## Deviations from the LCI method approaches
Background data:
- the \xe2\x80\x9cRecycled content cut-off\xe2\x80\x9d approach to allocate end-of-life by-products and secondary materials. This allocation is explained in the description of the recycled content system model (http://www.ecoinvent.org/database/system-models-in-ecoinvent-3/cut-off-system-model/allocation-cut-off-by-classification.html). The ecoinvent database mostly relies on “Allocation – market values” apart for few exceptions particularly in the energy sector. ecoinvent energy data is replaced with EF3.0 core data as per the EF guidelines version 2.0.
OR
- EF compliant data

## Modelling constants
All modelling constants follow the requirements listed in the Tender Specifications 070201/2020/SER/ENV.B1. Completeness: There are no intentional cut-offs in the inventory no matter how small their contribution to all the EF impact categories is. Eventual cut-offs are in compliance with the Guide for EF compliant data sets (JRC 2020), i.e. only if below the 3% cut-off rule. Water use: water use is modelled at country level using separate flows for water withdrawal, water release and water evaporation. Handling multi-functional processes: the following PEF multi- functionality decision hierarchy is applied for resolving all multi- functionality problems: (1) subdivision or system expansion; (2) allocation based on a relevant underlying physical relationship (substitution may apply here); (3) allocation based on some other relationship. Direct land use change: GHG emissions from direct LUC allocated to good/service for 20 years after the LUC occurs, with IPCC default values. Carbon storage and delayed emissions: credits associated with temporary (carbon) storage or delayed emissions up to 300 years are not be considered. Emissions off-setting: are not included. Capital goods (including infrastructures) and their End of life: they are included. System boundaries: system boundaries include all processes linked to the product supply chain (e.g. maintenance). Time period: emissions and removals are modelled as if released or removed at the beginning of the assessment method. Fossil and biogenic carbon emissions and removals: removals and emissions are modelled as follows: All GHG emissions from fossil fuels (including peat and limestone) are modelled consistently with the most updated ILCD list of elementary flows. The non-fossil (biogenic) carbon flows are modelled consistently with the most updated ILCD list of elementary flows.

## Cut-off and completeness
There are no intentional cut-offs in the inventory no matter how small their contribution to all the EF impact categories is. Eventual cut-offs are in compliance with the Guide for EF compliant data sets (JRC 2020), i.e. only if below the 3% cut-off rule. The dataset dry mass and water balance has been checked to ensure the inventory is complete. Capital goods (e.g. infrastructure) and their end-of-life are included.

## Data selection and combination
These datasets include, in both their foreground and background data, links to EF3.0 compliant data.
The relevant background data on energy, transport, and End of Life are from the LCDN data node (http://lcdn.thinkstep.com/Node/).
All other background data in the supply of this product for which no EF3.0 process was available are from ecoinvent v3.7 database (www.ecoinvent.org) or other data sources.

## Data treatment and extrapolations
Several data sources have been used to model the inventory.

## Review details
Internal reviews have been asked to review the plausibility of the unit process, LCIA scores, and DQRs. Internal reviewers have also been asked to review the data for EF compliancy. The consortium is therefore responsible for aspects such as compliancy with the ILCD format, including validation in Look@LCI, and nomenclature.
Internal reviwers have been asked to judge based on the process name, that the unit process models in a complete and representative way the process in the requested location. The review encompassed the plausability of:
- exchanges with nature (elementary flows) as well as exchanges such as product and waste flows.
- meta information (general comment, technology comment, system boundaries, allocation, cut-off rules, etc.). Reviewers were asked to judge if the provided information is enough to understand the content of the process.
- LCIA scores
- DQRs including precision, technology, time and geography. As well as the overall DQR.
External reviewers have been asked to provide their expertise in the field of interest. External reviewers have been asked to review the unit process, including eventual methodological choices, the LCIA scores (provided with contribution scores as well), and DQRs. External reviewers have been provided all the information in a tool developed by the consortium for the purpose of this project.
External reviewers have been asked to judge based on the process name, that the unit process models in a complete and representative way the process in the requested location. The review encompassed:
- Plausability and completeness of exchanges with nature (elementary flows) as well as exchanges such as product and waste flows.
- Review of meta information (general comment, technology comment, system boundaries, allocation, cut-off rules, etc.). Reviewers were asked to judge if the provided information is enough to understand the content of the process.
- Review of properties (biogenic carbon and water content).
- Review of allocation keys.
- Plausability of LCIA scores calculated by the consortium.
- Plausability of DQRs including precision, technology, time and geography. As well as the overall DQR.

## Data sources
- Background Data for Representative products and organisations. EF 3.0 compliant (data stock)
- UN Data (2018) Statistics Data for Lubricants Productions, http://data.un.org/Data.aspx?q=Lubricants&d=EDATA&f=cmID%3aLU, United Nations Statistics Division, Global.
- Lebon (2021) Nonwoven Oven Machine, Catalog and Company Messages, Qingdao Lebon Industry Co., Ltd., China
- Pasvic (2021) Sole Spraying Machine, https://www.pasvic.co.th/sole-finishing-machine/sole-spraying-machine.html, PASVIC Co., Ltd, Thailand
- World Health Organization (WHO). 2010. Chemistry of Dyes. Some Aromatic Amines, Organic Dyes, and Related Exposures. IARC Monographs on the Evaluation of Carcinogenic Risks to Humans, No. 99. International Agency for Research on Cancer. Lyon, France.
- Angelus Direct. 2021. How Much Paint Do I Need? https://angelusdirect.com/apps/help-center#hc-how-much-paint-do-i-need . Santa Fe Springs, California.

## Intended applications
Implementation of regular Product Environmental Footprint (PEF) studies and Organisation Environmental Footprint (OEF) studies exclusively under the specified Product groups and sectors as defined in the Product Environmental Footprint Category Rules (PEFCR) and Organisation Environmental Footprint Sectorial Rules (OEFSR) listed in http://ec.europa.eu/environment/eussd/smgp/PEFCR_OEFSR.htm
