# assembly, double lasting, elementary; strobel lasting machine, toe lasting machine; production mix, at plant; service for 1 pair

Dataset: ILCD process, Unit process, single operation
Geography: GLO
Reference year: 2021
Valid until: 2024
Classification: Other Services / Other services
LCI method principle: Attributional
LCI method approaches: Allocation - market value
Completeness: All relevant flows quantified
Project: Provision of process-based 3.0 Environmental Footprint-compliant life cycle inventory datasets - Apparel 2 - contract number 070201/2020/840292/SER/ENV.B.1
Generated by: Life Cycle Indonesia
Owner: PRé Sustainability B.V.
Compliance: Environmental Footprint non-primary supporting data set; Environmental Footprint 3.1
Amounts: no units in this file; such an amount is in the reference unit of its flow, which a separate flow dataset defines
copyright: true
licenseType: Free of charge for some user types or use types
accessRestrictions: Free of charge for all final users implementing a regular Product Environmental Footprint (PEF) studies and Organisation Environmental Footprint (OEF) studies exclusively under the specified Product groups and sectors as defined in the Product Environmental Footprint Category Rules (PEFCR) and Organisation Environmental Footprint Sectorial Rules (OEFSR) listed in http://ec.europa.eu/environment/eussd/smgp/PEFCR_OEFSR.htm and in accordance with the terms and conditions of the EULA (available at https://ecoinvent.lca-data.com/) exclusively until 31st December 2024. Any use of this dataset or any derivative data not within the specific context of one of the PEF/OEF projects or after the end of 2024 is not permitted.

## General comment
Notice: this data set supersedes the EF3.0-compliant version (see link under "preceding data set version" below calculated with the EF3.0). The life cycle inventory is not changed from the original EF3.0 data set. The LCIA results are calculated based on the EF3.1 methods which provide updated characterisation factors in the following impact categories: Climate Change, Ecotoxicity freshwater, Photochemical Ozone Formation, Acidification, Human Toxicity non-cancer, and Human Toxicity cancer. The review report and the data quality ratings refer to the original results. The data set has been updated by the European Commission on the basis of the original EF3.0 data set delivered by the data provider.This sub-process has limited documentation only. For all detailed documentation of the full model to which this data set belongs (such as DQRs, review reports and other technical documentation), please see this process: assembly, double lasting - GLO []

## Technology and included processes
The combination last is used to ensure the toe of a shoe is correctly formed to the last. For a shoe with a smooth, solid toe cap, the Strobel sock may be attached to the inner lining, and a lasting “skirt” may be left on the toe cap pattern part. Once the upper is lasted, a second machine operation is used to pull the toe pattern part down tight. This shoe construction is often used on light hiking boots and basketball shoes with smooth leather toe tips. Toe lasting allows the leather to be shaped with a lasting machine.

Therefore in this model strobel lasting machine and a toe lasting machine will be used. The model represents the process itself, hence the input raw materials are not included in the model. The user will use this dataset along with the input raw materials. The energy consumption and infrastructure of the machine are included. Direct emission to air might occured from possible volatilization of adhesive/glue. The amount is estimated from reccomended emission limits, indirect emission comes from electricity usage, while hazardous waste comes from waste lube oil. In the model, the energy sources of machines used solely from electricity. The consumption of lubricating oil for strobel lasting machine using a stitchbonding machine as a proxy and for toe lasting machine using thermobonding oven as a proxy. The amount of thread for the strobel lasting machine and glue for the toe lasting machine are also included in this model. The consumption of solvent glue amount using cementing and side and seat lasting process as proxy.

Sneaker Factory (2021) Shoe Lasting https://www.sneakerfactory.net/2019/10/shoe-lasting/

## Reference product
- assembly, double lasting // assembly, double lasting // glo, elementary: 1

## Outputs
- volatile organic compound, Emissions to air, unspecified: 0.000189617

## Impact indicators
- Ecotoxicity, freshwater: 0.000363552
- Human toxicity, non-cancer: 9.68637e-12
- Photochemical ozone formation - human health: 4.45599e-5
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
## Deviations from the LCI method principle
The background data uses:
- the \xe2\x80\x9cRecycled content cut-off\xe2\x80\x9d approach to allocate end-of-life by-products and secondary materials. This allocation is explained in the description of the recycled content system model (http://www.ecoinvent.org/database/system-models-in-ecoinvent-3/cut-off-system-model/allocation-cut-off-by-classification.html).
OR
- EF compliant data

## Deviations from the LCI method approaches
Background data:
- the \xe2\x80\x9cRecycled content cut-off\xe2\x80\x9d approach to allocate end-of-life by-products and secondary materials. This allocation is explained in the description of the recycled content system model (http://www.ecoinvent.org/database/system-models-in-ecoinvent-3/cut-off-system-model/allocation-cut-off-by-classification.html). The ecoinvent database mostly relies on “Allocation – market values” apart for few exceptions particularly in the energy sector. ecoinvent energy data is replaced with EF3.0 core data as per the EF guidelines version 2.0.
OR
- EF compliant data

## Modelling constants
All modelling constants follow the requirements listed in the Tender Specifications 070201/2020/SER/ENV.B1. Completeness: There are no intentional cut-offs in the inventory no matter how small their contribution to all the EF impact categories is. Eventual cut-offs are in compliance with the Guide for EF compliant data sets (JRC 2020), i.e. only if below the 3% cut-off rule. Water use: water use is modelled at country level using separate flows for water withdrawal, water release and water evaporation. Handling multi-functional processes: the following PEF multi- functionality decision hierarchy is applied for resolving all multi- functionality problems: (1) subdivision or system expansion; (2) allocation based on a relevant underlying physical relationship (substitution may apply here); (3) allocation based on some other relationship. Direct land use change: GHG emissions from direct LUC allocated to good/service for 20 years after the LUC occurs, with IPCC default values. Carbon storage and delayed emissions: credits associated with temporary (carbon) storage or delayed emissions up to 300 years are not be considered. Emissions off-setting: are not included. Capital goods (including infrastructures) and their End of life: they are included. System boundaries: system boundaries include all processes linked to the product supply chain (e.g. maintenance). Time period: emissions and removals are modelled as if released or removed at the beginning of the assessment method. Fossil and biogenic carbon emissions and removals: removals and emissions are modelled as follows: All GHG emissions from fossil fuels (including peat and limestone) are modelled consistently with the most updated ILCD list of elementary flows. The non-fossil (biogenic) carbon flows are modelled consistently with the most updated ILCD list of elementary flows.

## Cut-off and completeness
There are no intentional cut-offs in the inventory no matter how small their contribution to all the EF impact categories is. Eventual cut-offs are in compliance with the Guide for EF compliant data sets (JRC 2020), i.e. only if below the 3% cut-off rule. The dataset dry mass and water balance has been checked to ensure the inventory is complete. Capital goods (e.g. infrastructure) and their end-of-life are included.

## Data selection and combination
These datasets include, in both their foreground and background data, links to EF3.0 compliant data.
The relevant background data on energy, transport, and End of Life are from the LCDN data node (http://lcdn.thinkstep.com/Node/).
All other background data in the supply of this product for which no EF3.0 process was available are from ecoinvent v3.7 database (www.ecoinvent.org) or other data sources.

## Data treatment and extrapolations
Several data sources have been used to model the inventory.

## Use advice
This data set is a supporting sub-data set and must be used exclusively as sub-data set of its corresponding level-1 partly disaggregated data set (see “General comment” field for exact name and UUID).

## Data sources
- Background Data for Representative products and organisations. EF 3.0 compliant (data stock)
- Quantis Data (2021)
- UN Data (2018) Statistics Data for Lubricants Productions, http://data.un.org/Data.aspx?q=Lubricants&d=EDATA&f=cmID%3aLU, United Nations Statistics Division, Global
- Cotex (2021) Stitch Bonding Machine, Catalog and Company Email, Suzhou Cotex International Co., Ltd., China.
- Lebon (2021) Nonwoven Oven Machine, Catalog and Company Messages, Qingdao Lebon Industry Co., Ltd., China
- Elitech (2021), Heavy duty Strobel Machine For Moccasin Shoes, https://www.shoemachinery.com.tw/products-detail/id/48/title/Heavy_duty_Strobel_Machine_For_Moccasin_Shoes/, Elitech Footwear Technology Co.,Ltd., Taichung, Taiwan
- Coats (2021) Gral AWF (Coarse Sizes), https://coats.com/en/Products/Threads/Gral/Gral-AWF---coarse-sizes, Coats Group, Uxbridge, England
- Jessica Deberardinis, Conner Neilsen, Daniel Lidstone, Mohamed B Trabia (2020) A comparison of two techniques for center of pressure measurements, Journal of Rehabilitation and Assistive Technologies Engineering https://www.researchgate.net/publication/342725829_A_comparison_of_two_techniques_for_center_of_pressure_measurementss
- Marie Gottfridsson, Yuqing Zhang (2015). Environmental impacts of shoe consumption: Combining product flow analysis with an LCA model for Sweden. Chalmers University of Technology, Gothenburg, Sweden. https://publications.lib.chalmers.se/records/fulltext/218968/218968.pdf
- Kukdong (2021) Toe Lasting Machine https://www.komachine.com/en/companies/kukdong_/products/47776-KD-87A/ Kukdong Machinery Co., Ltd., Korea
- Alexis Herbaut, etc. (2015) Determination fo Optimal Shoe Dimensions for Occasional and Regular Tennis Players https://www.researchgate.net/publication/280976288_Determination_of_optimal_shoe_dimensions_for_occasional_and_regular_tennis_players/figures?lo=1
- LeibrockMSM (2013) Strobel VDT 410 EV, https://www.youtube.com/watch?v=Up0STCkVmuk, Industrial Data Youtube, Ukraine
- U.S. Environmental Protection Agency (2008), Control techniques guidelines for miscellaneous industrial adhesives, https://www3.epa.gov/airquality/ctg_act/200809_voc_epa453_r-08-005_miscellaneous_industrial_adhesives.pdf, U.S. Environmental Protection Agency Office of Air Quality Planning and Standards Sector Policies and Programs Division, United States
- Dillard D.A. (2011) Physical Properties of Adhesives, https://doi.org/10.1007/978-3-642-01169-6_17, Springer, Heidelberg, Germany

## Intended applications
Implementation of regular Product Environmental Footprint (PEF) studies and Organisation Environmental Footprint (OEF) studies exclusively under the specified Product groups and sectors as defined in the Product Environmental Footprint Category Rules (PEFCR) and Organisation Environmental Footprint Sectorial Rules (OEFSR) listed in http://ec.europa.eu/environment/eussd/smgp/PEFCR_OEFSR.htm
