# fading; technology mix; production mix, at plant; service

Dataset: ILCD process, Partly terminated system
Geography: GLO
Reference year: 2021
Valid until: 2024
Classification: Systems / Textiles, furnitures and other interiors
LCI method principle: Attributional
LCI method approaches: Allocation - market value
Completeness: All relevant flows quantified
Project: Provision of process-based 3.0 Environmental Footprint-compliant life cycle inventory datasets - Apparel 1 - contract number 070201/2020/840291/SER/ENV.B.1
Generated by: Life Cycle Indonesia
Owner: PRé Sustainability B.V.
Compliance: ILCD Data Network - Entry-level; Suggestions for updating the PEF method 2019; ISO 14040 Environmental Management – Life Cycle Assessment – Principles and Framework, 2006; ISO 14044:2006. Environmental Management – Life Cycle Assessment – Requirements and guidelines.; Environmental Footprint 3.1
Review: Dependent internal review by Avraam Symeonidis, Emilia Moreno Ruiz; Independent review panel by Fábio Valebona
Data quality: Overall quality: Good; Time representativeness: Very good; Geographical representativeness: Good; Technological representativeness: Very good; Precision: Good; Methodological appropriateness and consistency: Not applicable
Amounts: no units in this file; such an amount is in the reference unit of its flow, which a separate flow dataset defines
copyright: true
licenseType: Free of charge for some user types or use types
accessRestrictions: Free of charge for all final users implementing a regular Product Environmental Footprint (PEF) studies and Organisation Environmental Footprint (OEF) studies exclusively under the specified Product groups and sectors as defined in the Product Environmental Footprint Category Rules (PEFCR) and Organisation Environmental Footprint Sectorial Rules (OEFSR) listed in http://ec.europa.eu/environment/eussd/smgp/PEFCR_OEFSR.htm and in accordance with the terms and conditions of the EULA (available at https://ecoinvent.lca-data.com/) exclusively until 31st December 2024. Any use of this dataset or any derivative data not within the specific context of one of the PEF/OEF projects or after the end of 2024 is not permitted.

## General comment
Notice: this data set supersedes the EF3.0-compliant version (see link under "preceding data set version" below calculated with the EF3.0). The life cycle inventory is not changed from the original EF3.0 data set. The LCIA results are calculated based on the EF3.1 methods which provide updated characterisation factors in the following impact categories: Climate Change, Ecotoxicity freshwater, Photochemical Ozone Formation, Acidification, Human Toxicity non-cancer, and Human Toxicity cancer. The review report and the data quality ratings refer to the original results. The data set has been updated by the European Commission on the basis of the original EF3.0 data set delivered by the data provider.Fading is done in order to achieve faded look, usually in denim. There are various techniques to achieve this faded looks, and can be categorized as wet and dry process. Wet process is one of the most widely used process. It is done with various kind of chemical. There are several types of wet process depend on the chemical used such as stone washing, acid/snow washing, enzyme wash. In dry process, or mechanical washing process, the process are done without using any chemical and usually can be done by using mechanical method such as scraping, whiskering, damages, and sand blasting (Hossain, et al., 2017). There are also some new techniques that have been used to achieve faded looks such as laser marking and plasma treatment. Laser marking been used extensively to replace conventional dry processes and it is a computer-controlled process for denim fading (Choudhury, 2017).

Choudhury, Asim Kumar Roy. 2017. Principle of textile finishing. United Kingdom: Elsevier. pp 401-403
Hossain, Monoroma, Rony, Md. Shakhawat Hossain, Hasan, K. M. Faridul, Hossain, Md. Kawsar, Hossain, Md. Azharul, and Zhou, Yang. 2017. Effective Mechanical and Chemical Washing Process in Garment Industries. China: American Journal of Applied Physics Vol 2 Issues 1. pp 1-25

## Technology and included processes
In this model, the process consist of mechanical fading and chemical fading, in which the amount of input output (materials, infrastructure, energy) is equally proportioned between mechanical fading and chemical fading. Mechanical fading process modelled of two different technologies, laser marking (fading) and grinding (damages). Amount of gas input and emited from laser machine , also cooling water consumption is not accounted in this model. Both machine input is proportionated equally. While chemical fading process in modelled of enzyme washing using acide enzyme. The chemical process consist of enzyme washing followed by rinsing (twice), softening process, hydroextracting, and drying. The desizing process precedent to the process is not covered, while heat and steam consumption is not accounted.

Materials entering the process are included as well as energy uses and infrastructure. There is no direct emission to air since the emission comes from electricity usage, while hazardous waste comes from waste lube oil. The chemical used is assumed to be carried by waste water. The consumption of lubricating oil is calculated using a thermobonding oven as a proxy. The energy sources of machines used from electricity.

## Parameters
- kg_0: 0.00353488
  Mass in kg, for esterquat; Barge; EU+EFTA+UK
- km_0: 24.7816
  Distance in km, for esterquat; Barge; EU+EFTA+UK
- kg_km_0: 0.0876; = kg_0*km_0
  Transport amount in km*km, for esterquat; Barge; EU+EFTA+UK
- kg_1: 0.00353488
  Mass in kg, for esterquat; Articulated lorry transport, Euro 4, Total weight >32 t; EU+EFTA+UK
- km_1: 193.839
  Distance in km, for esterquat; Articulated lorry transport, Euro 4, Total weight >32 t; EU+EFTA+UK
- kg_km_1: 0.6852; = kg_1*km_1
  Transport amount in km*km, for esterquat; Articulated lorry transport, Euro 4, Total weight >32 t; EU+EFTA+UK
- kg_2: 0.00353488
  Mass in kg, for esterquat; Freight train, diesel traction; EU+EFTA+UK
- km_2: 19.231
  Distance in km, for esterquat; Freight train, diesel traction; EU+EFTA+UK
- kg_km_2: 0.0679792; = kg_2*km_2
  Transport amount in km*km, for esterquat; Freight train, diesel traction; EU+EFTA+UK
- kg_3: 0.00353488
  Mass in kg, for esterquat; Freight train, electricity traction; EU+EFTA+UK
- km_3: 30.3322
  Distance in km, for esterquat; Freight train, electricity traction; EU+EFTA+UK
- kg_km_3: 0.107221; = kg_3*km_3
  Transport amount in km*km, for esterquat; Freight train, electricity traction; EU+EFTA+UK
- kg_4: 0.002
  Mass in kg, for silicone product; Barge; EU+EFTA+UK
- km_4: 21.9
  Distance in km, for silicone product; Barge; EU+EFTA+UK
- kg_km_4: 0.0438; = kg_4*km_4
  Transport amount in km*km, for silicone product; Barge; EU+EFTA+UK
- kg_5: 0.002
  Mass in kg, for silicone product; Articulated lorry transport, Euro 4, Total weight >32 t; EU+EFTA+UK
- km_5: 171.3
  Distance in km, for silicone product; Articulated lorry transport, Euro 4, Total weight >32 t; EU+EFTA+UK
- kg_km_5: 0.3426; = kg_5*km_5
  Transport amount in km*km, for silicone product; Articulated lorry transport, Euro 4, Total weight >32 t; EU+EFTA+UK
- kg_6: 0.002
  Mass in kg, for silicone product; Freight train, diesel traction; EU+EFTA+UK
- km_6: 16.9948
  Distance in km, for silicone product; Freight train, diesel traction; EU+EFTA+UK
- kg_km_6: 0.0339896; = kg_6*km_6
  Transport amount in km*km, for silicone product; Freight train, diesel traction; EU+EFTA+UK
- kg_7: 0.002
  Mass in kg, for silicone product; Freight train, electricity traction; EU+EFTA+UK
- km_7: 26.8052
  Distance in km, for silicone product; Freight train, electricity traction; EU+EFTA+UK
- kg_km_7: 0.0536104; = kg_7*km_7
  Transport amount in km*km, for silicone product; Freight train, electricity traction; EU+EFTA+UK
- kg_8: 0.0044
  Mass in kg, for acetic acid // acetic acid production, product in 98% solution state // glo; Articulated lorry transport, Euro 4, Total weight >32 t; EU+EFTA+UK
- km_8: 1000
  Distance in km, for acetic acid // acetic acid production, product in 98% solution state // glo; Articulated lorry transport, Euro 4, Total weight >32 t; EU+EFTA+UK
- kg_km_8: 4.4; = kg_8*km_8
  Transport amount in km*km, for acetic acid // acetic acid production, product in 98% solution state // glo; Articulated lorry transport, Euro 4, Total weight >32 t; EU+EFTA+UK
- kg_9: 0.0048
  Mass in kg, for enzymes // enzymes production // eu+efta+uk; Articulated lorry transport, Euro 4, Total weight >32 t; EU+EFTA+UK
- km_9: 1000
  Distance in km, for enzymes // enzymes production // eu+efta+uk; Articulated lorry transport, Euro 4, Total weight >32 t; EU+EFTA+UK
- kg_km_9: 4.8; = kg_9*km_9
  Transport amount in km*km, for enzymes // enzymes production // eu+efta+uk; Articulated lorry transport, Euro 4, Total weight >32 t; EU+EFTA+UK
- kg_10: 2.9032e-6
  Mass in kg, for lubricating oil // lubricants at refinery // cn; Articulated lorry transport, Euro 4, Total weight >32 t; EU+EFTA+UK
- km_10: 1000
  Distance in km, for lubricating oil // lubricants at refinery // cn; Articulated lorry transport, Euro 4, Total weight >32 t; EU+EFTA+UK
- kg_km_10: 0.0029032; = kg_10*km_10
  Transport amount in km*km, for lubricating oil // lubricants at refinery // cn; Articulated lorry transport, Euro 4, Total weight >32 t; EU+EFTA+UK
- kg_11: 9.31392e-6
  Mass in kg, for lubricating oil // lubricants at refinery // eu+efta+uk; Articulated lorry transport, Euro 4, Total weight >32 t; EU+EFTA+UK
- km_11: 1000
  Distance in km, for lubricating oil // lubricants at refinery // eu+efta+uk; Articulated lorry transport, Euro 4, Total weight >32 t; EU+EFTA+UK
- kg_km_11: 0.00931392; = kg_11*km_11
  Transport amount in km*km, for lubricating oil // lubricants at refinery // eu+efta+uk; Articulated lorry transport, Euro 4, Total weight >32 t; EU+EFTA+UK
- kg_12: 6.97765e-7
  Mass in kg, for lubricating oil // lubricants at refinery // raf; Articulated lorry transport, Euro 4, Total weight >32 t; EU+EFTA+UK
- km_12: 1000
  Distance in km, for lubricating oil // lubricants at refinery // raf; Articulated lorry transport, Euro 4, Total weight >32 t; EU+EFTA+UK
- kg_km_12: 0.000697765; = kg_12*km_12
  Transport amount in km*km, for lubricating oil // lubricants at refinery // raf; Articulated lorry transport, Euro 4, Total weight >32 t; EU+EFTA+UK
- kg_13: 1.54502e-5
  Mass in kg, for lubricating oil // lubricants at refinery // ras w/o cn; Articulated lorry transport, Euro 4, Total weight >32 t; EU+EFTA+UK
- km_13: 1000
  Distance in km, for lubricating oil // lubricants at refinery // ras w/o cn; Articulated lorry transport, Euro 4, Total weight >32 t; EU+EFTA+UK
- kg_km_13: 0.0154502; = kg_13*km_13
  Transport amount in km*km, for lubricating oil // lubricants at refinery // ras w/o cn; Articulated lorry transport, Euro 4, Total weight >32 t; EU+EFTA+UK
- kg_14: 1.4273e-5
  Mass in kg, for lubricating oil // lubricants at refinery // rna; Articulated lorry transport, Euro 4, Total weight >32 t; EU+EFTA+UK
- km_14: 1000
  Distance in km, for lubricating oil // lubricants at refinery // rna; Articulated lorry transport, Euro 4, Total weight >32 t; EU+EFTA+UK
- kg_km_14: 0.014273; = kg_14*km_14
  Transport amount in km*km, for lubricating oil // lubricants at refinery // rna; Articulated lorry transport, Euro 4, Total weight >32 t; EU+EFTA+UK
- kg_15: 1.7008e-6
  Mass in kg, for lubricating oil // lubricants at refinery // rsa; Articulated lorry transport, Euro 4, Total weight >32 t; EU+EFTA+UK
- km_15: 1000
  Distance in km, for lubricating oil // lubricants at refinery // rsa; Articulated lorry transport, Euro 4, Total weight >32 t; EU+EFTA+UK
- kg_km_15: 0.0017008; = kg_15*km_15
  Transport amount in km*km, for lubricating oil // lubricants at refinery // rsa; Articulated lorry transport, Euro 4, Total weight >32 t; EU+EFTA+UK
- kg_16: 1.2776e-5
  Mass in kg, for lubricating oil // lubricants at refinery // ru; Articulated lorry transport, Euro 4, Total weight >32 t; EU+EFTA+UK
- km_16: 1000
  Distance in km, for lubricating oil // lubricants at refinery // ru; Articulated lorry transport, Euro 4, Total weight >32 t; EU+EFTA+UK
- kg_km_16: 0.012776; = kg_16*km_16
  Transport amount in km*km, for lubricating oil // lubricants at refinery // ru; Articulated lorry transport, Euro 4, Total weight >32 t; EU+EFTA+UK
- kg_17: 0.0044
  Mass in kg, for acetic acid // acetic acid production, product in 98% solution state // glo; Transoceanic ship, containers; GLO
- km_17: 18000
  Distance in km, for acetic acid // acetic acid production, product in 98% solution state // glo; Transoceanic ship, containers; GLO
- kg_km_17: 79.2; = kg_17*km_17
  Transport amount in km*km, for acetic acid // acetic acid production, product in 98% solution state // glo; Transoceanic ship, containers; GLO
- kg_18: 0.0048
  Mass in kg, for enzymes // enzymes production // eu+efta+uk; Transoceanic ship, containers; GLO
- km_18: 18000
  Distance in km, for enzymes // enzymes production // eu+efta+uk; Transoceanic ship, containers; GLO
- kg_km_18: 86.4; = kg_18*km_18
  Transport amount in km*km, for enzymes // enzymes production // eu+efta+uk; Transoceanic ship, containers; GLO
- kg_19: 2.9032e-6
  Mass in kg, for lubricating oil // lubricants at refinery // cn; Transoceanic ship, containers; GLO
- km_19: 18000
  Distance in km, for lubricating oil // lubricants at refinery // cn; Transoceanic ship, containers; GLO
- kg_km_19: 0.0522576; = kg_19*km_19
  Transport amount in km*km, for lubricating oil // lubricants at refinery // cn; Transoceanic ship, containers; GLO
- kg_20: 9.31392e-6
  Mass in kg, for lubricating oil // lubricants at refinery // eu+efta+uk; Transoceanic ship, containers; GLO
- km_20: 18000
  Distance in km, for lubricating oil // lubricants at refinery // eu+efta+uk; Transoceanic ship, containers; GLO
- kg_km_20: 0.167651; = kg_20*km_20
  Transport amount in km*km, for lubricating oil // lubricants at refinery // eu+efta+uk; Transoceanic ship, containers; GLO
- kg_21: 6.97765e-7
  Mass in kg, for lubricating oil // lubricants at refinery // raf; Transoceanic ship, containers; GLO
- km_21: 18000
  Distance in km, for lubricating oil // lubricants at refinery // raf; Transoceanic ship, containers; GLO
- kg_km_21: 0.0125598; = kg_21*km_21
  Transport amount in km*km, for lubricating oil // lubricants at refinery // raf; Transoceanic ship, containers; GLO
- kg_22: 1.54502e-5
  Mass in kg, for lubricating oil // lubricants at refinery // ras w/o cn; Transoceanic ship, containers; GLO
- km_22: 18000
  Distance in km, for lubricating oil // lubricants at refinery // ras w/o cn; Transoceanic ship, containers; GLO
- kg_km_22: 0.278103; = kg_22*km_22
  Transport amount in km*km, for lubricating oil // lubricants at refinery // ras w/o cn; Transoceanic ship, containers; GLO
- kg_23: 1.4273e-5
  Mass in kg, for lubricating oil // lubricants at refinery // rna; Transoceanic ship, containers; GLO
- km_23: 18000
  Distance in km, for lubricating oil // lubricants at refinery // rna; Transoceanic ship, containers; GLO
- kg_km_23: 0.256915; = kg_23*km_23
  Transport amount in km*km, for lubricating oil // lubricants at refinery // rna; Transoceanic ship, containers; GLO
- kg_24: 1.7008e-6
  Mass in kg, for lubricating oil // lubricants at refinery // rsa; Transoceanic ship, containers; GLO
- km_24: 18000
  Distance in km, for lubricating oil // lubricants at refinery // rsa; Transoceanic ship, containers; GLO
- kg_km_24: 0.0306145; = kg_24*km_24
  Transport amount in km*km, for lubricating oil // lubricants at refinery // rsa; Transoceanic ship, containers; GLO
- kg_25: 1.2776e-5
  Mass in kg, for lubricating oil // lubricants at refinery // ru; Transoceanic ship, containers; GLO
- km_25: 18000
  Distance in km, for lubricating oil // lubricants at refinery // ru; Transoceanic ship, containers; GLO
- kg_km_25: 0.229968; = kg_25*km_25
  Transport amount in km*km, for lubricating oil // lubricants at refinery // ru; Transoceanic ship, containers; GLO

## Reference product
- fading // fading // glo: 1

## Inputs
- Electricity from Electricity grid mix 1kV-60kV - AU: 0.0035
- Electricity from Electricity grid mix 1kV-60kV - EU+EFTA+UK: 0.0522
- Electricity from Electricity grid mix 1kV-60kV - NZ: 0.0007
- Electricity from Electricity grid mix 1kV-60kV - RAF: 0.0114
- Electricity from Electricity grid mix 1kV-60kV - RNA: 0.0763
- Electricity from Electricity grid mix 1kV-60kV - RSA: 0.0259
- Electricity from Electricity grid mix 1kV-60kV - RU: 0.0153
- Transport of esterquat by Barge - EU+EFTA+UK: 0.0876; = kg_km_0
- Transport of esterquat by Articulated lorry transport, Euro 4, Total weight >32 t - EU+EFTA+UK: 0.6852; = kg_km_1
- Transport of esterquat by Freight train, diesel traction - EU+EFTA+UK: 0.0679792; = kg_km_2
- Transport of esterquat by Freight train, electricity traction - EU+EFTA+UK: 0.107221; = kg_km_3
- Transport of silicone product by Barge - EU+EFTA+UK: 0.0438; = kg_km_4
- Transport of silicone product by Articulated lorry transport, Euro 4, Total weight >32 t - EU+EFTA+UK: 0.3426; = kg_km_5
- Transport of silicone product by Freight train, diesel traction - EU+EFTA+UK: 0.0339896; = kg_km_6
- Transport of silicone product by Freight train, electricity traction - EU+EFTA+UK: 0.0536104; = kg_km_7
- Transport of acetic acid // acetic acid production, product in 98% solution state // glo by Articulated lorry transport, Euro 4, Total weight >32 t - EU+EFTA+UK: 4.4; = kg_km_8
- Transport of enzymes // enzymes production // eu+efta+uk by Articulated lorry transport, Euro 4, Total weight >32 t - EU+EFTA+UK: 4.8; = kg_km_9
- Transport of lubricating oil // lubricants at refinery // cn by Articulated lorry transport, Euro 4, Total weight >32 t - EU+EFTA+UK: 0.0029032; = kg_km_10
- Transport of lubricating oil // lubricants at refinery // eu+efta+uk by Articulated lorry transport, Euro 4, Total weight >32 t - EU+EFTA+UK: 0.00931392; = kg_km_11
- Transport of lubricating oil // lubricants at refinery // raf by Articulated lorry transport, Euro 4, Total weight >32 t - EU+EFTA+UK: 0.000697765; = kg_km_12
- Transport of lubricating oil // lubricants at refinery // ras w/o cn by Articulated lorry transport, Euro 4, Total weight >32 t - EU+EFTA+UK: 0.0154502; = kg_km_13
- Transport of lubricating oil // lubricants at refinery // rna by Articulated lorry transport, Euro 4, Total weight >32 t - EU+EFTA+UK: 0.014273; = kg_km_14
- Transport of lubricating oil // lubricants at refinery // rsa by Articulated lorry transport, Euro 4, Total weight >32 t - EU+EFTA+UK: 0.0017008; = kg_km_15
- Transport of lubricating oil // lubricants at refinery // ru by Articulated lorry transport, Euro 4, Total weight >32 t - EU+EFTA+UK: 0.012776; = kg_km_16
- Transport of acetic acid // acetic acid production, product in 98% solution state // glo by Transoceanic ship, containers - GLO: 79.2; = kg_km_17
- Transport of enzymes // enzymes production // eu+efta+uk by Transoceanic ship, containers - GLO: 86.4; = kg_km_18
- Transport of lubricating oil // lubricants at refinery // cn by Transoceanic ship, containers - GLO: 0.0522576; = kg_km_19
- Transport of lubricating oil // lubricants at refinery // eu+efta+uk by Transoceanic ship, containers - GLO: 0.167651; = kg_km_20
- Transport of lubricating oil // lubricants at refinery // raf by Transoceanic ship, containers - GLO: 0.0125598; = kg_km_21
- Transport of lubricating oil // lubricants at refinery // ras w/o cn by Transoceanic ship, containers - GLO: 0.278103; = kg_km_22
- Transport of lubricating oil // lubricants at refinery // rna by Transoceanic ship, containers - GLO: 0.256915; = kg_km_23
- Transport of lubricating oil // lubricants at refinery // rsa by Transoceanic ship, containers - GLO: 0.0306145; = kg_km_24
- Transport of lubricating oil // lubricants at refinery // ru by Transoceanic ship, containers - GLO: 0.229968; = kg_km_25
- Electricity from Electricity grid mix 1kV-60kV - CN: 0.0782101
- Electricity from Electricity grid mix 1kV-60kV - RAS w/o CN: 0.0856899
- fading // fading // glo, blackbox: 1
- fading // fading // glo, elementary: 1

## Impact indicators
- Eutrophication marine: 0.000263924
- Ecotoxicity, freshwater: 1.86348
- Land use: 1.36114
- Water use: 0.430737
- Resource use, minerals and metals: 4.27673e-7
- Resource use, fossils: 1.979
- Climate change: 0.186318
- Ozone depletion: 3.09062e-9
- Human toxicity, cancer: 2.02012e-10
- Human toxicity, non-cancer: 2.45931e-9
- EF-particulate Matter: 2.23827e-8
- Ionising radiation, human health: 0.0122592
- Photochemical ozone formation - human health: 0.000459681
- Acidification: 0.00091006
- Eutrophication, terrestrial: 0.00138925
- Eutrophication, freshwater: 3.16466e-5

## Deviations from the LCI method principle
The background data uses:
- the \xe2\x80\x9cRecycled content cut-off\xe2\x80\x9d approach to allocate end-of-life by-products and secondary materials. This allocation is explained in the description of the recycled content system model (http://www.ecoinvent.org/database/system-models-in-ecoinvent-3/cut-off-system-model/allocation-cut-off-by-classification.html).
OR
- EF compliant data

## Deviations from the LCI method approaches
Background data:
- the \xe2\x80\x9cRecycled content cut-off\xe2\x80\x9d approach to allocate end-of-life by-products and secondary materials. This allocation is explained in the description of the recycled content system model (http://www.ecoinvent.org/database/system-models-in-ecoinvent-3/cut-off-system-model/allocation-cut-off-by-classification.html). The ecoinvent database mostly relies on “Allocation – market values” apart for few exceptions particularly in the energy sector. ecoinvent energy data is replaced with EF3.0 core data as per the EF guidelines version 2.0.
OR
- EF compliant data

## Modelling constants
All modelling constants follow the requirements listed in the Tender Specifications 070201/2020/SER/ENV.B1. Completeness: There are no intentional cut-offs in the inventory no matter how small their contribution to all the EF impact categories is. Eventual cut-offs are in compliance with the Guide for EF compliant data sets (JRC 2020), i.e. only if below the 3% cut-off rule. Water use: water use is modelled at country level using separate flows for water withdrawal, water release and water evaporation. Handling multi-functional processes: the following PEF multi- functionality decision hierarchy is applied for resolving all multi- functionality problems: (1) subdivision or system expansion; (2) allocation based on a relevant underlying physical relationship (substitution may apply here); (3) allocation based on some other relationship. Direct land use change: GHG emissions from direct LUC allocated to good/service for 20 years after the LUC occurs, with IPCC default values. Carbon storage and delayed emissions: credits associated with temporary (carbon) storage or delayed emissions up to 300 years are not be considered. Emissions off-setting: are not included. Capital goods (including infrastructures) and their End of life: they are included. System boundaries: system boundaries include all processes linked to the product supply chain (e.g. maintenance). Time period: emissions and removals are modelled as if released or removed at the beginning of the assessment method. Fossil and biogenic carbon emissions and removals: removals and emissions are modelled as follows: All GHG emissions from fossil fuels (including peat and limestone) are modelled consistently with the most updated ILCD list of elementary flows. The non-fossil (biogenic) carbon flows are modelled consistently with the most updated ILCD list of elementary flows.

## Cut-off and completeness
There are no intentional cut-offs in the inventory no matter how small their contribution to all the EF impact categories is. Eventual cut-offs are in compliance with the Guide for EF compliant data sets (JRC 2020), i.e. only if below the 3% cut-off rule. The dataset dry mass and water balance has been checked to ensure the inventory is complete. Capital goods (e.g. infrastructure) and their end-of-life are included.

## Data selection and combination
These datasets include, in both their foreground and background data, links to EF3.0 compliant data.
The relevant background data on energy, transport, and End of Life are from the LCDN data node (http://lcdn.thinkstep.com/Node/).
All other background data in the supply of this product for which no EF3.0 process was available are from ecoinvent v3.7 database (www.ecoinvent.org) or other data sources.

## Data treatment and extrapolations
Several data sources have been used to model the inventory.

## Review details
Internal reviews have been asked to review the plausibility of the unit process, LCIA scores, and DQRs. Internal reviewers have also been asked to review the data for EF compliancy. The consortium is therefore responsible for aspects such as compliancy with the ILCD format, including validation in Look@LCI, and nomenclature.
Internal reviwers have been asked to judge based on the process name, that the unit process models in a complete and representative way the process in the requested location. The review encompassed the plausability of:
- exchanges with nature (elementary flows) as well as exchanges such as product and waste flows.
- meta information (general comment, technology comment, system boundaries, allocation, cut-off rules, etc.). Reviewers were asked to judge if the provided information is enough to understand the content of the process.
- LCIA scores
- DQRs including precision, technology, time and geography. As well as the overall DQR.
External reviewers have been asked to provide their expertise in the field of interest. External reviewers have been asked to review the unit process, including eventual methodological choices, the LCIA scores (provided with contribution scores as well), and DQRs. External reviewers have been provided all the information in a tool developed by the consortium for the purpose of this project.
External reviewers have been asked to judge based on the process name, that the unit process models in a complete and representative way the process in the requested location. The review encompassed:
- Plausability and completeness of exchanges with nature (elementary flows) as well as exchanges such as product and waste flows.
- Review of meta information (general comment, technology comment, system boundaries, allocation, cut-off rules, etc.). Reviewers were asked to judge if the provided information is enough to understand the content of the process.
- Review of properties (biogenic carbon and water content).
- Review of allocation keys.
- Plausability of LCIA scores calculated by the consortium.
- Plausability of DQRs including precision, technology, time and geography. As well as the overall DQR.

## Data sources
- Background Data for Representative products and organisations. EF 3.0 compliant (data stock)
- Argus (2021). Denim Jeans Textil Laser Marking Machine Galvo Jeans Washing Laser Machine, http://www.argussolar.net/, Wuhan Sunic Photoelectricity Equipment Manufacture Co., Ltd, Wuhan, China.
- Pasen Machine (2021). Denim Grinding Jeans Machine, http://www.pasenmachinery.com/, Zhengzhou Pasen Machinery Co.,Ltd., Henan, China
- Lebon (2021) Nonwoven Oven Machine, Catalog and Company Messages, Qingdao Lebon Industry Co., Ltd., China
- American Reserve Clothing (2021). WHY IS DENIM WEIGHED IN OUNCES?, https://americanreserveshop.com/blogs/news/why-is-denim-weighed-in-ounces, American Reserve Clothing Co., New York.
- Tupesa (2021) Eco Washers, https://www.tupesa.com/index.php?route=product/product&path=72_59&product_id=51, Tupesa Maquinaria Textil, Girona, Spain.
- Tupesa (2021) EXTRACTOR Hidroextractors, https://www.tupesa.com/index.php?route=product/product&path=72_62&product_id=63, Tupesa Maquinaria Textil, Girona, Spain.
- Tupesa (2021) SC -2 Dryers, https://www.tupesa.com/index.php?route=product/product&path=72_63&product_id=70, Tupesa Maquinaria Textil, Girona, Spain.
- Monoroma Hossain, Md. Shakhawat Hossain Rony, K. M. Faridul Hasan, Md. Kawsar Hossain, Md. Azharul Hossain, and Yang Zhou, (2017). Effective Mechanical and Chemical Washing Process in Garment Industries. American Journal of Applied Physics Vol 2, Wuhan, China.

## Intended applications
Implementation of regular Product Environmental Footprint (PEF) studies and Organisation Environmental Footprint (OEF) studies exclusively under the specified Product groups and sectors as defined in the Product Environmental Footprint Category Rules (PEFCR) and Organisation Environmental Footprint Sectorial Rules (OEFSR) listed in http://ec.europa.eu/environment/eussd/smgp/PEFCR_OEFSR.htm
