# sanitary and household papers (tissue paper); technology mix; production mix, at plant; kg

Dataset: ILCD process, Partly terminated system
Geography: EU+EFTA+UK
Reference year: 2019
Valid until: 2024
Classification: Materials production / Paper and cardboards
LCI method principle: Attributional
LCI method approaches: Allocation - market value
Completeness: All relevant flows quantified
Project: Provision of process-based 3.0 Environmental Footprint-compliant life cycle inventory datasets - Renewable materials - contract number 070201/2020/840085/SER/ENV.B.1
Generated by: RISE
Owner: ETS
Compliance: ILCD Data Network - Entry-level; Suggestions for updating the PEF method 2019; ISO 14040 Environmental Management – Life Cycle Assessment – Principles and Framework, 2006; ISO 14044:2006. Environmental Management – Life Cycle Assessment – Requirements and guidelines.; Environmental Footprint 3.1
Review: Dependent internal review by Emilia Moreno Ruiz, Katarzyna Cenian; Independent review panel by Laura Batlle Bayer
Data quality: Overall quality: Good; Time representativeness: Good; Geographical representativeness: Very good; Technological representativeness: Very good; Precision: Good; Methodological appropriateness and consistency: Not applicable
Amounts: no units in this file; such an amount is in the reference unit of its flow, which a separate flow dataset defines
copyright: true
licenseType: Free of charge for some user types or use types
accessRestrictions: Free of charge for all final users implementing a regular Product Environmental Footprint (PEF) studies and Organisation Environmental Footprint (OEF) studies exclusively under the specified Product groups and sectors as defined in the Product Environmental Footprint Category Rules (PEFCR) and Organisation Environmental Footprint Sectorial Rules (OEFSR) listed in http://ec.europa.eu/environment/eussd/smgp/PEFCR_OEFSR.htm and in accordance with the terms and conditions of the EULA (available at https://ecoinvent.lca-data.com/) exclusively until 31st December 2024. Any use of this dataset or any derivative data not within the specific context of one of the PEF/OEF projects or after the end of 2024 is not permitted.

## General comment
Notice: this data set supersedes the EF3.0-compliant version (see link under "preceding data set version" below calculated with the EF3.0). The life cycle inventory is not changed from the original EF3.0 data set. The LCIA results are calculated based on the EF3.1 methods which provide updated characterisation factors in the following impact categories: Climate Change, Ecotoxicity freshwater, Photochemical Ozone Formation, Acidification, Human Toxicity non-cancer, and Human Toxicity cancer. The review report and the data quality ratings refer to the original results. The data set has been updated by the European Commission on the basis of the original EF3.0 data set delivered by the data provider.The activity describes the production of 1 Kg of sanitary and household paper. This product category covers a wide range of tissue and other hygienic papers for use in households or commercial and industrial premises. Examples are toilet paper and facial tissues, kitchen towels, hand towels and industrial wipes. Some tissue is also used in the manufacture of nappies, sanitary towels, etc-
The process starts with the reception of the recovered paper and purchased pulps.
The process ends with the production of sanitary and household paper.
The dataset is based on two environmental surveys: Core data on energy and fuel consumption, water intake and discharge, and emissions to air and water is based on an environmental data survey conducted by CEPI in which 22 companies took part, covering 82 mills. In total, the survey accounted for 5,790,000 tonnes of tissue production, representing 89% of total European production. A supplementary survey conducted by RISE to complete the data gaps (inputs of recovered paper and purchased pulps, inputs of chemicals, transport distances and modes for incoming raw materials, and generation and destination of residues) – 5 companies participated in this additional survey, covering 57 mills, accounting for 3,734,000 tonnes of tissue production, representing 50% of total European production.
Data was provided from mills located in the following countries: Austria, Finland, France, Germany, Greece, Italy, Netherlands, Norway, Poland, Portugal, Romania, Slovakia, Sweden, and the United Kingdom. Mills vary in capacity from <20,000 tonnes net saleable tissue paper per annum to 150,000 tonnes net saleable paper per annum.
For both surveys, data was collected covering the average market and technology situation for the calendar year 2019. The results are a weighted average dataset for tissue paper produced from virgin pulp and/or paper for recycling.

## Technology and included processes
The activity represents average European production of tissue paper, considered at the parent reel before conversion to finished products.
Tissue paper is manufactured in a tissue paper mill from virgin fibres or recovered fibres or a mixture of these. Where virgin fibres are used, production of pulp and production of tissue paper is typically a non-integrated process – i.e., the mills purchase market virgin pulp rather than manufacturing their own pulp from wood onsite.
Different processes are used to manufacture different types of tissue paper with different characteristics. The way of drying the tissue determines most of the tissue characteristics. The two main processes in use are conventional tissue-making and through-air drying process (TAD). The most common process is the conventional tissue paper machine with a conventional Yankee dryer. The tissue sheet is formed on a moving fabric, where water is removed by drainage. The sheet is then transferred to a felt where more water is removed by pressing and vacuum. Here the tissue sheet is compressed. For full drying, the sheet is transferred to a Yankee cylinder and dried by adding steam to the cylinder and blowing hot air onto the tissue surface. Finally, the tissue is removed from the Yankee cylinder by a creping blade and the sheet is reeled up.
The activity includes the following processes: deinking and pulp production from paper for recycling, stock preparation, refining, and operation of the paper machine, drying, reeling and reel winding, supporting activities used in paper production, e.g. water and solid waste treatment, onsite electricity and steam generation.
The following air emissions were reported in the survey: Dust, CO2 (fossil and biogenic), NOx (as NO2), and SOx (as SO2)-
For a more complete air emission profile, additional air emissions (beyond the ones listed above) were added for the combustion of the external fuels using ecoinvent LCI datasets for combustion of different fuels as proxy. Proxies for the air emissions were calculated based on: Heavy fuel oil: "heat production, heavy fuel oil, at industrial furnace 1MW” Natural gas: "heat production, natural gas, at industrial furnace >100kW”, Peat: "heat production, lignite briquette, at stove 5-15kW” Biofuel - scrap wood: "heat production, wood chips from industry, at furnace 1000kW”, coal: “heat production, at hard coal industrial furnace 1-10MW, Europe without Switzerland”
The amount of infrastructure (paper mill, integrated) was taken from the dataset " Hischier R., tissue paper production, RER, Undefined, ecoinvent database version 3.3.”
The production of paper based fully or partly on paper for recycling takes place in integrated processes for almost all cases. The share of recycled pulp in non-integrated mills (so recycled pulp produced dried and transported to a paper mill for making recycled paper) is around 3%. In the INTERMEDIATE PAPER PRODUCT PEFCR (2018) it is set that: "The PEF profile shall be calculated and reported using A equal to 1.". This dataset is therefore modelled as such.

## Parameters
- kg_0: 0.000755923
  Mass in kg, for akd sizer // akd sizer production // glo; Articulated lorry transport, Euro 4, Total weight >32 t; EU+EFTA+UK
- km_0: 2500
  Distance in km, for akd sizer // akd sizer production // glo; Articulated lorry transport, Euro 4, Total weight >32 t; EU+EFTA+UK
- kg_km_0: 1.88981; = kg_0*km_0
  Transport amount in km*km, for akd sizer // akd sizer production // glo; Articulated lorry transport, Euro 4, Total weight >32 t; EU+EFTA+UK
- kg_1: 0.340291
  Mass in kg, for bleached kraft pulp, eucalyptus // bleached kraft pulp, eucalyptus // eu+efta+uk; Articulated lorry transport, Euro 4, Total weight >32 t; EU+EFTA+UK
- km_1: 472.394
  Distance in km, for bleached kraft pulp, eucalyptus // bleached kraft pulp, eucalyptus // eu+efta+uk; Articulated lorry transport, Euro 4, Total weight >32 t; EU+EFTA+UK
- kg_km_1: 160.751; = kg_1*km_1
  Transport amount in km*km, for bleached kraft pulp, eucalyptus // bleached kraft pulp, eucalyptus // eu+efta+uk; Articulated lorry transport, Euro 4, Total weight >32 t; EU+EFTA+UK
- kg_2: 0.0323168
  Mass in kg, for bleached kraft pulp, hardwood // bleached kraft pulp, hardwood // eu+efta+uk; Articulated lorry transport, Euro 4, Total weight >32 t; EU+EFTA+UK
- km_2: 1179.35
  Distance in km, for bleached kraft pulp, hardwood // bleached kraft pulp, hardwood // eu+efta+uk; Articulated lorry transport, Euro 4, Total weight >32 t; EU+EFTA+UK
- kg_km_2: 38.1128; = kg_2*km_2
  Transport amount in km*km, for bleached kraft pulp, hardwood // bleached kraft pulp, hardwood // eu+efta+uk; Articulated lorry transport, Euro 4, Total weight >32 t; EU+EFTA+UK
- kg_3: 0.233704
  Mass in kg, for bleached kraft pulp, softwood // bleached kraft pulp, softwood // eu+efta+uk; Articulated lorry transport, Euro 4, Total weight >32 t; EU+EFTA+UK
- km_3: 464.538
  Distance in km, for bleached kraft pulp, softwood // bleached kraft pulp, softwood // eu+efta+uk; Articulated lorry transport, Euro 4, Total weight >32 t; EU+EFTA+UK
- kg_km_3: 108.564; = kg_3*km_3
  Transport amount in km*km, for bleached kraft pulp, softwood // bleached kraft pulp, softwood // eu+efta+uk; Articulated lorry transport, Euro 4, Total weight >32 t; EU+EFTA+UK
- kg_4: 0.0962014
  Mass in kg, for bleached sulphite pulp, softwood // bleached sulphite pulp, softwood // eu+efta+uk; Articulated lorry transport, Euro 4, Total weight >32 t; EU+EFTA+UK
- km_4: 517.348
  Distance in km, for bleached sulphite pulp, softwood // bleached sulphite pulp, softwood // eu+efta+uk; Articulated lorry transport, Euro 4, Total weight >32 t; EU+EFTA+UK
- kg_km_4: 49.7696; = kg_4*km_4
  Transport amount in km*km, for bleached sulphite pulp, softwood // bleached sulphite pulp, softwood // eu+efta+uk; Articulated lorry transport, Euro 4, Total weight >32 t; EU+EFTA+UK
- kg_5: 0.00274049
  Mass in kg, for chemi-thermomechanical pulp // chemi-thermomechanical pulp // eu+efta+uk; Articulated lorry transport, Euro 4, Total weight >32 t; EU+EFTA+UK
- km_5: 1553.16
  Distance in km, for chemi-thermomechanical pulp // chemi-thermomechanical pulp // eu+efta+uk; Articulated lorry transport, Euro 4, Total weight >32 t; EU+EFTA+UK
- kg_km_5: 4.25642; = kg_5*km_5
  Transport amount in km*km, for chemi-thermomechanical pulp // chemi-thermomechanical pulp // eu+efta+uk; Articulated lorry transport, Euro 4, Total weight >32 t; EU+EFTA+UK
- kg_6: 0.0363031
  Mass in kg, for wood chips, hardwood // wood chips, hardwood // eu+efta+uk; Articulated lorry transport, Euro 4, Total weight >32 t; EU+EFTA+UK
- km_6: 50
  Distance in km, for wood chips, hardwood // wood chips, hardwood // eu+efta+uk; Articulated lorry transport, Euro 4, Total weight >32 t; EU+EFTA+UK
- kg_km_6: 1.81515; = kg_6*km_6
  Transport amount in km*km, for wood chips, hardwood // wood chips, hardwood // eu+efta+uk; Articulated lorry transport, Euro 4, Total weight >32 t; EU+EFTA+UK
- kg_7: 0.0363031
  Mass in kg, for wood chips, softwood // wood chips, softwood // eu+efta+uk; Articulated lorry transport, Euro 4, Total weight >32 t; EU+EFTA+UK
- km_7: 50
  Distance in km, for wood chips, softwood // wood chips, softwood // eu+efta+uk; Articulated lorry transport, Euro 4, Total weight >32 t; EU+EFTA+UK
- kg_km_7: 1.81515; = kg_7*km_7
  Transport amount in km*km, for wood chips, softwood // wood chips, softwood // eu+efta+uk; Articulated lorry transport, Euro 4, Total weight >32 t; EU+EFTA+UK
- kg_8: 0.00536161
  Mass in kg, for hard coal, at consumer eu+efta // hard coal mix // eu+efta+uk; Articulated lorry transport, Euro 4, Total weight >32 t; EU+EFTA+UK
- km_8: 568.786
  Distance in km, for hard coal, at consumer eu+efta // hard coal mix // eu+efta+uk; Articulated lorry transport, Euro 4, Total weight >32 t; EU+EFTA+UK
- kg_km_8: 3.04961; = kg_8*km_8
  Transport amount in km*km, for hard coal, at consumer eu+efta // hard coal mix // eu+efta+uk; Articulated lorry transport, Euro 4, Total weight >32 t; EU+EFTA+UK
- kg_9: 0.000375998
  Mass in kg, for heavy fuel oil (1.0 wt.% s) // heavy fuel oil at refinery // eu+efta+uk; Articulated lorry transport, Euro 4, Total weight >32 t; EU+EFTA+UK
- km_9: 505.968
  Distance in km, for heavy fuel oil (1.0 wt.% s) // heavy fuel oil at refinery // eu+efta+uk; Articulated lorry transport, Euro 4, Total weight >32 t; EU+EFTA+UK
- kg_km_9: 0.190243; = kg_9*km_9
  Transport amount in km*km, for heavy fuel oil (1.0 wt.% s) // heavy fuel oil at refinery // eu+efta+uk; Articulated lorry transport, Euro 4, Total weight >32 t; EU+EFTA+UK
- kg_10: 0.00302354
  Mass in kg, for hydrogen peroxide, 100% // hydrogen peroxide, 100% production // eu+efta+uk; Articulated lorry transport, Euro 4, Total weight >32 t; EU+EFTA+UK
- km_10: 1111.11
  Distance in km, for hydrogen peroxide, 100% // hydrogen peroxide, 100% production // eu+efta+uk; Articulated lorry transport, Euro 4, Total weight >32 t; EU+EFTA+UK
- kg_km_10: 3.35949; = kg_10*km_10
  Transport amount in km*km, for hydrogen peroxide, 100% // hydrogen peroxide, 100% production // eu+efta+uk; Articulated lorry transport, Euro 4, Total weight >32 t; EU+EFTA+UK
- kg_11: 0.000775992
  Mass in kg, for latex // latex production // glo; Articulated lorry transport, Euro 4, Total weight >32 t; EU+EFTA+UK
- km_11: 500
  Distance in km, for latex // latex production // glo; Articulated lorry transport, Euro 4, Total weight >32 t; EU+EFTA+UK
- kg_km_11: 0.387996; = kg_11*km_11
  Transport amount in km*km, for latex // latex production // glo; Articulated lorry transport, Euro 4, Total weight >32 t; EU+EFTA+UK
- kg_12: 0.000861083
  Mass in kg, for lignite eu+efta // lignite mix // eu+efta+uk; Articulated lorry transport, Euro 4, Total weight >32 t; EU+EFTA+UK
- km_12: 318.75
  Distance in km, for lignite eu+efta // lignite mix // eu+efta+uk; Articulated lorry transport, Euro 4, Total weight >32 t; EU+EFTA+UK
- kg_km_12: 0.27447; = kg_12*km_12
  Transport amount in km*km, for lignite eu+efta // lignite mix // eu+efta+uk; Articulated lorry transport, Euro 4, Total weight >32 t; EU+EFTA+UK
- kg_13: 0.000128545
  Mass in kg, for maize starch, from wet milling (starch drying), at plant // glo; Articulated lorry transport, Euro 4, Total weight >32 t; EU+EFTA+UK
- km_13: 654.175
  Distance in km, for maize starch, from wet milling (starch drying), at plant // glo; Articulated lorry transport, Euro 4, Total weight >32 t; EU+EFTA+UK
- kg_km_13: 0.0840907; = kg_13*km_13
  Transport amount in km*km, for maize starch, from wet milling (starch drying), at plant // glo; Articulated lorry transport, Euro 4, Total weight >32 t; EU+EFTA+UK
- kg_14: 0.000763251
  Mass in kg, for mechanical wood pulp // mechanical wood pulp // eu+efta+uk; Articulated lorry transport, Euro 4, Total weight >32 t; EU+EFTA+UK
- km_14: 1389.91
  Distance in km, for mechanical wood pulp // mechanical wood pulp // eu+efta+uk; Articulated lorry transport, Euro 4, Total weight >32 t; EU+EFTA+UK
- kg_km_14: 1.06085; = kg_14*km_14
  Transport amount in km*km, for mechanical wood pulp // mechanical wood pulp // eu+efta+uk; Articulated lorry transport, Euro 4, Total weight >32 t; EU+EFTA+UK
- kg_15: 0.000755923
  Mass in kg, for melamine formaldehyde resin // melamine formaldehyde resin production // eu+efta+uk; Articulated lorry transport, Euro 4, Total weight >32 t; EU+EFTA+UK
- km_15: 2500
  Distance in km, for melamine formaldehyde resin // melamine formaldehyde resin production // eu+efta+uk; Articulated lorry transport, Euro 4, Total weight >32 t; EU+EFTA+UK
- kg_km_15: 1.88981; = kg_15*km_15
  Transport amount in km*km, for melamine formaldehyde resin // melamine formaldehyde resin production // eu+efta+uk; Articulated lorry transport, Euro 4, Total weight >32 t; EU+EFTA+UK
- kg_16: 0.00113129
  Mass in kg, for polyacrylamide // polyacrylamide production // eu+efta+uk; Articulated lorry transport, Euro 4, Total weight >32 t; EU+EFTA+UK
- km_16: 909.091
  Distance in km, for polyacrylamide // polyacrylamide production // eu+efta+uk; Articulated lorry transport, Euro 4, Total weight >32 t; EU+EFTA+UK
- kg_km_16: 1.02844; = kg_16*km_16
  Transport amount in km*km, for polyacrylamide // polyacrylamide production // eu+efta+uk; Articulated lorry transport, Euro 4, Total weight >32 t; EU+EFTA+UK
- kg_17: 0.00672476
  Mass in kg, for semi-chemical wood pulp // semi-chemical wood pulp // eu+efta+uk; Articulated lorry transport, Euro 4, Total weight >32 t; EU+EFTA+UK
- km_17: 587.561
  Distance in km, for semi-chemical wood pulp // semi-chemical wood pulp // eu+efta+uk; Articulated lorry transport, Euro 4, Total weight >32 t; EU+EFTA+UK
- kg_km_17: 3.9512; = kg_17*km_17
  Transport amount in km*km, for semi-chemical wood pulp // semi-chemical wood pulp // eu+efta+uk; Articulated lorry transport, Euro 4, Total weight >32 t; EU+EFTA+UK
- kg_18: 2.43138e-5
  Mass in kg, for sodium chlorate // sodium chlorate production // glo; Articulated lorry transport, Euro 4, Total weight >32 t; EU+EFTA+UK
- km_18: 500
  Distance in km, for sodium chlorate // sodium chlorate production // glo; Articulated lorry transport, Euro 4, Total weight >32 t; EU+EFTA+UK
- kg_km_18: 0.0121569; = kg_18*km_18
  Transport amount in km*km, for sodium chlorate // sodium chlorate production // glo; Articulated lorry transport, Euro 4, Total weight >32 t; EU+EFTA+UK
- kg_19: 0.000101277
  Mass in kg, for sodium hydrogen sulphite // sodium hydrogen sulphite production // eu+efta+uk; Articulated lorry transport, Euro 4, Total weight >32 t; EU+EFTA+UK
- km_19: 1282.05
  Distance in km, for sodium hydrogen sulphite // sodium hydrogen sulphite production // eu+efta+uk; Articulated lorry transport, Euro 4, Total weight >32 t; EU+EFTA+UK
- kg_km_19: 0.129842; = kg_19*km_19
  Transport amount in km*km, for sodium hydrogen sulphite // sodium hydrogen sulphite production // eu+efta+uk; Articulated lorry transport, Euro 4, Total weight >32 t; EU+EFTA+UK
- kg_20: 0.00046634
  Mass in kg, for sodium hydroxide // sodium hydroxide production // eu+efta+uk; Articulated lorry transport, Euro 4, Total weight >32 t; EU+EFTA+UK
- km_20: 1000
  Distance in km, for sodium hydroxide // sodium hydroxide production // eu+efta+uk; Articulated lorry transport, Euro 4, Total weight >32 t; EU+EFTA+UK
- kg_km_20: 0.46634; = kg_20*km_20
  Transport amount in km*km, for sodium hydroxide // sodium hydroxide production // eu+efta+uk; Articulated lorry transport, Euro 4, Total weight >32 t; EU+EFTA+UK
- kg_21: 0.000119946
  Mass in kg, for sulphuric acid // sulphuric acid production // eu+efta+uk; Articulated lorry transport, Euro 4, Total weight >32 t; EU+EFTA+UK
- km_21: 769.231
  Distance in km, for sulphuric acid // sulphuric acid production // eu+efta+uk; Articulated lorry transport, Euro 4, Total weight >32 t; EU+EFTA+UK
- kg_km_21: 0.0922658; = kg_21*km_21
  Transport amount in km*km, for sulphuric acid // sulphuric acid production // eu+efta+uk; Articulated lorry transport, Euro 4, Total weight >32 t; EU+EFTA+UK
- kg_22: 0.0116309
  Mass in kg, for thermomechanical pulp // thermomechanical pulp // eu+efta+uk; Articulated lorry transport, Euro 4, Total weight >32 t; EU+EFTA+UK
- km_22: 1081.47
  Distance in km, for thermomechanical pulp // thermomechanical pulp // eu+efta+uk; Articulated lorry transport, Euro 4, Total weight >32 t; EU+EFTA+UK
- kg_km_22: 12.5784; = kg_22*km_22
  Transport amount in km*km, for thermomechanical pulp // thermomechanical pulp // eu+efta+uk; Articulated lorry transport, Euro 4, Total weight >32 t; EU+EFTA+UK
- kg_23: 0.0001063
  Mass in kg, for unbleached kraft pulp, hardwood // unbleached kraft pulp, hardwood // eu+efta+uk; Articulated lorry transport, Euro 4, Total weight >32 t; EU+EFTA+UK
- km_23: 410.415
  Distance in km, for unbleached kraft pulp, hardwood // unbleached kraft pulp, hardwood // eu+efta+uk; Articulated lorry transport, Euro 4, Total weight >32 t; EU+EFTA+UK
- kg_km_23: 0.0436272; = kg_23*km_23
  Transport amount in km*km, for unbleached kraft pulp, hardwood // unbleached kraft pulp, hardwood // eu+efta+uk; Articulated lorry transport, Euro 4, Total weight >32 t; EU+EFTA+UK
- kg_24: 0.000755923
  Mass in kg, for urea-formaldehyde resin // urea-formaldehyde resin production // eu+efta+uk; Articulated lorry transport, Euro 4, Total weight >32 t; EU+EFTA+UK
- km_24: 2500
  Distance in km, for urea-formaldehyde resin // urea-formaldehyde resin production // eu+efta+uk; Articulated lorry transport, Euro 4, Total weight >32 t; EU+EFTA+UK
- kg_km_24: 1.88981; = kg_24*km_24
  Transport amount in km*km, for urea-formaldehyde resin // urea-formaldehyde resin production // eu+efta+uk; Articulated lorry transport, Euro 4, Total weight >32 t; EU+EFTA+UK
- kg_25: 0.4462
  Mass in kg, for waste paper, sorted // sorting waste paper, unsorted // eu+efta+uk; Articulated lorry transport, Euro 4, Total weight >32 t; EU+EFTA+UK
- km_25: 256.083
  Distance in km, for waste paper, sorted // sorting waste paper, unsorted // eu+efta+uk; Articulated lorry transport, Euro 4, Total weight >32 t; EU+EFTA+UK
- kg_km_25: 114.264; = kg_25*km_25
  Transport amount in km*km, for waste paper, sorted // sorting waste paper, unsorted // eu+efta+uk; Articulated lorry transport, Euro 4, Total weight >32 t; EU+EFTA+UK
- kg_26: 0.340291
  Mass in kg, for bleached kraft pulp, eucalyptus // bleached kraft pulp, eucalyptus // eu+efta+uk; Barge; EU+EFTA+UK
- km_26: 133.73
  Distance in km, for bleached kraft pulp, eucalyptus // bleached kraft pulp, eucalyptus // eu+efta+uk; Barge; EU+EFTA+UK
- kg_km_26: 45.5072; = kg_26*km_26
  Transport amount in km*km, for bleached kraft pulp, eucalyptus // bleached kraft pulp, eucalyptus // eu+efta+uk; Barge; EU+EFTA+UK
- kg_27: 0.0323168
  Mass in kg, for bleached kraft pulp, hardwood // bleached kraft pulp, hardwood // eu+efta+uk; Barge; EU+EFTA+UK
- km_27: 133.73
  Distance in km, for bleached kraft pulp, hardwood // bleached kraft pulp, hardwood // eu+efta+uk; Barge; EU+EFTA+UK
- kg_km_27: 4.32174; = kg_27*km_27
  Transport amount in km*km, for bleached kraft pulp, hardwood // bleached kraft pulp, hardwood // eu+efta+uk; Barge; EU+EFTA+UK
- kg_28: 0.233704
  Mass in kg, for bleached kraft pulp, softwood // bleached kraft pulp, softwood // eu+efta+uk; Barge; EU+EFTA+UK
- km_28: 143.836
  Distance in km, for bleached kraft pulp, softwood // bleached kraft pulp, softwood // eu+efta+uk; Barge; EU+EFTA+UK
- kg_km_28: 33.615; = kg_28*km_28
  Transport amount in km*km, for bleached kraft pulp, softwood // bleached kraft pulp, softwood // eu+efta+uk; Barge; EU+EFTA+UK
- kg_29: 0.0962014
  Mass in kg, for bleached sulphite pulp, softwood // bleached sulphite pulp, softwood // eu+efta+uk; Barge; EU+EFTA+UK
- km_29: 133.73
  Distance in km, for bleached sulphite pulp, softwood // bleached sulphite pulp, softwood // eu+efta+uk; Barge; EU+EFTA+UK
- kg_km_29: 12.8651; = kg_29*km_29
  Transport amount in km*km, for bleached sulphite pulp, softwood // bleached sulphite pulp, softwood // eu+efta+uk; Barge; EU+EFTA+UK
- kg_30: 0.00274049
  Mass in kg, for chemi-thermomechanical pulp // chemi-thermomechanical pulp // eu+efta+uk; Barge; EU+EFTA+UK
- km_30: 133.73
  Distance in km, for chemi-thermomechanical pulp // chemi-thermomechanical pulp // eu+efta+uk; Barge; EU+EFTA+UK
- kg_km_30: 0.366487; = kg_30*km_30
  Transport amount in km*km, for chemi-thermomechanical pulp // chemi-thermomechanical pulp // eu+efta+uk; Barge; EU+EFTA+UK
- kg_31: 0.000763251
  Mass in kg, for mechanical wood pulp // mechanical wood pulp // eu+efta+uk; Barge; EU+EFTA+UK
- km_31: 133.73
  Distance in km, for mechanical wood pulp // mechanical wood pulp // eu+efta+uk; Barge; EU+EFTA+UK
- kg_km_31: 0.10207; = kg_31*km_31
  Transport amount in km*km, for mechanical wood pulp // mechanical wood pulp // eu+efta+uk; Barge; EU+EFTA+UK
- kg_32: 0.00672476
  Mass in kg, for semi-chemical wood pulp // semi-chemical wood pulp // eu+efta+uk; Barge; EU+EFTA+UK
- km_32: 422.138
  Distance in km, for semi-chemical wood pulp // semi-chemical wood pulp // eu+efta+uk; Barge; EU+EFTA+UK
- kg_km_32: 2.83877; = kg_32*km_32
  Transport amount in km*km, for semi-chemical wood pulp // semi-chemical wood pulp // eu+efta+uk; Barge; EU+EFTA+UK
- kg_33: 0.0116309
  Mass in kg, for thermomechanical pulp // thermomechanical pulp // eu+efta+uk; Barge; EU+EFTA+UK
- km_33: 133.73
  Distance in km, for thermomechanical pulp // thermomechanical pulp // eu+efta+uk; Barge; EU+EFTA+UK
- kg_km_33: 1.5554; = kg_33*km_33
  Transport amount in km*km, for thermomechanical pulp // thermomechanical pulp // eu+efta+uk; Barge; EU+EFTA+UK
- kg_34: 0.0001063
  Mass in kg, for unbleached kraft pulp, hardwood // unbleached kraft pulp, hardwood // eu+efta+uk; Barge; EU+EFTA+UK
- km_34: 133.73
  Distance in km, for unbleached kraft pulp, hardwood // unbleached kraft pulp, hardwood // eu+efta+uk; Barge; EU+EFTA+UK
- kg_km_34: 0.0142156; = kg_34*km_34
  Transport amount in km*km, for unbleached kraft pulp, hardwood // unbleached kraft pulp, hardwood // eu+efta+uk; Barge; EU+EFTA+UK
- kg_35: 0.340291
  Mass in kg, for bleached kraft pulp, eucalyptus // bleached kraft pulp, eucalyptus // eu+efta+uk; Freight train, average; EU+EFTA+UK
- km_35: 178.88
  Distance in km, for bleached kraft pulp, eucalyptus // bleached kraft pulp, eucalyptus // eu+efta+uk; Freight train, average; EU+EFTA+UK
- kg_km_35: 60.8713; = kg_35*km_35
  Transport amount in km*km, for bleached kraft pulp, eucalyptus // bleached kraft pulp, eucalyptus // eu+efta+uk; Freight train, average; EU+EFTA+UK
- kg_36: 0.0323168
  Mass in kg, for bleached kraft pulp, hardwood // bleached kraft pulp, hardwood // eu+efta+uk; Freight train, average; EU+EFTA+UK
- km_36: 82.9528
  Distance in km, for bleached kraft pulp, hardwood // bleached kraft pulp, hardwood // eu+efta+uk; Freight train, average; EU+EFTA+UK
- kg_km_36: 2.68077; = kg_36*km_36
  Transport amount in km*km, for bleached kraft pulp, hardwood // bleached kraft pulp, hardwood // eu+efta+uk; Freight train, average; EU+EFTA+UK
- kg_37: 0.233704
  Mass in kg, for bleached kraft pulp, softwood // bleached kraft pulp, softwood // eu+efta+uk; Freight train, average; EU+EFTA+UK
- km_37: 271.267
  Distance in km, for bleached kraft pulp, softwood // bleached kraft pulp, softwood // eu+efta+uk; Freight train, average; EU+EFTA+UK
- kg_km_37: 63.3963; = kg_37*km_37
  Transport amount in km*km, for bleached kraft pulp, softwood // bleached kraft pulp, softwood // eu+efta+uk; Freight train, average; EU+EFTA+UK
- kg_38: 0.0962014
  Mass in kg, for bleached sulphite pulp, softwood // bleached sulphite pulp, softwood // eu+efta+uk; Freight train, average; EU+EFTA+UK
- km_38: 25.899
  Distance in km, for bleached sulphite pulp, softwood // bleached sulphite pulp, softwood // eu+efta+uk; Freight train, average; EU+EFTA+UK
- kg_km_38: 2.49152; = kg_38*km_38
  Transport amount in km*km, for bleached sulphite pulp, softwood // bleached sulphite pulp, softwood // eu+efta+uk; Freight train, average; EU+EFTA+UK
- kg_39: 0.00274049
  Mass in kg, for chemi-thermomechanical pulp // chemi-thermomechanical pulp // eu+efta+uk; Freight train, average; EU+EFTA+UK
- km_39: 25.899
  Distance in km, for chemi-thermomechanical pulp // chemi-thermomechanical pulp // eu+efta+uk; Freight train, average; EU+EFTA+UK
- kg_km_39: 0.0709759; = kg_39*km_39
  Transport amount in km*km, for chemi-thermomechanical pulp // chemi-thermomechanical pulp // eu+efta+uk; Freight train, average; EU+EFTA+UK
- kg_40: 0.000763251
  Mass in kg, for mechanical wood pulp // mechanical wood pulp // eu+efta+uk; Freight train, average; EU+EFTA+UK
- km_40: 25.899
  Distance in km, for mechanical wood pulp // mechanical wood pulp // eu+efta+uk; Freight train, average; EU+EFTA+UK
- kg_km_40: 0.0197674; = kg_40*km_40
  Transport amount in km*km, for mechanical wood pulp // mechanical wood pulp // eu+efta+uk; Freight train, average; EU+EFTA+UK
- kg_41: 0.00672476
  Mass in kg, for semi-chemical wood pulp // semi-chemical wood pulp // eu+efta+uk; Freight train, average; EU+EFTA+UK
- km_41: 84.6544
  Distance in km, for semi-chemical wood pulp // semi-chemical wood pulp // eu+efta+uk; Freight train, average; EU+EFTA+UK
- kg_km_41: 0.56928; = kg_41*km_41
  Transport amount in km*km, for semi-chemical wood pulp // semi-chemical wood pulp // eu+efta+uk; Freight train, average; EU+EFTA+UK
- kg_42: 0.0116309
  Mass in kg, for thermomechanical pulp // thermomechanical pulp // eu+efta+uk; Freight train, average; EU+EFTA+UK
- km_42: 25.899
  Distance in km, for thermomechanical pulp // thermomechanical pulp // eu+efta+uk; Freight train, average; EU+EFTA+UK
- kg_km_42: 0.301227; = kg_42*km_42
  Transport amount in km*km, for thermomechanical pulp // thermomechanical pulp // eu+efta+uk; Freight train, average; EU+EFTA+UK
- kg_43: 0.0001063
  Mass in kg, for unbleached kraft pulp, hardwood // unbleached kraft pulp, hardwood // eu+efta+uk; Freight train, average; EU+EFTA+UK
- km_43: 25.899
  Distance in km, for unbleached kraft pulp, hardwood // unbleached kraft pulp, hardwood // eu+efta+uk; Freight train, average; EU+EFTA+UK
- kg_km_43: 0.00275307; = kg_43*km_43
  Transport amount in km*km, for unbleached kraft pulp, hardwood // unbleached kraft pulp, hardwood // eu+efta+uk; Freight train, average; EU+EFTA+UK
- kg_44: 0.340291
  Mass in kg, for bleached kraft pulp, eucalyptus // bleached kraft pulp, eucalyptus // eu+efta+uk; Transoceanic ship, containers; GLO
- km_44: 8135.55
  Distance in km, for bleached kraft pulp, eucalyptus // bleached kraft pulp, eucalyptus // eu+efta+uk; Transoceanic ship, containers; GLO
- kg_km_44: 2768.45; = kg_44*km_44
  Transport amount in km*km, for bleached kraft pulp, eucalyptus // bleached kraft pulp, eucalyptus // eu+efta+uk; Transoceanic ship, containers; GLO
- kg_45: 0.0323168
  Mass in kg, for bleached kraft pulp, hardwood // bleached kraft pulp, hardwood // eu+efta+uk; Transoceanic ship, containers; GLO
- km_45: 2200.72
  Distance in km, for bleached kraft pulp, hardwood // bleached kraft pulp, hardwood // eu+efta+uk; Transoceanic ship, containers; GLO
- kg_km_45: 71.1203; = kg_45*km_45
  Transport amount in km*km, for bleached kraft pulp, hardwood // bleached kraft pulp, hardwood // eu+efta+uk; Transoceanic ship, containers; GLO
- kg_46: 0.233704
  Mass in kg, for bleached kraft pulp, softwood // bleached kraft pulp, softwood // eu+efta+uk; Transoceanic ship, containers; GLO
- km_46: 3031.04
  Distance in km, for bleached kraft pulp, softwood // bleached kraft pulp, softwood // eu+efta+uk; Transoceanic ship, containers; GLO
- kg_km_46: 708.367; = kg_46*km_46
  Transport amount in km*km, for bleached kraft pulp, softwood // bleached kraft pulp, softwood // eu+efta+uk; Transoceanic ship, containers; GLO
- kg_47: 0.0962014
  Mass in kg, for bleached sulphite pulp, softwood // bleached sulphite pulp, softwood // eu+efta+uk; Transoceanic ship, containers; GLO
- km_47: 1837.56
  Distance in km, for bleached sulphite pulp, softwood // bleached sulphite pulp, softwood // eu+efta+uk; Transoceanic ship, containers; GLO
- kg_km_47: 176.776; = kg_47*km_47
  Transport amount in km*km, for bleached sulphite pulp, softwood // bleached sulphite pulp, softwood // eu+efta+uk; Transoceanic ship, containers; GLO
- kg_48: 0.00274049
  Mass in kg, for chemi-thermomechanical pulp // chemi-thermomechanical pulp // eu+efta+uk; Transoceanic ship, containers; GLO
- km_48: 1882.18
  Distance in km, for chemi-thermomechanical pulp // chemi-thermomechanical pulp // eu+efta+uk; Transoceanic ship, containers; GLO
- kg_km_48: 5.1581; = kg_48*km_48
  Transport amount in km*km, for chemi-thermomechanical pulp // chemi-thermomechanical pulp // eu+efta+uk; Transoceanic ship, containers; GLO
- kg_49: 0.000763251
  Mass in kg, for mechanical wood pulp // mechanical wood pulp // eu+efta+uk; Transoceanic ship, containers; GLO
- km_49: 1812.8
  Distance in km, for mechanical wood pulp // mechanical wood pulp // eu+efta+uk; Transoceanic ship, containers; GLO
- kg_km_49: 1.38362; = kg_49*km_49
  Transport amount in km*km, for mechanical wood pulp // mechanical wood pulp // eu+efta+uk; Transoceanic ship, containers; GLO
- kg_50: 0.00672476
  Mass in kg, for semi-chemical wood pulp // semi-chemical wood pulp // eu+efta+uk; Transoceanic ship, containers; GLO
- km_50: 2999.04
  Distance in km, for semi-chemical wood pulp // semi-chemical wood pulp // eu+efta+uk; Transoceanic ship, containers; GLO
- kg_km_50: 20.1678; = kg_50*km_50
  Transport amount in km*km, for semi-chemical wood pulp // semi-chemical wood pulp // eu+efta+uk; Transoceanic ship, containers; GLO
- kg_51: 0.0116309
  Mass in kg, for thermomechanical pulp // thermomechanical pulp // eu+efta+uk; Transoceanic ship, containers; GLO
- km_51: 6475.4
  Distance in km, for thermomechanical pulp // thermomechanical pulp // eu+efta+uk; Transoceanic ship, containers; GLO
- kg_km_51: 75.3145; = kg_51*km_51
  Transport amount in km*km, for thermomechanical pulp // thermomechanical pulp // eu+efta+uk; Transoceanic ship, containers; GLO
- kg_52: 0.0001063
  Mass in kg, for unbleached kraft pulp, hardwood // unbleached kraft pulp, hardwood // eu+efta+uk; Transoceanic ship, containers; GLO
- km_52: 9975.24
  Distance in km, for unbleached kraft pulp, hardwood // unbleached kraft pulp, hardwood // eu+efta+uk; Transoceanic ship, containers; GLO
- kg_km_52: 1.06037; = kg_52*km_52
  Transport amount in km*km, for unbleached kraft pulp, hardwood // unbleached kraft pulp, hardwood // eu+efta+uk; Transoceanic ship, containers; GLO
- kg_53: 0.0260398
  Mass in kg, for biodegradable waste to landfill // landfill of biodegradable waste // eu+efta+uk; Articulated lorry transport, Euro 4, Total weight >32 t; EU+EFTA+UK
- km_53: 77
  Distance in km, for biodegradable waste to landfill // landfill of biodegradable waste // eu+efta+uk; Articulated lorry transport, Euro 4, Total weight >32 t; EU+EFTA+UK
- kg_km_53: 2.00507; = kg_53*km_53
  Transport amount in km*km, for biodegradable waste to landfill // landfill of biodegradable waste // eu+efta+uk; Articulated lorry transport, Euro 4, Total weight >32 t; EU+EFTA+UK
- kg_54: 0.0855594
  Mass in kg, for biowaste // enclosed composting // eu+efta+uk; Articulated lorry transport, Euro 4, Total weight >32 t; EU+EFTA+UK
- km_54: 77
  Distance in km, for biowaste // enclosed composting // eu+efta+uk; Articulated lorry transport, Euro 4, Total weight >32 t; EU+EFTA+UK
- kg_km_54: 6.58807; = kg_54*km_54
  Transport amount in km*km, for biowaste // enclosed composting // eu+efta+uk; Articulated lorry transport, Euro 4, Total weight >32 t; EU+EFTA+UK
- kg_55: 0.00535011
  Mass in kg, for industrial waste, average, not hazardous, to residual landfill // industrial waste, average, not hazardous, to residual landfill // eu+efta+uk; Articulated lorry transport, Euro 4, Total weight >32 t; EU+EFTA+UK
- km_55: 77
  Distance in km, for industrial waste, average, not hazardous, to residual landfill // industrial waste, average, not hazardous, to residual landfill // eu+efta+uk; Articulated lorry transport, Euro 4, Total weight >32 t; EU+EFTA+UK
- kg_km_55: 0.411959; = kg_55*km_55
  Transport amount in km*km, for industrial waste, average, not hazardous, to residual landfill // industrial waste, average, not hazardous, to residual landfill // eu+efta+uk; Articulated lorry transport, Euro 4, Total weight >32 t; EU+EFTA+UK
- kg_56: 0.0135929
  Mass in kg, for paper and paperboard waste to landfill // landfill of paper and paperboard waste // eu+efta+uk; Articulated lorry transport, Euro 4, Total weight >32 t; EU+EFTA+UK
- km_56: 77
  Distance in km, for paper and paperboard waste to landfill // landfill of paper and paperboard waste // eu+efta+uk; Articulated lorry transport, Euro 4, Total weight >32 t; EU+EFTA+UK
- kg_km_56: 1.04665; = kg_56*km_56
  Transport amount in km*km, for paper and paperboard waste to landfill // landfill of paper and paperboard waste // eu+efta+uk; Articulated lorry transport, Euro 4, Total weight >32 t; EU+EFTA+UK

## Reference product
- sanitary and household papers (tissue paper) // sanitary and household papers (tissue paper) // eu+efta+uk: 1

## Inputs
- Electricity from Electricity grid mix 1kV-60kV - AT: 0.110844
- Electricity from Electricity grid mix 1kV-60kV - DE: 0.770766
- Electricity from Electricity grid mix 1kV-60kV - FI: 0.0738959
- Electricity from Electricity grid mix 1kV-60kV - FR: 0.43565
- Electricity from Electricity grid mix 1kV-60kV - GB: 0.402139
- Electricity from Electricity grid mix 1kV-60kV - IT: 0.804277
- Electricity from Electricity grid mix 1kV-60kV - NL: 0.0335115
- Electricity from Electricity grid mix 1kV-60kV - NO: 0.0670231
- Electricity from Electricity grid mix 1kV-60kV - PL: 0.402139
- Electricity from Electricity grid mix 1kV-60kV - PT: 0.100535
- Electricity from Electricity grid mix 1kV-60kV - SE: 0.167558
- Thermal energy (MJ) from Thermal energy from natural gas - EU+EFTA+UK: 1.95987
- Transport of akd sizer // akd sizer production // glo by Articulated lorry transport, Euro 4, Total weight >32 t - EU+EFTA+UK: 1.88981; = kg_km_0
- Transport of bleached kraft pulp, eucalyptus // bleached kraft pulp, eucalyptus // eu+efta+uk by Articulated lorry transport, Euro 4, Total weight >32 t - EU+EFTA+UK: 160.751; = kg_km_1
- Transport of bleached kraft pulp, hardwood // bleached kraft pulp, hardwood // eu+efta+uk by Articulated lorry transport, Euro 4, Total weight >32 t - EU+EFTA+UK: 38.1128; = kg_km_2
- Transport of bleached kraft pulp, softwood // bleached kraft pulp, softwood // eu+efta+uk by Articulated lorry transport, Euro 4, Total weight >32 t - EU+EFTA+UK: 108.564; = kg_km_3
- Transport of bleached sulphite pulp, softwood // bleached sulphite pulp, softwood // eu+efta+uk by Articulated lorry transport, Euro 4, Total weight >32 t - EU+EFTA+UK: 49.7696; = kg_km_4
- Transport of chemi-thermomechanical pulp // chemi-thermomechanical pulp // eu+efta+uk by Articulated lorry transport, Euro 4, Total weight >32 t - EU+EFTA+UK: 4.25642; = kg_km_5
- Transport of wood chips, hardwood // wood chips, hardwood // eu+efta+uk by Articulated lorry transport, Euro 4, Total weight >32 t - EU+EFTA+UK: 1.81515; = kg_km_6
- Transport of wood chips, softwood // wood chips, softwood // eu+efta+uk by Articulated lorry transport, Euro 4, Total weight >32 t - EU+EFTA+UK: 1.81515; = kg_km_7
- Transport of hard coal, at consumer eu+efta // hard coal mix // eu+efta+uk by Articulated lorry transport, Euro 4, Total weight >32 t - EU+EFTA+UK: 3.04961; = kg_km_8
- Transport of heavy fuel oil (1.0 wt.% s) // heavy fuel oil at refinery // eu+efta+uk by Articulated lorry transport, Euro 4, Total weight >32 t - EU+EFTA+UK: 0.190243; = kg_km_9
- Transport of hydrogen peroxide, 100% // hydrogen peroxide, 100% production // eu+efta+uk by Articulated lorry transport, Euro 4, Total weight >32 t - EU+EFTA+UK: 3.35949; = kg_km_10
- Transport of latex // latex production // glo by Articulated lorry transport, Euro 4, Total weight >32 t - EU+EFTA+UK: 0.387996; = kg_km_11
- Transport of lignite eu+efta // lignite mix // eu+efta+uk by Articulated lorry transport, Euro 4, Total weight >32 t - EU+EFTA+UK: 0.27447; = kg_km_12
- Transport of maize starch, from wet milling (starch drying), at plant // glo by Articulated lorry transport, Euro 4, Total weight >32 t - EU+EFTA+UK: 0.0840907; = kg_km_13
- Transport of mechanical wood pulp // mechanical wood pulp // eu+efta+uk by Articulated lorry transport, Euro 4, Total weight >32 t - EU+EFTA+UK: 1.06085; = kg_km_14
- Transport of melamine formaldehyde resin // melamine formaldehyde resin production // eu+efta+uk by Articulated lorry transport, Euro 4, Total weight >32 t - EU+EFTA+UK: 1.88981; = kg_km_15
- Transport of polyacrylamide // polyacrylamide production // eu+efta+uk by Articulated lorry transport, Euro 4, Total weight >32 t - EU+EFTA+UK: 1.02844; = kg_km_16
- Transport of semi-chemical wood pulp // semi-chemical wood pulp // eu+efta+uk by Articulated lorry transport, Euro 4, Total weight >32 t - EU+EFTA+UK: 3.9512; = kg_km_17
- Transport of sodium chlorate // sodium chlorate production // glo by Articulated lorry transport, Euro 4, Total weight >32 t - EU+EFTA+UK: 0.0121569; = kg_km_18
- Transport of sodium hydrogen sulphite // sodium hydrogen sulphite production // eu+efta+uk by Articulated lorry transport, Euro 4, Total weight >32 t - EU+EFTA+UK: 0.129842; = kg_km_19
- Transport of sodium hydroxide // sodium hydroxide production // eu+efta+uk by Articulated lorry transport, Euro 4, Total weight >32 t - EU+EFTA+UK: 0.46634; = kg_km_20
- Transport of sulphuric acid // sulphuric acid production // eu+efta+uk by Articulated lorry transport, Euro 4, Total weight >32 t - EU+EFTA+UK: 0.0922658; = kg_km_21
- Transport of thermomechanical pulp // thermomechanical pulp // eu+efta+uk by Articulated lorry transport, Euro 4, Total weight >32 t - EU+EFTA+UK: 12.5784; = kg_km_22
- Transport of unbleached kraft pulp, hardwood // unbleached kraft pulp, hardwood // eu+efta+uk by Articulated lorry transport, Euro 4, Total weight >32 t - EU+EFTA+UK: 0.0436272; = kg_km_23
- Transport of urea-formaldehyde resin // urea-formaldehyde resin production // eu+efta+uk by Articulated lorry transport, Euro 4, Total weight >32 t - EU+EFTA+UK: 1.88981; = kg_km_24
- Transport of waste paper, sorted // sorting waste paper, unsorted // eu+efta+uk by Articulated lorry transport, Euro 4, Total weight >32 t - EU+EFTA+UK: 114.264; = kg_km_25
- Transport of bleached kraft pulp, eucalyptus // bleached kraft pulp, eucalyptus // eu+efta+uk by Barge - EU+EFTA+UK: 45.5072; = kg_km_26
- Transport of bleached kraft pulp, hardwood // bleached kraft pulp, hardwood // eu+efta+uk by Barge - EU+EFTA+UK: 4.32174; = kg_km_27
- Transport of bleached kraft pulp, softwood // bleached kraft pulp, softwood // eu+efta+uk by Barge - EU+EFTA+UK: 33.615; = kg_km_28
- Transport of bleached sulphite pulp, softwood // bleached sulphite pulp, softwood // eu+efta+uk by Barge - EU+EFTA+UK: 12.8651; = kg_km_29
- Transport of chemi-thermomechanical pulp // chemi-thermomechanical pulp // eu+efta+uk by Barge - EU+EFTA+UK: 0.366487; = kg_km_30
- Transport of mechanical wood pulp // mechanical wood pulp // eu+efta+uk by Barge - EU+EFTA+UK: 0.10207; = kg_km_31
- Transport of semi-chemical wood pulp // semi-chemical wood pulp // eu+efta+uk by Barge - EU+EFTA+UK: 2.83877; = kg_km_32
- Transport of thermomechanical pulp // thermomechanical pulp // eu+efta+uk by Barge - EU+EFTA+UK: 1.5554; = kg_km_33
- Transport of unbleached kraft pulp, hardwood // unbleached kraft pulp, hardwood // eu+efta+uk by Barge - EU+EFTA+UK: 0.0142156; = kg_km_34
- Transport of bleached kraft pulp, eucalyptus // bleached kraft pulp, eucalyptus // eu+efta+uk by Freight train, average - EU+EFTA+UK: 60.8713; = kg_km_35
- Transport of bleached kraft pulp, hardwood // bleached kraft pulp, hardwood // eu+efta+uk by Freight train, average - EU+EFTA+UK: 2.68077; = kg_km_36
- Transport of bleached kraft pulp, softwood // bleached kraft pulp, softwood // eu+efta+uk by Freight train, average - EU+EFTA+UK: 63.3963; = kg_km_37
- Transport of bleached sulphite pulp, softwood // bleached sulphite pulp, softwood // eu+efta+uk by Freight train, average - EU+EFTA+UK: 2.49152; = kg_km_38
- Transport of chemi-thermomechanical pulp // chemi-thermomechanical pulp // eu+efta+uk by Freight train, average - EU+EFTA+UK: 0.0709759; = kg_km_39
- Transport of mechanical wood pulp // mechanical wood pulp // eu+efta+uk by Freight train, average - EU+EFTA+UK: 0.0197674; = kg_km_40
- Transport of semi-chemical wood pulp // semi-chemical wood pulp // eu+efta+uk by Freight train, average - EU+EFTA+UK: 0.56928; = kg_km_41
- Transport of thermomechanical pulp // thermomechanical pulp // eu+efta+uk by Freight train, average - EU+EFTA+UK: 0.301227; = kg_km_42
- Transport of unbleached kraft pulp, hardwood // unbleached kraft pulp, hardwood // eu+efta+uk by Freight train, average - EU+EFTA+UK: 0.00275307; = kg_km_43
- Transport of bleached kraft pulp, eucalyptus // bleached kraft pulp, eucalyptus // eu+efta+uk by Transoceanic ship, containers - GLO: 2768.45; = kg_km_44
- Transport of bleached kraft pulp, hardwood // bleached kraft pulp, hardwood // eu+efta+uk by Transoceanic ship, containers - GLO: 71.1203; = kg_km_45
- Transport of bleached kraft pulp, softwood // bleached kraft pulp, softwood // eu+efta+uk by Transoceanic ship, containers - GLO: 708.367; = kg_km_46
- Transport of bleached sulphite pulp, softwood // bleached sulphite pulp, softwood // eu+efta+uk by Transoceanic ship, containers - GLO: 176.776; = kg_km_47
- Transport of chemi-thermomechanical pulp // chemi-thermomechanical pulp // eu+efta+uk by Transoceanic ship, containers - GLO: 5.1581; = kg_km_48
- Transport of mechanical wood pulp // mechanical wood pulp // eu+efta+uk by Transoceanic ship, containers - GLO: 1.38362; = kg_km_49
- Transport of semi-chemical wood pulp // semi-chemical wood pulp // eu+efta+uk by Transoceanic ship, containers - GLO: 20.1678; = kg_km_50
- Transport of thermomechanical pulp // thermomechanical pulp // eu+efta+uk by Transoceanic ship, containers - GLO: 75.3145; = kg_km_51
- Transport of unbleached kraft pulp, hardwood // unbleached kraft pulp, hardwood // eu+efta+uk by Transoceanic ship, containers - GLO: 1.06037; = kg_km_52
- Transport of biodegradable waste to landfill // landfill of biodegradable waste // eu+efta+uk by Articulated lorry transport, Euro 4, Total weight >32 t - EU+EFTA+UK: 2.00507; = kg_km_53
- Transport of biowaste // enclosed composting // eu+efta+uk by Articulated lorry transport, Euro 4, Total weight >32 t - EU+EFTA+UK: 6.58807; = kg_km_54
- Transport of industrial waste, average, not hazardous, to residual landfill // industrial waste, average, not hazardous, to residual landfill // eu+efta+uk by Articulated lorry transport, Euro 4, Total weight >32 t - EU+EFTA+UK: 0.411959; = kg_km_55
- Transport of paper and paperboard waste to landfill // landfill of paper and paperboard waste // eu+efta+uk by Articulated lorry transport, Euro 4, Total weight >32 t - EU+EFTA+UK: 1.04665; = kg_km_56
- sanitary and household papers (tissue paper) // sanitary and household papers (tissue paper) // eu+efta+uk, blackbox: 1
- sanitary and household papers (tissue paper) // sanitary and household papers (tissue paper) // eu+efta+uk, elementary: 1

## Impact indicators
- Eutrophication marine: 0.00191231
- Ecotoxicity, freshwater: 43.7296
- Land use: 303.976
- Water use: 0.733023
- Resource use, minerals and metals: 4.16508e-6
- Resource use, fossils: 21.2411
- Climate change: 1.5557
- Ozone depletion: 2.61241e-8
- Human toxicity, cancer: 5.19789e-10
- Human toxicity, non-cancer: 1.32479e-8
- EF-particulate Matter: 8.70602e-8
- Ionising radiation, human health: 0.142516
- Photochemical ozone formation - human health: 0.00508727
- Acidification: 0.0060851
- Eutrophication, terrestrial: 0.0159925
- Eutrophication, freshwater: 7.54835e-5

## Deviations from the LCI method principle
The background data uses:
- the \xe2\x80\x9cRecycled content cut-off\xe2\x80\x9d approach to allocate end-of-life by-products and secondary materials. This allocation is explained in the description of the recycled content system model (http://www.ecoinvent.org/database/system-models-in-ecoinvent-3/cut-off-system-model/allocation-cut-off-by-classification.html).
OR
- EF compliant data

## Deviations from the LCI method approaches
Background data:
- the \xe2\x80\x9cRecycled content cut-off\xe2\x80\x9d approach to allocate end-of-life by-products and secondary materials. This allocation is explained in the description of the recycled content system model (http://www.ecoinvent.org/database/system-models-in-ecoinvent-3/cut-off-system-model/allocation-cut-off-by-classification.html). The ecoinvent database mostly relies on “Allocation – market values” apart for few exceptions particularly in the energy sector. ecoinvent energy data is replaced with EF3.0 core data as per the EF guidelines version 2.0.
OR
- EF compliant data

## Modelling constants
All modelling constants follow the requirements listed in the Tender Specifications 070201/2020/SER/ENV.B1. Completeness: There are no intentional cut-offs in the inventory no matter how small their contribution to all the EF impact categories is. Eventual cut-offs are in compliance with the Guide for EF compliant data sets (JRC 2020), i.e. only if below the 3% cut-off rule. Water use: water use is modelled at country level using separate flows for water withdrawal, water release and water evaporation. Handling multi-functional processes: the following PEF multi- functionality decision hierarchy is applied for resolving all multi- functionality problems: (1) subdivision or system expansion; (2) allocation based on a relevant underlying physical relationship (substitution may apply here); (3) allocation based on some other relationship. Direct land use change: GHG emissions from direct LUC allocated to good/service for 20 years after the LUC occurs, with IPCC default values. Carbon storage and delayed emissions: credits associated with temporary (carbon) storage or delayed emissions up to 300 years are not be considered. Emissions off-setting: are not included. Capital goods (including infrastructures) and their End of life: they are included. System boundaries: system boundaries include all processes linked to the product supply chain (e.g. maintenance). Time period: emissions and removals are modelled as if released or removed at the beginning of the assessment method. Fossil and biogenic carbon emissions and removals: removals and emissions are modelled as follows: All GHG emissions from fossil fuels (including peat and limestone) are modelled consistently with the most updated ILCD list of elementary flows. The non-fossil (biogenic) carbon flows are modelled consistently with the most updated ILCD list of elementary flows.

## Cut-off and completeness
There are no intentional cut-offs in the inventory no matter how small their contribution to all the EF impact categories is. Eventual cut-offs are in compliance with the Guide for EF compliant data sets (JRC 2020), i.e. only if below the 3% cut-off rule. The dataset dry mass and water balance has been checked to ensure the inventory is complete. Capital goods (e.g. infrastructure) and their end-of-life are included.

## Data selection and combination
These datasets include, in both their foreground and background data, links to EF3.0 compliant data.
The relevant background data on energy, transport, and End of Life are from the LCDN data node (http://lcdn.thinkstep.com/Node/).
All other background data in the supply of this product for which no EF3.0 process was available are from ecoinvent v3.7 database (www.ecoinvent.org) or other data sources.

## Data treatment and extrapolations
Several data sources have been used to model the inventory.

## Review details
Internal reviews have been asked to review the plausibility of the unit process, LCIA scores, and DQRs. Internal reviewers have also been asked to review the data for EF compliancy. The consortium is therefore responsible for aspects such as compliancy with the ILCD format, including validation in Look@LCI, and nomenclature.
Internal reviwers have been asked to judge based on the process name, that the unit process models in a complete and representative way the process in the requested location. The review encompassed the plausability of:
- exchanges with nature (elementary flows) as well as exchanges such as product and waste flows.
- meta information (general comment, technology comment, system boundaries, allocation, cut-off rules, etc.). Reviewers were asked to judge if the provided information is enough to understand the content of the process.
- LCIA scores
- DQRs including precision, technology, time and geography. As well as the overall DQR.
External reviewers have been asked to provide their expertise in the field of interest. External reviewers have been asked to review the unit process, including eventual methodological choices, the LCIA scores (provided with contribution scores as well), and DQRs. External reviewers have been provided all the information in a tool developed by the consortium for the purpose of this project.
External reviewers have been asked to judge based on the process name, that the unit process models in a complete and representative way the process in the requested location. The review encompassed:
- Plausability and completeness of exchanges with nature (elementary flows) as well as exchanges such as product and waste flows.
- Review of meta information (general comment, technology comment, system boundaries, allocation, cut-off rules, etc.). Reviewers were asked to judge if the provided information is enough to understand the content of the process.
- Review of properties (biogenic carbon and water content).
- Review of allocation keys.
- Plausability of LCIA scores calculated by the consortium.
- Plausability of DQRs including precision, technology, time and geography. As well as the overall DQR.

## Data sources
- Background Data for Representative products and organisations. EF 3.0 compliant (data stock)
- RISE Research Institutes of Sweden on behalf of the European Tissue Symposium (ETS), (2021). Gate-to-gate life cycle inventory data for average European tissue paper production. available from ETS on request

## Intended applications
Implementation of regular Product Environmental Footprint (PEF) studies and Organisation Environmental Footprint (OEF) studies exclusively under the specified Product groups and sectors as defined in the Product Environmental Footprint Category Rules (PEFCR) and Organisation Environmental Footprint Sectorial Rules (OEFSR) listed in http://ec.europa.eu/environment/eussd/smgp/PEFCR_OEFSR.htm
