# flocking; flocking, flock printing machine; production mix, at plant; service

Dataset: ILCD process, Partly terminated system
Geography: GLO
Reference year: 2021
Valid until: 2024
Classification: Systems / Textiles, furnitures and other interiors
LCI method principle: Attributional
LCI method approaches: Allocation - market value
Completeness: All relevant flows quantified
Project: Provision of process-based 3.0 Environmental Footprint-compliant life cycle inventory datasets - Apparel 2 - contract number 070201/2020/840292/SER/ENV.B.1
Generated by: Life Cycle Indonesia
Owner: PRé Sustainability B.V.
Compliance: ILCD Data Network - Entry-level; Suggestions for updating the PEF method 2019; ISO 14040 Environmental Management – Life Cycle Assessment – Principles and Framework, 2006; ISO 14044:2006. Environmental Management – Life Cycle Assessment – Requirements and guidelines.; Environmental Footprint 3.1
Review: Dependent internal review by Avraam Symeonidis, Emilia Moreno Ruiz; Independent review panel by Fábio Valebona
Data quality: Overall quality: Very good; Time representativeness: Very good; Geographical representativeness: Good; Technological representativeness: Very good; Precision: Good; Methodological appropriateness and consistency: Not applicable
Amounts: no units in this file; such an amount is in the reference unit of its flow, which a separate flow dataset defines
copyright: true
licenseType: Free of charge for some user types or use types
accessRestrictions: Free of charge for all final users implementing a regular Product Environmental Footprint (PEF) studies and Organisation Environmental Footprint (OEF) studies exclusively under the specified Product groups and sectors as defined in the Product Environmental Footprint Category Rules (PEFCR) and Organisation Environmental Footprint Sectorial Rules (OEFSR) listed in http://ec.europa.eu/environment/eussd/smgp/PEFCR_OEFSR.htm and in accordance with the terms and conditions of the EULA (available at https://ecoinvent.lca-data.com/) exclusively until 31st December 2024. Any use of this dataset or any derivative data not within the specific context of one of the PEF/OEF projects or after the end of 2024 is not permitted.

## General comment
Notice: this data set supersedes the EF3.0-compliant version (see link under "preceding data set version" below calculated with the EF3.0). The life cycle inventory is not changed from the original EF3.0 data set. The LCIA results are calculated based on the EF3.1 methods which provide updated characterisation factors in the following impact categories: Climate Change, Ecotoxicity freshwater, Photochemical Ozone Formation, Acidification, Human Toxicity non-cancer, and Human Toxicity cancer. The review report and the data quality ratings refer to the original results. The data set has been updated by the European Commission on the basis of the original EF3.0 data set delivered by the data provider.Flocking is one of textile finishing process. The flocking process involves applying short monofilament fibres, usually nylon, rayon or polyester, directly on to a substrate that has been previously coated with an adhesive. Adhesives that capture the fibres must have the same flexibility and resistance to wear as the substrate. Flock can be applied to glass, metal, plastic, paper or textiles. Flock design applications are also found on many items such as garments, greeting cards, trophies, promotional items, toys and book covers.

Swicofil (2021) FLOCK AND THE FLOCKING PROCESS, https://www.swicofil.com/consult/industrial-applications/para-textil-and-carpets/flock

## Technology and included processes
The process uses special equipment that electrically charges the flock particles causing them to stand-up. The fibres are then propelled and anchored into the adhesive at right angles to the substrate. The application is both durable and permanent. Decorative flocking is accomplished by using one of four application methods: electrostatic, beater bar/gravity, spraying, and transfers.

The electrostatic method is perhaps the most viable flocking method, especially for the printer doing more than an occasional flocking job. Flocking material can also be sprayed using an air compressor, reservoir, and spray gun similar to spraying paint. It is primarily used when large areas require flocking. It is an untidy process, because some of the flocking fibres become airborne. Flocking is also applied by printing an adhesive on to a substrate, and then rapidly vibrating the substrate mechanically, while the flock fibres are dispensed over the surface. The vibration promotes the density of fibres, which is critical to good fibre coating, and causes the flocking fibres to adhere to the adhesive and pack into a layer. This process is called a beater bar or gravity flocking system and is basically a mechanical process. With this process the flocking fibres are randomly adhered to the surface of the substrate, and each fibre adheres to the adhesive at a different depth, creating an irregular flocked surface. Since the fibres adhere to the surface of the adhesive, rather than penetrate or imbed in it, some fibre shedding occurs. Loose flocking fibres generated during production also have a tendency to migrate, so many of these systems are installed in a separate area to prevent fibre contamination of the factory.

This process includes applying flock tape using flock printing machine with 4 drying room. Materials entering the process are included i.e. fibre, adhesive, energy consumption and infrastructure. There is water emission to air from water-based adhesive evaporation and hazardous waste comes from waste lube oil. In the model, the energy sources of machines used from electricity. Flock made of polyamide (Nylon) and viscose (Rayon) with equal usage probability. The consumption of lubricating oil using a thermobonding oven as a proxy. The flocking area is assumed to be 50% area of the output area and the GSM of the fabric is 175 GSM.

Swicofil (2021) FLOCK AND THE FLOCKING PROCESS, https://www.swicofil.com/consult/industrial-applications/para-textil-and-carpets/flock

## Parameters
- kg_0: 1.65065e-6
  Mass in kg, for lubricating oil // lubricants at refinery // cn; Articulated lorry transport, Euro 4, Total weight >32 t; EU+EFTA+UK
- km_0: 1000
  Distance in km, for lubricating oil // lubricants at refinery // cn; Articulated lorry transport, Euro 4, Total weight >32 t; EU+EFTA+UK
- kg_km_0: 0.00165065; = kg_0*km_0
  Transport amount in km*km, for lubricating oil // lubricants at refinery // cn; Articulated lorry transport, Euro 4, Total weight >32 t; EU+EFTA+UK
- kg_1: 3.96723e-7
  Mass in kg, for lubricating oil // lubricants at refinery // raf; Articulated lorry transport, Euro 4, Total weight >32 t; EU+EFTA+UK
- km_1: 1000
  Distance in km, for lubricating oil // lubricants at refinery // raf; Articulated lorry transport, Euro 4, Total weight >32 t; EU+EFTA+UK
- kg_km_1: 0.000396723; = kg_1*km_1
  Transport amount in km*km, for lubricating oil // lubricants at refinery // raf; Articulated lorry transport, Euro 4, Total weight >32 t; EU+EFTA+UK
- kg_2: 1.03963e-5
  Mass in kg, for lubricating oil // lubricants at refinery // ras w/o cn; Articulated lorry transport, Euro 4, Total weight >32 t; EU+EFTA+UK
- km_2: 1000
  Distance in km, for lubricating oil // lubricants at refinery // ras w/o cn; Articulated lorry transport, Euro 4, Total weight >32 t; EU+EFTA+UK
- kg_km_2: 0.0103963; = kg_2*km_2
  Transport amount in km*km, for lubricating oil // lubricants at refinery // ras w/o cn; Articulated lorry transport, Euro 4, Total weight >32 t; EU+EFTA+UK
- kg_3: 8.11512e-6
  Mass in kg, for lubricating oil // lubricants at refinery // rna; Articulated lorry transport, Euro 4, Total weight >32 t; EU+EFTA+UK
- km_3: 1000
  Distance in km, for lubricating oil // lubricants at refinery // rna; Articulated lorry transport, Euro 4, Total weight >32 t; EU+EFTA+UK
- kg_km_3: 0.00811512; = kg_3*km_3
  Transport amount in km*km, for lubricating oil // lubricants at refinery // rna; Articulated lorry transport, Euro 4, Total weight >32 t; EU+EFTA+UK
- kg_4: 9.67013e-7
  Mass in kg, for lubricating oil // lubricants at refinery // rsa; Articulated lorry transport, Euro 4, Total weight >32 t; EU+EFTA+UK
- km_4: 1000
  Distance in km, for lubricating oil // lubricants at refinery // rsa; Articulated lorry transport, Euro 4, Total weight >32 t; EU+EFTA+UK
- kg_km_4: 0.000967013; = kg_4*km_4
  Transport amount in km*km, for lubricating oil // lubricants at refinery // rsa; Articulated lorry transport, Euro 4, Total weight >32 t; EU+EFTA+UK
- kg_5: 8.59686e-6
  Mass in kg, for lubricating oil // lubricants at refinery // ru; Articulated lorry transport, Euro 4, Total weight >32 t; EU+EFTA+UK
- km_5: 1000
  Distance in km, for lubricating oil // lubricants at refinery // ru; Articulated lorry transport, Euro 4, Total weight >32 t; EU+EFTA+UK
- kg_km_5: 0.00859686; = kg_5*km_5
  Transport amount in km*km, for lubricating oil // lubricants at refinery // ru; Articulated lorry transport, Euro 4, Total weight >32 t; EU+EFTA+UK
- kg_6: 5.29555e-6
  Mass in kg, for lubricating oil // lubricants at refinery // eu+efta+uk; Articulated lorry transport, Euro 4, Total weight >32 t; EU+EFTA+UK
- km_6: 1000.84
  Distance in km, for lubricating oil // lubricants at refinery // eu+efta+uk; Articulated lorry transport, Euro 4, Total weight >32 t; EU+EFTA+UK
- kg_km_6: 0.0053; = kg_6*km_6
  Transport amount in km*km, for lubricating oil // lubricants at refinery // eu+efta+uk; Articulated lorry transport, Euro 4, Total weight >32 t; EU+EFTA+UK
- kg_7: 3.62857e-6
  Mass in kg, for nylon fibre, recycled, {econyl®} // nylon fibre, recycled, {econyl®} production // glo; Articulated lorry transport, Euro 4, Total weight >32 t; EU+EFTA+UK
- km_7: 1000.39
  Distance in km, for nylon fibre, recycled, {econyl®} // nylon fibre, recycled, {econyl®} production // glo; Articulated lorry transport, Euro 4, Total weight >32 t; EU+EFTA+UK
- kg_km_7: 0.00363; = kg_7*km_7
  Transport amount in km*km, for nylon fibre, recycled, {econyl®} // nylon fibre, recycled, {econyl®} production // glo; Articulated lorry transport, Euro 4, Total weight >32 t; EU+EFTA+UK
- kg_8: 4.34286e-6
  Mass in kg, for viscose fibre, virgin production from hardwood sulphite pulp // viscose fibre // glo; Articulated lorry transport, Euro 4, Total weight >32 t; EU+EFTA+UK
- km_8: 999.342
  Distance in km, for viscose fibre, virgin production from hardwood sulphite pulp // viscose fibre // glo; Articulated lorry transport, Euro 4, Total weight >32 t; EU+EFTA+UK
- kg_km_8: 0.00434; = kg_8*km_8
  Transport amount in km*km, for viscose fibre, virgin production from hardwood sulphite pulp // viscose fibre // glo; Articulated lorry transport, Euro 4, Total weight >32 t; EU+EFTA+UK
- kg_9: 0.571429
  Mass in kg, for lamination, water based glue // lamination, water based glue // glo; Articulated lorry transport, Euro 4, Total weight >32 t; EU+EFTA+UK
- km_9: 999.25
  Distance in km, for lamination, water based glue // lamination, water based glue // glo; Articulated lorry transport, Euro 4, Total weight >32 t; EU+EFTA+UK
- kg_km_9: 571; = kg_9*km_9
  Transport amount in km*km, for lamination, water based glue // lamination, water based glue // glo; Articulated lorry transport, Euro 4, Total weight >32 t; EU+EFTA+UK
- kg_10: 1.65065e-6
  Mass in kg, for lubricating oil // lubricants at refinery // cn; Transoceanic ship, containers; GLO
- km_10: 18000
  Distance in km, for lubricating oil // lubricants at refinery // cn; Transoceanic ship, containers; GLO
- kg_km_10: 0.0297118; = kg_10*km_10
  Transport amount in km*km, for lubricating oil // lubricants at refinery // cn; Transoceanic ship, containers; GLO
- kg_11: 3.96723e-7
  Mass in kg, for lubricating oil // lubricants at refinery // raf; Transoceanic ship, containers; GLO
- km_11: 18000
  Distance in km, for lubricating oil // lubricants at refinery // raf; Transoceanic ship, containers; GLO
- kg_km_11: 0.00714102; = kg_11*km_11
  Transport amount in km*km, for lubricating oil // lubricants at refinery // raf; Transoceanic ship, containers; GLO
- kg_12: 1.03963e-5
  Mass in kg, for lubricating oil // lubricants at refinery // ras w/o cn; Transoceanic ship, containers; GLO
- km_12: 18000
  Distance in km, for lubricating oil // lubricants at refinery // ras w/o cn; Transoceanic ship, containers; GLO
- kg_km_12: 0.187133; = kg_12*km_12
  Transport amount in km*km, for lubricating oil // lubricants at refinery // ras w/o cn; Transoceanic ship, containers; GLO
- kg_13: 5.29555e-6
  Mass in kg, for lubricating oil // lubricants at refinery // eu+efta+uk; Transoceanic ship, containers; GLO
- km_13: 18015.1
  Distance in km, for lubricating oil // lubricants at refinery // eu+efta+uk; Transoceanic ship, containers; GLO
- kg_km_13: 0.0954; = kg_13*km_13
  Transport amount in km*km, for lubricating oil // lubricants at refinery // eu+efta+uk; Transoceanic ship, containers; GLO
- kg_14: 8.11512e-6
  Mass in kg, for lubricating oil // lubricants at refinery // rna; Transoceanic ship, containers; GLO
- km_14: 18000
  Distance in km, for lubricating oil // lubricants at refinery // rna; Transoceanic ship, containers; GLO
- kg_km_14: 0.146072; = kg_14*km_14
  Transport amount in km*km, for lubricating oil // lubricants at refinery // rna; Transoceanic ship, containers; GLO
- kg_15: 9.67013e-7
  Mass in kg, for lubricating oil // lubricants at refinery // rsa; Transoceanic ship, containers; GLO
- km_15: 18000
  Distance in km, for lubricating oil // lubricants at refinery // rsa; Transoceanic ship, containers; GLO
- kg_km_15: 0.0174062; = kg_15*km_15
  Transport amount in km*km, for lubricating oil // lubricants at refinery // rsa; Transoceanic ship, containers; GLO
- kg_16: 8.59686e-6
  Mass in kg, for lubricating oil // lubricants at refinery // ru; Transoceanic ship, containers; GLO
- km_16: 18000
  Distance in km, for lubricating oil // lubricants at refinery // ru; Transoceanic ship, containers; GLO
- kg_km_16: 0.154743; = kg_16*km_16
  Transport amount in km*km, for lubricating oil // lubricants at refinery // ru; Transoceanic ship, containers; GLO
- kg_17: 3.62857e-6
  Mass in kg, for nylon fibre, recycled, {econyl®} // nylon fibre, recycled, {econyl®} production // glo; Transoceanic ship, containers; GLO
- km_17: 17996.1
  Distance in km, for nylon fibre, recycled, {econyl®} // nylon fibre, recycled, {econyl®} production // glo; Transoceanic ship, containers; GLO
- kg_km_17: 0.0653; = kg_17*km_17
  Transport amount in km*km, for nylon fibre, recycled, {econyl®} // nylon fibre, recycled, {econyl®} production // glo; Transoceanic ship, containers; GLO
- kg_18: 4.34286e-6
  Mass in kg, for viscose fibre, virgin production from hardwood sulphite pulp // viscose fibre // glo; Transoceanic ship, containers; GLO
- km_18: 18006.6
  Distance in km, for viscose fibre, virgin production from hardwood sulphite pulp // viscose fibre // glo; Transoceanic ship, containers; GLO
- kg_km_18: 0.0782; = kg_18*km_18
  Transport amount in km*km, for viscose fibre, virgin production from hardwood sulphite pulp // viscose fibre // glo; Transoceanic ship, containers; GLO
- kg_19: 0.571429
  Mass in kg, for lamination, water based glue // lamination, water based glue // glo; Transoceanic ship, containers; GLO
- km_19: 18025
  Distance in km, for lamination, water based glue // lamination, water based glue // glo; Transoceanic ship, containers; GLO
- kg_km_19: 10300; = kg_19*km_19
  Transport amount in km*km, for lamination, water based glue // lamination, water based glue // glo; Transoceanic ship, containers; GLO

## Reference product
- flocking // flocking // glo: 1

## Inputs
- Electricity from Electricity grid mix 1kV-60kV - AU: 0.0034
- Electricity from Electricity grid mix 1kV-60kV - EU+EFTA+UK: 0.0499
- Electricity from Electricity grid mix 1kV-60kV - NZ: 0.0006
- Electricity from Electricity grid mix 1kV-60kV - RAF: 0.0109
- Electricity from Electricity grid mix 1kV-60kV - RNA: 0.073
- Electricity from Electricity grid mix 1kV-60kV - RSA: 0.0248
- Electricity from Electricity grid mix 1kV-60kV - RU: 0.0146
- Transport of lubricating oil // lubricants at refinery // cn by Articulated lorry transport, Euro 4, Total weight >32 t - EU+EFTA+UK: 0.00165065; = kg_km_0
- Transport of lubricating oil // lubricants at refinery // raf by Articulated lorry transport, Euro 4, Total weight >32 t - EU+EFTA+UK: 0.000396723; = kg_km_1
- Transport of lubricating oil // lubricants at refinery // ras w/o cn by Articulated lorry transport, Euro 4, Total weight >32 t - EU+EFTA+UK: 0.0103963; = kg_km_2
- Transport of lubricating oil // lubricants at refinery // rna by Articulated lorry transport, Euro 4, Total weight >32 t - EU+EFTA+UK: 0.00811512; = kg_km_3
- Transport of lubricating oil // lubricants at refinery // rsa by Articulated lorry transport, Euro 4, Total weight >32 t - EU+EFTA+UK: 0.000967013; = kg_km_4
- Transport of lubricating oil // lubricants at refinery // ru by Articulated lorry transport, Euro 4, Total weight >32 t - EU+EFTA+UK: 0.00859686; = kg_km_5
- Transport of lubricating oil // lubricants at refinery // eu+efta+uk by Articulated lorry transport, Euro 4, Total weight >32 t - EU+EFTA+UK: 0.0053; = kg_km_6
- Transport of nylon fibre, recycled, {econyl®} // nylon fibre, recycled, {econyl®} production // glo by Articulated lorry transport, Euro 4, Total weight >32 t - EU+EFTA+UK: 0.00363; = kg_km_7
- Transport of viscose fibre, virgin production from hardwood sulphite pulp // viscose fibre // glo by Articulated lorry transport, Euro 4, Total weight >32 t - EU+EFTA+UK: 0.00434; = kg_km_8
- Transport of lamination, water based glue // lamination, water based glue // glo by Articulated lorry transport, Euro 4, Total weight >32 t - EU+EFTA+UK: 571; = kg_km_9
- Transport of lubricating oil // lubricants at refinery // cn by Transoceanic ship, containers - GLO: 0.0297118; = kg_km_10
- Transport of lubricating oil // lubricants at refinery // raf by Transoceanic ship, containers - GLO: 0.00714102; = kg_km_11
- Transport of lubricating oil // lubricants at refinery // ras w/o cn by Transoceanic ship, containers - GLO: 0.187133; = kg_km_12
- Transport of lubricating oil // lubricants at refinery // eu+efta+uk by Transoceanic ship, containers - GLO: 0.0954; = kg_km_13
- Transport of lubricating oil // lubricants at refinery // rna by Transoceanic ship, containers - GLO: 0.146072; = kg_km_14
- Transport of lubricating oil // lubricants at refinery // rsa by Transoceanic ship, containers - GLO: 0.0174062; = kg_km_15
- Transport of lubricating oil // lubricants at refinery // ru by Transoceanic ship, containers - GLO: 0.154743; = kg_km_16
- Transport of nylon fibre, recycled, {econyl®} // nylon fibre, recycled, {econyl®} production // glo by Transoceanic ship, containers - GLO: 0.0653; = kg_km_17
- Transport of viscose fibre, virgin production from hardwood sulphite pulp // viscose fibre // glo by Transoceanic ship, containers - GLO: 0.0782; = kg_km_18
- Transport of lamination, water based glue // lamination, water based glue // glo by Transoceanic ship, containers - GLO: 10300; = kg_km_19
- Electricity from Electricity grid mix 1kV-60kV - CN: 0.0747744
- Electricity from Electricity grid mix 1kV-60kV - RAS w/o CN: 0.0819256
- flocking // flocking // glo, blackbox: 1
- flocking // flocking // glo, elementary: 1

## Impact indicators
- Eutrophication marine: 0.0044419
- Ecotoxicity, freshwater: 25.9924
- Land use: 17.498
- Water use: 1.14536
- Resource use, minerals and metals: 3.57228e-6
- Resource use, fossils: 47.0629
- Climate change: 3.84572
- Ozone depletion: 9.59422e-9
- Human toxicity, cancer: 1.72891e-9
- Human toxicity, non-cancer: 2.14414e-8
- EF-particulate Matter: 8.2585e-7
- Ionising radiation, human health: 0.21977
- Photochemical ozone formation - human health: 0.0126663
- Acidification: 0.0255081
- Eutrophication, terrestrial: 0.0463132
- Eutrophication, freshwater: 1.77891e-5

## Deviations from the LCI method principle
The background data uses:
- the \xe2\x80\x9cRecycled content cut-off\xe2\x80\x9d approach to allocate end-of-life by-products and secondary materials. This allocation is explained in the description of the recycled content system model (http://www.ecoinvent.org/database/system-models-in-ecoinvent-3/cut-off-system-model/allocation-cut-off-by-classification.html).
OR
- EF compliant data

## Deviations from the LCI method approaches
Background data:
- the \xe2\x80\x9cRecycled content cut-off\xe2\x80\x9d approach to allocate end-of-life by-products and secondary materials. This allocation is explained in the description of the recycled content system model (http://www.ecoinvent.org/database/system-models-in-ecoinvent-3/cut-off-system-model/allocation-cut-off-by-classification.html). The ecoinvent database mostly relies on “Allocation – market values” apart for few exceptions particularly in the energy sector. ecoinvent energy data is replaced with EF3.0 core data as per the EF guidelines version 2.0.
OR
- EF compliant data

## Modelling constants
All modelling constants follow the requirements listed in the Tender Specifications 070201/2020/SER/ENV.B1. Completeness: There are no intentional cut-offs in the inventory no matter how small their contribution to all the EF impact categories is. Eventual cut-offs are in compliance with the Guide for EF compliant data sets (JRC 2020), i.e. only if below the 3% cut-off rule. Water use: water use is modelled at country level using separate flows for water withdrawal, water release and water evaporation. Handling multi-functional processes: the following PEF multi- functionality decision hierarchy is applied for resolving all multi- functionality problems: (1) subdivision or system expansion; (2) allocation based on a relevant underlying physical relationship (substitution may apply here); (3) allocation based on some other relationship. Direct land use change: GHG emissions from direct LUC allocated to good/service for 20 years after the LUC occurs, with IPCC default values. Carbon storage and delayed emissions: credits associated with temporary (carbon) storage or delayed emissions up to 300 years are not be considered. Emissions off-setting: are not included. Capital goods (including infrastructures) and their End of life: they are included. System boundaries: system boundaries include all processes linked to the product supply chain (e.g. maintenance). Time period: emissions and removals are modelled as if released or removed at the beginning of the assessment method. Fossil and biogenic carbon emissions and removals: removals and emissions are modelled as follows: All GHG emissions from fossil fuels (including peat and limestone) are modelled consistently with the most updated ILCD list of elementary flows. The non-fossil (biogenic) carbon flows are modelled consistently with the most updated ILCD list of elementary flows.

## Cut-off and completeness
There are no intentional cut-offs in the inventory no matter how small their contribution to all the EF impact categories is. Eventual cut-offs are in compliance with the Guide for EF compliant data sets (JRC 2020), i.e. only if below the 3% cut-off rule. The dataset dry mass and water balance has been checked to ensure the inventory is complete. Capital goods (e.g. infrastructure) and their end-of-life are included.

## Data selection and combination
These datasets include, in both their foreground and background data, links to EF3.0 compliant data.
The relevant background data on energy, transport, and End of Life are from the LCDN data node (http://lcdn.thinkstep.com/Node/).
All other background data in the supply of this product for which no EF3.0 process was available are from ecoinvent v3.7 database (www.ecoinvent.org) or other data sources.

## Data treatment and extrapolations
Several data sources have been used to model the inventory.

## Review details
Internal reviews have been asked to review the plausibility of the unit process, LCIA scores, and DQRs. Internal reviewers have also been asked to review the data for EF compliancy. The consortium is therefore responsible for aspects such as compliancy with the ILCD format, including validation in Look@LCI, and nomenclature.
Internal reviwers have been asked to judge based on the process name, that the unit process models in a complete and representative way the process in the requested location. The review encompassed the plausability of:
- exchanges with nature (elementary flows) as well as exchanges such as product and waste flows.
- meta information (general comment, technology comment, system boundaries, allocation, cut-off rules, etc.). Reviewers were asked to judge if the provided information is enough to understand the content of the process.
- LCIA scores
- DQRs including precision, technology, time and geography. As well as the overall DQR.
External reviewers have been asked to provide their expertise in the field of interest. External reviewers have been asked to review the unit process, including eventual methodological choices, the LCIA scores (provided with contribution scores as well), and DQRs. External reviewers have been provided all the information in a tool developed by the consortium for the purpose of this project.
External reviewers have been asked to judge based on the process name, that the unit process models in a complete and representative way the process in the requested location. The review encompassed:
- Plausability and completeness of exchanges with nature (elementary flows) as well as exchanges such as product and waste flows.
- Review of meta information (general comment, technology comment, system boundaries, allocation, cut-off rules, etc.). Reviewers were asked to judge if the provided information is enough to understand the content of the process.
- Review of properties (biogenic carbon and water content).
- Review of allocation keys.
- Plausability of LCIA scores calculated by the consortium.
- Plausability of DQRs including precision, technology, time and geography. As well as the overall DQR.

## Data sources
- Background Data for Representative products and organisations. EF 3.0 compliant (data stock)
- UN Data (2018) Statistics Data for Lubricants Productions, http://data.un.org/Data.aspx?q=Lubricants&d=EDATA&f=cmID%3aLU, United Nations Statistics Division, Global
- Lebon (2021) Nonwoven Oven Machine, Catalog and Company Messages, Qingdao Lebon Industry Co., Ltd., China
- Swissflock (2021) What you Always Wanted to Know About Flock, https://www.swissflock.com/view/data/4207/swissflock_broschuere_e_einzelseiten.pdf, Swissflock AG, Switzerland
- BPF (2021) Nylons (Polyamide), https://www.bpf.co.uk/plastipedia/polymers/polyamides.aspx, British Plastics Federation, London, England
- Faruk, Md. Omar (2018) Viscose Fiber | Viscose Rayon Production | Properties of Viscose Rayon, https://textilestudycenter.com/viscose-rayon-production/, Textile Study Center, Dhaka, Bangladesh
- Shree Balaji Textile (2021) Printed Flock Fabrics, GSM: 150-200, for Garments, http://www.shreebalajitextile.com/, Shree Balaji Textile, India https://www.indiamart.com/proddetail/printed-flock-fabrics-21063275497.html
- Wanfang (2021) Single Colors Flock Printing Machine, https://www.wanfangmachine.com/dyeing-and-finishing-machine/flock-printing-machine/single-colors-flock-printing-machine.html, Wanfang Dyeing and Finishing Machinery Manufacturing Co.,Ltd., Wuxi, China

## Intended applications
Implementation of regular Product Environmental Footprint (PEF) studies and Organisation Environmental Footprint (OEF) studies exclusively under the specified Product groups and sectors as defined in the Product Environmental Footprint Category Rules (PEFCR) and Organisation Environmental Footprint Sectorial Rules (OEFSR) listed in http://ec.europa.eu/environment/eussd/smgp/PEFCR_OEFSR.htm
