# treatment, cellulase enzyme; bio-polishign treatment; production mix, at plant; service

Dataset: ILCD process, Partly terminated system
Geography: GLO
Reference year: 2021
Valid until: 2024
Classification: Systems / Textiles, furnitures and other interiors
LCI method principle: Attributional
LCI method approaches: Allocation - market value
Completeness: All relevant flows quantified
Project: Provision of process-based 3.0 Environmental Footprint-compliant life cycle inventory datasets - Apparel 1 - contract number 070201/2020/840291/SER/ENV.B.1
Generated by: Life Cycle Indonesia
Owner: PRé Sustainability B.V.
Compliance: ILCD Data Network - Entry-level; Suggestions for updating the PEF method 2019; ISO 14040 Environmental Management – Life Cycle Assessment – Principles and Framework, 2006; ISO 14044:2006. Environmental Management – Life Cycle Assessment – Requirements and guidelines.; Environmental Footprint 3.1
Review: Dependent internal review by Avraam Symeonidis, Emilia Moreno Ruiz; Independent review panel by Fábio Valebona
Data quality: Overall quality: Good; Time representativeness: Very good; Geographical representativeness: Good; Technological representativeness: Very good; Precision: Good; Methodological appropriateness and consistency: Not applicable
Amounts: no units in this file; such an amount is in the reference unit of its flow, which a separate flow dataset defines
copyright: true
licenseType: Free of charge for some user types or use types
accessRestrictions: Free of charge for all final users implementing a regular Product Environmental Footprint (PEF) studies and Organisation Environmental Footprint (OEF) studies exclusively under the specified Product groups and sectors as defined in the Product Environmental Footprint Category Rules (PEFCR) and Organisation Environmental Footprint Sectorial Rules (OEFSR) listed in http://ec.europa.eu/environment/eussd/smgp/PEFCR_OEFSR.htm and in accordance with the terms and conditions of the EULA (available at https://ecoinvent.lca-data.com/) exclusively until 31st December 2024. Any use of this dataset or any derivative data not within the specific context of one of the PEF/OEF projects or after the end of 2024 is not permitted.

## General comment
Notice: this data set supersedes the EF3.0-compliant version (see link under "preceding data set version" below calculated with the EF3.0). The life cycle inventory is not changed from the original EF3.0 data set. The LCIA results are calculated based on the EF3.1 methods which provide updated characterisation factors in the following impact categories: Climate Change, Ecotoxicity freshwater, Photochemical Ozone Formation, Acidification, Human Toxicity non-cancer, and Human Toxicity cancer. The review report and the data quality ratings refer to the original results. The data set has been updated by the European Commission on the basis of the original EF3.0 data set delivered by the data provider.One of the celluase enzyme treatment is called Bio-polishing. It is a finishing process to decrease pilling tendency and fuzziness of cellulose knitted fabric. Potruding fibres & slubs from knitted fabric would be removed, hence the fabric quality is enhanced , the fabric would have a smooth appearance. The protruding fibers is weaken by hydrolysis action of the enzyme, then easily removed by small physical abrasion force. This treatment can be done at any step durin the wet processing, it could be done after dyeing or before dyeing, but the dye would decrease if the treatment is done after dyeing process (Ulah and Munna, 2017).

Ulah, Md. Shafi and Munna, Asaduzzaman. 2017. Study On Fabric Weight Loss During Bio-polishing. Bangladesh: Daffodil International University.

## Technology and included processes
In this model, the bio-polishing treatment is done with cold rinsing and drying followed. Cellulase enzyme is used for the biopolishing process with acetic acid as auxillary chemical. MLR for the process is 1:6, with average fibre loss 3.6695%. The process is done acid condition (pH 4.8), cycle time of 55 minutes and temperature of 55 celcius degree. Cold washing process is assumed to be only washing process with similiar MLR 1:6. In this model, the steam consumption for heating water and for drying is not included.

Materials entering the process are included as well as energy uses and infrastructure. In this model, the washing machine is washing extractor machine. The chemical used in this process is assumed to be generated as waste water. The hazardous waste comes from waste lube oil. The consumption of lubricating oil using a thermobonding oven as a proxy.

## Parameters
- kg_0: 0.00809712
  Mass in kg, for acetic acid // acetic acid production, product in 98% solution state // glo; Articulated lorry transport, Euro 4, Total weight >32 t; EU+EFTA+UK
- km_0: 1000
  Distance in km, for acetic acid // acetic acid production, product in 98% solution state // glo; Articulated lorry transport, Euro 4, Total weight >32 t; EU+EFTA+UK
- kg_km_0: 8.09713; = kg_0*km_0
  Transport amount in km*km, for acetic acid // acetic acid production, product in 98% solution state // glo; Articulated lorry transport, Euro 4, Total weight >32 t; EU+EFTA+UK
- kg_1: 0.00207619
  Mass in kg, for enzymes // enzymes production // eu+efta+uk; Articulated lorry transport, Euro 4, Total weight >32 t; EU+EFTA+UK
- km_1: 1000
  Distance in km, for enzymes // enzymes production // eu+efta+uk; Articulated lorry transport, Euro 4, Total weight >32 t; EU+EFTA+UK
- kg_km_1: 2.07619; = kg_1*km_1
  Transport amount in km*km, for enzymes // enzymes production // eu+efta+uk; Articulated lorry transport, Euro 4, Total weight >32 t; EU+EFTA+UK
- kg_2: 1.75435e-6
  Mass in kg, for lubricating oil // lubricants at refinery // rsa; Articulated lorry transport, Euro 4, Total weight >32 t; EU+EFTA+UK
- km_2: 1000
  Distance in km, for lubricating oil // lubricants at refinery // rsa; Articulated lorry transport, Euro 4, Total weight >32 t; EU+EFTA+UK
- kg_km_2: 0.00175435; = kg_2*km_2
  Transport amount in km*km, for lubricating oil // lubricants at refinery // rsa; Articulated lorry transport, Euro 4, Total weight >32 t; EU+EFTA+UK
- kg_3: 7.19732e-7
  Mass in kg, for lubricating oil // lubricants at refinery // raf; Articulated lorry transport, Euro 4, Total weight >32 t; EU+EFTA+UK
- km_3: 1000
  Distance in km, for lubricating oil // lubricants at refinery // raf; Articulated lorry transport, Euro 4, Total weight >32 t; EU+EFTA+UK
- kg_km_3: 0.000719732; = kg_3*km_3
  Transport amount in km*km, for lubricating oil // lubricants at refinery // raf; Articulated lorry transport, Euro 4, Total weight >32 t; EU+EFTA+UK
- kg_4: 1.88608e-5
  Mass in kg, for lubricating oil // lubricants at refinery // ras w/o cn; Articulated lorry transport, Euro 4, Total weight >32 t; EU+EFTA+UK
- km_4: 1000
  Distance in km, for lubricating oil // lubricants at refinery // ras w/o cn; Articulated lorry transport, Euro 4, Total weight >32 t; EU+EFTA+UK
- kg_km_4: 0.0188608; = kg_4*km_4
  Transport amount in km*km, for lubricating oil // lubricants at refinery // ras w/o cn; Articulated lorry transport, Euro 4, Total weight >32 t; EU+EFTA+UK
- kg_5: 1.55963e-5
  Mass in kg, for lubricating oil // lubricants at refinery // ru; Articulated lorry transport, Euro 4, Total weight >32 t; EU+EFTA+UK
- km_5: 1000
  Distance in km, for lubricating oil // lubricants at refinery // ru; Articulated lorry transport, Euro 4, Total weight >32 t; EU+EFTA+UK
- kg_km_5: 0.0155963; = kg_5*km_5
  Transport amount in km*km, for lubricating oil // lubricants at refinery // ru; Articulated lorry transport, Euro 4, Total weight >32 t; EU+EFTA+UK
- kg_6: 9.60714e-6
  Mass in kg, for lubricating oil // lubricants at refinery // eu+efta+uk; Articulated lorry transport, Euro 4, Total weight >32 t; EU+EFTA+UK
- km_6: 1000
  Distance in km, for lubricating oil // lubricants at refinery // eu+efta+uk; Articulated lorry transport, Euro 4, Total weight >32 t; EU+EFTA+UK
- kg_km_6: 0.00960714; = kg_6*km_6
  Transport amount in km*km, for lubricating oil // lubricants at refinery // eu+efta+uk; Articulated lorry transport, Euro 4, Total weight >32 t; EU+EFTA+UK
- kg_7: 1.47224e-5
  Mass in kg, for lubricating oil // lubricants at refinery // rna; Articulated lorry transport, Euro 4, Total weight >32 t; EU+EFTA+UK
- km_7: 1000
  Distance in km, for lubricating oil // lubricants at refinery // rna; Articulated lorry transport, Euro 4, Total weight >32 t; EU+EFTA+UK
- kg_km_7: 0.0147224; = kg_7*km_7
  Transport amount in km*km, for lubricating oil // lubricants at refinery // rna; Articulated lorry transport, Euro 4, Total weight >32 t; EU+EFTA+UK
- kg_8: 2.9946e-6
  Mass in kg, for lubricating oil // lubricants at refinery // cn; Articulated lorry transport, Euro 4, Total weight >32 t; EU+EFTA+UK
- km_8: 1000
  Distance in km, for lubricating oil // lubricants at refinery // cn; Articulated lorry transport, Euro 4, Total weight >32 t; EU+EFTA+UK
- kg_km_8: 0.0029946; = kg_8*km_8
  Transport amount in km*km, for lubricating oil // lubricants at refinery // cn; Articulated lorry transport, Euro 4, Total weight >32 t; EU+EFTA+UK
- kg_9: 0.00809712
  Mass in kg, for acetic acid // acetic acid production, product in 98% solution state // glo; Transoceanic ship, containers; GLO
- km_9: 18000
  Distance in km, for acetic acid // acetic acid production, product in 98% solution state // glo; Transoceanic ship, containers; GLO
- kg_km_9: 145.748; = kg_9*km_9
  Transport amount in km*km, for acetic acid // acetic acid production, product in 98% solution state // glo; Transoceanic ship, containers; GLO
- kg_10: 0.00207619
  Mass in kg, for enzymes // enzymes production // eu+efta+uk; Transoceanic ship, containers; GLO
- km_10: 18000
  Distance in km, for enzymes // enzymes production // eu+efta+uk; Transoceanic ship, containers; GLO
- kg_km_10: 37.3713; = kg_10*km_10
  Transport amount in km*km, for enzymes // enzymes production // eu+efta+uk; Transoceanic ship, containers; GLO
- kg_11: 1.75435e-6
  Mass in kg, for lubricating oil // lubricants at refinery // rsa; Transoceanic ship, containers; GLO
- km_11: 18000
  Distance in km, for lubricating oil // lubricants at refinery // rsa; Transoceanic ship, containers; GLO
- kg_km_11: 0.0315783; = kg_11*km_11
  Transport amount in km*km, for lubricating oil // lubricants at refinery // rsa; Transoceanic ship, containers; GLO
- kg_12: 7.19732e-7
  Mass in kg, for lubricating oil // lubricants at refinery // raf; Transoceanic ship, containers; GLO
- km_12: 18000
  Distance in km, for lubricating oil // lubricants at refinery // raf; Transoceanic ship, containers; GLO
- kg_km_12: 0.0129552; = kg_12*km_12
  Transport amount in km*km, for lubricating oil // lubricants at refinery // raf; Transoceanic ship, containers; GLO
- kg_13: 1.88608e-5
  Mass in kg, for lubricating oil // lubricants at refinery // ras w/o cn; Transoceanic ship, containers; GLO
- km_13: 18000
  Distance in km, for lubricating oil // lubricants at refinery // ras w/o cn; Transoceanic ship, containers; GLO
- kg_km_13: 0.339495; = kg_13*km_13
  Transport amount in km*km, for lubricating oil // lubricants at refinery // ras w/o cn; Transoceanic ship, containers; GLO
- kg_14: 1.55963e-5
  Mass in kg, for lubricating oil // lubricants at refinery // ru; Transoceanic ship, containers; GLO
- km_14: 18000
  Distance in km, for lubricating oil // lubricants at refinery // ru; Transoceanic ship, containers; GLO
- kg_km_14: 0.280734; = kg_14*km_14
  Transport amount in km*km, for lubricating oil // lubricants at refinery // ru; Transoceanic ship, containers; GLO
- kg_15: 9.60714e-6
  Mass in kg, for lubricating oil // lubricants at refinery // eu+efta+uk; Transoceanic ship, containers; GLO
- km_15: 18000
  Distance in km, for lubricating oil // lubricants at refinery // eu+efta+uk; Transoceanic ship, containers; GLO
- kg_km_15: 0.172929; = kg_15*km_15
  Transport amount in km*km, for lubricating oil // lubricants at refinery // eu+efta+uk; Transoceanic ship, containers; GLO
- kg_16: 1.47224e-5
  Mass in kg, for lubricating oil // lubricants at refinery // rna; Transoceanic ship, containers; GLO
- km_16: 18000
  Distance in km, for lubricating oil // lubricants at refinery // rna; Transoceanic ship, containers; GLO
- kg_km_16: 0.265003; = kg_16*km_16
  Transport amount in km*km, for lubricating oil // lubricants at refinery // rna; Transoceanic ship, containers; GLO
- kg_17: 2.9946e-6
  Mass in kg, for lubricating oil // lubricants at refinery // cn; Transoceanic ship, containers; GLO
- km_17: 18000
  Distance in km, for lubricating oil // lubricants at refinery // cn; Transoceanic ship, containers; GLO
- kg_km_17: 0.0539028; = kg_17*km_17
  Transport amount in km*km, for lubricating oil // lubricants at refinery // cn; Transoceanic ship, containers; GLO

## Reference product
- treatment, cellulase enzyme // treatment, cellulase enzyme // glo: 1

## Inputs
- Electricity from Electricity grid mix 1kV-60kV - AU: 0.0065
- Electricity from Electricity grid mix 1kV-60kV - EU+EFTA+UK: 0.0951
- Electricity from Electricity grid mix 1kV-60kV - NZ: 0.0012
- Electricity from Electricity grid mix 1kV-60kV - RAF: 0.0208
- Electricity from Electricity grid mix 1kV-60kV - RNA: 0.1392
- Electricity from Electricity grid mix 1kV-60kV - RSA: 0.0472
- Electricity from Electricity grid mix 1kV-60kV - RU: 0.0278
- Transport of acetic acid // acetic acid production, product in 98% solution state // glo by Articulated lorry transport, Euro 4, Total weight >32 t - EU+EFTA+UK: 8.09713; = kg_km_0
- Transport of enzymes // enzymes production // eu+efta+uk by Articulated lorry transport, Euro 4, Total weight >32 t - EU+EFTA+UK: 2.07619; = kg_km_1
- Transport of lubricating oil // lubricants at refinery // rsa by Articulated lorry transport, Euro 4, Total weight >32 t - EU+EFTA+UK: 0.00175435; = kg_km_2
- Transport of lubricating oil // lubricants at refinery // raf by Articulated lorry transport, Euro 4, Total weight >32 t - EU+EFTA+UK: 0.000719732; = kg_km_3
- Transport of lubricating oil // lubricants at refinery // ras w/o cn by Articulated lorry transport, Euro 4, Total weight >32 t - EU+EFTA+UK: 0.0188608; = kg_km_4
- Transport of lubricating oil // lubricants at refinery // ru by Articulated lorry transport, Euro 4, Total weight >32 t - EU+EFTA+UK: 0.0155963; = kg_km_5
- Transport of lubricating oil // lubricants at refinery // eu+efta+uk by Articulated lorry transport, Euro 4, Total weight >32 t - EU+EFTA+UK: 0.00960714; = kg_km_6
- Transport of lubricating oil // lubricants at refinery // rna by Articulated lorry transport, Euro 4, Total weight >32 t - EU+EFTA+UK: 0.0147224; = kg_km_7
- Transport of lubricating oil // lubricants at refinery // cn by Articulated lorry transport, Euro 4, Total weight >32 t - EU+EFTA+UK: 0.0029946; = kg_km_8
- Transport of acetic acid // acetic acid production, product in 98% solution state // glo by Transoceanic ship, containers - GLO: 145.748; = kg_km_9
- Transport of enzymes // enzymes production // eu+efta+uk by Transoceanic ship, containers - GLO: 37.3713; = kg_km_10
- Transport of lubricating oil // lubricants at refinery // rsa by Transoceanic ship, containers - GLO: 0.0315783; = kg_km_11
- Transport of lubricating oil // lubricants at refinery // raf by Transoceanic ship, containers - GLO: 0.0129552; = kg_km_12
- Transport of lubricating oil // lubricants at refinery // ras w/o cn by Transoceanic ship, containers - GLO: 0.339495; = kg_km_13
- Transport of lubricating oil // lubricants at refinery // ru by Transoceanic ship, containers - GLO: 0.280734; = kg_km_14
- Transport of lubricating oil // lubricants at refinery // eu+efta+uk by Transoceanic ship, containers - GLO: 0.172929; = kg_km_15
- Transport of lubricating oil // lubricants at refinery // rna by Transoceanic ship, containers - GLO: 0.265003; = kg_km_16
- Transport of lubricating oil // lubricants at refinery // cn by Transoceanic ship, containers - GLO: 0.0539028; = kg_km_17
- Electricity from Electricity grid mix 1kV-60kV - CN: 0.142677
- Electricity from Electricity grid mix 1kV-60kV - RAS w/o CN: 0.156323
- treatment, cellulase enzyme // treatment, cellulase enzyme // glo, blackbox: 1
- treatment, cellulase enzyme // treatment, cellulase enzyme // glo, elementary: 1

## Impact indicators
- Eutrophication marine: 0.000220728
- Ecotoxicity, freshwater: 1.56357
- Land use: -0.152415
- Water use: 0.327412
- Resource use, minerals and metals: 3.02446e-7
- Resource use, fossils: 2.41934
- Climate change: 0.191538
- Ozone depletion: 2.01745e-10
- Human toxicity, cancer: 1.64403e-10
- Human toxicity, non-cancer: 2.21396e-9
- EF-particulate Matter: 3.38465e-8
- Ionising radiation, human health: 0.0122972
- Photochemical ozone formation - human health: 0.000509296
- Acidification: 0.00106128
- Eutrophication, terrestrial: 0.001583
- Eutrophication, freshwater: 2.06806e-5

## Deviations from the LCI method principle
The background data uses:
- the \xe2\x80\x9cRecycled content cut-off\xe2\x80\x9d approach to allocate end-of-life by-products and secondary materials. This allocation is explained in the description of the recycled content system model (http://www.ecoinvent.org/database/system-models-in-ecoinvent-3/cut-off-system-model/allocation-cut-off-by-classification.html).
OR
- EF compliant data

## Deviations from the LCI method approaches
Background data:
- the \xe2\x80\x9cRecycled content cut-off\xe2\x80\x9d approach to allocate end-of-life by-products and secondary materials. This allocation is explained in the description of the recycled content system model (http://www.ecoinvent.org/database/system-models-in-ecoinvent-3/cut-off-system-model/allocation-cut-off-by-classification.html). The ecoinvent database mostly relies on “Allocation – market values” apart for few exceptions particularly in the energy sector. ecoinvent energy data is replaced with EF3.0 core data as per the EF guidelines version 2.0.
OR
- EF compliant data

## Modelling constants
All modelling constants follow the requirements listed in the Tender Specifications 070201/2020/SER/ENV.B1. Completeness: There are no intentional cut-offs in the inventory no matter how small their contribution to all the EF impact categories is. Eventual cut-offs are in compliance with the Guide for EF compliant data sets (JRC 2020), i.e. only if below the 3% cut-off rule. Water use: water use is modelled at country level using separate flows for water withdrawal, water release and water evaporation. Handling multi-functional processes: the following PEF multi- functionality decision hierarchy is applied for resolving all multi- functionality problems: (1) subdivision or system expansion; (2) allocation based on a relevant underlying physical relationship (substitution may apply here); (3) allocation based on some other relationship. Direct land use change: GHG emissions from direct LUC allocated to good/service for 20 years after the LUC occurs, with IPCC default values. Carbon storage and delayed emissions: credits associated with temporary (carbon) storage or delayed emissions up to 300 years are not be considered. Emissions off-setting: are not included. Capital goods (including infrastructures) and their End of life: they are included. System boundaries: system boundaries include all processes linked to the product supply chain (e.g. maintenance). Time period: emissions and removals are modelled as if released or removed at the beginning of the assessment method. Fossil and biogenic carbon emissions and removals: removals and emissions are modelled as follows: All GHG emissions from fossil fuels (including peat and limestone) are modelled consistently with the most updated ILCD list of elementary flows. The non-fossil (biogenic) carbon flows are modelled consistently with the most updated ILCD list of elementary flows.

## Cut-off and completeness
There are no intentional cut-offs in the inventory no matter how small their contribution to all the EF impact categories is. Eventual cut-offs are in compliance with the Guide for EF compliant data sets (JRC 2020), i.e. only if below the 3% cut-off rule. The dataset dry mass and water balance has been checked to ensure the inventory is complete. Capital goods (e.g. infrastructure) and their end-of-life are included.

## Data selection and combination
These datasets include, in both their foreground and background data, links to EF3.0 compliant data.
The relevant background data on energy, transport, and End of Life are from the LCDN data node (http://lcdn.thinkstep.com/Node/).
All other background data in the supply of this product for which no EF3.0 process was available are from ecoinvent v3.7 database (www.ecoinvent.org) or other data sources.

## Data treatment and extrapolations
Several data sources have been used to model the inventory.

## Review details
Internal reviews have been asked to review the plausibility of the unit process, LCIA scores, and DQRs. Internal reviewers have also been asked to review the data for EF compliancy. The consortium is therefore responsible for aspects such as compliancy with the ILCD format, including validation in Look@LCI, and nomenclature.
Internal reviwers have been asked to judge based on the process name, that the unit process models in a complete and representative way the process in the requested location. The review encompassed the plausability of:
- exchanges with nature (elementary flows) as well as exchanges such as product and waste flows.
- meta information (general comment, technology comment, system boundaries, allocation, cut-off rules, etc.). Reviewers were asked to judge if the provided information is enough to understand the content of the process.
- LCIA scores
- DQRs including precision, technology, time and geography. As well as the overall DQR.
External reviewers have been asked to provide their expertise in the field of interest. External reviewers have been asked to review the unit process, including eventual methodological choices, the LCIA scores (provided with contribution scores as well), and DQRs. External reviewers have been provided all the information in a tool developed by the consortium for the purpose of this project.
External reviewers have been asked to judge based on the process name, that the unit process models in a complete and representative way the process in the requested location. The review encompassed:
- Plausability and completeness of exchanges with nature (elementary flows) as well as exchanges such as product and waste flows.
- Review of meta information (general comment, technology comment, system boundaries, allocation, cut-off rules, etc.). Reviewers were asked to judge if the provided information is enough to understand the content of the process.
- Review of properties (biogenic carbon and water content).
- Review of allocation keys.
- Plausability of LCIA scores calculated by the consortium.
- Plausability of DQRs including precision, technology, time and geography. As well as the overall DQR.

## Data sources
- Background Data for Representative products and organisations. EF 3.0 compliant (data stock)
- UN Data (2018) Statistics Data for Lubricants Productions, http://data.un.org/Data.aspx?q=Lubricants&d=EDATA&f=cmID%3aLU, United Nations Statistics Division, Global
- Md. Shafi Ullah, Asaduzzaman Munna (2017). Study On Fabric Weight Loss During Bio-polishing. Daffodil International University, Bangladesh, India.
- Tupesa (2021) SL Washer Extractors, https://www.tupesa.com/index.php?route=product/product&path=72_61&product_id=62, Tupesa Maquinaria Textil, Girona, Spain.
- Tupesa (2021) SC -2 Dryers, https://www.tupesa.com/index.php?route=product/product&path=72_63&product_id=70, Tupesa Maquinaria Textil, Girona, Spain.
- Lebon (2021) Nonwoven Oven Machine, Catalog and Company Messages, Qingdao Lebon Industry Co., Ltd., China

## Intended applications
Implementation of regular Product Environmental Footprint (PEF) studies and Organisation Environmental Footprint (OEF) studies exclusively under the specified Product groups and sectors as defined in the Product Environmental Footprint Category Rules (PEFCR) and Organisation Environmental Footprint Sectorial Rules (OEFSR) listed in http://ec.europa.eu/environment/eussd/smgp/PEFCR_OEFSR.htm
