# linen, elementary; European Flax® scutched long fibre, dew retted

Dataset: ILCD process, Unit process, single operation
Geography: EU+EFTA+UK
Reference year: 2019
Valid until: 2024
Classification: Other Services / Other services
LCI method principle: Attributional
LCI method approaches: Allocation - market value
Completeness: All relevant flows quantified
Project: Provision of process-based 3.0 Environmental Footprint-compliant life cycle inventory datasets - Renewable materials - contract number 070201/2020/840085/SER/ENV.B.1
Generated by: Blonk Sustainability Tools
Owner: Blonk Sustainability Tools
Compliance: Environmental Footprint non-primary supporting data set; Environmental Footprint 3.1
Amounts: no units in this file; such an amount is in the reference unit of its flow, which a separate flow dataset defines
copyright: true
licenseType: Free of charge for some user types or use types
accessRestrictions: Free of charge for all final users implementing a regular Product Environmental Footprint (PEF) studies and Organisation Environmental Footprint (OEF) studies exclusively under the specified Product groups and sectors as defined in the Product Environmental Footprint Category Rules (PEFCR) and Organisation Environmental Footprint Sectorial Rules (OEFSR) listed in http://ec.europa.eu/environment/eussd/smgp/PEFCR_OEFSR.htm and in accordance with the terms and conditions of the EULA (available at https://ecoinvent.lca-data.com/) exclusively until 31st December 2024. Any use of this dataset or any derivative data not within the specific context of one of the PEF/OEF projects or after the end of 2024 is not permitted.

## General comment
Notice: this data set supersedes the EF3.0-compliant version (see link under "preceding data set version" below calculated with the EF3.0). The life cycle inventory is not changed from the original EF3.0 data set. The LCIA results are calculated based on the EF3.1 methods which provide updated characterisation factors in the following impact categories: Climate Change, Ecotoxicity freshwater, Photochemical Ozone Formation, Acidification, Human Toxicity non-cancer, and Human Toxicity cancer. The review report and the data quality ratings refer to the original results. The data set has been updated by the European Commission on the basis of the original EF3.0 data set delivered by the data provider.This sub-process has limited documentation only. For all detailed documentation of the full model to which this data set belongs (such as DQRs, review reports and other technical documentation), please see this process: linen - EU+EFTA+UK []

## Technology and included processes
The system includes all stages from cradle to gate to obtain European Flax® scutched long fibres in France, Belgium and the Netherlands. 100% of the long fibres produced in France, Belgium and the Netherlands are certified to European Flax®, certification owned by the European Confederation of Flax and Hemp (CELC) for third party verified traceability downstream. Fibre flax cultivation is modelled after the average common technical itinerary in the 3 countries including crop rotation and the absence of irrigation. The transformation from flax plant to flax fibre, from which linen textiles are made of, begins with the retting process. Retting is essential in priming the flax plants for textile usability. The process begins after the flax crop has reached maturity and it is pulled from the ground, but before it is collected from the field. Dew retting is the only form of retting in western Europe. After the flax has been pulled, it is spread evenly in the field, and over the course of the next 3-7 weeks, depending on climatic conditions. During this process microorganisms from the soil develop on the plants, leading to partial decomposition of the stem pectins and facilitated mechanical extraction and improved fiber quality. This step is followed by the scutching process which separates the components of the plant: long finer flax fibers called line, short coarser fibers called tow, woody matter called shives, seeds and dust. The proportion of long fibres between France, Belgium and the Netherlands in this dataset matches the production in the 3 countries and is representative of the fibre blends in linen textiles made from European long fibres, as blending during spinning is key to ensure optimal and regular yarn quality over time.

## Reference product
- linen, european flax® scutched long fibre, dew retted // linen // eu+efta+uk, elementary: 1

## Impact indicators
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
## Deviations from the LCI method principle
The background data uses:
- the \xe2\x80\x9cRecycled content cut-off\xe2\x80\x9d approach to allocate end-of-life by-products and secondary materials. This allocation is explained in the description of the recycled content system model (http://www.ecoinvent.org/database/system-models-in-ecoinvent-3/cut-off-system-model/allocation-cut-off-by-classification.html).
OR
- EF compliant data

## Deviations from the LCI method approaches
Background data:
- the \xe2\x80\x9cRecycled content cut-off\xe2\x80\x9d approach to allocate end-of-life by-products and secondary materials. This allocation is explained in the description of the recycled content system model (http://www.ecoinvent.org/database/system-models-in-ecoinvent-3/cut-off-system-model/allocation-cut-off-by-classification.html). The ecoinvent database mostly relies on “Allocation – market values” apart for few exceptions particularly in the energy sector. ecoinvent energy data is replaced with EF3.0 core data as per the EF guidelines version 2.0.
OR
- EF compliant data

## Modelling constants
All modelling constants follow the requirements listed in the Tender Specifications 070201/2020/SER/ENV.B1. Completeness: There are no intentional cut-offs in the inventory no matter how small their contribution to all the EF impact categories is. Eventual cut-offs are in compliance with the Guide for EF compliant data sets (JRC 2020), i.e. only if below the 3% cut-off rule. Water use: water use is modelled at country level using separate flows for water withdrawal, water release and water evaporation. Handling multi-functional processes: the following PEF multi- functionality decision hierarchy is applied for resolving all multi- functionality problems: (1) subdivision or system expansion; (2) allocation based on a relevant underlying physical relationship (substitution may apply here); (3) allocation based on some other relationship. Direct land use change: GHG emissions from direct LUC allocated to good/service for 20 years after the LUC occurs, with IPCC default values. Carbon storage and delayed emissions: credits associated with temporary (carbon) storage or delayed emissions up to 300 years are not be considered. Emissions off-setting: are not included. Capital goods (including infrastructures) and their End of life: they are included. System boundaries: system boundaries include all processes linked to the product supply chain (e.g. maintenance). Time period: emissions and removals are modelled as if released or removed at the beginning of the assessment method. Fossil and biogenic carbon emissions and removals: removals and emissions are modelled as follows: All GHG emissions from fossil fuels (including peat and limestone) are modelled consistently with the most updated ILCD list of elementary flows. The non-fossil (biogenic) carbon flows are modelled consistently with the most updated ILCD list of elementary flows.

## Cut-off and completeness
There are no intentional cut-offs in the inventory no matter how small their contribution to all the EF impact categories is. Eventual cut-offs are in compliance with the Guide for EF compliant data sets (JRC 2020), i.e. only if below the 3% cut-off rule. The dataset dry mass and water balance has been checked to ensure the inventory is complete. Capital goods (e.g. infrastructure) and their end-of-life are included.

## Data selection and combination
These datasets include, in both their foreground and background data, links to EF3.0 compliant data.
The relevant background data on energy, transport, and End of Life are from the LCDN data node (http://lcdn.thinkstep.com/Node/).
All other background data in the supply of this product for which no EF3.0 process was available are from ecoinvent v3.7 database (www.ecoinvent.org) or other data sources.

## Data treatment and extrapolations
Several data sources have been used to model the inventory.

## Use advice
This data set is a supporting sub-data set and must be used exclusively as sub-data set of its corresponding level-1 partly disaggregated data set (see “General comment” field for exact name and UUID).

## Data sources
- Background Data for Representative products and organisations. EF 3.0 compliant (data stock)
- Yukan, European Confederation of Flax and Hemp (CELC), Arvalis and Inagro(2021) European Flax® scutched long fibres LCI study using PEF methodology as supporting documentation for the EF-compliant data set
- Vellinga T., Blonk H., Marinussen M., Zeist WJ VanBoer IJM De ., Starmans D., (2013). Methodology used in feedprint: a tool quantifying greenhouse gas emissions of feed production and utilization (Issue March). http://www.wageningenur.nl/nl/show/Feedprint.htm
- Marinussen M., Kernebeek H ., van Broekema R., Groen E., Kool A., van Zeist WJ., Dolman M., Blonk, H., (2012). LCI data for the calculation tool Feedprint for greenhouse gas emissions of feed production and utilization: Cultivation oil seeds and oil fruits. Blonk Consultants and WUR Livestock Research
- Blonk Consultants., (2019). Agrifootprint database v5.0
- Blonk Consultants. (2018). The Direct Land Use Change Assessment Tool v.2018
- IPCC., (2006). IPCC Guidelines for National Greenhouse Gas Inventories. http://www.ipcc-nggip.iges.or.jp/public/2006gl/index.html
- Nemecek T., Schnetzer J., (2012). Methods of assessment of direct field emissions for LCIs of agricultural production systems.
- PRé consultants, Radboud University Nijmegen, Leiden University, & RIVM. (2013). ReCiPe 1.08: Characterisation factors spreadsheet. http://www.lcia-recipe.net/characterisation-and-normalisation-factors
- European Environment Agency., (2013). EMEP/EEA Air Pollutant Emission Inventory Guidebook 2013. 12. http://www.eea.europa.eu/publications/emep-eea-guidebook-2013
- Mekonnen M., Hoekstra A. (2010). The green, blue and grey water footprint of crops and derived crop products - Volume 1: Main Report volume 1.(41)

## Intended applications
Implementation of regular Product Environmental Footprint (PEF) studies and Organisation Environmental Footprint (OEF) studies exclusively under the specified Product groups and sectors as defined in the Product Environmental Footprint Category Rules (PEFCR) and Organisation Environmental Footprint Sectorial Rules (OEFSR) listed in http://ec.europa.eu/environment/eussd/smgp/PEFCR_OEFSR.htm
