# tufting of carpet; production, at plant; Carpet, turfting

Dataset: ILCD process, Partly terminated system
Geography: EU+EFTA+UK
Reference year: 2021
Valid until: 2024
Classification: Systems / Textiles, furnitures and other interiors
LCI method principle: Attributional
LCI method approaches: Allocation - market value
Completeness: All relevant flows quantified
Project: Provision of process-based 3.0 Environmental Footprint-compliant life cycle inventory datasets - Apparel 2 - contract number 070201/2020/840292/SER/ENV.B.1
Generated by: Metsims Sustainability Consulting
Owner: PRé Sustainability B.V.
Compliance: ILCD Data Network - Entry-level; Suggestions for updating the PEF method 2019; ISO 14040 Environmental Management – Life Cycle Assessment – Principles and Framework, 2006; ISO 14044:2006. Environmental Management – Life Cycle Assessment – Requirements and guidelines.; Environmental Footprint 3.1
Review: Dependent internal review by Avraam Symeonidis, Emilia Moreno Ruiz; Independent review panel by Madhuri Nigam
Data quality: Overall quality: Very good; Time representativeness: Very good; Geographical representativeness: Good; Technological representativeness: Very good; Precision: Good; Methodological appropriateness and consistency: Not applicable
Amounts: no units in this file; such an amount is in the reference unit of its flow, which a separate flow dataset defines
copyright: true
licenseType: Free of charge for some user types or use types
accessRestrictions: Free of charge for all final users implementing a regular Product Environmental Footprint (PEF) studies and Organisation Environmental Footprint (OEF) studies exclusively under the specified Product groups and sectors as defined in the Product Environmental Footprint Category Rules (PEFCR) and Organisation Environmental Footprint Sectorial Rules (OEFSR) listed in http://ec.europa.eu/environment/eussd/smgp/PEFCR_OEFSR.htm and in accordance with the terms and conditions of the EULA (available at https://ecoinvent.lca-data.com/) exclusively until 31st December 2024. Any use of this dataset or any derivative data not within the specific context of one of the PEF/OEF projects or after the end of 2024 is not permitted.

## General comment
Notice: this data set supersedes the EF3.0-compliant version (see link under "preceding data set version" below calculated with the EF3.0). The life cycle inventory is not changed from the original EF3.0 data set. The LCIA results are calculated based on the EF3.1 methods which provide updated characterisation factors in the following impact categories: Climate Change, Ecotoxicity freshwater, Photochemical Ozone Formation, Acidification, Human Toxicity non-cancer, and Human Toxicity cancer. The review report and the data quality ratings refer to the original results. The data set has been updated by the European Commission on the basis of the original EF3.0 data set delivered by the data provider.This data covers general production figures of weaved backing and tufting process. As a backing material latex is used.

## Technology and included processes
Tufting is a type of textile weaving in which a thread is inserted on a primary base. A woven fabric is used as a backing material and latex is used as an adhesive to glue the tufts to the backing material. For the tufting carpet data; The production of the backing material is modelled within this process. Production processes covers general production values and a user shlould add the facing material according to the raw materials of the carpet.

A user employing this service within their models should use it along with an 1.05 kg of material to produce an 1 kg of tufted carpet. 0.05 kg of waste shall also be added. A user is responsible for defining the nature of the recycling and/or disposal of this waste. Additionally, a user is responsible for accounting transportation expenditures for all extra input and output materials that need to be modelled alongside this service.*

*Ref: Altun, S. (2012). Prediction of textile waste profile and recycling opportunities in Turk. Fibres & Textiles in Eastern Europe.

## Parameters
- kg_0: 0.285
  Mass in kg, for styrene-butadiene-styrene latex, petrochemical // styrene-butadiene-styrene (sbs) latex production,petrochemical based // glo; Articulated lorry transport, Euro 4, Total weight >32 t; EU+EFTA+UK
- km_0: 130.175
  Distance in km, for styrene-butadiene-styrene latex, petrochemical // styrene-butadiene-styrene (sbs) latex production,petrochemical based // glo; Articulated lorry transport, Euro 4, Total weight >32 t; EU+EFTA+UK
- kg_km_0: 37.1; = kg_0*km_0
  Transport amount in km*km, for styrene-butadiene-styrene latex, petrochemical // styrene-butadiene-styrene (sbs) latex production,petrochemical based // glo; Articulated lorry transport, Euro 4, Total weight >32 t; EU+EFTA+UK
- kg_1: 0.00304969
  Mass in kg, for lubricating oil // lubricants at refinery // eu+efta+uk; Articulated lorry transport, Euro 4, Total weight >32 t; EU+EFTA+UK
- km_1: 130.177
  Distance in km, for lubricating oil // lubricants at refinery // eu+efta+uk; Articulated lorry transport, Euro 4, Total weight >32 t; EU+EFTA+UK
- kg_km_1: 0.397; = kg_1*km_1
  Transport amount in km*km, for lubricating oil // lubricants at refinery // eu+efta+uk; Articulated lorry transport, Euro 4, Total weight >32 t; EU+EFTA+UK
- kg_2: 0.285
  Mass in kg, for styrene-butadiene-styrene latex, petrochemical // styrene-butadiene-styrene (sbs) latex production,petrochemical based // glo; Barge; EU+EFTA+UK
- km_2: 270.175
  Distance in km, for styrene-butadiene-styrene latex, petrochemical // styrene-butadiene-styrene (sbs) latex production,petrochemical based // glo; Barge; EU+EFTA+UK
- kg_km_2: 77; = kg_2*km_2
  Transport amount in km*km, for styrene-butadiene-styrene latex, petrochemical // styrene-butadiene-styrene (sbs) latex production,petrochemical based // glo; Barge; EU+EFTA+UK
- kg_3: 0.00304969
  Mass in kg, for lubricating oil // lubricants at refinery // eu+efta+uk; Barge; EU+EFTA+UK
- km_3: 270.191
  Distance in km, for lubricating oil // lubricants at refinery // eu+efta+uk; Barge; EU+EFTA+UK
- kg_km_3: 0.824; = kg_3*km_3
  Transport amount in km*km, for lubricating oil // lubricants at refinery // eu+efta+uk; Barge; EU+EFTA+UK
- kg_4: 0.285
  Mass in kg, for styrene-butadiene-styrene latex, petrochemical // styrene-butadiene-styrene (sbs) latex production,petrochemical based // glo; Freight train, average; EU+EFTA+UK
- km_4: 240
  Distance in km, for styrene-butadiene-styrene latex, petrochemical // styrene-butadiene-styrene (sbs) latex production,petrochemical based // glo; Freight train, average; EU+EFTA+UK
- kg_km_4: 68.4; = kg_4*km_4
  Transport amount in km*km, for styrene-butadiene-styrene latex, petrochemical // styrene-butadiene-styrene (sbs) latex production,petrochemical based // glo; Freight train, average; EU+EFTA+UK
- kg_5: 0.00304969
  Mass in kg, for lubricating oil // lubricants at refinery // eu+efta+uk; Freight train, average; EU+EFTA+UK
- km_5: 240.024
  Distance in km, for lubricating oil // lubricants at refinery // eu+efta+uk; Freight train, average; EU+EFTA+UK
- kg_km_5: 0.732; = kg_5*km_5
  Transport amount in km*km, for lubricating oil // lubricants at refinery // eu+efta+uk; Freight train, average; EU+EFTA+UK

## Reference product
- tufting of carpet // tufting of carpet // eu+efta+uk: 1

## Inputs
- Transport of styrene-butadiene-styrene latex, petrochemical // styrene-butadiene-styrene (sbs) latex production,petrochemical based // glo by Articulated lorry transport, Euro 4, Total weight >32 t - EU+EFTA+UK: 37.1; = kg_km_0
- Transport of lubricating oil // lubricants at refinery // eu+efta+uk by Articulated lorry transport, Euro 4, Total weight >32 t - EU+EFTA+UK: 0.397; = kg_km_1
- Electricity from Electricity grid mix 1kV-60kV - EU+EFTA+UK: 19.3787
- Thermal energy (MJ) from Thermal energy from hard coal - EU+EFTA+UK: 2.22984
- Thermal energy (MJ) from Thermal energy from heavy fuel oil (HFO) - EU+EFTA+UK: 0.049552
- Thermal energy (MJ) from Thermal energy from light fuel oil (LFO) - EU+EFTA+UK: 0.693728
- Thermal energy (MJ) from Thermal energy from natural gas - EU+EFTA+UK: 1.98208
- Transport of styrene-butadiene-styrene latex, petrochemical // styrene-butadiene-styrene (sbs) latex production,petrochemical based // glo by Barge - EU+EFTA+UK: 77; = kg_km_2
- Transport of lubricating oil // lubricants at refinery // eu+efta+uk by Barge - EU+EFTA+UK: 0.824; = kg_km_3
- Transport of styrene-butadiene-styrene latex, petrochemical // styrene-butadiene-styrene (sbs) latex production,petrochemical based // glo by Freight train, average - EU+EFTA+UK: 68.4; = kg_km_4
- Transport of lubricating oil // lubricants at refinery // eu+efta+uk by Freight train, average - EU+EFTA+UK: 0.732; = kg_km_5
- tufting of carpet // tufting of carpet // eu+efta+uk, blackbox: 1
- tufting of carpet // tufting of carpet // eu+efta+uk, elementary: 1

## Impact indicators
- Eutrophication marine: 0.00404851
- Ecotoxicity, freshwater: 35.3344
- Land use: 10.6398
- Water use: 1.17614
- Resource use, minerals and metals: 1.00497e-5
- Resource use, fossils: 74.2146
- Climate change: 4.11725
- Ozone depletion: 8.57841e-9
- Human toxicity, cancer: 1.69336e-9
- Human toxicity, non-cancer: 2.24577e-8
- EF-particulate Matter: 2.69732e-7
- Ionising radiation, human health: 0.984071
- Photochemical ozone formation - human health: 0.011062
- Acidification: 0.0175539
- Eutrophication, terrestrial: 0.0404366
- Eutrophication, freshwater: 9.79345e-5

## Deviations from the LCI method principle
The background data use the \xe2\x80\x9cRecycled content cut-off\xe2\x80\x9d approach to allocate end-of-life by-products and secondary materials. This allocation is explained in the description of the recycled content system model (http://www.ecoinvent.org/database/system-models-in-ecoinvent-3/cut-off-system-model/allocation-cut-off-by-classification.html).

## Deviations from the LCI method approaches
Allocation following the ISO 14044 hierarchy.

## Modelling constants
All modelling constants follow the requirements listed in the Tender Specifications ENV.B.1/SER/2016/0038vl. Completeness: All known environmental flows are included. All known resource uses and emissions are listed in the inventory. Water use: water use is modelled at country level using separate flows for water withdrawal, water release and water evaporation. Cut-off: All known environmental flows are included. All known resource uses and emissions are listed in the inventory. Handling multi-functional processes: the following PEF multi- functionality decision hierarchy is applied for resolving all multi- functionality problems: (1) subdivision or system expansion; (2) allocation based on a relevant underlying physical relationship (substitution may apply here); (3) allocation based on some other relationship. Direct land use change: GHG emissions from direct LUC allocated to good/service for 20 years after the LUC occurs, with IPCC default values. Carbon storage and delayed emissions: credits associated with temporary (carbon) storage or delayed emissions up to 300 years are not be considered. Emissions off-setting: are not included. Capital goods (including infrastructures) and their End of life: they are included. System boundaries: system boundaries include all processes linked to the product supply chain (e.g. maintenance). Time period: emissions and removals are modelled as if released or removed at the beginning of the assessment method. Fossil and biogenic carbon emissions and removals: removals and emissions are modelled as follows: All GHG emissions from fossil fuels (including peat and limestone) are modelled consistently with the most updated ILCD list of elementary flows. The non-fossil (biogenic) carbon flows are modelled consistently with the most updated ILCD list of elementary flows.

## Cut-off and completeness
All known environmental flows are included. All known resource uses and emissions are listed in the inventory. The dataset dry mass balance has been checked to ensure the inventory is complete. Capital goods (e.g. infrastructure) and their end-of-life are included.

## Data selection and combination
These datasets include, in both their foreground and background data, links to EF3.0 compliant data.
The relevant background data on energy, transport, and End of Life are from the LCDN data node (http://lcdn.thinkstep.com/Node/).
All other background data in the supply of this product for which no EF3.0 process was available are from ecoinvent v3.7 database (www.ecoinvent.org) or other data sources.

## Data treatment and extrapolations
Several data sources have been used to model the inventory.

## Review details
Internal reviews have been asked to review the plausibility of the unit process, LCIA scores, and DQRs. Internal reviewers have also been asked to review the data for EF compliancy. The consortium is therefore responsible for aspects such as compliancy with the ILCD format, including validation in Look@LCI, and nomenclature.
Internal reviwers have been asked to judge based on the process name, that the unit process models in a complete and representative way the process in the requested location. The review encompassed the plausability of:
- exchanges with nature (elementary flows) as well as exchanges such as product and waste flows.
- meta information (general comment, technology comment, system boundaries, allocation, cut-off rules, etc.). Reviewers were asked to judge if the provided information is enough to understand the content of the process.
- LCIA scores
- DQRs including precision, technology, time and geography. As well as the overall DQR.
External reviewers have been asked to provide their expertise in the field of interest. External reviewers have been asked to review the unit process, including eventual methodological choices, the LCIA scores (provided with contribution scores as well), and DQRs. External reviewers have been provided all the information in a tool developed by the consortium for the purpose of this project.
External reviewers have been asked to judge based on the process name, that the unit process models in a complete and representative way the process in the requested location. The review encompassed:
- Plausability and completeness of exchanges with nature (elementary flows) as well as exchanges such as product and waste flows.
- Review of meta information (general comment, technology comment, system boundaries, allocation, cut-off rules, etc.). Reviewers were asked to judge if the provided information is enough to understand the content of the process.
- Review of properties (biogenic carbon and water content).
- Review of allocation keys.
- Plausability of LCIA scores calculated by the consortium.
- Plausability of DQRs including precision, technology, time and geography. As well as the overall DQR.

## Data sources
- Background Data for Representative products and organisations. EF 3.0 compliant (data stock)
- Sim, J., & Prabhu, V. (2018). The life cycle assessment of energy and carbon emissions on wool and nylon carpets in the United States. Journal of cleaner production, 170, 1231-1243.
- Prasanna, M. A. A. U., Senanayake, S. S., Wijesinghe, S. A. K. P., Fernando, E. A. S. K., & Perera, S. A. S. (2016, April). Developing a technological process to weave cotton fabrics on water jet loom. In 2016 Moratuwa Engineering Research Conference (MERCon) (pp. 283-288). IEEE.
- The Difference Between Rapier Loom and Other Looms, https://www.sinotextilemachinery.com/news/industry-news/difference-between-rapier-loom-and-other-looms.html, Access Date: 25.06.2021
- Pattanayak, A. K. (2020). Sustainability in fabric manufacturing. In Sustainable Technologies for Fashion and Textiles (pp. 57-72). Woodhead Publishing.
- Electronic Jacquard, https://www.shreetexengineers.com/electronic-jacquard.html, Access Date: 25.06.2021
- Water Jet Weaving Machine, https://www.slideshare.net/syed424/water-jet-loom?next_slideshow=1, Access Date: 25.06.2021
- Roos, S., Jönsson, C., Posner, S., Arvidsson, R., & Svanström, M. (2019). An inventory framework for inclusion of textile chemicals in life cycle assessment. The International Journal of Life Cycle Assessment, 24(5), 838-847.
- Altun, S. (2012). Prediction of textile waste profile and recycling opportunities in Turk. Fibres & Textiles in Eastern Europe.

## Intended applications
Implementation of regular Product Environmental Footprint (PEF) studies and Organisation Environmental Footprint (OEF) studies exclusively under the specified Product groups and sectors as defined in the Product Environmental Footprint Category Rules (PEFCR) and Organisation Environmental Footprint Sectorial Rules (OEFSR) listed in http://ec.europa.eu/environment/eussd/smgp/PEFCR_OEFSR.htm
