# cuprammonium rayon fiber; technology mix; at plant; ready for spinning

Dataset: ILCD process, Partly terminated system
Geography: GLO
Reference year: 2020
Valid until: 2024
Classification: Materials production / Food and renewable raw materials
LCI method principle: Attributional
LCI method approaches: Allocation - market value
Completeness: All relevant flows quantified
Project: Provision of process-based 3.0 Environmental Footprint-compliant life cycle inventory datasets - Renewable materials - contract number 070201/2020/840085/SER/ENV.B.1
Generated by: ACV Brasil
Owner: ecoinvent
Compliance: ILCD Data Network - Entry-level; Suggestions for updating the PEF method 2019; ISO 14040 Environmental Management – Life Cycle Assessment – Principles and Framework, 2006; ISO 14044:2006. Environmental Management – Life Cycle Assessment – Requirements and guidelines.; Environmental Footprint 3.1
Review: Dependent internal review by Hans Blonk, Emilia Moreno Ruiz; Independent review panel by Laura Batlle Bayer
Data quality: Overall quality: Good; Time representativeness: Very good; Geographical representativeness: Very good; Technological representativeness: Good; Precision: Good; Methodological appropriateness and consistency: Not applicable
Amounts: no units in this file; such an amount is in the reference unit of its flow, which a separate flow dataset defines
copyright: true
licenseType: Free of charge for some user types or use types
accessRestrictions: Free of charge for all final users implementing a regular Product Environmental Footprint (PEF) studies and Organisation Environmental Footprint (OEF) studies exclusively under the specified Product groups and sectors as defined in the Product Environmental Footprint Category Rules (PEFCR) and Organisation Environmental Footprint Sectorial Rules (OEFSR) listed in http://ec.europa.eu/environment/eussd/smgp/PEFCR_OEFSR.htm and in accordance with the terms and conditions of the EULA (available at https://ecoinvent.lca-data.com/) exclusively until 31st December 2024. Any use of this dataset or any derivative data not within the specific context of one of the PEF/OEF projects or after the end of 2024 is not permitted.

## General comment
Notice: this data set supersedes the EF3.0-compliant version (see link under "preceding data set version" below calculated with the EF3.0). The life cycle inventory is not changed from the original EF3.0 data set. The LCIA results are calculated based on the EF3.1 methods which provide updated characterisation factors in the following impact categories: Climate Change, Ecotoxicity freshwater, Photochemical Ozone Formation, Acidification, Human Toxicity non-cancer, and Human Toxicity cancer. The review report and the data quality ratings refer to the original results. The data set has been updated by the European Commission on the basis of the original EF3.0 data set delivered by the data provider.Cuprammonium rayon is a highly valued cellulosic fibre that closely resembles silk in the textile industry and is used in a variety of apparels and home textiles. This material was based on the Swiss chemist Matthias Eduard Schweizer’s discovery in 1857 that cellulose could be dissolved in a solution of copper salts and ammonia and, after extrusion, be regenerated in a coagulating bath (Sayyed et al 2019). In 1911, the German textile firm J.-P. Bemberg, based on a technique of stretch spinning, began to produce cuprammonium rayon as Bemberg silk, reviving the interest in the cuprammonium process (Cook 1984). And since then, the production of the fibre has continued.
In its essentials, the process for making cuprammonium rayon is similar to that used in making viscose (Cook 1984). Cellulose is dissolved, and the solution is forced through holes in a spinnerest. The jets of solution are coagulated, the cellulose being regenerated as a solid filament.

Cook, J. G. Handbook of Textile Fibres. II. Man-Made Fibres. 1984.
Sayyed, A. J., Deshmukh, N. A., Pinjari, D. V. A critical review of manufacturing processes used in regenerated cellulosic fibres: viscose, cellulose acetate, cuprammonium, LiCl/DMAc, ionic liquids, and NMMO based lyocell. Cellulose, 26, 2913–2940, 2019.

## Technology and included processes
This activity aims at representing the production of cuprammonium rayon fibre. The dataset is modelled based on "Fibre production, viscose (GLO)" from the ecoinvent database, updating the most relevant flows in terms of impact according to data from a german viscose rayon manufacturer (ENKA, 2020) and adjusting the flows according to stoichiometric calculations based on the reactions invoved in cuprammonium production. The dataset models all relevant inputs necessary for the production of the fiber (water, electricity, heat and chemical substances). Infrastracture is also considered. The activity starts with sulphate pulp.
Cuprammonium liquor is prepared by dissolving basic copper suphate in ammonia (3 NaOH + 4 CuSO4 + 16 NH3 ↔ 1 [Cu(NH3)4]SO4 + 3 [Cu(NH3)4]OH + 3 NaSO4) (Cook, 1984). Sulphate pulp is mixed into cuprammonium liquor at low temperature (nitrogen atmosphere). Stabilizing agents and caustic soda are added. The spinning solution is filtered, deaerated and the activity ends with cuprammonium fibres ready for spinning.

Cook, J. G. Handbook of Textile Fibres. II. Man-Made Fibres. 1984.
ENKA. Consumption and emission data. http://www.enka.de/nachhaltigkeit_7_en.php. 2020.

## Parameters
- kg_0: 0.00664953
  Mass in kg, for copper sulfate; Transoceanic ship, containers; GLO
- km_0: 599.456
  Distance in km, for copper sulfate; Transoceanic ship, containers; GLO
- kg_km_0: 3.9861; = kg_0*km_0
  Transport amount in km*km, for copper sulfate; Transoceanic ship, containers; GLO
- kg_1: 0.00664953
  Mass in kg, for copper sulfate; Freight train, diesel traction; EU+EFTA+UK
- km_1: 229.446
  Distance in km, for copper sulfate; Freight train, diesel traction; EU+EFTA+UK
- kg_km_1: 1.52571; = kg_1*km_1
  Transport amount in km*km, for copper sulfate; Freight train, diesel traction; EU+EFTA+UK
- kg_2: 0.00664953
  Mass in kg, for copper sulfate; Freight train, electricity traction; EU+EFTA+UK
- km_2: 78.0483
  Distance in km, for copper sulfate; Freight train, electricity traction; EU+EFTA+UK
- kg_km_2: 0.518985; = kg_2*km_2
  Transport amount in km*km, for copper sulfate; Freight train, electricity traction; EU+EFTA+UK
- kg_3: 0.00664953
  Mass in kg, for copper sulfate; Freight train, average; EU+EFTA+UK
- km_3: 1.8408
  Distance in km, for copper sulfate; Freight train, average; EU+EFTA+UK
- kg_km_3: 0.0122405; = kg_3*km_3
  Transport amount in km*km, for copper sulfate; Freight train, average; EU+EFTA+UK
- kg_4: 0.00664953
  Mass in kg, for copper sulfate; Barge; EU+EFTA+UK
- km_4: 8.09307
  Distance in km, for copper sulfate; Barge; EU+EFTA+UK
- kg_km_4: 0.0538151; = kg_4*km_4
  Transport amount in km*km, for copper sulfate; Barge; EU+EFTA+UK
- kg_5: 0.00664953
  Mass in kg, for copper sulfate; Barge; ROW w/o EU+EFTA
- km_5: 16.5257
  Distance in km, for copper sulfate; Barge; ROW w/o EU+EFTA
- kg_km_5: 0.109888; = kg_5*km_5
  Transport amount in km*km, for copper sulfate; Barge; ROW w/o EU+EFTA
- kg_6: 0.00664953
  Mass in kg, for copper sulfate; Articulated lorry transport, Euro 4, Total weight >32 t; EU+EFTA+UK
- km_6: 57.4191
  Distance in km, for copper sulfate; Articulated lorry transport, Euro 4, Total weight >32 t; EU+EFTA+UK
- kg_km_6: 0.38181; = kg_6*km_6
  Transport amount in km*km, for copper sulfate; Articulated lorry transport, Euro 4, Total weight >32 t; EU+EFTA+UK
- kg_7: 0.00664953
  Mass in kg, for copper sulfate; Articulated lorry transport, Total weight >32 t, mix Euro 0-5; ROW w/o EU+EFTA
- km_7: 151.54
  Distance in km, for copper sulfate; Articulated lorry transport, Total weight >32 t, mix Euro 0-5; ROW w/o EU+EFTA
- kg_km_7: 1.00767; = kg_7*km_7
  Transport amount in km*km, for copper sulfate; Articulated lorry transport, Total weight >32 t, mix Euro 0-5; ROW w/o EU+EFTA
- kg_8: 0.0469
  Mass in kg, for nitrogen liquid // nitrogen liquid production // eu+efta+uk; Articulated lorry transport, Euro 4, Total weight >32 t; EU+EFTA+UK
- km_8: 1000
  Distance in km, for nitrogen liquid // nitrogen liquid production // eu+efta+uk; Articulated lorry transport, Euro 4, Total weight >32 t; EU+EFTA+UK
- kg_km_8: 46.9; = kg_8*km_8
  Transport amount in km*km, for nitrogen liquid // nitrogen liquid production // eu+efta+uk; Articulated lorry transport, Euro 4, Total weight >32 t; EU+EFTA+UK
- kg_9: 0.0186
  Mass in kg, for oxygen // oxygen production // eu+efta+uk; Articulated lorry transport, Euro 4, Total weight >32 t; EU+EFTA+UK
- km_9: 1000
  Distance in km, for oxygen // oxygen production // eu+efta+uk; Articulated lorry transport, Euro 4, Total weight >32 t; EU+EFTA+UK
- kg_km_9: 18.6; = kg_9*km_9
  Transport amount in km*km, for oxygen // oxygen production // eu+efta+uk; Articulated lorry transport, Euro 4, Total weight >32 t; EU+EFTA+UK
- kg_10: 0.125072
  Mass in kg, for sodium hydroxide // sodium hydroxide production // eu+efta+uk; Articulated lorry transport, Euro 4, Total weight >32 t; EU+EFTA+UK
- km_10: 1000
  Distance in km, for sodium hydroxide // sodium hydroxide production // eu+efta+uk; Articulated lorry transport, Euro 4, Total weight >32 t; EU+EFTA+UK
- kg_km_10: 125.072; = kg_10*km_10
  Transport amount in km*km, for sodium hydroxide // sodium hydroxide production // eu+efta+uk; Articulated lorry transport, Euro 4, Total weight >32 t; EU+EFTA+UK
- kg_11: 0.7436
  Mass in kg, for sulphate pulp // sulphate pulp production // eu+efta+uk; Articulated lorry transport, Euro 4, Total weight >32 t; EU+EFTA+UK
- km_11: 1371.71
  Distance in km, for sulphate pulp // sulphate pulp production // eu+efta+uk; Articulated lorry transport, Euro 4, Total weight >32 t; EU+EFTA+UK
- kg_km_11: 1020; = kg_11*km_11
  Transport amount in km*km, for sulphate pulp // sulphate pulp production // eu+efta+uk; Articulated lorry transport, Euro 4, Total weight >32 t; EU+EFTA+UK
- kg_12: 0.153345
  Mass in kg, for sulphuric acid // sulphuric acid production // eu+efta+uk; Articulated lorry transport, Euro 4, Total weight >32 t; EU+EFTA+UK
- km_12: 1000
  Distance in km, for sulphuric acid // sulphuric acid production // eu+efta+uk; Articulated lorry transport, Euro 4, Total weight >32 t; EU+EFTA+UK
- kg_km_12: 153.345; = kg_12*km_12
  Transport amount in km*km, for sulphuric acid // sulphuric acid production // eu+efta+uk; Articulated lorry transport, Euro 4, Total weight >32 t; EU+EFTA+UK
- kg_13: 0.156219
  Mass in kg, for ammonia, as 100% nh3 // ammonia, as 100% nh3 production // eu+efta+uk; Articulated lorry transport, Euro 4, Total weight >32 t; EU+EFTA+UK
- km_13: 1000
  Distance in km, for ammonia, as 100% nh3 // ammonia, as 100% nh3 production // eu+efta+uk; Articulated lorry transport, Euro 4, Total weight >32 t; EU+EFTA+UK
- kg_km_13: 156.219; = kg_13*km_13
  Transport amount in km*km, for ammonia, as 100% nh3 // ammonia, as 100% nh3 production // eu+efta+uk; Articulated lorry transport, Euro 4, Total weight >32 t; EU+EFTA+UK
- kg_14: 0.0469
  Mass in kg, for nitrogen liquid // nitrogen liquid production // eu+efta+uk; Transoceanic ship, containers; GLO
- km_14: 18000
  Distance in km, for nitrogen liquid // nitrogen liquid production // eu+efta+uk; Transoceanic ship, containers; GLO
- kg_km_14: 844.2; = kg_14*km_14
  Transport amount in km*km, for nitrogen liquid // nitrogen liquid production // eu+efta+uk; Transoceanic ship, containers; GLO
- kg_15: 0.0186
  Mass in kg, for oxygen // oxygen production // eu+efta+uk; Transoceanic ship, containers; GLO
- km_15: 18000
  Distance in km, for oxygen // oxygen production // eu+efta+uk; Transoceanic ship, containers; GLO
- kg_km_15: 334.8; = kg_15*km_15
  Transport amount in km*km, for oxygen // oxygen production // eu+efta+uk; Transoceanic ship, containers; GLO
- kg_16: 0.125072
  Mass in kg, for sodium hydroxide // sodium hydroxide production // eu+efta+uk; Transoceanic ship, containers; GLO
- km_16: 18000
  Distance in km, for sodium hydroxide // sodium hydroxide production // eu+efta+uk; Transoceanic ship, containers; GLO
- kg_km_16: 2251.29; = kg_16*km_16
  Transport amount in km*km, for sodium hydroxide // sodium hydroxide production // eu+efta+uk; Transoceanic ship, containers; GLO
- kg_17: 0.7436
  Mass in kg, for sulphate pulp // sulphate pulp production // eu+efta+uk; Transoceanic ship, containers; GLO
- km_17: 24690.7
  Distance in km, for sulphate pulp // sulphate pulp production // eu+efta+uk; Transoceanic ship, containers; GLO
- kg_km_17: 18360; = kg_17*km_17
  Transport amount in km*km, for sulphate pulp // sulphate pulp production // eu+efta+uk; Transoceanic ship, containers; GLO
- kg_18: 0.153345
  Mass in kg, for sulphuric acid // sulphuric acid production // eu+efta+uk; Transoceanic ship, containers; GLO
- km_18: 18000
  Distance in km, for sulphuric acid // sulphuric acid production // eu+efta+uk; Transoceanic ship, containers; GLO
- kg_km_18: 2760.2; = kg_18*km_18
  Transport amount in km*km, for sulphuric acid // sulphuric acid production // eu+efta+uk; Transoceanic ship, containers; GLO
- kg_19: 0.156219
  Mass in kg, for ammonia, as 100% nh3 // ammonia, as 100% nh3 production // eu+efta+uk; Transoceanic ship, containers; GLO
- km_19: 18000
  Distance in km, for ammonia, as 100% nh3 // ammonia, as 100% nh3 production // eu+efta+uk; Transoceanic ship, containers; GLO
- kg_km_19: 2811.93; = kg_19*km_19
  Transport amount in km*km, for ammonia, as 100% nh3 // ammonia, as 100% nh3 production // eu+efta+uk; Transoceanic ship, containers; GLO

## Reference product
- cuprammonium rayon fiber, at plant // cuprammonium rayon fiber // glo: 1

## Inputs
- Transport of copper sulfate by Transoceanic ship, containers - GLO: 3.9861; = kg_km_0
- Transport of copper sulfate by Freight train, diesel traction - EU+EFTA+UK: 1.52571; = kg_km_1
- Transport of copper sulfate by Freight train, electricity traction - EU+EFTA+UK: 0.518985; = kg_km_2
- Transport of copper sulfate by Freight train, average - EU+EFTA+UK: 0.0122405; = kg_km_3
- Transport of copper sulfate by Barge - EU+EFTA+UK: 0.0538151; = kg_km_4
- Transport of copper sulfate by Barge - ROW w/o EU+EFTA: 0.109888; = kg_km_5
- Transport of copper sulfate by Articulated lorry transport, Euro 4, Total weight >32 t - EU+EFTA+UK: 0.38181; = kg_km_6
- Transport of copper sulfate by Articulated lorry transport, Total weight >32 t, mix Euro 0-5 - ROW w/o EU+EFTA: 1.00767; = kg_km_7
- Electricity from Electricity grid mix 1kV-60kV - AU: 0.0862
- Electricity from Electricity grid mix 1kV-60kV - EU+EFTA+UK: 1.27
- Electricity from Electricity grid mix 1kV-60kV - NZ: 0.0164
- Electricity from Electricity grid mix 1kV-60kV - RAF: 0.2775
- Electricity from Electricity grid mix 1kV-60kV - RAS w/o CN: 3.9909
- Electricity from Electricity grid mix 1kV-60kV - RNA: 1.8586
- Electricity from Electricity grid mix 1kV-60kV - RSA: 0.6307
- Electricity from Electricity grid mix 1kV-60kV - RU: 0.3716
- Thermal energy (MJ) from Thermal energy from light fuel oil (LFO) - EU+EFTA+UK: 31.2982
- Thermal energy (MJ) from Thermal energy from natural gas - EU+EFTA+UK: 11.5757
- Transport of nitrogen liquid // nitrogen liquid production // eu+efta+uk by Articulated lorry transport, Euro 4, Total weight >32 t - EU+EFTA+UK: 46.9; = kg_km_8
- Transport of oxygen // oxygen production // eu+efta+uk by Articulated lorry transport, Euro 4, Total weight >32 t - EU+EFTA+UK: 18.6; = kg_km_9
- Transport of sodium hydroxide // sodium hydroxide production // eu+efta+uk by Articulated lorry transport, Euro 4, Total weight >32 t - EU+EFTA+UK: 125.072; = kg_km_10
- Transport of sulphate pulp // sulphate pulp production // eu+efta+uk by Articulated lorry transport, Euro 4, Total weight >32 t - EU+EFTA+UK: 1020; = kg_km_11
- Transport of sulphuric acid // sulphuric acid production // eu+efta+uk by Articulated lorry transport, Euro 4, Total weight >32 t - EU+EFTA+UK: 153.345; = kg_km_12
- Transport of ammonia, as 100% nh3 // ammonia, as 100% nh3 production // eu+efta+uk by Articulated lorry transport, Euro 4, Total weight >32 t - EU+EFTA+UK: 156.219; = kg_km_13
- Transport of nitrogen liquid // nitrogen liquid production // eu+efta+uk by Transoceanic ship, containers - GLO: 844.2; = kg_km_14
- Transport of oxygen // oxygen production // eu+efta+uk by Transoceanic ship, containers - GLO: 334.8; = kg_km_15
- Transport of sodium hydroxide // sodium hydroxide production // eu+efta+uk by Transoceanic ship, containers - GLO: 2251.29; = kg_km_16
- Transport of sulphate pulp // sulphate pulp production // eu+efta+uk by Transoceanic ship, containers - GLO: 18360; = kg_km_17
- Transport of sulphuric acid // sulphuric acid production // eu+efta+uk by Transoceanic ship, containers - GLO: 2760.2; = kg_km_18
- Transport of ammonia, as 100% nh3 // ammonia, as 100% nh3 production // eu+efta+uk by Transoceanic ship, containers - GLO: 2811.93; = kg_km_19
- cuprammonium rayon fiber, at plant // cuprammonium rayon fiber // glo, blackbox: 1
- cuprammonium rayon fiber, at plant // cuprammonium rayon fiber // glo, elementary: 1

## Impact indicators
- Eutrophication marine: 0.135767
- Ecotoxicity, freshwater: 467.302
- Land use: 158.291
- Water use: -0.0407947
- Resource use, minerals and metals: 4.71669e-5
- Resource use, fossils: 91.9235
- Climate change: 6.37633
- Ozone depletion: 1.03242e-7
- Human toxicity, cancer: 2.37633e-9
- Human toxicity, non-cancer: 3.81773e-8
- EF-particulate Matter: 5.28431e-7
- Ionising radiation, human health: 0.217557
- Photochemical ozone formation - human health: 0.0208318
- Acidification: 0.0339824
- Eutrophication, terrestrial: 0.0774917
- Eutrophication, freshwater: 0.000202308

## Deviations from the LCI method principle
The background data uses:
- the \xe2\x80\x9cRecycled content cut-off\xe2\x80\x9d approach to allocate end-of-life by-products and secondary materials. This allocation is explained in the description of the recycled content system model (http://www.ecoinvent.org/database/system-models-in-ecoinvent-3/cut-off-system-model/allocation-cut-off-by-classification.html).
OR
- EF compliant data

## Deviations from the LCI method approaches
Background data:
- the \xe2\x80\x9cRecycled content cut-off\xe2\x80\x9d approach to allocate end-of-life by-products and secondary materials. This allocation is explained in the description of the recycled content system model (http://www.ecoinvent.org/database/system-models-in-ecoinvent-3/cut-off-system-model/allocation-cut-off-by-classification.html). The ecoinvent database mostly relies on “Allocation – market values” apart for few exceptions particularly in the energy sector. ecoinvent energy data is replaced with EF3.0 core data as per the EF guidelines version 2.0.
OR
- EF compliant data

## Modelling constants
All modelling constants follow the requirements listed in the Tender Specifications 070201/2020/SER/ENV.B1. Completeness: There are no intentional cut-offs in the inventory no matter how small their contribution to all the EF impact categories is. Eventual cut-offs are in compliance with the Guide for EF compliant data sets (JRC 2020), i.e. only if below the 3% cut-off rule. Water use: water use is modelled at country level using separate flows for water withdrawal, water release and water evaporation. Handling multi-functional processes: the following PEF multi- functionality decision hierarchy is applied for resolving all multi- functionality problems: (1) subdivision or system expansion; (2) allocation based on a relevant underlying physical relationship (substitution may apply here); (3) allocation based on some other relationship. Direct land use change: GHG emissions from direct LUC allocated to good/service for 20 years after the LUC occurs, with IPCC default values. Carbon storage and delayed emissions: credits associated with temporary (carbon) storage or delayed emissions up to 300 years are not be considered. Emissions off-setting: are not included. Capital goods (including infrastructures) and their End of life: they are included. System boundaries: system boundaries include all processes linked to the product supply chain (e.g. maintenance). Time period: emissions and removals are modelled as if released or removed at the beginning of the assessment method. Fossil and biogenic carbon emissions and removals: removals and emissions are modelled as follows: All GHG emissions from fossil fuels (including peat and limestone) are modelled consistently with the most updated ILCD list of elementary flows. The non-fossil (biogenic) carbon flows are modelled consistently with the most updated ILCD list of elementary flows.

## Cut-off and completeness
There are no intentional cut-offs in the inventory no matter how small their contribution to all the EF impact categories is. Eventual cut-offs are in compliance with the Guide for EF compliant data sets (JRC 2020), i.e. only if below the 3% cut-off rule. The dataset dry mass and water balance has been checked to ensure the inventory is complete. Capital goods (e.g. infrastructure) and their end-of-life are included.

## Data selection and combination
These datasets include, in both their foreground and background data, links to EF3.0 compliant data.
The relevant background data on energy, transport, and End of Life are from the LCDN data node (http://lcdn.thinkstep.com/Node/).
All other background data in the supply of this product for which no EF3.0 process was available are from ecoinvent v3.7 database (www.ecoinvent.org) or other data sources.

## Data treatment and extrapolations
Several data sources have been used to model the inventory.

## Review details
Internal reviews have been asked to review the plausibility of the unit process, LCIA scores, and DQRs. Internal reviewers have also been asked to review the data for EF compliancy. The consortium is therefore responsible for aspects such as compliancy with the ILCD format, including validation in Look@LCI, and nomenclature.
Internal reviwers have been asked to judge based on the process name, that the unit process models in a complete and representative way the process in the requested location. The review encompassed the plausability of:
- exchanges with nature (elementary flows) as well as exchanges such as product and waste flows.
- meta information (general comment, technology comment, system boundaries, allocation, cut-off rules, etc.). Reviewers were asked to judge if the provided information is enough to understand the content of the process.
- LCIA scores
- DQRs including precision, technology, time and geography. As well as the overall DQR.
External reviewers have been asked to provide their expertise in the field of interest. External reviewers have been asked to review the unit process, including eventual methodological choices, the LCIA scores (provided with contribution scores as well), and DQRs. External reviewers have been provided all the information in a tool developed by the consortium for the purpose of this project.
External reviewers have been asked to judge based on the process name, that the unit process models in a complete and representative way the process in the requested location. The review encompassed:
- Plausability and completeness of exchanges with nature (elementary flows) as well as exchanges such as product and waste flows.
- Review of meta information (general comment, technology comment, system boundaries, allocation, cut-off rules, etc.). Reviewers were asked to judge if the provided information is enough to understand the content of the process.
- Review of properties (biogenic carbon and water content).
- Review of allocation keys.
- Plausability of LCIA scores calculated by the consortium.
- Plausability of DQRs including precision, technology, time and geography. As well as the overall DQR.

## Data sources
- Background Data for Representative products and organisations. EF 3.0 compliant (data stock)
- Cook, J. G. Handbook of Textile Fibres. II. Man-Made Fibres. 1984.
- ENKA. Consumption and emission data. http://www.enka.de/nachhaltigkeit_7_en.php. 2020.
- Whiley-VCH. Ullmann's Encyclopedia of Industrial Chemistry, 40 Volume Set. 2011.

## Intended applications
Implementation of regular Product Environmental Footprint (PEF) studies and Organisation Environmental Footprint (OEF) studies exclusively under the specified Product groups and sectors as defined in the Product Environmental Footprint Category Rules (PEFCR) and Organisation Environmental Footprint Sectorial Rules (OEFSR) listed in http://ec.europa.eu/environment/eussd/smgp/PEFCR_OEFSR.htm
