# wood residues, softwood; technology mix; production mix, at plant; measured as dry mass

Dataset: ILCD process, Partly terminated system
Geography: FI
Reference year: 2018
Valid until: 2024
Classification: Materials production / Wood
LCI method principle: Attributional
LCI method approaches: Allocation - market value
Completeness: All relevant flows quantified
Project: Provision of process-based 3.0 Environmental Footprint-compliant life cycle inventory datasets - Renewable materials - contract number 070201/2020/840085/SER/ENV.B.1
Generated by: ACV Brasil
Owner: ecoinvent
Compliance: ILCD Data Network - Entry-level; Suggestions for updating the PEF method 2019; ISO 14040 Environmental Management – Life Cycle Assessment – Principles and Framework, 2006; ISO 14044:2006. Environmental Management – Life Cycle Assessment – Requirements and guidelines.; Environmental Footprint 3.1
Review: Dependent internal review by Hans Blonk, Emilia Moreno Ruiz; Independent review panel by Jens Lansche
Data quality: Overall quality: Very good; Time representativeness: Good; Geographical representativeness: Very good; Technological representativeness: Very good; Precision: Good; Methodological appropriateness and consistency: Not applicable
Amounts: no units in this file; such an amount is in the reference unit of its flow, which a separate flow dataset defines
copyright: true
licenseType: Free of charge for some user types or use types
accessRestrictions: Free of charge for all final users implementing a regular Product Environmental Footprint (PEF) studies and Organisation Environmental Footprint (OEF) studies exclusively under the specified Product groups and sectors as defined in the Product Environmental Footprint Category Rules (PEFCR) and Organisation Environmental Footprint Sectorial Rules (OEFSR) listed in http://ec.europa.eu/environment/eussd/smgp/PEFCR_OEFSR.htm and in accordance with the terms and conditions of the EULA (available at https://ecoinvent.lca-data.com/) exclusively until 31st December 2024. Any use of this dataset or any derivative data not within the specific context of one of the PEF/OEF projects or after the end of 2024 is not permitted.

## General comment
Notice: this data set supersedes the EF3.0-compliant version (see link under "preceding data set version" below calculated with the EF3.0). The life cycle inventory is not changed from the original EF3.0 data set. The LCIA results are calculated based on the EF3.1 methods which provide updated characterisation factors in the following impact categories: Climate Change, Ecotoxicity freshwater, Photochemical Ozone Formation, Acidification, Human Toxicity non-cancer, and Human Toxicity cancer. The review report and the data quality ratings refer to the original results. The data set has been updated by the European Commission on the basis of the original EF3.0 data set delivered by the data provider.This dataset represents the production of wood residues from softwood forestry measured as dry mass. Wood residues refer to the energy wood (i.e. cleft timber and bundles) produced in forestry activities of conifer tree species. Wood residues are modelled as co-products from the production of logs, pulpwood and wood chips.

## Technology and included processes
The activity of pine cultivation starts with site preparation, including seedling and/or natural regeneration, thinnings, and the final felling. This dataset is modelled according to the activity ‘softwood forestry, pine, sustainable forest management – SE’, valid from 2010 to 2012, published in the ecoinvent database 3.7.1. The dataset is updated with information retrieved from EFO-LCI: A New Life Cycle Inventory Database of Forestry Operations in Europe (Cardellini et al., 2018).
The inventory from one Forest Unit of Pinus Silvestris in Finland (i.e. even-aged forests with a uniform clear-cut system) is reported in EFO-LCI. This data was used to update the parameters of ‘yield wood over rotation period’, the respective ‘rotation period’ as well as the shares of co-products from the ecoinvent activity in the ecoEditor software. The wood properties have also been updated according to the reported values for Finnish pine in EFO-LCI. The unit process dataset (UPR) was subsequently allocated among the co-products ‘softwood’, ‘wood residues’ and ‘wood chips’. Materials and energy inputs from the technosphere were allocated according to revenue prices while remaining inputs from the environment (i.e. energy in biomass, carbon dioxide from air, standing wood, and land occupation/transformation) were allocated according to the volume of the co-products. Flows allocated by price are 97.4% allocated to softwood; 2.14% to wood chips; and 0.41% to wood residues.
Parameters:
Yield of wood under bark per ha over one rotation period: 329 m³ (149 m³ of pulpwood, 160 m³ of logs and 20 m³ of firewood based on EFO-LCI; firewood composition is assumed as 78% wood chips and 22% wood residues based on ecoinvent)
Rotation period (number of years from planting to final harvest): 84 (EFO-LCI)
Dry wood density (kg dry matter/ dry volume): 300 kg/m³ (EFO-LCI)
Softwood price (as solid wood under bark): 0.14 EUR/kg (average from ecoinvent)
Wood chips price (as dry mass): 0.11 EUR/kg (from ecoinvent)
Wood residues (as dry mass): 0.07 EUR/kg (cleft timber price from ecoinvent)
References:
Cardellini, G., Valada, T., Cornillier, C., Vial, E., Dragoi, M., Goudiaby, V., Muys, B. (2018). EFO-LCI: A new life cycle inventory database of forestry operations in Europe. Environmental Management, 61(6), 1031-1047.
ecoinvent database version 3.7.1 – System model Undefined. Activity name: softwood forestry, pine, sustainable forest management. Geography: Sweeden. Time period: 2010-01-01 to 2012-12-31. Available at: v371.ecoquery.ecoinvent.org/Details/UPR/7226fb51-a2b6-4b65-a2ee-d77ea94045c1/8b738ea0-f89e-4627-8679-433616064e82

## Parameters
- kg_0: 3.71712
  Mass in kg, for gravel, crushed; Freight train, diesel traction; EU+EFTA+UK
- km_0: 9.04586
  Distance in km, for gravel, crushed; Freight train, diesel traction; EU+EFTA+UK
- kg_km_0: 33.6245; = kg_0*km_0
  Transport amount in km*km, for gravel, crushed; Freight train, diesel traction; EU+EFTA+UK
- kg_1: 3.71712
  Mass in kg, for gravel, crushed; Freight train, electricity traction; EU+EFTA+UK
- km_1: 2.98144
  Distance in km, for gravel, crushed; Freight train, electricity traction; EU+EFTA+UK
- kg_km_1: 11.0824; = kg_1*km_1
  Transport amount in km*km, for gravel, crushed; Freight train, electricity traction; EU+EFTA+UK
- kg_2: 3.71712
  Mass in kg, for gravel, crushed; Freight train, average; EU+EFTA+UK
- km_2: 0.0726988
  Distance in km, for gravel, crushed; Freight train, average; EU+EFTA+UK
- kg_km_2: 0.27023; = kg_2*km_2
  Transport amount in km*km, for gravel, crushed; Freight train, average; EU+EFTA+UK
- kg_3: 3.71712
  Mass in kg, for gravel, crushed; Barge; EU+EFTA+UK
- km_3: 0.690346
  Distance in km, for gravel, crushed; Barge; EU+EFTA+UK
- kg_km_3: 2.5661; = kg_3*km_3
  Transport amount in km*km, for gravel, crushed; Barge; EU+EFTA+UK
- kg_4: 3.71712
  Mass in kg, for gravel, crushed; Articulated lorry transport, Total weight >32 t, mix Euro 0-5; ROW w/o EU+EFTA
- km_4: 32.3
  Distance in km, for gravel, crushed; Articulated lorry transport, Total weight >32 t, mix Euro 0-5; ROW w/o EU+EFTA
- kg_km_4: 120.063; = kg_4*km_4
  Transport amount in km*km, for gravel, crushed; Articulated lorry transport, Total weight >32 t, mix Euro 0-5; ROW w/o EU+EFTA
- kg_5: 3.71712
  Mass in kg, for gravel, crushed; Transoceanic ship, bulk; GLO
- km_5: 72.7
  Distance in km, for gravel, crushed; Transoceanic ship, bulk; GLO
- kg_km_5: 270.235; = kg_5*km_5
  Transport amount in km*km, for gravel, crushed; Transoceanic ship, bulk; GLO
- kg_6: 3.71712
  Mass in kg, for gravel, crushed; Articulated lorry transport, Total weight <7.5 t, mix Euro 0-5; EU+EFTA+UK
- km_6: 0.678647
  Distance in km, for gravel, crushed; Articulated lorry transport, Total weight <7.5 t, mix Euro 0-5; EU+EFTA+UK
- kg_km_6: 2.52261; = kg_6*km_6
  Transport amount in km*km, for gravel, crushed; Articulated lorry transport, Total weight <7.5 t, mix Euro 0-5; EU+EFTA+UK
- kg_7: 3.71712
  Mass in kg, for gravel, crushed; Barge; ROW w/o EU+EFTA
- km_7: 1.40965
  Distance in km, for gravel, crushed; Barge; ROW w/o EU+EFTA
- kg_km_7: 5.23986; = kg_7*km_7
  Transport amount in km*km, for gravel, crushed; Barge; ROW w/o EU+EFTA

## Reference product
- wood residues, softwood // wood residues, softwood // fi: 1

## Inputs
- Transport of gravel, crushed by Freight train, diesel traction - EU+EFTA+UK: 33.6245; = kg_km_0
- Transport of gravel, crushed by Freight train, electricity traction - EU+EFTA+UK: 11.0824; = kg_km_1
- Transport of gravel, crushed by Freight train, average - EU+EFTA+UK: 0.27023; = kg_km_2
- Transport of gravel, crushed by Barge - EU+EFTA+UK: 2.5661; = kg_km_3
- Transport of gravel, crushed by Articulated lorry transport, Total weight >32 t, mix Euro 0-5 - ROW w/o EU+EFTA: 120.063; = kg_km_4
- Transport of gravel, crushed by Transoceanic ship, bulk - GLO: 270.235; = kg_km_5
- Transport of gravel, crushed by Articulated lorry transport, Total weight <7.5 t, mix Euro 0-5 - EU+EFTA+UK: 2.52261; = kg_km_6
- Transport of gravel, crushed by Barge - ROW w/o EU+EFTA: 5.23986; = kg_km_7
- wood residues, softwood // wood residues, softwood // fi, blackbox: 1
- wood residues, softwood // wood residues, softwood // fi, elementary: 1

## Impact indicators
- Eutrophication marine: 0.0358687
- Ecotoxicity, freshwater: 152.106
- Land use: 44604.4
- Water use: 2.31643
- Resource use, minerals and metals: 2.30024e-5
- Resource use, fossils: 221.942
- Climate change: 16.1293
- Ozone depletion: 2.7066e-8
- Human toxicity, cancer: 1.21906e-8
- Human toxicity, non-cancer: 1.18556e-7
- EF-particulate Matter: 5.59382e-7
- Ionising radiation, human health: 0.301358
- Photochemical ozone formation - human health: 0.119422
- Acidification: 0.0655804
- Eutrophication, terrestrial: 0.234852
- Eutrophication, freshwater: 0.00154092

## Deviations from the LCI method principle
The background data uses:
- the \xe2\x80\x9cRecycled content cut-off\xe2\x80\x9d approach to allocate end-of-life by-products and secondary materials. This allocation is explained in the description of the recycled content system model (http://www.ecoinvent.org/database/system-models-in-ecoinvent-3/cut-off-system-model/allocation-cut-off-by-classification.html).
OR
- EF compliant data

## Deviations from the LCI method approaches
Background data:
- the \xe2\x80\x9cRecycled content cut-off\xe2\x80\x9d approach to allocate end-of-life by-products and secondary materials. This allocation is explained in the description of the recycled content system model (http://www.ecoinvent.org/database/system-models-in-ecoinvent-3/cut-off-system-model/allocation-cut-off-by-classification.html). The ecoinvent database mostly relies on “Allocation – market values” apart for few exceptions particularly in the energy sector. ecoinvent energy data is replaced with EF3.0 core data as per the EF guidelines version 2.0.
OR
- EF compliant data

## Modelling constants
All modelling constants follow the requirements listed in the Tender Specifications 070201/2020/SER/ENV.B1. Completeness: There are no intentional cut-offs in the inventory no matter how small their contribution to all the EF impact categories is. Eventual cut-offs are in compliance with the Guide for EF compliant data sets (JRC 2020), i.e. only if below the 3% cut-off rule. Water use: water use is modelled at country level using separate flows for water withdrawal, water release and water evaporation. Handling multi-functional processes: the following PEF multi- functionality decision hierarchy is applied for resolving all multi- functionality problems: (1) subdivision or system expansion; (2) allocation based on a relevant underlying physical relationship (substitution may apply here); (3) allocation based on some other relationship. Direct land use change: GHG emissions from direct LUC allocated to good/service for 20 years after the LUC occurs, with IPCC default values. Carbon storage and delayed emissions: credits associated with temporary (carbon) storage or delayed emissions up to 300 years are not be considered. Emissions off-setting: are not included. Capital goods (including infrastructures) and their End of life: they are included. System boundaries: system boundaries include all processes linked to the product supply chain (e.g. maintenance). Time period: emissions and removals are modelled as if released or removed at the beginning of the assessment method. Fossil and biogenic carbon emissions and removals: removals and emissions are modelled as follows: All GHG emissions from fossil fuels (including peat and limestone) are modelled consistently with the most updated ILCD list of elementary flows. The non-fossil (biogenic) carbon flows are modelled consistently with the most updated ILCD list of elementary flows.

## Cut-off and completeness
There are no intentional cut-offs in the inventory no matter how small their contribution to all the EF impact categories is. Eventual cut-offs are in compliance with the Guide for EF compliant data sets (JRC 2020), i.e. only if below the 3% cut-off rule. The dataset dry mass and water balance has been checked to ensure the inventory is complete. Capital goods (e.g. infrastructure) and their end-of-life are included.

## Data selection and combination
These datasets include, in both their foreground and background data, links to EF3.0 compliant data.
The relevant background data on energy, transport, and End of Life are from the LCDN data node (http://lcdn.thinkstep.com/Node/).
All other background data in the supply of this product for which no EF3.0 process was available are from ecoinvent v3.7 database (www.ecoinvent.org) or other data sources.

## Data treatment and extrapolations
Several data sources have been used to model the inventory.

## Review details
Internal reviews have been asked to review the plausibility of the unit process, LCIA scores, and DQRs. Internal reviewers have also been asked to review the data for EF compliancy. The consortium is therefore responsible for aspects such as compliancy with the ILCD format, including validation in Look@LCI, and nomenclature.
Internal reviwers have been asked to judge based on the process name, that the unit process models in a complete and representative way the process in the requested location. The review encompassed the plausability of:
- exchanges with nature (elementary flows) as well as exchanges such as product and waste flows.
- meta information (general comment, technology comment, system boundaries, allocation, cut-off rules, etc.). Reviewers were asked to judge if the provided information is enough to understand the content of the process.
- LCIA scores
- DQRs including precision, technology, time and geography. As well as the overall DQR.
External reviewers have been asked to provide their expertise in the field of interest. External reviewers have been asked to review the unit process, including eventual methodological choices, the LCIA scores (provided with contribution scores as well), and DQRs. External reviewers have been provided all the information in a tool developed by the consortium for the purpose of this project.
External reviewers have been asked to judge based on the process name, that the unit process models in a complete and representative way the process in the requested location. The review encompassed:
- Plausability and completeness of exchanges with nature (elementary flows) as well as exchanges such as product and waste flows.
- Review of meta information (general comment, technology comment, system boundaries, allocation, cut-off rules, etc.). Reviewers were asked to judge if the provided information is enough to understand the content of the process.
- Review of properties (biogenic carbon and water content).
- Review of allocation keys.
- Plausability of LCIA scores calculated by the consortium.
- Plausability of DQRs including precision, technology, time and geography. As well as the overall DQR.

## Data sources
- Background Data for Representative products and organisations. EF 3.0 compliant (data stock)
- Cardellini, G., Valada, T., Cornillier, C., Vial, E., Dragoi, M., Goudiaby, V., Muys, B. (2018). EFO-LCI: A new life cycle inventory database of forestry operations in Europe. Environmental Management, 61(6), 1031-1047.
- ecoinvent database version 3.7.1 – System model Undefined. Activity name: softwood forestry, pine, sustainable forest management. Geography: Sweeden. Time period: 2010-01-01 to 2012-12-31. Available at: v371.ecoquery.ecoinvent.org/Details/UPR/7226fb51-a2b6-4b65-a2ee-d77ea94045c1/8b738ea0-f89e-4627-8679-433616064e84

## Intended applications
Implementation of regular Product Environmental Footprint (PEF) studies and Organisation Environmental Footprint (OEF) studies exclusively under the specified Product groups and sectors as defined in the Product Environmental Footprint Category Rules (PEFCR) and Organisation Environmental Footprint Sectorial Rules (OEFSR) listed in http://ec.europa.eu/environment/eussd/smgp/PEFCR_OEFSR.htm
