# lamination, water based glue, 3 times (for 4 layers); lamination process; service, at plant; 1 kg of 3 times water based glue laminated fabric

Dataset: ILCD process, Partly terminated system
Geography: GLO
Reference year: 2021
Valid until: 2024
Classification: Systems / Textiles, furnitures and other interiors
LCI method principle: Attributional
LCI method approaches: Allocation - market value
Completeness: All relevant flows quantified
Project: Provision of process-based 3.0 Environmental Footprint-compliant life cycle inventory datasets - Apparel 2 - contract number 070201/2020/840292/SER/ENV.B.1
Generated by: Metsims Sustainability Consulting
Owner: PRé Sustainability B.V.
Compliance: ILCD Data Network - Entry-level; Suggestions for updating the PEF method 2019; ISO 14040 Environmental Management – Life Cycle Assessment – Principles and Framework, 2006; ISO 14044:2006. Environmental Management – Life Cycle Assessment – Requirements and guidelines.; Environmental Footprint 3.1
Review: Dependent internal review by Avraam Symeonidis, Emilia Moreno Ruiz; Independent review panel by Madhuri Nigam
Data quality: Overall quality: Very good; Time representativeness: Very good; Geographical representativeness: Good; Technological representativeness: Very good; Precision: Very good; Methodological appropriateness and consistency: Not applicable
Amounts: no units in this file; such an amount is in the reference unit of its flow, which a separate flow dataset defines
copyright: true
licenseType: Free of charge for some user types or use types
accessRestrictions: Free of charge for all final users implementing a regular Product Environmental Footprint (PEF) studies and Organisation Environmental Footprint (OEF) studies exclusively under the specified Product groups and sectors as defined in the Product Environmental Footprint Category Rules (PEFCR) and Organisation Environmental Footprint Sectorial Rules (OEFSR) listed in http://ec.europa.eu/environment/eussd/smgp/PEFCR_OEFSR.htm and in accordance with the terms and conditions of the EULA (available at https://ecoinvent.lca-data.com/) exclusively until 31st December 2024. Any use of this dataset or any derivative data not within the specific context of one of the PEF/OEF projects or after the end of 2024 is not permitted.

## General comment
Notice: this data set supersedes the EF3.0-compliant version (see link under "preceding data set version" below calculated with the EF3.0). The life cycle inventory is not changed from the original EF3.0 data set. The LCIA results are calculated based on the EF3.1 methods which provide updated characterisation factors in the following impact categories: Climate Change, Ecotoxicity freshwater, Photochemical Ozone Formation, Acidification, Human Toxicity non-cancer, and Human Toxicity cancer. The review report and the data quality ratings refer to the original results. The data set has been updated by the European Commission on the basis of the original EF3.0 data set delivered by the data provider.The process covers textile hotmelt glue lamination process for 1 kg laminated fabric. Two or more fabric are laminated each other by water based glues. While processing the water is evaporated from lamination adhesive.

This production process data represent a 3 time laminated 4 layered fabric. For the certain layered fabric, aveage layer number of layer must be considered. For the certain layered fabric, aveage layer number of layer must be considered. Adhesive consumption is included to dataset as mix from following chemicals:
1. Latex
2. Polyurethane foam
3. Acrylic resin

Waste rate is assumed as 1 kg at 1 tonne production.

## Technology and included processes
This dataset consists of 2-5 layers water based glue lamination process mixture.

This dataset covers machine electricity consumption, water based lamination adhesives (water based PU, Latex, Acrylic adhesive mix), air emissions (water).

A user employing this service within their models should use it along with an 1.001 kg of material to produce an 1 kg of laminated fabric. 0.001 kg of waste shall also be added. A user is responsible for defining the nature of the recycling and/or disposal of this waste. Additionally, a user is responsible for accounting transportation expenditures for all extra input and output materials that need to be modelled alongside this service.*

*Waste rate is assumed.

## Parameters
- kg_0: 0.0666667
  Mass in kg, for latex, natural, virgin // latex production, natural, virgin // glo; Articulated lorry transport, Euro 4, Total weight >32 t; EU+EFTA+UK
- km_0: 1000.5
  Distance in km, for latex, natural, virgin // latex production, natural, virgin // glo; Articulated lorry transport, Euro 4, Total weight >32 t; EU+EFTA+UK
- kg_km_0: 66.7; = kg_0*km_0
  Transport amount in km*km, for latex, natural, virgin // latex production, natural, virgin // glo; Articulated lorry transport, Euro 4, Total weight >32 t; EU+EFTA+UK
- kg_1: 0.0666667
  Mass in kg, for polyurethane foam // polyurethane foam production // glo; Articulated lorry transport, Euro 4, Total weight >32 t; EU+EFTA+UK
- km_1: 1000.5
  Distance in km, for polyurethane foam // polyurethane foam production // glo; Articulated lorry transport, Euro 4, Total weight >32 t; EU+EFTA+UK
- kg_km_1: 66.7; = kg_1*km_1
  Transport amount in km*km, for polyurethane foam // polyurethane foam production // glo; Articulated lorry transport, Euro 4, Total weight >32 t; EU+EFTA+UK
- kg_2: 0.0666667
  Mass in kg, for resin, acrylic // resin, acrylic production // glo; Articulated lorry transport, Euro 4, Total weight >32 t; EU+EFTA+UK
- km_2: 1000.5
  Distance in km, for resin, acrylic // resin, acrylic production // glo; Articulated lorry transport, Euro 4, Total weight >32 t; EU+EFTA+UK
- kg_km_2: 66.7; = kg_2*km_2
  Transport amount in km*km, for resin, acrylic // resin, acrylic production // glo; Articulated lorry transport, Euro 4, Total weight >32 t; EU+EFTA+UK
- kg_3: 0.0666667
  Mass in kg, for latex, natural, virgin // latex production, natural, virgin // glo; Transoceanic ship, containers; GLO
- km_3: 18000
  Distance in km, for latex, natural, virgin // latex production, natural, virgin // glo; Transoceanic ship, containers; GLO
- kg_km_3: 1200; = kg_3*km_3
  Transport amount in km*km, for latex, natural, virgin // latex production, natural, virgin // glo; Transoceanic ship, containers; GLO
- kg_4: 0.0666667
  Mass in kg, for polyurethane foam // polyurethane foam production // glo; Transoceanic ship, containers; GLO
- km_4: 18000
  Distance in km, for polyurethane foam // polyurethane foam production // glo; Transoceanic ship, containers; GLO
- kg_km_4: 1200; = kg_4*km_4
  Transport amount in km*km, for polyurethane foam // polyurethane foam production // glo; Transoceanic ship, containers; GLO
- kg_5: 0.0666667
  Mass in kg, for resin, acrylic // resin, acrylic production // glo; Transoceanic ship, containers; GLO
- km_5: 18000
  Distance in km, for resin, acrylic // resin, acrylic production // glo; Transoceanic ship, containers; GLO
- kg_km_5: 1200; = kg_5*km_5
  Transport amount in km*km, for resin, acrylic // resin, acrylic production // glo; Transoceanic ship, containers; GLO

## Reference product
- lamination, water based glue, 3 times (for 4 layers) // lamination, water based glue, 3 times (for 4 layers) // glo: 1

## Inputs
- Electricity from Electricity grid mix 1kV-60kV - AU: 0.3282
- Electricity from Electricity grid mix 1kV-60kV - EU+EFTA+UK: 4.8343
- Electricity from Electricity grid mix 1kV-60kV - NZ: 0.0625
- Electricity from Electricity grid mix 1kV-60kV - RAF: 1.0564
- Electricity from Electricity grid mix 1kV-60kV - RNA: 7.0747
- Electricity from Electricity grid mix 1kV-60kV - RSA: 2.4006
- Electricity from Electricity grid mix 1kV-60kV - RU: 1.4147
- Transport of latex, natural, virgin // latex production, natural, virgin // glo by Articulated lorry transport, Euro 4, Total weight >32 t - EU+EFTA+UK: 66.7; = kg_km_0
- Transport of polyurethane foam // polyurethane foam production // glo by Articulated lorry transport, Euro 4, Total weight >32 t - EU+EFTA+UK: 66.7; = kg_km_1
- Transport of resin, acrylic // resin, acrylic production // glo by Articulated lorry transport, Euro 4, Total weight >32 t - EU+EFTA+UK: 66.7; = kg_km_2
- Transport of latex, natural, virgin // latex production, natural, virgin // glo by Transoceanic ship, containers - GLO: 1200; = kg_km_3
- Transport of polyurethane foam // polyurethane foam production // glo by Transoceanic ship, containers - GLO: 1200; = kg_km_4
- Transport of resin, acrylic // resin, acrylic production // glo by Transoceanic ship, containers - GLO: 1200; = kg_km_5
- Electricity from Electricity grid mix 1kV-60kV - CN: 7.24896
- Electricity from Electricity grid mix 1kV-60kV - RAS w/o CN: 7.94224
- lamination, water based glue, 3 times (for 4 layers) // lamination, water based glue, 3 times (for 4 layers) // glo, blackbox: 1
- lamination, water based glue, 3 times (for 4 layers) // lamination, water based glue, 3 times (for 4 layers) // glo, elementary: 1

## Impact indicators
- Eutrophication marine: 0.00687018
- Ecotoxicity, freshwater: 46.8907
- Land use: 31.235
- Water use: 2.29603
- Resource use, minerals and metals: 6.19052e-6
- Resource use, fossils: 91.4659
- Climate change: 7.41629
- Ozone depletion: 1.68399e-8
- Human toxicity, cancer: 3.37978e-9
- Human toxicity, non-cancer: 4.17296e-8
- EF-particulate Matter: 1.56523e-6
- Ionising radiation, human health: 0.450091
- Photochemical ozone formation - human health: 0.0200198
- Acidification: 0.0443521
- Eutrophication, terrestrial: 0.0710793
- Eutrophication, freshwater: 3.07326e-5

## Deviations from the LCI method principle
The background data uses:
- the \xe2\x80\x9cRecycled content cut-off\xe2\x80\x9d approach to allocate end-of-life by-products and secondary materials. This allocation is explained in the description of the recycled content system model (http://www.ecoinvent.org/database/system-models-in-ecoinvent-3/cut-off-system-model/allocation-cut-off-by-classification.html).
OR
- EF compliant data

## Deviations from the LCI method approaches
Background data:
- the \xe2\x80\x9cRecycled content cut-off\xe2\x80\x9d approach to allocate end-of-life by-products and secondary materials. This allocation is explained in the description of the recycled content system model (http://www.ecoinvent.org/database/system-models-in-ecoinvent-3/cut-off-system-model/allocation-cut-off-by-classification.html). The ecoinvent database mostly relies on “Allocation – market values” apart for few exceptions particularly in the energy sector. ecoinvent energy data is replaced with EF3.0 core data as per the EF guidelines version 2.0.
OR
- EF compliant data

## Modelling constants
All modelling constants follow the requirements listed in the Tender Specifications 070201/2020/SER/ENV.B1. Completeness: There are no intentional cut-offs in the inventory no matter how small their contribution to all the EF impact categories is. Eventual cut-offs are in compliance with the Guide for EF compliant data sets (JRC 2020), i.e. only if below the 3% cut-off rule. Water use: water use is modelled at country level using separate flows for water withdrawal, water release and water evaporation. Handling multi-functional processes: the following PEF multi- functionality decision hierarchy is applied for resolving all multi- functionality problems: (1) subdivision or system expansion; (2) allocation based on a relevant underlying physical relationship (substitution may apply here); (3) allocation based on some other relationship. Direct land use change: GHG emissions from direct LUC allocated to good/service for 20 years after the LUC occurs, with IPCC default values. Carbon storage and delayed emissions: credits associated with temporary (carbon) storage or delayed emissions up to 300 years are not be considered. Emissions off-setting: are not included. Capital goods (including infrastructures) and their End of life: they are included. System boundaries: system boundaries include all processes linked to the product supply chain (e.g. maintenance). Time period: emissions and removals are modelled as if released or removed at the beginning of the assessment method. Fossil and biogenic carbon emissions and removals: removals and emissions are modelled as follows: All GHG emissions from fossil fuels (including peat and limestone) are modelled consistently with the most updated ILCD list of elementary flows. The non-fossil (biogenic) carbon flows are modelled consistently with the most updated ILCD list of elementary flows.

## Cut-off and completeness
There are no intentional cut-offs in the inventory no matter how small their contribution to all the EF impact categories is. Eventual cut-offs are in compliance with the Guide for EF compliant data sets (JRC 2020), i.e. only if below the 3% cut-off rule. The dataset dry mass and water balance has been checked to ensure the inventory is complete. Capital goods (e.g. infrastructure) and their end-of-life are included.

## Data selection and combination
These datasets include, in both their foreground and background data, links to EF3.0 compliant data.
The relevant background data on energy, transport, and End of Life are from the LCDN data node (http://lcdn.thinkstep.com/Node/).
All other background data in the supply of this product for which no EF3.0 process was available are from ecoinvent v3.7 database (www.ecoinvent.org) or other data sources.

## Data treatment and extrapolations
Several data sources have been used to model the inventory.

## Review details
Internal reviews have been asked to review the plausibility of the unit process, LCIA scores, and DQRs. Internal reviewers have also been asked to review the data for EF compliancy. The consortium is therefore responsible for aspects such as compliancy with the ILCD format, including validation in Look@LCI, and nomenclature.
Internal reviwers have been asked to judge based on the process name, that the unit process models in a complete and representative way the process in the requested location. The review encompassed the plausability of:
- exchanges with nature (elementary flows) as well as exchanges such as product and waste flows.
- meta information (general comment, technology comment, system boundaries, allocation, cut-off rules, etc.). Reviewers were asked to judge if the provided information is enough to understand the content of the process.
- LCIA scores
- DQRs including precision, technology, time and geography. As well as the overall DQR.
External reviewers have been asked to provide their expertise in the field of interest. External reviewers have been asked to review the unit process, including eventual methodological choices, the LCIA scores (provided with contribution scores as well), and DQRs. External reviewers have been provided all the information in a tool developed by the consortium for the purpose of this project.
External reviewers have been asked to judge based on the process name, that the unit process models in a complete and representative way the process in the requested location. The review encompassed:
- Plausability and completeness of exchanges with nature (elementary flows) as well as exchanges such as product and waste flows.
- Review of meta information (general comment, technology comment, system boundaries, allocation, cut-off rules, etc.). Reviewers were asked to judge if the provided information is enough to understand the content of the process.
- Review of properties (biogenic carbon and water content).
- Review of allocation keys.
- Plausability of LCIA scores calculated by the consortium.
- Plausability of DQRs including precision, technology, time and geography. As well as the overall DQR.

## Data sources
- Background Data for Representative products and organisations. EF 3.0 compliant (data stock)
- Fung, W. (2002). Coated and laminated textiles (Vol. 23). Woodhead Publishing.
- Singha, K. (2012). A review on coating & lamination in textiles: processes and applications. American Journal of Polymer Science, 2(3), 39-49.
- Kecin, İ. (2018). Teknik Tekstil için Laminasyon Poliüretanları, https://www.turkchem.net/teknik-tekstil-icin-laminasyon-poliuretanlari.html, Access Date: 09.04.2021
- Fries, J. A. (1983). Adhesives for fabric lamination. Journal of Coated Fabrics, 12(3), 174-186.
- Water-Based Adhesives, https://www.henkel-adhesives.com/pk/en/products/industrial-adhesives/water-based-adhesives.html, Access Date: 09.04.2021
- WATER-BASED DRY LAMINATION ADHESIVE FOR LAMINATING FILM, https://www.sinogracechem.com/water-based-dry-lamination-adhesive-for-laminating-film_p391.html, Access Date: 09.04.2021
- Laminating Machine For Blanket, https://www.kuntai-group.com/laminating-machine/water-based-glue-laminating-machine/laminating-machine-for-blanket.html, Web Access: 10.02.2021
- Velcro Abrasive Laminating Machine, https://www.kuntai-group.com/laminating-machine/water-based-glue-laminating-machine/velcro-abrasive-laminating-machine.html, Web Access: 10.02.2021
- Shoe Material Laminating Machine, https://www.kuntai-group.com/laminating-machine/water-based-glue-laminating-machine/shoe-material-laminating-machine.html, Web Access: 10.02.2021
- EVA Foam Laminating Machine, https://www.kuntai-group.com/laminating-machine/water-based-glue-laminating-machine/eva-foam-laminating-machine.html, Web Access: 10.02.2021
- Mesh Belt Type Water Based Glue Laminating Machine, https://www.kuntai-group.com/laminating-machine/water-based-glue-laminating-machine/mesh-belt-type-water-based-glue-laminating.html, Web Access: 10.02.2021
- Mesh Belt Type Laminating Machine, https://www.kuntai-group.com/laminating-machine/water-based-glue-laminating-machine/mesh-belt-type-laminating-machine.html, Web Access: 10.02.2021
- Shoemaking Material Laminating Machine, https://www.kuntai-group.com/laminating-machine/water-based-glue-laminating-machine/shoemaking-material-laminating-machine.html, Web Access: 10.02.2021
- Factory Sale Shoe Material Laminating Machine, https://www.kuntai-group.com/laminating-machine/water-based-glue-laminating-machine/factory-sale-shoe-material-laminating-machine.html, Web Access: 10.02.2021
- CE Certificated High Quality Fabric Foam Lamination Machine, https://www.kuntai-group.com/laminating-machine/water-based-glue-laminating-machine/ce-certificated-high-quality-fabric-foam.html, Web Access: 10.02.2021
- Garment Materials Application Vertical Type Water Based Glue Laminating Machine, https://www.kuntai-group.com/laminating-machine/water-based-glue-laminating-machine/garment-materials-application-vertical-type.html, Web Access: 10.02.2021
- Fabric Water Based Glue Lamination Machine Distributor, https://www.kuntai-group.com/laminating-machine/water-based-glue-laminating-machine/fabric-water-based-glue-lamination-machine.html, Web Access: 10.02.2021
- Horizontal Mesh Belt Lamination Machine, Laminating Machine, https://www.kuntai-group.com/laminating-machine/water-based-glue-laminating-machine/horizontal-mesh-belt-lamination-machine-lamin.html, Web Access: 10.02.2021

## Intended applications
Implementation of regular Product Environmental Footprint (PEF) studies and Organisation Environmental Footprint (OEF) studies exclusively under the specified Product groups and sectors as defined in the Product Environmental Footprint Category Rules (PEFCR) and Organisation Environmental Footprint Sectorial Rules (OEFSR) listed in http://ec.europa.eu/environment/eussd/smgp/PEFCR_OEFSR.htm
