# bonding, mechanical, spun-bond (hydroentanglement), non-woven fabric; technology mix; production mix, at plant; service (raw materials excluded)

Dataset: ILCD process, Partly terminated system
Geography: GLO
Reference year: 2021
Valid until: 2024
Classification: Systems / Textiles, furnitures and other interiors
LCI method principle: Attributional
LCI method approaches: Allocation - market value
Completeness: All relevant flows quantified
Project: Provision of process-based 3.0 Environmental Footprint-compliant life cycle inventory datasets - Apparel 1 - contract number 070201/2020/840291/SER/ENV.B.1
Generated by: Life Cycle Indonesia
Owner: PRé Sustainability B.V.
Compliance: ILCD Data Network - Entry-level; Suggestions for updating the PEF method 2019; ISO 14040 Environmental Management – Life Cycle Assessment – Principles and Framework, 2006; ISO 14044:2006. Environmental Management – Life Cycle Assessment – Requirements and guidelines.; Environmental Footprint 3.1
Review: Dependent internal review by Avraam Symeonidis, Emilia Moreno Ruiz; Independent review panel by Fábio Valebona
Data quality: Overall quality: Very good; Time representativeness: Very good; Geographical representativeness: Good; Technological representativeness: Very good; Precision: Good; Methodological appropriateness and consistency: Not applicable
Amounts: no units in this file; such an amount is in the reference unit of its flow, which a separate flow dataset defines
copyright: true
licenseType: Free of charge for some user types or use types
accessRestrictions: Free of charge for all final users implementing a regular Product Environmental Footprint (PEF) studies and Organisation Environmental Footprint (OEF) studies exclusively under the specified Product groups and sectors as defined in the Product Environmental Footprint Category Rules (PEFCR) and Organisation Environmental Footprint Sectorial Rules (OEFSR) listed in http://ec.europa.eu/environment/eussd/smgp/PEFCR_OEFSR.htm and in accordance with the terms and conditions of the EULA (available at https://ecoinvent.lca-data.com/) exclusively until 31st December 2024. Any use of this dataset or any derivative data not within the specific context of one of the PEF/OEF projects or after the end of 2024 is not permitted.

## General comment
Notice: this data set supersedes the EF3.0-compliant version (see link under "preceding data set version" below calculated with the EF3.0). The life cycle inventory is not changed from the original EF3.0 data set. The LCIA results are calculated based on the EF3.1 methods which provide updated characterisation factors in the following impact categories: Climate Change, Ecotoxicity freshwater, Photochemical Ozone Formation, Acidification, Human Toxicity non-cancer, and Human Toxicity cancer. The review report and the data quality ratings refer to the original results. The data set has been updated by the European Commission on the basis of the original EF3.0 data set delivered by the data provider.Non-woven fabric can be produced from mechanical hydroentanglement bonding process. Virtually all polymeric fine fibres of a wide range of dimensions and high specific surface area which are flexible, deformable, and hydrophilic materials are compatible with hydroentanglement. Polypropylene, polyamide, polyethylene, polyester, nylon fibres, acrylics, Kevlar, polytetrafluroethylene, viscose rayon, and cotton fibres can be hydroentangled. Effective hydroentanglement requires uniform and rapid wetting of the web. The choice of spin finish is particularly important to ensure proper wetting-out of hydrophobic fibres such as PP and to minimise foaming during the process as the finish is removed in the waste water. The final products have good dimensional stability, high drape, non-abrasiveness, agreeable handle, and great quality/weight characterstics, but the wash strength of hydroentangled fabrics are extensively lower than that of woven or knitted fabrics. Hydroentangled fabrics can be further finished, usually dyed and/or printed, treated with binders to allow for wash durability, or fire retardants can be applied to resist burning. The fabric can also be treated by antimicrobial agents to enhance resistance against microorganisms. Hydroentangled fabrics are usually used for wipes, washable domestics fabrics (e.g. bedsheets, napkins, and tablecloths), high-temperature protective clothing, artificial leather, surgical fabrics, medical gauze, linings and clothing, filtration, and automotive products.

References:
Russel, S.J. 2007. Handbook of Nonwovens. England: Woodhead Publishing Limited. pp 288-293
Cheema, Muhammad Shahbaz. 2016. "DEVELOPMENT OF HYDROENTANGLED NONWOVEN STRUCTURES FOR FASHION GARMENTS".Thesis. Institute of Materials Research and Innovation (IMRI), University of Bolton, United Kingdom.
Khartik, T., dkk. 2016. Non-woven - Process, Structure, Properties and Applications. New Delhi: Woodhead Publishing India. pp 124-132

## Technology and included processes
Hydroentanglement is a mechanical process, which is employed in order to interlock the fibres in a web structure, by the use of fine and highly pressurised water jets. High pressure of the water jets pushes the fibres from the top of the web into the interior of the web structure, which forms wires and results in the rearrangement and intermingling of the fibres. It is basically an energy transfer process that forces the fibres to interlock and give strength to the resultant fabric (Cheema, 2016).

A curtain of multiple high-pressure columnar water jets is produced by pumping water through capillary cone-shaped nozzles in a jet strip clamped into an injector (or manifold). These high-velocity jets are directed at a pre-formed web (the target) supported on a moving conveyor or ‘wire’, which may be a flat bed or cylindrical surface. Fibre entanglements are introduced by the combined effects of the incident water jets and the turbulent water created in the web which intertwines neighbouring fibres. The conveyor sleeve being permeable enables most of the de-energised water to be drawn into the vacuum box for recycling and reuse. Some of the remaining process water continues with the web, some drains from the side of the support surface and some is atomised depending on the water pressure. Normally, multiple injectors are used in sequence to produce a fully bonded fabric. Immediately after the fabric is hydroentangled, a proportion of the water held interstitially within the hydroentangled fabric is mechanically removed by suction, which for synthetic fibres is quite effective in reducing the moisture content to well below 100%. For cellulosics and other hygroscopic fibres, the water content is much higher even after mechanical extraction, which places a high demand on the subsequent drying process. Drum drying, can drying and through-air flat conveyor drying are all found in operation although through-air drum drying is the most common solution (Russel, 2007).

At the end of the production line, the final hydroentangled fabrics receive some other chemical or physical treatment to provide special characteristics. The finisihing process of final hydroentangled fabrics are flame retardant, rewet agents, hydrophobic agents, coloration, and printing (Khartik, 2016).

The model represents the process of bonding, hence the input raw materials are not included in the model. The user will use this dataset along with the input raw materials. Other supporting materials entering the process (e.g. make up water) are included as well as energy uses (e.g. electricity and natural gas), infrastructure and waste. There is no direct emission to air and soil, while the emissions to water are BOD, COD, and TSS in this process. In the model, the wastewater treatment process to recycle the water (closed-loop system) and the finishing process is not included in the scope of this dataset.

References:
Cheema, Muhammad Shahbaz. 2016. "DEVELOPMENT OF HYDROENTANGLED NONWOVEN STRUCTURES FOR FASHION GARMENTS".Thesis. Institute of Materials Research and Innovation (IMRI), University of Bolton, United Kingdom. pp 43
Russel, S.J. 2007. Handbook of Nonwovens. England: Woodhead Publishing Limited. pp 288-293
Khartik, T., dkk. 2016. Non-woven - Process, Structure, Properties and Applications. New Delhi: Woodhead Publishing India. pp 130-131

## Parameters
- kg_0: 0.000276326
  Mass in kg, for high temperature lubrication grease // high temperature lubrication grease production // eu+efta+uk; Articulated lorry transport, Euro 4, Total weight >32 t; EU+EFTA+UK
- km_0: 998.821
  Distance in km, for high temperature lubrication grease // high temperature lubrication grease production // eu+efta+uk; Articulated lorry transport, Euro 4, Total weight >32 t; EU+EFTA+UK
- kg_km_0: 0.276; = kg_0*km_0
  Transport amount in km*km, for high temperature lubrication grease // high temperature lubrication grease production // eu+efta+uk; Articulated lorry transport, Euro 4, Total weight >32 t; EU+EFTA+UK
- kg_1: 0.000276326
  Mass in kg, for high temperature lubrication grease // high temperature lubrication grease production // eu+efta+uk; Transoceanic ship, containers; GLO
- km_1: 17986
  Distance in km, for high temperature lubrication grease // high temperature lubrication grease production // eu+efta+uk; Transoceanic ship, containers; GLO
- kg_km_1: 4.97; = kg_1*km_1
  Transport amount in km*km, for high temperature lubrication grease // high temperature lubrication grease production // eu+efta+uk; Transoceanic ship, containers; GLO

## Reference product
- non-woven fabric // bonding, mechanical, spun-bond (hydroentanglement), non-woven fabric // glo: 1

## Inputs
- Electricity from Electricity grid mix 1kV-60kV - AU: 0.0737
- Electricity from Electricity grid mix 1kV-60kV - EU+EFTA+UK: 1.0864
- Electricity from Electricity grid mix 1kV-60kV - NZ: 0.0141
- Electricity from Electricity grid mix 1kV-60kV - RAF: 0.2374
- Electricity from Electricity grid mix 1kV-60kV - RNA: 1.5899
- Electricity from Electricity grid mix 1kV-60kV - RSA: 0.5395
- Electricity from Electricity grid mix 1kV-60kV - RU: 0.3179
- Transport of high temperature lubrication grease // high temperature lubrication grease production // eu+efta+uk by Articulated lorry transport, Euro 4, Total weight >32 t - EU+EFTA+UK: 0.276; = kg_km_0
- Thermal energy (MJ) from Thermal energy from natural gas - EU+EFTA+UK: 1.18291
- Thermal energy (MJ) from Thermal energy from natural gas - ROW: 3.05952
- Transport of high temperature lubrication grease // high temperature lubrication grease production // eu+efta+uk by Transoceanic ship, containers - GLO: 4.97; = kg_km_1
- Electricity from Electricity grid mix 1kV-60kV - CN: 1.62905
- Electricity from Electricity grid mix 1kV-60kV - RAS w/o CN: 1.78485
- non-woven fabric // bonding, mechanical, spun-bond (hydroentanglement), non-woven fabric // glo, blackbox: 1
- non-woven fabric // bonding, mechanical, spun-bond (hydroentanglement), non-woven fabric // glo, elementary: 1

## Impact indicators
- Eutrophication marine: 0.00134769
- Ecotoxicity, freshwater: 6.53781
- Land use: 1.78795
- Water use: 0.474563
- Resource use, minerals and metals: 4.18659e-7
- Resource use, fossils: 23.2169
- Climate change: 1.68669
- Ozone depletion: 1.36204e-10
- Human toxicity, cancer: 1.23404e-9
- Human toxicity, non-cancer: 8.09769e-9
- EF-particulate Matter: 3.33422e-7
- Ionising radiation, human health: 0.101203
- Photochemical ozone formation - human health: 0.00410285
- Acidification: 0.00917559
- Eutrophication, terrestrial: 0.0146105
- Eutrophication, freshwater: 3.14945e-6

## Deviations from the LCI method principle
The background data uses:
- the \xe2\x80\x9cRecycled content cut-off\xe2\x80\x9d approach to allocate end-of-life by-products and secondary materials. This allocation is explained in the description of the recycled content system model (http://www.ecoinvent.org/database/system-models-in-ecoinvent-3/cut-off-system-model/allocation-cut-off-by-classification.html).
OR
- EF compliant data

## Deviations from the LCI method approaches
Background data:
- the \xe2\x80\x9cRecycled content cut-off\xe2\x80\x9d approach to allocate end-of-life by-products and secondary materials. This allocation is explained in the description of the recycled content system model (http://www.ecoinvent.org/database/system-models-in-ecoinvent-3/cut-off-system-model/allocation-cut-off-by-classification.html). The ecoinvent database mostly relies on “Allocation – market values” apart for few exceptions particularly in the energy sector. ecoinvent energy data is replaced with EF3.0 core data as per the EF guidelines version 2.0.
OR
- EF compliant data

## Modelling constants
All modelling constants follow the requirements listed in the Tender Specifications 070201/2020/SER/ENV.B1. Completeness: There are no intentional cut-offs in the inventory no matter how small their contribution to all the EF impact categories is. Eventual cut-offs are in compliance with the Guide for EF compliant data sets (JRC 2020), i.e. only if below the 3% cut-off rule. Water use: water use is modelled at country level using separate flows for water withdrawal, water release and water evaporation. Handling multi-functional processes: the following PEF multi- functionality decision hierarchy is applied for resolving all multi- functionality problems: (1) subdivision or system expansion; (2) allocation based on a relevant underlying physical relationship (substitution may apply here); (3) allocation based on some other relationship. Direct land use change: GHG emissions from direct LUC allocated to good/service for 20 years after the LUC occurs, with IPCC default values. Carbon storage and delayed emissions: credits associated with temporary (carbon) storage or delayed emissions up to 300 years are not be considered. Emissions off-setting: are not included. Capital goods (including infrastructures) and their End of life: they are included. System boundaries: system boundaries include all processes linked to the product supply chain (e.g. maintenance). Time period: emissions and removals are modelled as if released or removed at the beginning of the assessment method. Fossil and biogenic carbon emissions and removals: removals and emissions are modelled as follows: All GHG emissions from fossil fuels (including peat and limestone) are modelled consistently with the most updated ILCD list of elementary flows. The non-fossil (biogenic) carbon flows are modelled consistently with the most updated ILCD list of elementary flows.

## Cut-off and completeness
There are no intentional cut-offs in the inventory no matter how small their contribution to all the EF impact categories is. Eventual cut-offs are in compliance with the Guide for EF compliant data sets (JRC 2020), i.e. only if below the 3% cut-off rule. The dataset dry mass and water balance has been checked to ensure the inventory is complete. Capital goods (e.g. infrastructure) and their end-of-life are included.

## Data selection and combination
These datasets include, in both their foreground and background data, links to EF3.0 compliant data.
The relevant background data on energy, transport, and End of Life are from the LCDN data node (http://lcdn.thinkstep.com/Node/).
All other background data in the supply of this product for which no EF3.0 process was available are from ecoinvent v3.7 database (www.ecoinvent.org) or other data sources.

## Data treatment and extrapolations
Several data sources have been used to model the inventory.

## Review details
Internal reviews have been asked to review the plausibility of the unit process, LCIA scores, and DQRs. Internal reviewers have also been asked to review the data for EF compliancy. The consortium is therefore responsible for aspects such as compliancy with the ILCD format, including validation in Look@LCI, and nomenclature.
Internal reviwers have been asked to judge based on the process name, that the unit process models in a complete and representative way the process in the requested location. The review encompassed the plausability of:
- exchanges with nature (elementary flows) as well as exchanges such as product and waste flows.
- meta information (general comment, technology comment, system boundaries, allocation, cut-off rules, etc.). Reviewers were asked to judge if the provided information is enough to understand the content of the process.
- LCIA scores
- DQRs including precision, technology, time and geography. As well as the overall DQR.
External reviewers have been asked to provide their expertise in the field of interest. External reviewers have been asked to review the unit process, including eventual methodological choices, the LCIA scores (provided with contribution scores as well), and DQRs. External reviewers have been provided all the information in a tool developed by the consortium for the purpose of this project.
External reviewers have been asked to judge based on the process name, that the unit process models in a complete and representative way the process in the requested location. The review encompassed:
- Plausability and completeness of exchanges with nature (elementary flows) as well as exchanges such as product and waste flows.
- Review of meta information (general comment, technology comment, system boundaries, allocation, cut-off rules, etc.). Reviewers were asked to judge if the provided information is enough to understand the content of the process.
- Review of properties (biogenic carbon and water content).
- Review of allocation keys.
- Plausability of LCIA scores calculated by the consortium.
- Plausability of DQRs including precision, technology, time and geography. As well as the overall DQR.

## Data sources
- Background Data for Representative products and organisations. EF 3.0 compliant (data stock)
- Riway (2021), Spunlace Nonwoven Machine, E-mail Company, Ningbo Riway Nonwovens Tech Co., LTD, China
- UN Data (2018) Statistics Data for Lubricants Productions, http://data.un.org/Data.aspx?q=Lubricants&d=EDATA&f=cmID%3aLU, United Nations Statistics Division, Global

## Intended applications
Implementation of regular Product Environmental Footprint (PEF) studies and Organisation Environmental Footprint (OEF) studies exclusively under the specified Product groups and sectors as defined in the Product Environmental Footprint Category Rules (PEFCR) and Organisation Environmental Footprint Sectorial Rules (OEFSR) listed in http://ec.europa.eu/environment/eussd/smgp/PEFCR_OEFSR.htm
