# timber granulate, virgin; transportation and sieving; production mix, at plant; virgin material, measured as dry mass

Dataset: ILCD process, Partly terminated system
Geography: SE
Reference year: 2018
Valid until: 2024
Classification: Materials production / Wood
LCI method principle: Attributional
LCI method approaches: Allocation - market value
Completeness: All relevant flows quantified
Project: Provision of process-based 3.0 Environmental Footprint-compliant life cycle inventory datasets - Renewable materials - contract number 070201/2020/840085/SER/ENV.B.1
Generated by: ACV Brasil
Owner: ecoinvent
Compliance: ILCD Data Network - Entry-level; Suggestions for updating the PEF method 2019; ISO 14040 Environmental Management – Life Cycle Assessment – Principles and Framework, 2006; ISO 14044:2006. Environmental Management – Life Cycle Assessment – Requirements and guidelines.; Environmental Footprint 3.1
Review: Dependent internal review by Hans Blonk, Emilia Moreno Ruiz; Independent review panel by Jens Lansche
Data quality: Overall quality: Very good; Time representativeness: Very good; Geographical representativeness: Very good; Technological representativeness: Very good; Precision: Very good; Methodological appropriateness and consistency: Not applicable
Amounts: no units in this file; such an amount is in the reference unit of its flow, which a separate flow dataset defines
copyright: true
licenseType: Free of charge for some user types or use types
accessRestrictions: Free of charge for all final users implementing a regular Product Environmental Footprint (PEF) studies and Organisation Environmental Footprint (OEF) studies exclusively under the specified Product groups and sectors as defined in the Product Environmental Footprint Category Rules (PEFCR) and Organisation Environmental Footprint Sectorial Rules (OEFSR) listed in http://ec.europa.eu/environment/eussd/smgp/PEFCR_OEFSR.htm and in accordance with the terms and conditions of the EULA (available at https://ecoinvent.lca-data.com/) exclusively until 31st December 2024. Any use of this dataset or any derivative data not within the specific context of one of the PEF/OEF projects or after the end of 2024 is not permitted.

## General comment
Notice: this data set supersedes the EF3.0-compliant version (see link under "preceding data set version" below calculated with the EF3.0). The life cycle inventory is not changed from the original EF3.0 data set. The LCIA results are calculated based on the EF3.1 methods which provide updated characterisation factors in the following impact categories: Climate Change, Ecotoxicity freshwater, Photochemical Ozone Formation, Acidification, Human Toxicity non-cancer, and Human Toxicity cancer. The review report and the data quality ratings refer to the original results. The data set has been updated by the European Commission on the basis of the original EF3.0 data set delivered by the data provider.This dataset represents the production of 1 kg of timber granulates, which are the upcycling of sawdust produced as by-products of wood sawing at sawmills (Plosplan®, 2021). Wood granulates may be used for animal bedding.

## Technology and included processes
Sawdust is produced as a by-product of wood sawing. The sawdust is stored and transported within the plant through pneumatic mechanisms. Finally, the material is sieved.
This dataset is modelled according to the activity ‘sawing, softwood – CH’, valid from 2011 to 2013, published in the ecoinvent database 3.7.1. The dataset is updated with electricity and fuel requirements retrieved from CORRIM (2020). The unit process dataset (UPR) was subsequently allocated among the co-products ‘sawnwood, softwood, raw’, ‘bark’, ‘sawdust’ and ‘slab and siding’. All flows were allocated according to revenue prices, apart the input of Roundwood, which was allocated according to the volume of the co-products. Furthermore, the electricity requirements for pneumatic transportation and sieving are estimated from a cork granulate plant (Martins, 2018).
The activity starts with materials entering the process. Energy consumption, infrastructure and the treatment of waste are included.
References:
CORRIM – Consortium for Research on Renewable Industrial Materials (2020). Life cycle assessment for the production of southeastern softwood lumber. Available at: https://corrim.org/wp-content/uploads/2020/06/CORIRM-AWC-SE-Lumber.pdf
ecoinvent database version 3.7.1 – System model Undefined. Activity name: sawing, softwood. Geography: Switzerland. Time period: 2011-01-01 to 2013-12-31. Available at: https://v371.ecoquery.ecoinvent.org/Details/UPR/8BEDEF0E-564F-400F-8C46-D3E34945BACC/8B738EA0-F89E-4627-8679-433616064E82
Martins, D.F.M. (2018). Contributos para a conceção de uma unidade fabril de granulado de cortiça. Master thesis. Faculdade de Ciências e Tecnologia. Universidade Nova de Lisboa. Available at: core.ac.uk/download/pdf/303762413.pdf. Accessed on: 25/05/2021.
Plosplan® (2021). Residual wood. Upcycling. Available at: https://plospan.com/residual-wood/. Accessed on: 30/06/2021.

## Parameters
- kg_0: 2.07935e-5
  Mass in kg, for lubricating oil // lubricating oil production // eu+efta+uk; Articulated lorry transport, Euro 4, Total weight >32 t; EU+EFTA+UK
- km_0: 130
  Distance in km, for lubricating oil // lubricating oil production // eu+efta+uk; Articulated lorry transport, Euro 4, Total weight >32 t; EU+EFTA+UK
- kg_km_0: 0.00270315; = kg_0*km_0
  Transport amount in km*km, for lubricating oil // lubricating oil production // eu+efta+uk; Articulated lorry transport, Euro 4, Total weight >32 t; EU+EFTA+UK
- kg_1: 1.7
  Mass in kg, for softwood under bark // softwood forestry // se; Articulated lorry transport, Euro 4, Total weight >32 t; EU+EFTA+UK
- km_1: 76.4706
  Distance in km, for softwood under bark // softwood forestry // se; Articulated lorry transport, Euro 4, Total weight >32 t; EU+EFTA+UK
- kg_km_1: 130; = kg_1*km_1
  Transport amount in km*km, for softwood under bark // softwood forestry // se; Articulated lorry transport, Euro 4, Total weight >32 t; EU+EFTA+UK
- kg_2: 2.07935e-5
  Mass in kg, for lubricating oil // lubricating oil production // eu+efta+uk; Barge; EU+EFTA+UK
- km_2: 270
  Distance in km, for lubricating oil // lubricating oil production // eu+efta+uk; Barge; EU+EFTA+UK
- kg_km_2: 0.00561423; = kg_2*km_2
  Transport amount in km*km, for lubricating oil // lubricating oil production // eu+efta+uk; Barge; EU+EFTA+UK
- kg_3: 1.7
  Mass in kg, for softwood under bark // softwood forestry // se; Barge; EU+EFTA+UK
- km_3: 158.824
  Distance in km, for softwood under bark // softwood forestry // se; Barge; EU+EFTA+UK
- kg_km_3: 270; = kg_3*km_3
  Transport amount in km*km, for softwood under bark // softwood forestry // se; Barge; EU+EFTA+UK
- kg_4: 2.07935e-5
  Mass in kg, for lubricating oil // lubricating oil production // eu+efta+uk; Freight train, average; EU+EFTA+UK
- km_4: 240
  Distance in km, for lubricating oil // lubricating oil production // eu+efta+uk; Freight train, average; EU+EFTA+UK
- kg_km_4: 0.00499043; = kg_4*km_4
  Transport amount in km*km, for lubricating oil // lubricating oil production // eu+efta+uk; Freight train, average; EU+EFTA+UK
- kg_5: 1.7
  Mass in kg, for softwood under bark // softwood forestry // se; Freight train, average; EU+EFTA+UK
- km_5: 141.176
  Distance in km, for softwood under bark // softwood forestry // se; Freight train, average; EU+EFTA+UK
- kg_km_5: 240; = kg_5*km_5
  Transport amount in km*km, for softwood under bark // softwood forestry // se; Freight train, average; EU+EFTA+UK

## Reference product
- timber granulate, virgin // timber granulate, virgin // se: 1

## Inputs
- Electricity from Electricity grid mix 1kV-60kV - SE: 0.468008
- Transport of lubricating oil // lubricating oil production // eu+efta+uk by Articulated lorry transport, Euro 4, Total weight >32 t - EU+EFTA+UK: 0.00270315; = kg_km_0
- Transport of softwood under bark // softwood forestry // se by Articulated lorry transport, Euro 4, Total weight >32 t - EU+EFTA+UK: 130; = kg_km_1
- Transport of lubricating oil // lubricating oil production // eu+efta+uk by Barge - EU+EFTA+UK: 0.00561423; = kg_km_2
- Transport of softwood under bark // softwood forestry // se by Barge - EU+EFTA+UK: 270; = kg_km_3
- Transport of lubricating oil // lubricating oil production // eu+efta+uk by Freight train, average - EU+EFTA+UK: 0.00499043; = kg_km_4
- Transport of softwood under bark // softwood forestry // se by Freight train, average - EU+EFTA+UK: 240; = kg_km_5
- timber granulate, virgin // timber granulate, virgin // se, blackbox: 1
- timber granulate, virgin // timber granulate, virgin // se, elementary: 1

## Impact indicators
- Eutrophication marine: 0.000123228
- Ecotoxicity, freshwater: 0.461207
- Land use: 161.11
- Water use: 0.0447403
- Resource use, minerals and metals: 8.84796e-8
- Resource use, fossils: 1.17431
- Climate change: 0.0525001
- Ozone depletion: 7.55921e-11
- Human toxicity, cancer: 5.37653e-11
- Human toxicity, non-cancer: 3.86841e-10
- EF-particulate Matter: 4.10525e-9
- Ionising radiation, human health: 0.0243053
- Photochemical ozone formation - human health: 0.000454574
- Acidification: 0.000267756
- Eutrophication, terrestrial: 0.00117227
- Eutrophication, freshwater: 5.85631e-6

## Deviations from the LCI method principle
The background data uses:
- the \xe2\x80\x9cRecycled content cut-off\xe2\x80\x9d approach to allocate end-of-life by-products and secondary materials. This allocation is explained in the description of the recycled content system model (http://www.ecoinvent.org/database/system-models-in-ecoinvent-3/cut-off-system-model/allocation-cut-off-by-classification.html).
OR
- EF compliant data

## Deviations from the LCI method approaches
The sawing activity has been allocated among the co-products ‘sawnwood, softwood, raw’, ‘bark’, ‘sawdust’ and ‘slab and siding’. All flows were allocated according to revenue, apart from the input of Roundwood, which has been allocated according to the volume of the co-products.
Background data:
- the \xe2\x80\x9cRecycled content cut-off\xe2\x80\x9d approach to allocate end-of-life by-products and secondary materials. This allocation is explained in the description of the recycled content system model (http://www.ecoinvent.org/database/system-models-in-ecoinvent-3/cut-off-system-model/allocation-cut-off-by-classification.html). The ecoinvent database mostly relies on “Allocation – market values” apart for few exceptions particularly in the energy sector. ecoinvent energy data is replaced with EF3.0 core data as per the EF guidelines version 2.0.
OR
- EF compliant data

## Modelling constants
All modelling constants follow the requirements listed in the Tender Specifications 070201/2020/SER/ENV.B1. Completeness: There are no intentional cut-offs in the inventory no matter how small their contribution to all the EF impact categories is. Eventual cut-offs are in compliance with the Guide for EF compliant data sets (JRC 2020), i.e. only if below the 3% cut-off rule. Water use: water use is modelled at country level using separate flows for water withdrawal, water release and water evaporation. Handling multi-functional processes: the following PEF multi- functionality decision hierarchy is applied for resolving all multi- functionality problems: (1) subdivision or system expansion; (2) allocation based on a relevant underlying physical relationship (substitution may apply here); (3) allocation based on some other relationship. Direct land use change: GHG emissions from direct LUC allocated to good/service for 20 years after the LUC occurs, with IPCC default values. Carbon storage and delayed emissions: credits associated with temporary (carbon) storage or delayed emissions up to 300 years are not be considered. Emissions off-setting: are not included. Capital goods (including infrastructures) and their End of life: they are included. System boundaries: system boundaries include all processes linked to the product supply chain (e.g. maintenance). Time period: emissions and removals are modelled as if released or removed at the beginning of the assessment method. Fossil and biogenic carbon emissions and removals: removals and emissions are modelled as follows: All GHG emissions from fossil fuels (including peat and limestone) are modelled consistently with the most updated ILCD list of elementary flows. The non-fossil (biogenic) carbon flows are modelled consistently with the most updated ILCD list of elementary flows.

## Cut-off and completeness
There are no intentional cut-offs in the inventory no matter how small their contribution to all the EF impact categories is. Eventual cut-offs are in compliance with the Guide for EF compliant data sets (JRC 2020), i.e. only if below the 3% cut-off rule. The dataset dry mass and water balance has been checked to ensure the inventory is complete. Capital goods (e.g. infrastructure) and their end-of-life are included.

## Data selection and combination
These datasets include, in both their foreground and background data, links to EF3.0 compliant data.
The relevant background data on energy, transport, and End of Life are from the LCDN data node (http://lcdn.thinkstep.com/Node/).
All other background data in the supply of this product for which no EF3.0 process was available are from ecoinvent v3.7 database (www.ecoinvent.org) or other data sources.

## Data treatment and extrapolations
Several data sources have been used to model the inventory.

## Review details
Internal reviews have been asked to review the plausibility of the unit process, LCIA scores, and DQRs. Internal reviewers have also been asked to review the data for EF compliancy. The consortium is therefore responsible for aspects such as compliancy with the ILCD format, including validation in Look@LCI, and nomenclature.
Internal reviwers have been asked to judge based on the process name, that the unit process models in a complete and representative way the process in the requested location. The review encompassed the plausability of:
- exchanges with nature (elementary flows) as well as exchanges such as product and waste flows.
- meta information (general comment, technology comment, system boundaries, allocation, cut-off rules, etc.). Reviewers were asked to judge if the provided information is enough to understand the content of the process.
- LCIA scores
- DQRs including precision, technology, time and geography. As well as the overall DQR.
External reviewers have been asked to provide their expertise in the field of interest. External reviewers have been asked to review the unit process, including eventual methodological choices, the LCIA scores (provided with contribution scores as well), and DQRs. External reviewers have been provided all the information in a tool developed by the consortium for the purpose of this project.
External reviewers have been asked to judge based on the process name, that the unit process models in a complete and representative way the process in the requested location. The review encompassed:
- Plausability and completeness of exchanges with nature (elementary flows) as well as exchanges such as product and waste flows.
- Review of meta information (general comment, technology comment, system boundaries, allocation, cut-off rules, etc.). Reviewers were asked to judge if the provided information is enough to understand the content of the process.
- Review of properties (biogenic carbon and water content).
- Review of allocation keys.
- Plausability of LCIA scores calculated by the consortium.
- Plausability of DQRs including precision, technology, time and geography. As well as the overall DQR.

## Data sources
- Background Data for Representative products and organisations. EF 3.0 compliant (data stock)
- CORRIM – Consortium for Research on Renewable Industrial Materials (2020). Life cycle assessment for the production of southeastern softwood lumber. Available at: https://corrim.org/wp-content/uploads/2020/06/CORIRM-AWC-SE-Lumber.pdf
- ecoinvent database version 3.7.1 – System model Undefined. Activity name: sawing, softwood. Geography: Switzerland. Time period: 2011-01-01 to 2013-12-31. Available at: https://v371.ecoquery.ecoinvent.org/Details/UPR/8BEDEF0E-564F-400F-8C46-D3E34945BACC/8B738EA0-F89E-4627-8679-433616064E82
- Martins, D.F.M. (2018). Contributos para a conceção de uma unidade fabril de granulado de cortiça. Master thesis. Faculdade de Ciências e Tecnologia. Universidade Nova de Lisboa. Available at: core.ac.uk/download/pdf/303762413.pdf. Accessed on: 25/05/2021.
- Plosplan® (2021). Residual wood. Upcycling. Available at: https://plospan.com/residual-wood/. Accessed on: 30/06/2021.

## Intended applications
Implementation of regular Product Environmental Footprint (PEF) studies and Organisation Environmental Footprint (OEF) studies exclusively under the specified Product groups and sectors as defined in the Product Environmental Footprint Category Rules (PEFCR) and Organisation Environmental Footprint Sectorial Rules (OEFSR) listed in http://ec.europa.eu/environment/eussd/smgp/PEFCR_OEFSR.htm
