# waterproofing; waterproofing, silicone spray; production mix, at plant; service, item(s) = pair

Dataset: ILCD process, Partly terminated system
Geography: GLO
Reference year: 2021
Valid until: 2024
Classification: Systems / Textiles, furnitures and other interiors
LCI method principle: Attributional
LCI method approaches: Allocation - market value
Completeness: All relevant flows quantified
Project: Provision of process-based 3.0 Environmental Footprint-compliant life cycle inventory datasets - Others - contract number 070201/2020/840235/SER/ENV.B.1
Generated by: Life Cycle Indonesia
Owner: PRé Sustainability B.V.
Compliance: ILCD Data Network - Entry-level; Suggestions for updating the PEF method 2019; ISO 14040 Environmental Management – Life Cycle Assessment – Principles and Framework, 2006; ISO 14044:2006. Environmental Management – Life Cycle Assessment – Requirements and guidelines.; Environmental Footprint 3.1
Review: Dependent internal review by Avraam Symeonidis, Emilia Moreno Ruiz; Independent review panel by Fábio Valebona
Data quality: Overall quality: Good; Time representativeness: Very good; Geographical representativeness: Good; Technological representativeness: Good; Precision: Good; Methodological appropriateness and consistency: Not applicable
Amounts: no units in this file; such an amount is in the reference unit of its flow, which a separate flow dataset defines
copyright: true
licenseType: Free of charge for some user types or use types
accessRestrictions: Free of charge for all final users implementing a regular Product Environmental Footprint (PEF) studies and Organisation Environmental Footprint (OEF) studies exclusively under the specified Product groups and sectors as defined in the Product Environmental Footprint Category Rules (PEFCR) and Organisation Environmental Footprint Sectorial Rules (OEFSR) listed in http://ec.europa.eu/environment/eussd/smgp/PEFCR_OEFSR.htm and in accordance with the terms and conditions of the EULA (available at https://ecoinvent.lca-data.com/) exclusively until 31st December 2024. Any use of this dataset or any derivative data not within the specific context of one of the PEF/OEF projects or after the end of 2024 is not permitted.

## General comment
Notice: this data set supersedes the EF3.0-compliant version (see link under "preceding data set version" below calculated with the EF3.0). The life cycle inventory is not changed from the original EF3.0 data set. The LCIA results are calculated based on the EF3.1 methods which provide updated characterisation factors in the following impact categories: Climate Change, Ecotoxicity freshwater, Photochemical Ozone Formation, Acidification, Human Toxicity non-cancer, and Human Toxicity cancer. The review report and the data quality ratings refer to the original results. The data set has been updated by the European Commission on the basis of the original EF3.0 data set delivered by the data provider.The term ‘waterproof’ is normally used to represent the conditions where a textile material (treated or untreated) can prevent the absorption and penetration of water into its structure. Thus a waterproof surface provides a barrier to water under all practical end-use conditions. In absolute terms, a waterproof fabric is fully resistant to penetration by water, implying that the fabric water penetration resistance is equivalent to its hydraulic bursting strength (Choudhury, 2017).

Several methods and material can be used for waterproofing shoes. Waterproof spray or wax (dubbin wax) can be used to waterproof your shoes. Several materials such as silicone, beeswax, candle wax, and vaseline can be used for waterproofing shoes (Shoe Zone, 2019).

Choudhury, Asim Kumar Roy. 2017. Principle of textile finishing. United Kingdom: Elsevier. pp 149-151
Shoe Zone. 2019. How to Waterproof Boots & Shoes: Your Complete Guide, https://www.shoezone.com/Blog/how-to-waterproof-boots-shoes-your-complete-guide. Shoe Zone Retail Limited

## Technology and included processes
Some waterproof sprays are sillicone based and it is good for all types of shoes. Before applying waterproofing solution or spray, it is best to wash or clean the shoes (Shoe Zone, 2019). Second application (second layer of waterproofing coating) might be needed for certain purpose. In this data set, washing or cleaning prior to applying waterproof is not included and it is modelled for one layer application (one time coating).

This dataset is modelled for waterproofing shoes with silicone spray. The activity starts when the raw materials enter the process. Materials entering the process are included as well as infrastructure and chemicals. In the model, it is assumed that the drying and curing process is done at ambient condition hence there is no input of energy. There is direct emission to air from the aerosol spray containing propellent. Several propellent gas was used in the model to represent general data and the amount is equally proportioned.

Shoe Zone. 2019. How to Waterproof Boots & Shoes: Your Complete Guide, https://www.shoezone.com/Blog/how-to-waterproof-boots-shoes-your-complete-guide. Shoe Zone Retail Limited

## Parameters
- kg_0: 0.001725
  Mass in kg, for silicone product; Freight train, diesel traction; EU+EFTA+UK
- km_0: 220.339
  Distance in km, for silicone product; Freight train, diesel traction; EU+EFTA+UK
- kg_km_0: 0.380085; = kg_0*km_0
  Transport amount in km*km, for silicone product; Freight train, diesel traction; EU+EFTA+UK
- kg_1: 0.001725
  Mass in kg, for silicone product; Freight train, electricity traction; EU+EFTA+UK
- km_1: 66.5384
  Distance in km, for silicone product; Freight train, electricity traction; EU+EFTA+UK
- kg_km_1: 0.114779; = kg_1*km_1
  Transport amount in km*km, for silicone product; Freight train, electricity traction; EU+EFTA+UK
- kg_2: 0.001725
  Mass in kg, for silicone product; Freight train, average; EU+EFTA+UK
- km_2: 1.82229
  Distance in km, for silicone product; Freight train, average; EU+EFTA+UK
- kg_km_2: 0.00314346; = kg_2*km_2
  Transport amount in km*km, for silicone product; Freight train, average; EU+EFTA+UK
- kg_3: 0.001725
  Mass in kg, for silicone product; Articulated lorry transport, Total weight >32 t, mix Euro 0-5; ROW w/o EU+EFTA
- km_3: 450.4
  Distance in km, for silicone product; Articulated lorry transport, Total weight >32 t, mix Euro 0-5; ROW w/o EU+EFTA
- kg_km_3: 0.77694; = kg_3*km_3
  Transport amount in km*km, for silicone product; Articulated lorry transport, Total weight >32 t, mix Euro 0-5; ROW w/o EU+EFTA
- kg_4: 0.001725
  Mass in kg, for silicone product; Transoceanic ship, containers; GLO
- km_4: 524.8
  Distance in km, for silicone product; Transoceanic ship, containers; GLO
- kg_km_4: 0.90528; = kg_4*km_4
  Transport amount in km*km, for silicone product; Transoceanic ship, containers; GLO
- kg_5: 0.000107639
  Mass in kg, for propane; Freight train, diesel traction; EU+EFTA+UK
- km_5: 229.308
  Distance in km, for propane; Freight train, diesel traction; EU+EFTA+UK
- kg_km_5: 0.0246826; = kg_5*km_5
  Transport amount in km*km, for propane; Freight train, diesel traction; EU+EFTA+UK
- kg_6: 0.000107639
  Mass in kg, for propane; Freight train, electricity traction; EU+EFTA+UK
- km_6: 78.0012
  Distance in km, for propane; Freight train, electricity traction; EU+EFTA+UK
- kg_km_6: 0.00839599; = kg_6*km_6
  Transport amount in km*km, for propane; Freight train, electricity traction; EU+EFTA+UK
- kg_7: 0.000107639
  Mass in kg, for propane; Freight train, average; EU+EFTA+UK
- km_7: 1.83969
  Distance in km, for propane; Freight train, average; EU+EFTA+UK
- kg_km_7: 0.000198023; = kg_7*km_7
  Transport amount in km*km, for propane; Freight train, average; EU+EFTA+UK
- kg_8: 0.000107639
  Mass in kg, for propane; Barge; EU+EFTA+UK
- km_8: 8.08819
  Distance in km, for propane; Barge; EU+EFTA+UK
- kg_km_8: 0.000870607; = kg_8*km_8
  Transport amount in km*km, for propane; Barge; EU+EFTA+UK
- kg_9: 0.000107639
  Mass in kg, for propane; Barge; ROW w/o EU+EFTA
- km_9: 16.5157
  Distance in km, for propane; Barge; ROW w/o EU+EFTA
- kg_km_9: 0.00177774; = kg_9*km_9
  Transport amount in km*km, for propane; Barge; ROW w/o EU+EFTA
- kg_10: 0.000107639
  Mass in kg, for propane; Articulated lorry transport, Euro 4, Total weight >32 t; EU+EFTA+UK
- km_10: 57.3844
  Distance in km, for propane; Articulated lorry transport, Euro 4, Total weight >32 t; EU+EFTA+UK
- kg_km_10: 0.00617682; = kg_10*km_10
  Transport amount in km*km, for propane; Articulated lorry transport, Euro 4, Total weight >32 t; EU+EFTA+UK
- kg_11: 0.000107639
  Mass in kg, for propane; Articulated lorry transport, Total weight >32 t, mix Euro 0-5; ROW w/o EU+EFTA
- km_11: 151.449
  Distance in km, for propane; Articulated lorry transport, Total weight >32 t, mix Euro 0-5; ROW w/o EU+EFTA
- kg_km_11: 0.0163018; = kg_11*km_11
  Transport amount in km*km, for propane; Articulated lorry transport, Total weight >32 t, mix Euro 0-5; ROW w/o EU+EFTA
- kg_12: 0.000107261
  Mass in kg, for butane; Transoceanic ship, containers; GLO
- km_12: 601.207
  Distance in km, for butane; Transoceanic ship, containers; GLO
- kg_km_12: 0.0644861; = kg_12*km_12
  Transport amount in km*km, for butane; Transoceanic ship, containers; GLO
- kg_13: 0.000107261
  Mass in kg, for butane; Freight train, diesel traction; EU+EFTA+UK
- km_13: 230.116
  Distance in km, for butane; Freight train, diesel traction; EU+EFTA+UK
- kg_km_13: 0.0246826; = kg_13*km_13
  Transport amount in km*km, for butane; Freight train, diesel traction; EU+EFTA+UK
- kg_14: 0.000107261
  Mass in kg, for butane; Freight train, electricity traction; EU+EFTA+UK
- km_14: 78.2762
  Distance in km, for butane; Freight train, electricity traction; EU+EFTA+UK
- kg_km_14: 0.00839599; = kg_14*km_14
  Transport amount in km*km, for butane; Freight train, electricity traction; EU+EFTA+UK
- kg_15: 0.000107261
  Mass in kg, for butane; Freight train, average; EU+EFTA+UK
- km_15: 1.84618
  Distance in km, for butane; Freight train, average; EU+EFTA+UK
- kg_km_15: 0.000198023; = kg_15*km_15
  Transport amount in km*km, for butane; Freight train, average; EU+EFTA+UK
- kg_16: 0.000107261
  Mass in kg, for butane; Barge; EU+EFTA+UK
- km_16: 8.1167
  Distance in km, for butane; Barge; EU+EFTA+UK
- kg_km_16: 0.000870607; = kg_16*km_16
  Transport amount in km*km, for butane; Barge; EU+EFTA+UK
- kg_17: 0.000107261
  Mass in kg, for butane; Barge; ROW w/o EU+EFTA
- km_17: 16.5739
  Distance in km, for butane; Barge; ROW w/o EU+EFTA
- kg_km_17: 0.00177774; = kg_17*km_17
  Transport amount in km*km, for butane; Barge; ROW w/o EU+EFTA
- kg_18: 0.000107261
  Mass in kg, for butane; Articulated lorry transport, Euro 4, Total weight >32 t; EU+EFTA+UK
- km_18: 57.5867
  Distance in km, for butane; Articulated lorry transport, Euro 4, Total weight >32 t; EU+EFTA+UK
- kg_km_18: 0.00617682; = kg_18*km_18
  Transport amount in km*km, for butane; Articulated lorry transport, Euro 4, Total weight >32 t; EU+EFTA+UK
- kg_19: 0.000107261
  Mass in kg, for butane; Articulated lorry transport, Total weight >32 t, mix Euro 0-5; ROW w/o EU+EFTA
- km_19: 151.982
  Distance in km, for butane; Articulated lorry transport, Total weight >32 t, mix Euro 0-5; ROW w/o EU+EFTA
- kg_km_19: 0.0163018; = kg_19*km_19
  Transport amount in km*km, for butane; Articulated lorry transport, Total weight >32 t, mix Euro 0-5; ROW w/o EU+EFTA
- kg_20: 0.000107656
  Mass in kg, for carbon dioxide, liquid // carbon dioxide, liquid production // eu+efta+uk; Articulated lorry transport, Euro 4, Total weight >32 t; EU+EFTA+UK
- km_20: 1003.19
  Distance in km, for carbon dioxide, liquid // carbon dioxide, liquid production // eu+efta+uk; Articulated lorry transport, Euro 4, Total weight >32 t; EU+EFTA+UK
- kg_km_20: 0.108; = kg_20*km_20
  Transport amount in km*km, for carbon dioxide, liquid // carbon dioxide, liquid production // eu+efta+uk; Articulated lorry transport, Euro 4, Total weight >32 t; EU+EFTA+UK
- kg_21: 0.000107656
  Mass in kg, for carbon dioxide, liquid // carbon dioxide, liquid production // eu+efta+uk; Transoceanic ship, containers; GLO
- km_21: 18020.3
  Distance in km, for carbon dioxide, liquid // carbon dioxide, liquid production // eu+efta+uk; Transoceanic ship, containers; GLO
- kg_km_21: 1.94; = kg_21*km_21
  Transport amount in km*km, for carbon dioxide, liquid // carbon dioxide, liquid production // eu+efta+uk; Transoceanic ship, containers; GLO
- kg_22: 0.000107656
  Mass in kg, for nitrogen liquid // nitrogen liquid production // eu+efta+uk; Articulated lorry transport, Euro 4, Total weight >32 t; EU+EFTA+UK
- km_22: 999.997
  Distance in km, for nitrogen liquid // nitrogen liquid production // eu+efta+uk; Articulated lorry transport, Euro 4, Total weight >32 t; EU+EFTA+UK
- kg_km_22: 0.107656; = kg_22*km_22
  Transport amount in km*km, for nitrogen liquid // nitrogen liquid production // eu+efta+uk; Articulated lorry transport, Euro 4, Total weight >32 t; EU+EFTA+UK
- kg_23: 0.000107656
  Mass in kg, for nitrogen liquid // nitrogen liquid production // eu+efta+uk; Transoceanic ship, containers; GLO
- km_23: 18000
  Distance in km, for nitrogen liquid // nitrogen liquid production // eu+efta+uk; Transoceanic ship, containers; GLO
- kg_km_23: 1.93781; = kg_23*km_23
  Transport amount in km*km, for nitrogen liquid // nitrogen liquid production // eu+efta+uk; Transoceanic ship, containers; GLO
- kg_24: 0.00287084
  Mass in kg, for can (steel, empty, [kg]) // can non-food, body tin plated steel // eu+efta+uk; Articulated lorry transport, Euro 4, Total weight >32 t; EU+EFTA+UK
- km_24: 1000
  Distance in km, for can (steel, empty, [kg]) // can non-food, body tin plated steel // eu+efta+uk; Articulated lorry transport, Euro 4, Total weight >32 t; EU+EFTA+UK
- kg_km_24: 2.87084; = kg_24*km_24
  Transport amount in km*km, for can (steel, empty, [kg]) // can non-food, body tin plated steel // eu+efta+uk; Articulated lorry transport, Euro 4, Total weight >32 t; EU+EFTA+UK
- kg_25: 0.00287084
  Mass in kg, for can (steel, empty, [kg]) // can non-food, body tin plated steel // eu+efta+uk; Transoceanic ship, containers; GLO
- km_25: 18000
  Distance in km, for can (steel, empty, [kg]) // can non-food, body tin plated steel // eu+efta+uk; Transoceanic ship, containers; GLO
- kg_km_25: 51.675; = kg_25*km_25
  Transport amount in km*km, for can (steel, empty, [kg]) // can non-food, body tin plated steel // eu+efta+uk; Transoceanic ship, containers; GLO

## Reference product
- waterproofing, for footwear // waterproofing // glo: 1

## Inputs
- Transport of silicone product by Freight train, diesel traction - EU+EFTA+UK: 0.380085; = kg_km_0
- Transport of silicone product by Freight train, electricity traction - EU+EFTA+UK: 0.114779; = kg_km_1
- Transport of silicone product by Freight train, average - EU+EFTA+UK: 0.00314346; = kg_km_2
- Transport of silicone product by Articulated lorry transport, Total weight >32 t, mix Euro 0-5 - ROW w/o EU+EFTA: 0.77694; = kg_km_3
- Transport of silicone product by Transoceanic ship, containers - GLO: 0.90528; = kg_km_4
- Transport of propane by Freight train, diesel traction - EU+EFTA+UK: 0.0246826; = kg_km_5
- Transport of propane by Freight train, electricity traction - EU+EFTA+UK: 0.00839599; = kg_km_6
- Transport of propane by Freight train, average - EU+EFTA+UK: 0.000198023; = kg_km_7
- Transport of propane by Barge - EU+EFTA+UK: 0.000870607; = kg_km_8
- Transport of propane by Barge - ROW w/o EU+EFTA: 0.00177774; = kg_km_9
- Transport of propane by Articulated lorry transport, Euro 4, Total weight >32 t - EU+EFTA+UK: 0.00617682; = kg_km_10
- Transport of propane by Articulated lorry transport, Total weight >32 t, mix Euro 0-5 - ROW w/o EU+EFTA: 0.0163018; = kg_km_11
- Transport of butane by Transoceanic ship, containers - GLO: 0.0644861; = kg_km_12
- Transport of butane by Freight train, diesel traction - EU+EFTA+UK: 0.0246826; = kg_km_13
- Transport of butane by Freight train, electricity traction - EU+EFTA+UK: 0.00839599; = kg_km_14
- Transport of butane by Freight train, average - EU+EFTA+UK: 0.000198023; = kg_km_15
- Transport of butane by Barge - EU+EFTA+UK: 0.000870607; = kg_km_16
- Transport of butane by Barge - ROW w/o EU+EFTA: 0.00177774; = kg_km_17
- Transport of butane by Articulated lorry transport, Euro 4, Total weight >32 t - EU+EFTA+UK: 0.00617682; = kg_km_18
- Transport of butane by Articulated lorry transport, Total weight >32 t, mix Euro 0-5 - ROW w/o EU+EFTA: 0.0163018; = kg_km_19
- Transport of carbon dioxide, liquid // carbon dioxide, liquid production // eu+efta+uk by Articulated lorry transport, Euro 4, Total weight >32 t - EU+EFTA+UK: 0.108; = kg_km_20
- Transport of carbon dioxide, liquid // carbon dioxide, liquid production // eu+efta+uk by Transoceanic ship, containers - GLO: 1.94; = kg_km_21
- Transport of nitrogen liquid // nitrogen liquid production // eu+efta+uk by Articulated lorry transport, Euro 4, Total weight >32 t - EU+EFTA+UK: 0.107656; = kg_km_22
- Transport of nitrogen liquid // nitrogen liquid production // eu+efta+uk by Transoceanic ship, containers - GLO: 1.93781; = kg_km_23
- Transport of can (steel, empty, [kg]) // can non-food, body tin plated steel // eu+efta+uk by Articulated lorry transport, Euro 4, Total weight >32 t - EU+EFTA+UK: 2.87084; = kg_km_24
- Transport of can (steel, empty, [kg]) // can non-food, body tin plated steel // eu+efta+uk by Transoceanic ship, containers - GLO: 51.675; = kg_km_25
- waterproofing, for footwear // waterproofing // glo, blackbox: 1
- waterproofing, for footwear // waterproofing // glo, elementary: 1

## Impact indicators
- Eutrophication marine: 2.42981e-5
- Ecotoxicity, freshwater: 0.115885
- Land use: 0.0527433
- Water use: 0.00813607
- Resource use, minerals and metals: 3.36346e-7
- Resource use, fossils: 0.263332
- Climate change: 0.0237226
- Ozone depletion: 2.28135e-9
- Human toxicity, cancer: 1.28522e-11
- Human toxicity, non-cancer: 5.4109e-10
- EF-particulate Matter: 2.52273e-9
- Ionising radiation, human health: 0.000777407
- Photochemical ozone formation - human health: 0.000177535
- Acidification: 0.000116804
- Eutrophication, terrestrial: 0.000259244
- Eutrophication, freshwater: 1.74653e-7

## Deviations from the LCI method principle
The background data uses:
- the \xe2\x80\x9cRecycled content cut-off\xe2\x80\x9d approach to allocate end-of-life by-products and secondary materials. This allocation is explained in the description of the recycled content system model (http://www.ecoinvent.org/database/system-models-in-ecoinvent-3/cut-off-system-model/allocation-cut-off-by-classification.html).
OR
- EF compliant data

## Deviations from the LCI method approaches
Background data:
- the \xe2\x80\x9cRecycled content cut-off\xe2\x80\x9d approach to allocate end-of-life by-products and secondary materials. This allocation is explained in the description of the recycled content system model (http://www.ecoinvent.org/database/system-models-in-ecoinvent-3/cut-off-system-model/allocation-cut-off-by-classification.html). The ecoinvent database mostly relies on “Allocation – market values” apart for few exceptions particularly in the energy sector. ecoinvent energy data is replaced with EF3.0 core data as per the EF guidelines version 2.0.
OR
- EF compliant data

## Modelling constants
All modelling constants follow the requirements listed in the Tender Specifications 070201/2020/SER/ENV.B1. Completeness: There are no intentional cut-offs in the inventory no matter how small their contribution to all the EF impact categories is. Eventual cut-offs are in compliance with the Guide for EF compliant data sets (JRC 2020), i.e. only if below the 3% cut-off rule. Water use: water use is modelled at country level using separate flows for water withdrawal, water release and water evaporation. Handling multi-functional processes: the following PEF multi- functionality decision hierarchy is applied for resolving all multi- functionality problems: (1) subdivision or system expansion; (2) allocation based on a relevant underlying physical relationship (substitution may apply here); (3) allocation based on some other relationship. Direct land use change: GHG emissions from direct LUC allocated to good/service for 20 years after the LUC occurs, with IPCC default values. Carbon storage and delayed emissions: credits associated with temporary (carbon) storage or delayed emissions up to 300 years are not be considered. Emissions off-setting: are not included. Capital goods (including infrastructures) and their End of life: they are included. System boundaries: system boundaries include all processes linked to the product supply chain (e.g. maintenance). Time period: emissions and removals are modelled as if released or removed at the beginning of the assessment method. Fossil and biogenic carbon emissions and removals: removals and emissions are modelled as follows: All GHG emissions from fossil fuels (including peat and limestone) are modelled consistently with the most updated ILCD list of elementary flows. The non-fossil (biogenic) carbon flows are modelled consistently with the most updated ILCD list of elementary flows.

## Cut-off and completeness
There are no intentional cut-offs in the inventory no matter how small their contribution to all the EF impact categories is. Eventual cut-offs are in compliance with the Guide for EF compliant data sets (JRC 2020), i.e. only if below the 3% cut-off rule. The dataset dry mass and water balance has been checked to ensure the inventory is complete. Capital goods (e.g. infrastructure) and their end-of-life are included.

## Data selection and combination
These datasets include, in both their foreground and background data, links to EF3.0 compliant data.
The relevant background data on energy, transport, and End of Life are from the LCDN data node (http://lcdn.thinkstep.com/Node/).
All other background data in the supply of this product for which no EF3.0 process was available are from ecoinvent v3.7 database (www.ecoinvent.org) or other data sources.

## Data treatment and extrapolations
Several data sources have been used to model the inventory.

## Review details
Internal reviews have been asked to review the plausibility of the unit process, LCIA scores, and DQRs. Internal reviewers have also been asked to review the data for EF compliancy. The consortium is therefore responsible for aspects such as compliancy with the ILCD format, including validation in Look@LCI, and nomenclature.
Internal reviwers have been asked to judge based on the process name, that the unit process models in a complete and representative way the process in the requested location. The review encompassed the plausability of:
- exchanges with nature (elementary flows) as well as exchanges such as product and waste flows.
- meta information (general comment, technology comment, system boundaries, allocation, cut-off rules, etc.). Reviewers were asked to judge if the provided information is enough to understand the content of the process.
- LCIA scores
- DQRs including precision, technology, time and geography. As well as the overall DQR.
External reviewers have been asked to provide their expertise in the field of interest. External reviewers have been asked to review the unit process, including eventual methodological choices, the LCIA scores (provided with contribution scores as well), and DQRs. External reviewers have been provided all the information in a tool developed by the consortium for the purpose of this project.
External reviewers have been asked to judge based on the process name, that the unit process models in a complete and representative way the process in the requested location. The review encompassed:
- Plausability and completeness of exchanges with nature (elementary flows) as well as exchanges such as product and waste flows.
- Review of meta information (general comment, technology comment, system boundaries, allocation, cut-off rules, etc.). Reviewers were asked to judge if the provided information is enough to understand the content of the process.
- Review of properties (biogenic carbon and water content).
- Review of allocation keys.
- Plausability of LCIA scores calculated by the consortium.
- Plausability of DQRs including precision, technology, time and geography. As well as the overall DQR.

## Data sources
- Background Data for Representative products and organisations. EF 3.0 compliant (data stock)
- Marie Gottfridsson, Yuqing Zhang (2015). Environmental impacts of shoe consumption: Combining product flow analysis with an LCA model for Sweden. Chalmers University of Technology, Gothenburg, Sweden.
- New Pig (2015) PIG Aerosol Can Recycler, https://newpig.scene7.com/is/content/NewPig/pdfs/350194_AEROSOLFAQSHEET.pdf, Pennsylvania, United States
- Ian Smith (2021) Footwear Circular Economy, Textile Consult, United Kingdom
- Williams, John (2018) Waterproof and Water Repellent Textiles and Clothing, The Textile Institute Book Series, Woodhead Publishing, United Kingdom
- Mousumi Kar, Yashu Chourasiya, Rahul Maheshwari, Rakesh K. Tekade (2019) Chapter 2 - Current Developments in Excipient Science: Implication of Quantitative Selection of Each Excipient in Product Development, https://doi.org/10.1016/B978-0-12-817909-3.00002-9, Elsevier, India
- Custom Pak (2021) Aerosol Spray Paint, https://custompakproducts.com/index.php/custom-pak-manufactured-products/aerosol-spray-paint/, Custom Pak, United States

## Intended applications
Implementation of regular Product Environmental Footprint (PEF) studies and Organisation Environmental Footprint (OEF) studies exclusively under the specified Product groups and sectors as defined in the Product Environmental Footprint Category Rules (PEFCR) and Organisation Environmental Footprint Sectorial Rules (OEFSR) listed in http://ec.europa.eu/environment/eussd/smgp/PEFCR_OEFSR.htm
