# treatment, plasma, water repellent; plasma treatment, water repellent treatment (pad-dry-cure method); production mix, at plant; item(s) = 1 pair

Dataset: ILCD process, Partly terminated system
Geography: GLO
Reference year: 2021
Valid until: 2024
Classification: Systems / Textiles, furnitures and other interiors
LCI method principle: Attributional
LCI method approaches: Allocation - market value
Completeness: All relevant flows quantified
Project: Provision of process-based 3.0 Environmental Footprint-compliant life cycle inventory datasets - Apparel 1 - contract number 070201/2020/840291/SER/ENV.B.1
Generated by: Life Cycle Indonesia
Owner: PRé Sustainability B.V.
Compliance: ILCD Data Network - Entry-level; Suggestions for updating the PEF method 2019; ISO 14040 Environmental Management – Life Cycle Assessment – Principles and Framework, 2006; ISO 14044:2006. Environmental Management – Life Cycle Assessment – Requirements and guidelines.; Environmental Footprint 3.1
Review: Dependent internal review by Avraam Symeonidis, Emilia Moreno Ruiz; Independent review panel by Fábio Valebona
Data quality: Overall quality: Good; Time representativeness: Very good; Geographical representativeness: Good; Technological representativeness: Very good; Precision: Good; Methodological appropriateness and consistency: Not applicable
Amounts: no units in this file; such an amount is in the reference unit of its flow, which a separate flow dataset defines
copyright: true
licenseType: Free of charge for some user types or use types
accessRestrictions: Free of charge for all final users implementing a regular Product Environmental Footprint (PEF) studies and Organisation Environmental Footprint (OEF) studies exclusively under the specified Product groups and sectors as defined in the Product Environmental Footprint Category Rules (PEFCR) and Organisation Environmental Footprint Sectorial Rules (OEFSR) listed in http://ec.europa.eu/environment/eussd/smgp/PEFCR_OEFSR.htm and in accordance with the terms and conditions of the EULA (available at https://ecoinvent.lca-data.com/) exclusively until 31st December 2024. Any use of this dataset or any derivative data not within the specific context of one of the PEF/OEF projects or after the end of 2024 is not permitted.

## General comment
Notice: this data set supersedes the EF3.0-compliant version (see link under "preceding data set version" below calculated with the EF3.0). The life cycle inventory is not changed from the original EF3.0 data set. The LCIA results are calculated based on the EF3.1 methods which provide updated characterisation factors in the following impact categories: Climate Change, Ecotoxicity freshwater, Photochemical Ozone Formation, Acidification, Human Toxicity non-cancer, and Human Toxicity cancer. The review report and the data quality ratings refer to the original results. The data set has been updated by the European Commission on the basis of the original EF3.0 data set delivered by the data provider.Hydrophobic plasma coating are subcategories of plasma surface functionalization, the specific precursor being chosen to produce a permanent, low surface enrgy layer on the material or the part being treated. the hydrophobic surface is typically less than 1/100th thickness of human hair, colourless, odourless, and doesnt affect the look in any way. Plasma coatings deliver two main categories of surface property: totally liquid (water & oil) repellent, or totally wettable.

Henniker Plasma (2021) Plasma Treatment in the Textiles & Fabric Industry. https://plasmatreatment.co.uk/pt/plasma-treatments/plasma-coatings/hydrophobic-plasma-treatment , Henniker Plasma, UK

## Technology and included processes
Monomers are introduced with the plasma feed gas. Monomers are small molecules which will, under the correct conditions, bond together to form polymers. Plasmas create the right conditions at the surface of the material for this to happen both quickly and efficiently. Different monomers are used to produce hydrophobic and hydrophilic surfaces.

However, since the information about the hydrophobic plasma coating machine is very minimal, in this process it is assumed that the plasma machine used is the large-format vacuum chambers plasma treatment machine to improve the fabric surface. By using the plasma treatment machine, the chemical used can be reduced by 50%. For the water repellent treatment, the chemicals is applied using the pad-dry-cure method. The chemical used is a combination between the PFC and the PFC free water repellent treatment chemicals with a 1:1 ratio. The process includes the use of balloon padder and dryer. The process includes chemicals, energy, lube oil consumption and infrastructure. There is no direct emission to air since the emission comes from electricity usage, while hazardous waste comes from waste lube oil. The input chemicals is carried along the wastewater. In the model, the energy sources of machines used is from electricity and steam. The consumption of lubricating oil using stitch bonding and thermobonding oven as a proxy. The GSM of the fabric is assumed to be 135 GSM cotton fabric

Henniker Plasma (2021) Plasma Treatment in the Textiles & Fabric Industry. https://plasmatreatment.co.uk/pt/plasma-treatments/plasma-coatings/hydrophobic-plasma-treatment , Henniker Plasma, UK

## Parameters
- kg_0: 6.975e-5
  Mass in kg, for hydrochloric acid, without water, in 30% solution state; Freight train, diesel traction; EU+EFTA+UK
- km_0: 23.5909
  Distance in km, for hydrochloric acid, without water, in 30% solution state; Freight train, diesel traction; EU+EFTA+UK
- kg_km_0: 0.00164546; = kg_0*km_0
  Transport amount in km*km, for hydrochloric acid, without water, in 30% solution state; Freight train, diesel traction; EU+EFTA+UK
- kg_1: 6.975e-5
  Mass in kg, for hydrochloric acid, without water, in 30% solution state; Freight train, electricity traction; EU+EFTA+UK
- km_1: 7.12401
  Distance in km, for hydrochloric acid, without water, in 30% solution state; Freight train, electricity traction; EU+EFTA+UK
- kg_km_1: 0.0004969; = kg_1*km_1
  Transport amount in km*km, for hydrochloric acid, without water, in 30% solution state; Freight train, electricity traction; EU+EFTA+UK
- kg_2: 6.975e-5
  Mass in kg, for hydrochloric acid, without water, in 30% solution state; Freight train, average; EU+EFTA+UK
- km_2: 0.195106
  Distance in km, for hydrochloric acid, without water, in 30% solution state; Freight train, average; EU+EFTA+UK
- kg_km_2: 1.36086e-5; = kg_2*km_2
  Transport amount in km*km, for hydrochloric acid, without water, in 30% solution state; Freight train, average; EU+EFTA+UK
- kg_3: 6.975e-5
  Mass in kg, for hydrochloric acid, without water, in 30% solution state; Articulated lorry transport, Total weight >32 t, mix Euro 0-5; ROW w/o EU+EFTA
- km_3: 20.88
  Distance in km, for hydrochloric acid, without water, in 30% solution state; Articulated lorry transport, Total weight >32 t, mix Euro 0-5; ROW w/o EU+EFTA
- kg_km_3: 0.00145638; = kg_3*km_3
  Transport amount in km*km, for hydrochloric acid, without water, in 30% solution state; Articulated lorry transport, Total weight >32 t, mix Euro 0-5; ROW w/o EU+EFTA
- kg_4: 6.975e-5
  Mass in kg, for hydrochloric acid, without water, in 30% solution state; Transoceanic ship, containers; GLO
- km_4: 59.9
  Distance in km, for hydrochloric acid, without water, in 30% solution state; Transoceanic ship, containers; GLO
- kg_km_4: 0.00417803; = kg_4*km_4
  Transport amount in km*km, for hydrochloric acid, without water, in 30% solution state; Transoceanic ship, containers; GLO
- kg_5: 6.975e-5
  Mass in kg, for hydrochloric acid, without water, in 30% solution state; Barge; ROW w/o EU+EFTA
- km_5: 2.46
  Distance in km, for hydrochloric acid, without water, in 30% solution state; Barge; ROW w/o EU+EFTA
- kg_km_5: 0.000171585; = kg_5*km_5
  Transport amount in km*km, for hydrochloric acid, without water, in 30% solution state; Barge; ROW w/o EU+EFTA
- kg_6: 0.00034875
  Mass in kg, for acetic acid // acetic acid production, product in 98% solution state // glo; Articulated lorry transport, Euro 4, Total weight >32 t; EU+EFTA+UK
- km_6: 1000
  Distance in km, for acetic acid // acetic acid production, product in 98% solution state // glo; Articulated lorry transport, Euro 4, Total weight >32 t; EU+EFTA+UK
- kg_km_6: 0.34875; = kg_6*km_6
  Transport amount in km*km, for acetic acid // acetic acid production, product in 98% solution state // glo; Articulated lorry transport, Euro 4, Total weight >32 t; EU+EFTA+UK
- kg_7: 0.000186
  Mass in kg, for alkylbenzene sulfonate // alkylbenzene sulfonate production // glo; Articulated lorry transport, Euro 4, Total weight >32 t; EU+EFTA+UK
- km_7: 1000
  Distance in km, for alkylbenzene sulfonate // alkylbenzene sulfonate production // glo; Articulated lorry transport, Euro 4, Total weight >32 t; EU+EFTA+UK
- kg_km_7: 0.186; = kg_7*km_7
  Transport amount in km*km, for alkylbenzene sulfonate // alkylbenzene sulfonate production // glo; Articulated lorry transport, Euro 4, Total weight >32 t; EU+EFTA+UK
- kg_8: 9.3e-5
  Mass in kg, for antifoaming agent, ethoxylate fatty alcohols // antifoaming agent, ethoxylate fatty alcohols production // glo; Articulated lorry transport, Euro 4, Total weight >32 t; EU+EFTA+UK
- km_8: 1000
  Distance in km, for antifoaming agent, ethoxylate fatty alcohols // antifoaming agent, ethoxylate fatty alcohols production // glo; Articulated lorry transport, Euro 4, Total weight >32 t; EU+EFTA+UK
- kg_km_8: 0.093; = kg_8*km_8
  Transport amount in km*km, for antifoaming agent, ethoxylate fatty alcohols // antifoaming agent, ethoxylate fatty alcohols production // glo; Articulated lorry transport, Euro 4, Total weight >32 t; EU+EFTA+UK
- kg_9: 0.011625
  Mass in kg, for cationic resin // cationic resin production // eu+efta+uk; Articulated lorry transport, Euro 4, Total weight >32 t; EU+EFTA+UK
- km_9: 1000
  Distance in km, for cationic resin // cationic resin production // eu+efta+uk; Articulated lorry transport, Euro 4, Total weight >32 t; EU+EFTA+UK
- kg_km_9: 11.625; = kg_9*km_9
  Transport amount in km*km, for cationic resin // cationic resin production // eu+efta+uk; Articulated lorry transport, Euro 4, Total weight >32 t; EU+EFTA+UK
- kg_10: 1.32198e-7
  Mass in kg, for lubricating oil // lubricants at refinery // cn; Articulated lorry transport, Euro 4, Total weight >32 t; EU+EFTA+UK
- km_10: 1000
  Distance in km, for lubricating oil // lubricants at refinery // cn; Articulated lorry transport, Euro 4, Total weight >32 t; EU+EFTA+UK
- kg_km_10: 0.000132198; = kg_10*km_10
  Transport amount in km*km, for lubricating oil // lubricants at refinery // cn; Articulated lorry transport, Euro 4, Total weight >32 t; EU+EFTA+UK
- kg_11: 4.24111e-7
  Mass in kg, for lubricating oil // lubricants at refinery // eu+efta+uk; Articulated lorry transport, Euro 4, Total weight >32 t; EU+EFTA+UK
- km_11: 999.738
  Distance in km, for lubricating oil // lubricants at refinery // eu+efta+uk; Articulated lorry transport, Euro 4, Total weight >32 t; EU+EFTA+UK
- kg_km_11: 0.000424; = kg_11*km_11
  Transport amount in km*km, for lubricating oil // lubricants at refinery // eu+efta+uk; Articulated lorry transport, Euro 4, Total weight >32 t; EU+EFTA+UK
- kg_12: 3.17729e-8
  Mass in kg, for lubricating oil // lubricants at refinery // raf; Articulated lorry transport, Euro 4, Total weight >32 t; EU+EFTA+UK
- km_12: 1000
  Distance in km, for lubricating oil // lubricants at refinery // raf; Articulated lorry transport, Euro 4, Total weight >32 t; EU+EFTA+UK
- kg_km_12: 3.17729e-5; = kg_12*km_12
  Transport amount in km*km, for lubricating oil // lubricants at refinery // raf; Articulated lorry transport, Euro 4, Total weight >32 t; EU+EFTA+UK
- kg_13: 8.3262e-7
  Mass in kg, for lubricating oil // lubricants at refinery // ras w/o cn; Articulated lorry transport, Euro 4, Total weight >32 t; EU+EFTA+UK
- km_13: 1000
  Distance in km, for lubricating oil // lubricants at refinery // ras w/o cn; Articulated lorry transport, Euro 4, Total weight >32 t; EU+EFTA+UK
- kg_km_13: 0.00083262; = kg_13*km_13
  Transport amount in km*km, for lubricating oil // lubricants at refinery // ras w/o cn; Articulated lorry transport, Euro 4, Total weight >32 t; EU+EFTA+UK
- kg_14: 6.49926e-7
  Mass in kg, for lubricating oil // lubricants at refinery // rna; Articulated lorry transport, Euro 4, Total weight >32 t; EU+EFTA+UK
- km_14: 1000
  Distance in km, for lubricating oil // lubricants at refinery // rna; Articulated lorry transport, Euro 4, Total weight >32 t; EU+EFTA+UK
- kg_km_14: 0.000649926; = kg_14*km_14
  Transport amount in km*km, for lubricating oil // lubricants at refinery // rna; Articulated lorry transport, Euro 4, Total weight >32 t; EU+EFTA+UK
- kg_15: 7.74464e-8
  Mass in kg, for lubricating oil // lubricants at refinery // rsa; Articulated lorry transport, Euro 4, Total weight >32 t; EU+EFTA+UK
- km_15: 1000
  Distance in km, for lubricating oil // lubricants at refinery // rsa; Articulated lorry transport, Euro 4, Total weight >32 t; EU+EFTA+UK
- kg_km_15: 7.74464e-5; = kg_15*km_15
  Transport amount in km*km, for lubricating oil // lubricants at refinery // rsa; Articulated lorry transport, Euro 4, Total weight >32 t; EU+EFTA+UK
- kg_16: 6.88507e-7
  Mass in kg, for lubricating oil // lubricants at refinery // ru; Articulated lorry transport, Euro 4, Total weight >32 t; EU+EFTA+UK
- km_16: 1000
  Distance in km, for lubricating oil // lubricants at refinery // ru; Articulated lorry transport, Euro 4, Total weight >32 t; EU+EFTA+UK
- kg_km_16: 0.000688507; = kg_16*km_16
  Transport amount in km*km, for lubricating oil // lubricants at refinery // ru; Articulated lorry transport, Euro 4, Total weight >32 t; EU+EFTA+UK
- kg_17: 0.0058125
  Mass in kg, for non-ionic surfactant, ethyleneoxidederivate // non-ionic surfactant, ethyleneoxidederivate production // glo; Articulated lorry transport, Euro 4, Total weight >32 t; EU+EFTA+UK
- km_17: 1000
  Distance in km, for non-ionic surfactant, ethyleneoxidederivate // non-ionic surfactant, ethyleneoxidederivate production // glo; Articulated lorry transport, Euro 4, Total weight >32 t; EU+EFTA+UK
- kg_km_17: 5.8125; = kg_17*km_17
  Transport amount in km*km, for non-ionic surfactant, ethyleneoxidederivate // non-ionic surfactant, ethyleneoxidederivate production // glo; Articulated lorry transport, Euro 4, Total weight >32 t; EU+EFTA+UK
- kg_18: 0.011625
  Mass in kg, for silicone, fossil fuel-based // silicone production // glo; Articulated lorry transport, Euro 4, Total weight >32 t; EU+EFTA+UK
- km_18: 1000
  Distance in km, for silicone, fossil fuel-based // silicone production // glo; Articulated lorry transport, Euro 4, Total weight >32 t; EU+EFTA+UK
- kg_km_18: 11.625; = kg_18*km_18
  Transport amount in km*km, for silicone, fossil fuel-based // silicone production // glo; Articulated lorry transport, Euro 4, Total weight >32 t; EU+EFTA+UK
- kg_19: 0.011625
  Mass in kg, for tetrafluoroethylene // tetrafluoroethylene production // glo; Articulated lorry transport, Euro 4, Total weight >32 t; EU+EFTA+UK
- km_19: 1000
  Distance in km, for tetrafluoroethylene // tetrafluoroethylene production // glo; Articulated lorry transport, Euro 4, Total weight >32 t; EU+EFTA+UK
- kg_km_19: 11.625; = kg_19*km_19
  Transport amount in km*km, for tetrafluoroethylene // tetrafluoroethylene production // glo; Articulated lorry transport, Euro 4, Total weight >32 t; EU+EFTA+UK
- kg_20: 0.058125
  Mass in kg, for urea-formaldehyde resin // urea-formaldehyde resin production // eu+efta+uk; Articulated lorry transport, Euro 4, Total weight >32 t; EU+EFTA+UK
- km_20: 1000
  Distance in km, for urea-formaldehyde resin // urea-formaldehyde resin production // eu+efta+uk; Articulated lorry transport, Euro 4, Total weight >32 t; EU+EFTA+UK
- kg_km_20: 58.125; = kg_20*km_20
  Transport amount in km*km, for urea-formaldehyde resin // urea-formaldehyde resin production // eu+efta+uk; Articulated lorry transport, Euro 4, Total weight >32 t; EU+EFTA+UK
- kg_21: 0.0001395
  Mass in kg, for wax // wax production // eu+efta+uk; Articulated lorry transport, Euro 4, Total weight >32 t; EU+EFTA+UK
- km_21: 1003.58
  Distance in km, for wax // wax production // eu+efta+uk; Articulated lorry transport, Euro 4, Total weight >32 t; EU+EFTA+UK
- kg_km_21: 0.14; = kg_21*km_21
  Transport amount in km*km, for wax // wax production // eu+efta+uk; Articulated lorry transport, Euro 4, Total weight >32 t; EU+EFTA+UK
- kg_22: 0.0001395
  Mass in kg, for wax // wax production // eu+efta+uk; Transoceanic ship, containers; GLO
- km_22: 17992.8
  Distance in km, for wax // wax production // eu+efta+uk; Transoceanic ship, containers; GLO
- kg_km_22: 2.51; = kg_22*km_22
  Transport amount in km*km, for wax // wax production // eu+efta+uk; Transoceanic ship, containers; GLO
- kg_23: 0.00034875
  Mass in kg, for acetic acid // acetic acid production, product in 98% solution state // glo; Transoceanic ship, containers; GLO
- km_23: 18000
  Distance in km, for acetic acid // acetic acid production, product in 98% solution state // glo; Transoceanic ship, containers; GLO
- kg_km_23: 6.2775; = kg_23*km_23
  Transport amount in km*km, for acetic acid // acetic acid production, product in 98% solution state // glo; Transoceanic ship, containers; GLO
- kg_24: 0.000186
  Mass in kg, for alkylbenzene sulfonate // alkylbenzene sulfonate production // glo; Transoceanic ship, containers; GLO
- km_24: 18000
  Distance in km, for alkylbenzene sulfonate // alkylbenzene sulfonate production // glo; Transoceanic ship, containers; GLO
- kg_km_24: 3.348; = kg_24*km_24
  Transport amount in km*km, for alkylbenzene sulfonate // alkylbenzene sulfonate production // glo; Transoceanic ship, containers; GLO
- kg_25: 9.3e-5
  Mass in kg, for antifoaming agent, ethoxylate fatty alcohols // antifoaming agent, ethoxylate fatty alcohols production // glo; Transoceanic ship, containers; GLO
- km_25: 18000
  Distance in km, for antifoaming agent, ethoxylate fatty alcohols // antifoaming agent, ethoxylate fatty alcohols production // glo; Transoceanic ship, containers; GLO
- kg_km_25: 1.674; = kg_25*km_25
  Transport amount in km*km, for antifoaming agent, ethoxylate fatty alcohols // antifoaming agent, ethoxylate fatty alcohols production // glo; Transoceanic ship, containers; GLO
- kg_26: 0.011625
  Mass in kg, for cationic resin // cationic resin production // eu+efta+uk; Transoceanic ship, containers; GLO
- km_26: 18000
  Distance in km, for cationic resin // cationic resin production // eu+efta+uk; Transoceanic ship, containers; GLO
- kg_km_26: 209.25; = kg_26*km_26
  Transport amount in km*km, for cationic resin // cationic resin production // eu+efta+uk; Transoceanic ship, containers; GLO
- kg_27: 4.24111e-7
  Mass in kg, for lubricating oil // lubricants at refinery // eu+efta+uk; Transoceanic ship, containers; GLO
- km_27: 17990.6
  Distance in km, for lubricating oil // lubricants at refinery // eu+efta+uk; Transoceanic ship, containers; GLO
- kg_km_27: 0.00763; = kg_27*km_27
  Transport amount in km*km, for lubricating oil // lubricants at refinery // eu+efta+uk; Transoceanic ship, containers; GLO
- kg_28: 3.17729e-8
  Mass in kg, for lubricating oil // lubricants at refinery // raf; Transoceanic ship, containers; GLO
- km_28: 18000
  Distance in km, for lubricating oil // lubricants at refinery // raf; Transoceanic ship, containers; GLO
- kg_km_28: 0.000571912; = kg_28*km_28
  Transport amount in km*km, for lubricating oil // lubricants at refinery // raf; Transoceanic ship, containers; GLO
- kg_29: 8.3262e-7
  Mass in kg, for lubricating oil // lubricants at refinery // ras w/o cn; Transoceanic ship, containers; GLO
- km_29: 18000
  Distance in km, for lubricating oil // lubricants at refinery // ras w/o cn; Transoceanic ship, containers; GLO
- kg_km_29: 0.0149872; = kg_29*km_29
  Transport amount in km*km, for lubricating oil // lubricants at refinery // ras w/o cn; Transoceanic ship, containers; GLO
- kg_30: 6.49926e-7
  Mass in kg, for lubricating oil // lubricants at refinery // rna; Transoceanic ship, containers; GLO
- km_30: 21661.3
  Distance in km, for lubricating oil // lubricants at refinery // rna; Transoceanic ship, containers; GLO
- kg_km_30: 0.0140782; = kg_30*km_30
  Transport amount in km*km, for lubricating oil // lubricants at refinery // rna; Transoceanic ship, containers; GLO
- kg_31: 7.74464e-8
  Mass in kg, for lubricating oil // lubricants at refinery // rsa; Transoceanic ship, containers; GLO
- km_31: 18000
  Distance in km, for lubricating oil // lubricants at refinery // rsa; Transoceanic ship, containers; GLO
- kg_km_31: 0.00139404; = kg_31*km_31
  Transport amount in km*km, for lubricating oil // lubricants at refinery // rsa; Transoceanic ship, containers; GLO
- kg_32: 6.88507e-7
  Mass in kg, for lubricating oil // lubricants at refinery // ru; Transoceanic ship, containers; GLO
- km_32: 18000
  Distance in km, for lubricating oil // lubricants at refinery // ru; Transoceanic ship, containers; GLO
- kg_km_32: 0.0123931; = kg_32*km_32
  Transport amount in km*km, for lubricating oil // lubricants at refinery // ru; Transoceanic ship, containers; GLO
- kg_33: 0.0058125
  Mass in kg, for non-ionic surfactant, ethyleneoxidederivate // non-ionic surfactant, ethyleneoxidederivate production // glo; Transoceanic ship, containers; GLO
- km_33: 18000
  Distance in km, for non-ionic surfactant, ethyleneoxidederivate // non-ionic surfactant, ethyleneoxidederivate production // glo; Transoceanic ship, containers; GLO
- kg_km_33: 104.625; = kg_33*km_33
  Transport amount in km*km, for non-ionic surfactant, ethyleneoxidederivate // non-ionic surfactant, ethyleneoxidederivate production // glo; Transoceanic ship, containers; GLO
- kg_34: 0.011625
  Mass in kg, for silicone, fossil fuel-based // silicone production // glo; Transoceanic ship, containers; GLO
- km_34: 18000
  Distance in km, for silicone, fossil fuel-based // silicone production // glo; Transoceanic ship, containers; GLO
- kg_km_34: 209.25; = kg_34*km_34
  Transport amount in km*km, for silicone, fossil fuel-based // silicone production // glo; Transoceanic ship, containers; GLO
- kg_35: 0.011625
  Mass in kg, for tetrafluoroethylene // tetrafluoroethylene production // glo; Transoceanic ship, containers; GLO
- km_35: 18000
  Distance in km, for tetrafluoroethylene // tetrafluoroethylene production // glo; Transoceanic ship, containers; GLO
- kg_km_35: 209.25; = kg_35*km_35
  Transport amount in km*km, for tetrafluoroethylene // tetrafluoroethylene production // glo; Transoceanic ship, containers; GLO
- kg_36: 0.058125
  Mass in kg, for urea-formaldehyde resin // urea-formaldehyde resin production // eu+efta+uk; Transoceanic ship, containers; GLO
- km_36: 18000
  Distance in km, for urea-formaldehyde resin // urea-formaldehyde resin production // eu+efta+uk; Transoceanic ship, containers; GLO
- kg_km_36: 1046.25; = kg_36*km_36
  Transport amount in km*km, for urea-formaldehyde resin // urea-formaldehyde resin production // eu+efta+uk; Transoceanic ship, containers; GLO

## Reference product
- treatment, plasma, water repellent // treatment, plasma, water repellent // glo: 1

## Inputs
- Electricity from Electricity grid mix 1kV-60kV - AU: 0.0021
- Electricity from Electricity grid mix 1kV-60kV - EU+EFTA+UK: 0.0308
- Electricity from Electricity grid mix 1kV-60kV - NZ: 0.0004
- Electricity from Electricity grid mix 1kV-60kV - RAF: 0.0067
- Electricity from Electricity grid mix 1kV-60kV - RNA: 0.0451
- Electricity from Electricity grid mix 1kV-60kV - RSA: 0.0153
- Electricity from Electricity grid mix 1kV-60kV - RU: 0.0091
- Transport of hydrochloric acid, without water, in 30% solution state by Freight train, diesel traction - EU+EFTA+UK: 0.00164546; = kg_km_0
- Transport of hydrochloric acid, without water, in 30% solution state by Freight train, electricity traction - EU+EFTA+UK: 0.0004969; = kg_km_1
- Transport of hydrochloric acid, without water, in 30% solution state by Freight train, average - EU+EFTA+UK: 1.36086e-5; = kg_km_2
- Transport of hydrochloric acid, without water, in 30% solution state by Articulated lorry transport, Total weight >32 t, mix Euro 0-5 - ROW w/o EU+EFTA: 0.00145638; = kg_km_3
- Transport of hydrochloric acid, without water, in 30% solution state by Transoceanic ship, containers - GLO: 0.00417803; = kg_km_4
- Transport of hydrochloric acid, without water, in 30% solution state by Barge - ROW w/o EU+EFTA: 0.000171585; = kg_km_5
- Transport of acetic acid // acetic acid production, product in 98% solution state // glo by Articulated lorry transport, Euro 4, Total weight >32 t - EU+EFTA+UK: 0.34875; = kg_km_6
- Transport of alkylbenzene sulfonate // alkylbenzene sulfonate production // glo by Articulated lorry transport, Euro 4, Total weight >32 t - EU+EFTA+UK: 0.186; = kg_km_7
- Transport of antifoaming agent, ethoxylate fatty alcohols // antifoaming agent, ethoxylate fatty alcohols production // glo by Articulated lorry transport, Euro 4, Total weight >32 t - EU+EFTA+UK: 0.093; = kg_km_8
- Transport of cationic resin // cationic resin production // eu+efta+uk by Articulated lorry transport, Euro 4, Total weight >32 t - EU+EFTA+UK: 11.625; = kg_km_9
- Transport of lubricating oil // lubricants at refinery // cn by Articulated lorry transport, Euro 4, Total weight >32 t - EU+EFTA+UK: 0.000132198; = kg_km_10
- Transport of lubricating oil // lubricants at refinery // eu+efta+uk by Articulated lorry transport, Euro 4, Total weight >32 t - EU+EFTA+UK: 0.000424; = kg_km_11
- Transport of lubricating oil // lubricants at refinery // raf by Articulated lorry transport, Euro 4, Total weight >32 t - EU+EFTA+UK: 3.17729e-5; = kg_km_12
- Transport of lubricating oil // lubricants at refinery // ras w/o cn by Articulated lorry transport, Euro 4, Total weight >32 t - EU+EFTA+UK: 0.00083262; = kg_km_13
- Transport of lubricating oil // lubricants at refinery // rna by Articulated lorry transport, Euro 4, Total weight >32 t - EU+EFTA+UK: 0.000649926; = kg_km_14
- Transport of lubricating oil // lubricants at refinery // rsa by Articulated lorry transport, Euro 4, Total weight >32 t - EU+EFTA+UK: 7.74464e-5; = kg_km_15
- Transport of lubricating oil // lubricants at refinery // ru by Articulated lorry transport, Euro 4, Total weight >32 t - EU+EFTA+UK: 0.000688507; = kg_km_16
- Transport of non-ionic surfactant, ethyleneoxidederivate // non-ionic surfactant, ethyleneoxidederivate production // glo by Articulated lorry transport, Euro 4, Total weight >32 t - EU+EFTA+UK: 5.8125; = kg_km_17
- Transport of silicone, fossil fuel-based // silicone production // glo by Articulated lorry transport, Euro 4, Total weight >32 t - EU+EFTA+UK: 11.625; = kg_km_18
- Transport of tetrafluoroethylene // tetrafluoroethylene production // glo by Articulated lorry transport, Euro 4, Total weight >32 t - EU+EFTA+UK: 11.625; = kg_km_19
- Transport of urea-formaldehyde resin // urea-formaldehyde resin production // eu+efta+uk by Articulated lorry transport, Euro 4, Total weight >32 t - EU+EFTA+UK: 58.125; = kg_km_20
- Transport of wax // wax production // eu+efta+uk by Articulated lorry transport, Euro 4, Total weight >32 t - EU+EFTA+UK: 0.14; = kg_km_21
- Transport of wax // wax production // eu+efta+uk by Transoceanic ship, containers - GLO: 2.51; = kg_km_22
- Transport of acetic acid // acetic acid production, product in 98% solution state // glo by Transoceanic ship, containers - GLO: 6.2775; = kg_km_23
- Transport of alkylbenzene sulfonate // alkylbenzene sulfonate production // glo by Transoceanic ship, containers - GLO: 3.348; = kg_km_24
- Transport of antifoaming agent, ethoxylate fatty alcohols // antifoaming agent, ethoxylate fatty alcohols production // glo by Transoceanic ship, containers - GLO: 1.674; = kg_km_25
- Transport of cationic resin // cationic resin production // eu+efta+uk by Transoceanic ship, containers - GLO: 209.25; = kg_km_26
- Transport of lubricating oil // lubricants at refinery // eu+efta+uk by Transoceanic ship, containers - GLO: 0.00763; = kg_km_27
- Transport of lubricating oil // lubricants at refinery // raf by Transoceanic ship, containers - GLO: 0.000571912; = kg_km_28
- Transport of lubricating oil // lubricants at refinery // ras w/o cn by Transoceanic ship, containers - GLO: 0.0149872; = kg_km_29
- Transport of lubricating oil // lubricants at refinery // rna by Transoceanic ship, containers - GLO: 0.0140782; = kg_km_30
- Transport of lubricating oil // lubricants at refinery // rsa by Transoceanic ship, containers - GLO: 0.00139404; = kg_km_31
- Transport of lubricating oil // lubricants at refinery // ru by Transoceanic ship, containers - GLO: 0.0123931; = kg_km_32
- Transport of non-ionic surfactant, ethyleneoxidederivate // non-ionic surfactant, ethyleneoxidederivate production // glo by Transoceanic ship, containers - GLO: 104.625; = kg_km_33
- Transport of silicone, fossil fuel-based // silicone production // glo by Transoceanic ship, containers - GLO: 209.25; = kg_km_34
- Transport of tetrafluoroethylene // tetrafluoroethylene production // glo by Transoceanic ship, containers - GLO: 209.25; = kg_km_35
- Transport of urea-formaldehyde resin // urea-formaldehyde resin production // eu+efta+uk by Transoceanic ship, containers - GLO: 1046.25; = kg_km_36
- Electricity from Electricity grid mix 1kV-60kV - CN: 0.0461912
- Electricity from Electricity grid mix 1kV-60kV - RAS w/o CN: 0.0506088
- treatment, plasma, water repellent // treatment, plasma, water repellent // glo, blackbox: 1
- treatment, plasma, water repellent // treatment, plasma, water repellent // glo, elementary: 1

## Impact indicators
- Eutrophication marine: 0.000788487
- Ecotoxicity, freshwater: 9.65586
- Land use: 2.35665
- Water use: 0.479746
- Resource use, minerals and metals: 5.27687e-6
- Resource use, fossils: 9.01808
- Climate change: 2.14927
- Ozone depletion: 5.39473e-5
- Human toxicity, cancer: 3.70552e-9
- Human toxicity, non-cancer: 6.67097e-9
- EF-particulate Matter: 9.37811e-8
- Ionising radiation, human health: 0.0187564
- Photochemical ozone formation - human health: 0.00224631
- Acidification: 0.00421786
- Eutrophication, terrestrial: 0.00934831
- Eutrophication, freshwater: 3.93359e-5

## Deviations from the LCI method principle
The background data uses:
- the \xe2\x80\x9cRecycled content cut-off\xe2\x80\x9d approach to allocate end-of-life by-products and secondary materials. This allocation is explained in the description of the recycled content system model (http://www.ecoinvent.org/database/system-models-in-ecoinvent-3/cut-off-system-model/allocation-cut-off-by-classification.html).
OR
- EF compliant data

## Deviations from the LCI method approaches
Background data:
- the \xe2\x80\x9cRecycled content cut-off\xe2\x80\x9d approach to allocate end-of-life by-products and secondary materials. This allocation is explained in the description of the recycled content system model (http://www.ecoinvent.org/database/system-models-in-ecoinvent-3/cut-off-system-model/allocation-cut-off-by-classification.html). The ecoinvent database mostly relies on “Allocation – market values” apart for few exceptions particularly in the energy sector. ecoinvent energy data is replaced with EF3.0 core data as per the EF guidelines version 2.0.
OR
- EF compliant data

## Modelling constants
All modelling constants follow the requirements listed in the Tender Specifications 070201/2020/SER/ENV.B1. Completeness: There are no intentional cut-offs in the inventory no matter how small their contribution to all the EF impact categories is. Eventual cut-offs are in compliance with the Guide for EF compliant data sets (JRC 2020), i.e. only if below the 3% cut-off rule. Water use: water use is modelled at country level using separate flows for water withdrawal, water release and water evaporation. Handling multi-functional processes: the following PEF multi- functionality decision hierarchy is applied for resolving all multi- functionality problems: (1) subdivision or system expansion; (2) allocation based on a relevant underlying physical relationship (substitution may apply here); (3) allocation based on some other relationship. Direct land use change: GHG emissions from direct LUC allocated to good/service for 20 years after the LUC occurs, with IPCC default values. Carbon storage and delayed emissions: credits associated with temporary (carbon) storage or delayed emissions up to 300 years are not be considered. Emissions off-setting: are not included. Capital goods (including infrastructures) and their End of life: they are included. System boundaries: system boundaries include all processes linked to the product supply chain (e.g. maintenance). Time period: emissions and removals are modelled as if released or removed at the beginning of the assessment method. Fossil and biogenic carbon emissions and removals: removals and emissions are modelled as follows: All GHG emissions from fossil fuels (including peat and limestone) are modelled consistently with the most updated ILCD list of elementary flows. The non-fossil (biogenic) carbon flows are modelled consistently with the most updated ILCD list of elementary flows.

## Cut-off and completeness
There are no intentional cut-offs in the inventory no matter how small their contribution to all the EF impact categories is. Eventual cut-offs are in compliance with the Guide for EF compliant data sets (JRC 2020), i.e. only if below the 3% cut-off rule. The dataset dry mass and water balance has been checked to ensure the inventory is complete. Capital goods (e.g. infrastructure) and their end-of-life are included.

## Data selection and combination
These datasets include, in both their foreground and background data, links to EF3.0 compliant data.
The relevant background data on energy, transport, and End of Life are from the LCDN data node (http://lcdn.thinkstep.com/Node/).
All other background data in the supply of this product for which no EF3.0 process was available are from ecoinvent v3.7 database (www.ecoinvent.org) or other data sources.

## Data treatment and extrapolations
Several data sources have been used to model the inventory.

## Review details
Internal reviews have been asked to review the plausibility of the unit process, LCIA scores, and DQRs. Internal reviewers have also been asked to review the data for EF compliancy. The consortium is therefore responsible for aspects such as compliancy with the ILCD format, including validation in Look@LCI, and nomenclature.
Internal reviwers have been asked to judge based on the process name, that the unit process models in a complete and representative way the process in the requested location. The review encompassed the plausability of:
- exchanges with nature (elementary flows) as well as exchanges such as product and waste flows.
- meta information (general comment, technology comment, system boundaries, allocation, cut-off rules, etc.). Reviewers were asked to judge if the provided information is enough to understand the content of the process.
- LCIA scores
- DQRs including precision, technology, time and geography. As well as the overall DQR.
External reviewers have been asked to provide their expertise in the field of interest. External reviewers have been asked to review the unit process, including eventual methodological choices, the LCIA scores (provided with contribution scores as well), and DQRs. External reviewers have been provided all the information in a tool developed by the consortium for the purpose of this project.
External reviewers have been asked to judge based on the process name, that the unit process models in a complete and representative way the process in the requested location. The review encompassed:
- Plausability and completeness of exchanges with nature (elementary flows) as well as exchanges such as product and waste flows.
- Review of meta information (general comment, technology comment, system boundaries, allocation, cut-off rules, etc.). Reviewers were asked to judge if the provided information is enough to understand the content of the process.
- Review of properties (biogenic carbon and water content).
- Review of allocation keys.
- Plausability of LCIA scores calculated by the consortium.
- Plausability of DQRs including precision, technology, time and geography. As well as the overall DQR.

## Data sources
- Background Data for Representative products and organisations. EF 3.0 compliant (data stock)
- UN Data (2018) Statistics Data for Lubricants Productions, http://data.un.org/Data.aspx?q=Lubricants&d=EDATA&f=cmID%3aLU, United Nations Statistics Division, Global
- Lebon (2021) Nonwoven Oven Machine, Catalog and Company Messages, Qingdao Lebon Industry Co., Ltd., China
- Chowdhury, Kawser Parveen (2018) Effect of Special Finishes on the Functional Properties of Cotton Fabrics, Journal of Textile Science and Technology, 4, 49-66, https://file.scirp.org/pdf/JTST_2018050815303131.pdf, Bangladesh
- Deguan (2018) Balloon Padder with Detwister and Squeezer for tubular fabric only, http://www.textilemachinery.com.cn/index.php?m=content&c=index&a=show&catid=59&id=82, Dezhou Deguan TextileMachinery Co.,Ltd., Shandong, China
- Finestart (2017) Open Width Compactor(Dryer, Stenter and Compactor 3in1), http://www.finestart.com.cn/index.php?m=content&c=index&a=show&catid=55&id=62, Shandong Finestart Imp.& Exp. Co.,Ltd., Shandong, China
- Asim Kumar Roy Choudhury (2017) Principles of Textile Finishing
- Industry data (2021)
- Expert interview (2021)
- Madhu, Amit (2012), Low wet pick-up techniques in textile finishing https://www.researchgate.net/publication/291935918_Low_wet_pick-up_techniques_in_textile_finishing
- Henniker plasma (2021), Nebula plasma surface treatment systems https://plasmatreatment.co.uk/products-services/our-models/nebula#specifications Henniker plasma, UK
- Marie Gottfridsson and Yuqing Zhang (2015), Environmental impacts of shoe consumption, Chalmers University of Technology. Gothenburg, Sweden 2015 https://publications.lib.chalmers.se/records/fulltext/218968/218968.pdf
- Mia, M. A. S. (2017). Waste management & quality assessment of footwear manufacturing industry in Bangladesh: An innovative approach. International Journal of Engineering and Management Research (IJEMR), 7(4), 402-407. https://www.researchgate.net/publication/319873669_Waste_Management_Quality_Assessment_of_Footwear_Manufacturing_Industry_in_Bangladesh_An_Innovative_Approach
- Barnhardt purified cotton (2021) Properties of Cotton https://barnhardtcotton.net/technology/cotton-properties/ Barnhardt manufacturing company inc., United States

## Intended applications
Implementation of regular Product Environmental Footprint (PEF) studies and Organisation Environmental Footprint (OEF) studies exclusively under the specified Product groups and sectors as defined in the Product Environmental Footprint Category Rules (PEFCR) and Organisation Environmental Footprint Sectorial Rules (OEFSR) listed in http://ec.europa.eu/environment/eussd/smgp/PEFCR_OEFSR.htm
