# finishing, flame retardant; pad dry-cure method; production mix, at plant; service

Dataset: ILCD process, Partly terminated system
Geography: GLO
Reference year: 2021
Valid until: 2024
Classification: Systems / Textiles, furnitures and other interiors
LCI method principle: Attributional
LCI method approaches: Allocation - market value
Completeness: All relevant flows quantified
Project: Provision of process-based 3.0 Environmental Footprint-compliant life cycle inventory datasets - Apparel 1 - contract number 070201/2020/840291/SER/ENV.B.1
Generated by: Life Cycle Indonesia
Owner: PRé Sustainability B.V.
Compliance: ILCD Data Network - Entry-level; Suggestions for updating the PEF method 2019; ISO 14040 Environmental Management – Life Cycle Assessment – Principles and Framework, 2006; ISO 14044:2006. Environmental Management – Life Cycle Assessment – Requirements and guidelines.; Environmental Footprint 3.1
Review: Dependent internal review by Avraam Symeonidis, Emilia Moreno Ruiz; Independent review panel by Fábio Valebona
Data quality: Overall quality: Good; Time representativeness: Very good; Geographical representativeness: Good; Technological representativeness: Good; Precision: Good; Methodological appropriateness and consistency: Not applicable
Amounts: no units in this file; such an amount is in the reference unit of its flow, which a separate flow dataset defines
copyright: true
licenseType: Free of charge for some user types or use types
accessRestrictions: Free of charge for all final users implementing a regular Product Environmental Footprint (PEF) studies and Organisation Environmental Footprint (OEF) studies exclusively under the specified Product groups and sectors as defined in the Product Environmental Footprint Category Rules (PEFCR) and Organisation Environmental Footprint Sectorial Rules (OEFSR) listed in http://ec.europa.eu/environment/eussd/smgp/PEFCR_OEFSR.htm and in accordance with the terms and conditions of the EULA (available at https://ecoinvent.lca-data.com/) exclusively until 31st December 2024. Any use of this dataset or any derivative data not within the specific context of one of the PEF/OEF projects or after the end of 2024 is not permitted.

## General comment
Notice: this data set supersedes the EF3.0-compliant version (see link under "preceding data set version" below calculated with the EF3.0). The life cycle inventory is not changed from the original EF3.0 data set. The LCIA results are calculated based on the EF3.1 methods which provide updated characterisation factors in the following impact categories: Climate Change, Ecotoxicity freshwater, Photochemical Ozone Formation, Acidification, Human Toxicity non-cancer, and Human Toxicity cancer. The review report and the data quality ratings refer to the original results. The data set has been updated by the European Commission on the basis of the original EF3.0 data set delivered by the data provider.The term ‘flame retardant’ is used to describe fabrics which will not support combus- tion and are self-extinguishing. Flame retardants (FR) are chemicals which are added to combustible materials to render them resistant to fire. They are designed to minimise the risk of fire in case of contact with a small heat source such as cigarette, candle or an electrical fault. If the material is ignited, the flame retardant will slow down combustion and prevent fire from spreading to other items.

Flame retardancy may be conferred on textile fabrics by use of inherently flame resistant fibres, use of chemical aftertreatments or both. Inherently flame retardancy may arise from a chemical structure which is thermally stable in the first instant or transforms to one (e.g., the polyaramids or other aromatic structures), incorporation of flame retardant additives during the production of manmade fibres (e.g., FR viscose) or by the synthesis of conventional fibre-forming polymers, which include flame re- tardant comonomers (e.g., FR polyester). Chemical aftertreatments include surface or topical treatments, coatings and functional finishes which become a part of the final fibre structure.

The flame-retardant chemicals and formulations are also numerous and include halogen, phosphorous, nitrogen, antimony, sulphur, boron and other elements in many forms and combinations. Flame-retardant treatments require application of a relatively large quantity of chemicals, about 10–30% of the weight of material. Hence, the aes- thetic properties (softness, stiffness, lustre, handle, drape, etc.), physical properties (washability, soil repellence and soil release and static charge accumulation), tensile properties, creasing and pilling properties may change.

Choudhury, Asim Kumar Roy. 2017. Principle of textile finishing. United Kingdom: Elsevier. pp 195, 201

## Technology and included processes
Several types of compounds and polymers are used as Flame Retardants (FR) for textile materials, including inorganic acids, acid salts and hydrates, organophosphorous and organo- bromine compounds, antimony salts/halogen systems etc. They may be classified into three categories:
(1) Primary FR based on phosphorous and/or halogen—the phosphorous derivatives act usu- ally in solid or condensed phase, while halogen (chlorine or bromine) is active in gaseous phase.
(2) FR using synergists such as nitrogen and antimony for phosphorous and halogen-based FRs respectively. Synergists themselves are not flame retardants. FRs exhibiting P/N and/ or Sb/X synergism are durable in nature.
(3) Adjunctive or physical FRs includes alumina trihydrate, boron compounds, silicates, and carbonates. Their activity is mainly physical, although recently some evidence of a chem- ical effect has been cited. They are nondurable and used only if durability in laundering is not important.

Phosphorous-based FRs have been in use for more than 150 years; the first patent was granted in 1735. Many such compounds are very effective for a wide range of fabrics and more so for cellulosics. They are easy to use, compatible with many textile chemicals and are favoured from both environmental and toxicological perspectives. Pekoflam DPN is a commercial organic phosphorous compound capable of providing a permanent flame-retardant finish on natural and regenerated cellulosic fibres. It is a pale, colourless liquid (pH 4.5–6.5), slightly cationic in acid medium. It is applied together with a catalyst, pref- erably phosphoric acid. It is recommended that a nitrogen-containing cross-linking agent, such as Arkofix NDS type (very low free formaldehyde on finished goods), should be used simul- taneously because a synergistic flame-retardancy effect is produced that withstands washing at the boil. It can be combined with wetting agents such as Sandozin grades or water and oil repellents such as Nuva grades. The amount of FR depends on the fibre type, fabric weight and construction and the desired flame retardancy. Light and open fabrics require a higher quantity than the one having a heavy and close weave.

In this process the finishing chemical is applied using the pad dry-cure method. The process includes the use of balloon padder, dryer, and stenter for curing. The process includes chemicals, energy, lube oil consumption and infrastructure. There is no direct emission to air since the emission comes from electricity usage, while hazardous waste comes from waste lube oil. In the model, the energy sources of machines used from electricity and steam. The consumption of lubricating oil using a thermobonding oven as a proxy. The GSM of the fabric is assumed to be 285 GSM cotton fabric

Choudhury, Asim Kumar Roy. 2017. Principle of textile finishing. United Kingdom: Elsevier. pp 201, 215, 217

## Parameters
- kg_0: 0.0795349
  Mass in kg, for esterquat; Barge; EU+EFTA+UK
- km_0: 24.7816
  Distance in km, for esterquat; Barge; EU+EFTA+UK
- kg_km_0: 1.971; = kg_0*km_0
  Transport amount in km*km, for esterquat; Barge; EU+EFTA+UK
- kg_1: 0.0795349
  Mass in kg, for esterquat; Articulated lorry transport, Euro 4, Total weight >32 t; EU+EFTA+UK
- km_1: 193.839
  Distance in km, for esterquat; Articulated lorry transport, Euro 4, Total weight >32 t; EU+EFTA+UK
- kg_km_1: 15.417; = kg_1*km_1
  Transport amount in km*km, for esterquat; Articulated lorry transport, Euro 4, Total weight >32 t; EU+EFTA+UK
- kg_2: 0.0795349
  Mass in kg, for esterquat; Freight train, diesel traction; EU+EFTA+UK
- km_2: 19.231
  Distance in km, for esterquat; Freight train, diesel traction; EU+EFTA+UK
- kg_km_2: 1.52953; = kg_2*km_2
  Transport amount in km*km, for esterquat; Freight train, diesel traction; EU+EFTA+UK
- kg_3: 0.0795349
  Mass in kg, for esterquat; Freight train, electricity traction; EU+EFTA+UK
- km_3: 30.3322
  Distance in km, for esterquat; Freight train, electricity traction; EU+EFTA+UK
- kg_km_3: 2.41247; = kg_3*km_3
  Transport amount in km*km, for esterquat; Freight train, electricity traction; EU+EFTA+UK
- kg_4: 1.95765e-7
  Mass in kg, for lubricating oil // lubricants at refinery // cn; Articulated lorry transport, Euro 4, Total weight >32 t; EU+EFTA+UK
- km_4: 1000
  Distance in km, for lubricating oil // lubricants at refinery // cn; Articulated lorry transport, Euro 4, Total weight >32 t; EU+EFTA+UK
- kg_km_4: 0.000195765; = kg_4*km_4
  Transport amount in km*km, for lubricating oil // lubricants at refinery // cn; Articulated lorry transport, Euro 4, Total weight >32 t; EU+EFTA+UK
- kg_5: 6.28045e-7
  Mass in kg, for lubricating oil // lubricants at refinery // eu+efta+uk; Articulated lorry transport, Euro 4, Total weight >32 t; EU+EFTA+UK
- km_5: 1000
  Distance in km, for lubricating oil // lubricants at refinery // eu+efta+uk; Articulated lorry transport, Euro 4, Total weight >32 t; EU+EFTA+UK
- kg_km_5: 0.000628045; = kg_5*km_5
  Transport amount in km*km, for lubricating oil // lubricants at refinery // eu+efta+uk; Articulated lorry transport, Euro 4, Total weight >32 t; EU+EFTA+UK
- kg_6: 4.70508e-8
  Mass in kg, for lubricating oil // lubricants at refinery // raf; Articulated lorry transport, Euro 4, Total weight >32 t; EU+EFTA+UK
- km_6: 1000
  Distance in km, for lubricating oil // lubricants at refinery // raf; Articulated lorry transport, Euro 4, Total weight >32 t; EU+EFTA+UK
- kg_km_6: 4.70508e-5; = kg_6*km_6
  Transport amount in km*km, for lubricating oil // lubricants at refinery // raf; Articulated lorry transport, Euro 4, Total weight >32 t; EU+EFTA+UK
- kg_7: 1.23298e-6
  Mass in kg, for lubricating oil // lubricants at refinery // ras w/o cn; Articulated lorry transport, Euro 4, Total weight >32 t; EU+EFTA+UK
- km_7: 1000
  Distance in km, for lubricating oil // lubricants at refinery // ras w/o cn; Articulated lorry transport, Euro 4, Total weight >32 t; EU+EFTA+UK
- kg_km_7: 0.00123298; = kg_7*km_7
  Transport amount in km*km, for lubricating oil // lubricants at refinery // ras w/o cn; Articulated lorry transport, Euro 4, Total weight >32 t; EU+EFTA+UK
- kg_8: 9.62442e-7
  Mass in kg, for lubricating oil // lubricants at refinery // rna; Articulated lorry transport, Euro 4, Total weight >32 t; EU+EFTA+UK
- km_8: 1000
  Distance in km, for lubricating oil // lubricants at refinery // rna; Articulated lorry transport, Euro 4, Total weight >32 t; EU+EFTA+UK
- kg_km_8: 0.000962442; = kg_8*km_8
  Transport amount in km*km, for lubricating oil // lubricants at refinery // rna; Articulated lorry transport, Euro 4, Total weight >32 t; EU+EFTA+UK
- kg_9: 1.14686e-7
  Mass in kg, for lubricating oil // lubricants at refinery // rsa; Articulated lorry transport, Euro 4, Total weight >32 t; EU+EFTA+UK
- km_9: 1000
  Distance in km, for lubricating oil // lubricants at refinery // rsa; Articulated lorry transport, Euro 4, Total weight >32 t; EU+EFTA+UK
- kg_km_9: 0.000114686; = kg_9*km_9
  Transport amount in km*km, for lubricating oil // lubricants at refinery // rsa; Articulated lorry transport, Euro 4, Total weight >32 t; EU+EFTA+UK
- kg_10: 1.01957e-6
  Mass in kg, for lubricating oil // lubricants at refinery // ru; Articulated lorry transport, Euro 4, Total weight >32 t; EU+EFTA+UK
- km_10: 1000
  Distance in km, for lubricating oil // lubricants at refinery // ru; Articulated lorry transport, Euro 4, Total weight >32 t; EU+EFTA+UK
- kg_km_10: 0.00101957; = kg_10*km_10
  Transport amount in km*km, for lubricating oil // lubricants at refinery // ru; Articulated lorry transport, Euro 4, Total weight >32 t; EU+EFTA+UK
- kg_11: 2.1
  Mass in kg, for organophosphorus-compounds // organophosphorus-compounds // glo; Articulated lorry transport, Euro 4, Total weight >32 t; EU+EFTA+UK
- km_11: 1000
  Distance in km, for organophosphorus-compounds // organophosphorus-compounds // glo; Articulated lorry transport, Euro 4, Total weight >32 t; EU+EFTA+UK
- kg_km_11: 2100; = kg_11*km_11
  Transport amount in km*km, for organophosphorus-compounds // organophosphorus-compounds // glo; Articulated lorry transport, Euro 4, Total weight >32 t; EU+EFTA+UK
- kg_12: 0.135
  Mass in kg, for phosphoric acid // phosphoric acid production // glo; Articulated lorry transport, Euro 4, Total weight >32 t; EU+EFTA+UK
- km_12: 1000
  Distance in km, for phosphoric acid // phosphoric acid production // glo; Articulated lorry transport, Euro 4, Total weight >32 t; EU+EFTA+UK
- kg_km_12: 135; = kg_12*km_12
  Transport amount in km*km, for phosphoric acid // phosphoric acid production // glo; Articulated lorry transport, Euro 4, Total weight >32 t; EU+EFTA+UK
- kg_13: 0.018
  Mass in kg, for soap // soap production // glo; Articulated lorry transport, Euro 4, Total weight >32 t; EU+EFTA+UK
- km_13: 1000
  Distance in km, for soap // soap production // glo; Articulated lorry transport, Euro 4, Total weight >32 t; EU+EFTA+UK
- kg_km_13: 18; = kg_13*km_13
  Transport amount in km*km, for soap // soap production // glo; Articulated lorry transport, Euro 4, Total weight >32 t; EU+EFTA+UK
- kg_14: 0.36
  Mass in kg, for urea-formaldehyde resin // urea-formaldehyde resin production // eu+efta+uk; Articulated lorry transport, Euro 4, Total weight >32 t; EU+EFTA+UK
- km_14: 1000
  Distance in km, for urea-formaldehyde resin // urea-formaldehyde resin production // eu+efta+uk; Articulated lorry transport, Euro 4, Total weight >32 t; EU+EFTA+UK
- kg_km_14: 360; = kg_14*km_14
  Transport amount in km*km, for urea-formaldehyde resin // urea-formaldehyde resin production // eu+efta+uk; Articulated lorry transport, Euro 4, Total weight >32 t; EU+EFTA+UK
- kg_15: 1.95765e-7
  Mass in kg, for lubricating oil // lubricants at refinery // cn; Transoceanic ship, containers; GLO
- km_15: 18000
  Distance in km, for lubricating oil // lubricants at refinery // cn; Transoceanic ship, containers; GLO
- kg_km_15: 0.00352377; = kg_15*km_15
  Transport amount in km*km, for lubricating oil // lubricants at refinery // cn; Transoceanic ship, containers; GLO
- kg_16: 6.28045e-7
  Mass in kg, for lubricating oil // lubricants at refinery // eu+efta+uk; Transoceanic ship, containers; GLO
- km_16: 18000
  Distance in km, for lubricating oil // lubricants at refinery // eu+efta+uk; Transoceanic ship, containers; GLO
- kg_km_16: 0.0113048; = kg_16*km_16
  Transport amount in km*km, for lubricating oil // lubricants at refinery // eu+efta+uk; Transoceanic ship, containers; GLO
- kg_17: 4.70508e-8
  Mass in kg, for lubricating oil // lubricants at refinery // raf; Transoceanic ship, containers; GLO
- km_17: 18000
  Distance in km, for lubricating oil // lubricants at refinery // raf; Transoceanic ship, containers; GLO
- kg_km_17: 0.000846915; = kg_17*km_17
  Transport amount in km*km, for lubricating oil // lubricants at refinery // raf; Transoceanic ship, containers; GLO
- kg_18: 1.23298e-6
  Mass in kg, for lubricating oil // lubricants at refinery // ras w/o cn; Transoceanic ship, containers; GLO
- km_18: 18000
  Distance in km, for lubricating oil // lubricants at refinery // ras w/o cn; Transoceanic ship, containers; GLO
- kg_km_18: 0.0221937; = kg_18*km_18
  Transport amount in km*km, for lubricating oil // lubricants at refinery // ras w/o cn; Transoceanic ship, containers; GLO
- kg_19: 9.62442e-7
  Mass in kg, for lubricating oil // lubricants at refinery // rna; Transoceanic ship, containers; GLO
- km_19: 18000
  Distance in km, for lubricating oil // lubricants at refinery // rna; Transoceanic ship, containers; GLO
- kg_km_19: 0.0173239; = kg_19*km_19
  Transport amount in km*km, for lubricating oil // lubricants at refinery // rna; Transoceanic ship, containers; GLO
- kg_20: 1.14686e-7
  Mass in kg, for lubricating oil // lubricants at refinery // rsa; Transoceanic ship, containers; GLO
- km_20: 18000
  Distance in km, for lubricating oil // lubricants at refinery // rsa; Transoceanic ship, containers; GLO
- kg_km_20: 0.00206436; = kg_20*km_20
  Transport amount in km*km, for lubricating oil // lubricants at refinery // rsa; Transoceanic ship, containers; GLO
- kg_21: 1.01957e-6
  Mass in kg, for lubricating oil // lubricants at refinery // ru; Transoceanic ship, containers; GLO
- km_21: 18000
  Distance in km, for lubricating oil // lubricants at refinery // ru; Transoceanic ship, containers; GLO
- kg_km_21: 0.0183523; = kg_21*km_21
  Transport amount in km*km, for lubricating oil // lubricants at refinery // ru; Transoceanic ship, containers; GLO
- kg_22: 2.1
  Mass in kg, for organophosphorus-compounds // organophosphorus-compounds // glo; Transoceanic ship, containers; GLO
- km_22: 18000
  Distance in km, for organophosphorus-compounds // organophosphorus-compounds // glo; Transoceanic ship, containers; GLO
- kg_km_22: 37800; = kg_22*km_22
  Transport amount in km*km, for organophosphorus-compounds // organophosphorus-compounds // glo; Transoceanic ship, containers; GLO
- kg_23: 0.135
  Mass in kg, for phosphoric acid // phosphoric acid production // glo; Transoceanic ship, containers; GLO
- km_23: 18000
  Distance in km, for phosphoric acid // phosphoric acid production // glo; Transoceanic ship, containers; GLO
- kg_km_23: 2430; = kg_23*km_23
  Transport amount in km*km, for phosphoric acid // phosphoric acid production // glo; Transoceanic ship, containers; GLO
- kg_24: 0.018
  Mass in kg, for soap // soap production // glo; Transoceanic ship, containers; GLO
- km_24: 18000
  Distance in km, for soap // soap production // glo; Transoceanic ship, containers; GLO
- kg_km_24: 324; = kg_24*km_24
  Transport amount in km*km, for soap // soap production // glo; Transoceanic ship, containers; GLO
- kg_25: 0.36
  Mass in kg, for urea-formaldehyde resin // urea-formaldehyde resin production // eu+efta+uk; Transoceanic ship, containers; GLO
- km_25: 18000
  Distance in km, for urea-formaldehyde resin // urea-formaldehyde resin production // eu+efta+uk; Transoceanic ship, containers; GLO
- kg_km_25: 6480; = kg_25*km_25
  Transport amount in km*km, for urea-formaldehyde resin // urea-formaldehyde resin production // eu+efta+uk; Transoceanic ship, containers; GLO

## Reference product
- finishing, flame retardant // finishing, flame retardant // glo: 1

## Inputs
- Electricity from Electricity grid mix 1kV-60kV - AU: 0.0032
- Electricity from Electricity grid mix 1kV-60kV - EU+EFTA+UK: 0.0468
- Electricity from Electricity grid mix 1kV-60kV - NZ: 0.0006
- Electricity from Electricity grid mix 1kV-60kV - RAF: 0.0103
- Electricity from Electricity grid mix 1kV-60kV - RNA: 0.0693
- Electricity from Electricity grid mix 1kV-60kV - RSA: 0.0232
- Electricity from Electricity grid mix 1kV-60kV - RU: 0.0136
- Transport of esterquat by Barge - EU+EFTA+UK: 1.971; = kg_km_0
- Transport of esterquat by Articulated lorry transport, Euro 4, Total weight >32 t - EU+EFTA+UK: 15.417; = kg_km_1
- Transport of esterquat by Freight train, diesel traction - EU+EFTA+UK: 1.52953; = kg_km_2
- Transport of esterquat by Freight train, electricity traction - EU+EFTA+UK: 2.41247; = kg_km_3
- Transport of lubricating oil // lubricants at refinery // cn by Articulated lorry transport, Euro 4, Total weight >32 t - EU+EFTA+UK: 0.000195765; = kg_km_4
- Transport of lubricating oil // lubricants at refinery // eu+efta+uk by Articulated lorry transport, Euro 4, Total weight >32 t - EU+EFTA+UK: 0.000628045; = kg_km_5
- Transport of lubricating oil // lubricants at refinery // raf by Articulated lorry transport, Euro 4, Total weight >32 t - EU+EFTA+UK: 4.70508e-5; = kg_km_6
- Transport of lubricating oil // lubricants at refinery // ras w/o cn by Articulated lorry transport, Euro 4, Total weight >32 t - EU+EFTA+UK: 0.00123298; = kg_km_7
- Transport of lubricating oil // lubricants at refinery // rna by Articulated lorry transport, Euro 4, Total weight >32 t - EU+EFTA+UK: 0.000962442; = kg_km_8
- Transport of lubricating oil // lubricants at refinery // rsa by Articulated lorry transport, Euro 4, Total weight >32 t - EU+EFTA+UK: 0.000114686; = kg_km_9
- Transport of lubricating oil // lubricants at refinery // ru by Articulated lorry transport, Euro 4, Total weight >32 t - EU+EFTA+UK: 0.00101957; = kg_km_10
- Transport of organophosphorus-compounds // organophosphorus-compounds // glo by Articulated lorry transport, Euro 4, Total weight >32 t - EU+EFTA+UK: 2100; = kg_km_11
- Transport of phosphoric acid // phosphoric acid production // glo by Articulated lorry transport, Euro 4, Total weight >32 t - EU+EFTA+UK: 135; = kg_km_12
- Transport of soap // soap production // glo by Articulated lorry transport, Euro 4, Total weight >32 t - EU+EFTA+UK: 18; = kg_km_13
- Transport of urea-formaldehyde resin // urea-formaldehyde resin production // eu+efta+uk by Articulated lorry transport, Euro 4, Total weight >32 t - EU+EFTA+UK: 360; = kg_km_14
- Transport of lubricating oil // lubricants at refinery // cn by Transoceanic ship, containers - GLO: 0.00352377; = kg_km_15
- Transport of lubricating oil // lubricants at refinery // eu+efta+uk by Transoceanic ship, containers - GLO: 0.0113048; = kg_km_16
- Transport of lubricating oil // lubricants at refinery // raf by Transoceanic ship, containers - GLO: 0.000846915; = kg_km_17
- Transport of lubricating oil // lubricants at refinery // ras w/o cn by Transoceanic ship, containers - GLO: 0.0221937; = kg_km_18
- Transport of lubricating oil // lubricants at refinery // rna by Transoceanic ship, containers - GLO: 0.0173239; = kg_km_19
- Transport of lubricating oil // lubricants at refinery // rsa by Transoceanic ship, containers - GLO: 0.00206436; = kg_km_20
- Transport of lubricating oil // lubricants at refinery // ru by Transoceanic ship, containers - GLO: 0.0183523; = kg_km_21
- Transport of organophosphorus-compounds // organophosphorus-compounds // glo by Transoceanic ship, containers - GLO: 37800; = kg_km_22
- Transport of phosphoric acid // phosphoric acid production // glo by Transoceanic ship, containers - GLO: 2430; = kg_km_23
- Transport of soap // soap production // glo by Transoceanic ship, containers - GLO: 324; = kg_km_24
- Transport of urea-formaldehyde resin // urea-formaldehyde resin production // eu+efta+uk by Transoceanic ship, containers - GLO: 6480; = kg_km_25
- Electricity from Electricity grid mix 1kV-60kV - CN: 0.0700503
- Electricity from Electricity grid mix 1kV-60kV - RAS w/o CN: 0.0767497
- finishing, flame retardant // finishing, flame retardant // glo, blackbox: 1
- finishing, flame retardant // finishing, flame retardant // glo, elementary: 1

## Impact indicators
- Eutrophication marine: 0.0345646
- Ecotoxicity, freshwater: 751.564
- Land use: 223.153
- Water use: 16.2185
- Resource use, minerals and metals: 0.000271218
- Resource use, fossils: 319.908
- Climate change: 21.7157
- Ozone depletion: 2.06858e-6
- Human toxicity, cancer: 3.77594e-8
- Human toxicity, non-cancer: 1.97209e-7
- EF-particulate Matter: 3.89169e-6
- Ionising radiation, human health: 1.33181
- Photochemical ozone formation - human health: 0.0863869
- Acidification: 0.149402
- Eutrophication, terrestrial: 0.3325
- Eutrophication, freshwater: 0.022157

## Deviations from the LCI method principle
The background data uses:
- the \xe2\x80\x9cRecycled content cut-off\xe2\x80\x9d approach to allocate end-of-life by-products and secondary materials. This allocation is explained in the description of the recycled content system model (http://www.ecoinvent.org/database/system-models-in-ecoinvent-3/cut-off-system-model/allocation-cut-off-by-classification.html).
OR
- EF compliant data

## Deviations from the LCI method approaches
Background data:
- the \xe2\x80\x9cRecycled content cut-off\xe2\x80\x9d approach to allocate end-of-life by-products and secondary materials. This allocation is explained in the description of the recycled content system model (http://www.ecoinvent.org/database/system-models-in-ecoinvent-3/cut-off-system-model/allocation-cut-off-by-classification.html). The ecoinvent database mostly relies on “Allocation – market values” apart for few exceptions particularly in the energy sector. ecoinvent energy data is replaced with EF3.0 core data as per the EF guidelines version 2.0.
OR
- EF compliant data

## Modelling constants
All modelling constants follow the requirements listed in the Tender Specifications 070201/2020/SER/ENV.B1. Completeness: There are no intentional cut-offs in the inventory no matter how small their contribution to all the EF impact categories is. Eventual cut-offs are in compliance with the Guide for EF compliant data sets (JRC 2020), i.e. only if below the 3% cut-off rule. Water use: water use is modelled at country level using separate flows for water withdrawal, water release and water evaporation. Handling multi-functional processes: the following PEF multi- functionality decision hierarchy is applied for resolving all multi- functionality problems: (1) subdivision or system expansion; (2) allocation based on a relevant underlying physical relationship (substitution may apply here); (3) allocation based on some other relationship. Direct land use change: GHG emissions from direct LUC allocated to good/service for 20 years after the LUC occurs, with IPCC default values. Carbon storage and delayed emissions: credits associated with temporary (carbon) storage or delayed emissions up to 300 years are not be considered. Emissions off-setting: are not included. Capital goods (including infrastructures) and their End of life: they are included. System boundaries: system boundaries include all processes linked to the product supply chain (e.g. maintenance). Time period: emissions and removals are modelled as if released or removed at the beginning of the assessment method. Fossil and biogenic carbon emissions and removals: removals and emissions are modelled as follows: All GHG emissions from fossil fuels (including peat and limestone) are modelled consistently with the most updated ILCD list of elementary flows. The non-fossil (biogenic) carbon flows are modelled consistently with the most updated ILCD list of elementary flows.

## Cut-off and completeness
There are no intentional cut-offs in the inventory no matter how small their contribution to all the EF impact categories is. Eventual cut-offs are in compliance with the Guide for EF compliant data sets (JRC 2020), i.e. only if below the 3% cut-off rule. The dataset dry mass and water balance has been checked to ensure the inventory is complete. Capital goods (e.g. infrastructure) and their end-of-life are included.

## Data selection and combination
These datasets include, in both their foreground and background data, links to EF3.0 compliant data.
The relevant background data on energy, transport, and End of Life are from the LCDN data node (http://lcdn.thinkstep.com/Node/).
All other background data in the supply of this product for which no EF3.0 process was available are from ecoinvent v3.7 database (www.ecoinvent.org) or other data sources.

## Data treatment and extrapolations
Several data sources have been used to model the inventory.

## Review details
Internal reviews have been asked to review the plausibility of the unit process, LCIA scores, and DQRs. Internal reviewers have also been asked to review the data for EF compliancy. The consortium is therefore responsible for aspects such as compliancy with the ILCD format, including validation in Look@LCI, and nomenclature.
Internal reviwers have been asked to judge based on the process name, that the unit process models in a complete and representative way the process in the requested location. The review encompassed the plausability of:
- exchanges with nature (elementary flows) as well as exchanges such as product and waste flows.
- meta information (general comment, technology comment, system boundaries, allocation, cut-off rules, etc.). Reviewers were asked to judge if the provided information is enough to understand the content of the process.
- LCIA scores
- DQRs including precision, technology, time and geography. As well as the overall DQR.
External reviewers have been asked to provide their expertise in the field of interest. External reviewers have been asked to review the unit process, including eventual methodological choices, the LCIA scores (provided with contribution scores as well), and DQRs. External reviewers have been provided all the information in a tool developed by the consortium for the purpose of this project.
External reviewers have been asked to judge based on the process name, that the unit process models in a complete and representative way the process in the requested location. The review encompassed:
- Plausability and completeness of exchanges with nature (elementary flows) as well as exchanges such as product and waste flows.
- Review of meta information (general comment, technology comment, system boundaries, allocation, cut-off rules, etc.). Reviewers were asked to judge if the provided information is enough to understand the content of the process.
- Review of properties (biogenic carbon and water content).
- Review of allocation keys.
- Plausability of LCIA scores calculated by the consortium.
- Plausability of DQRs including precision, technology, time and geography. As well as the overall DQR.

## Data sources
- Background Data for Representative products and organisations. EF 3.0 compliant (data stock)
- UN Data (2018) Statistics Data for Lubricants Productions, http://data.un.org/Data.aspx?q=Lubricants&d=EDATA&f=cmID%3aLU, United Nations Statistics Division, Global
- Lebon (2021) Nonwoven Oven Machine, Catalog and Company Messages, Qingdao Lebon Industry Co., Ltd., China
- Tianyu Textile (2021), https://www.tygarment.com/flame-retardant-fabric/, Flame Retardant Cotton Fabric, TIANYU Protective Textiles, China
- Deguan (2018) Balloon Padder with Detwister and Squeezer for tubular fabric only, http://www.textilemachinery.com.cn/index.php?m=content&c=index&a=show&catid=59&id=82, Dezhou Deguan TextileMachinery Co.,Ltd., Shandong, China
- Finestart (2017) Open Width Compactor(Dryer, Stenter and Compactor 3in1), http://www.finestart.com.cn/index.php?m=content&c=index&a=show&catid=55&id=62, Shandong Finestart Imp.& Exp. Co.,Ltd., Shandong, China
- Choudhury, Asim Kumar Roy. 2017. Principle of textile finishing. United Kingdom: Elsevier, pp 217
- Abhijit Majumdar(2020) Functional Textiles and Clothing, pp 138
- Madhu, Amit (2012), Low wet pick-up techniques in textile finishing https://www.researchgate.net/publication/291935918_Low_wet_pick-up_techniques_in_textile_finishing
- Expert interview (2021)

## Intended applications
Implementation of regular Product Environmental Footprint (PEF) studies and Organisation Environmental Footprint (OEF) studies exclusively under the specified Product groups and sectors as defined in the Product Environmental Footprint Category Rules (PEFCR) and Organisation Environmental Footprint Sectorial Rules (OEFSR) listed in http://ec.europa.eu/environment/eussd/smgp/PEFCR_OEFSR.htm
